Simulations: Version=184
  DataStore
  Memo Stock Model Examples
    #Stock Model Example Simulations

    Contributors:

    * Neville Herrman (CSIRO)
    * Dean Holzworth (CSIRO)
    * Di Mayberry (CSIRO)
    * Mark Liefferring (AgResearch
    * Val Snow (AgResearch)

    Funding Acknowledgements:

    * CSIRO ???? fund
    * AgResearch Strategic Science Investment Fund
    * APSIM Initiative Development Fund

    This simulation file contains examples of how to use Stock is a variety of settings. Each simulation has a variety of Managers that are explained in this PDF and/or as in-text comments in the Manager scripts. The intention is that they can form starting points for new simulations and as such may not make much practical sense.
    Included are:

    *  Agistment grazing of a forage crop with supplements offered
    *  A simple rotation of stock around five paddocks
    *  Feedlot sheep tactically grazing a wheat crop
  Folder Agistment Grazing Example
    Memo Agistment Grazing Described
      “Agistment Grazing” refers to a practise of bringing stock onto and then off a paddock based on a set of criteria. The location and management of the stock when not on the paddock are ignored. Practical examples of this might be grazing dairy heifers on a dry stock farm, or periodic grazing of an experiment trial using sheep from a nearby farm.

      Because we are not concerned with the disposition of the stock while not grazing the forage crop, this a single-paddock simulation. The paddock contains a forage crop, in this example we use plantain, that is irrigated and fertilised. The forage is sown in spring of the first year and is rejuvenated thereafter at the frequency set on the sowing rule in the paddock. In this simulation a new mob of animals are bought every time the forage is ready to be grazed and sold after each grazing event (note that here bought and sold only refer to acquiring and  disposing of animals not the financial transactions of such actions). The user sets the characteristics of the stock, the grazing rules and if/how any supplementary feeding is done.

      This example includes:

      * setting several commonly-needed stock characteristics
      * buying stock
      * finding out the current location of the stock
      * changing the location of the stock
      * feeding supplements based on a range of criteria
      * selling stock
    Simulation Agistment Grazing
      Clock: Start=2010-09-01; End=2012-08-31
      Weather: FileName=%root%/Examples/WeatherFiles/NZ_Lincoln.met; Latitude=-43.624; Tav=11.4; Amp=11.5
      Summary
      SoilArbitrator Soil Arbitrator
      MicroClimate: a_interception=0; b_interception=1; c_interception=0; d_interception=0; SoilHeatFluxFraction=0.4; MinimumHeightDiffForNewLayer=0; NightInterceptionFraction=0.5; ReferenceHeight=2
      Supplement: SpoilageTime=0
        Stores:
          Name    Stored  IsRoughage  DMContent  DMD   MEContent  CPConc  ProtDg  PConc   SConc   EEConc  ADIP2CP  AshAlk  MaxPassage
          fodder  0       true        0.85       0     0          0       0       0       0       0       0        0       0
          silage  0       true        1          0.75  12         0.18    0.8     0.0032  0.0024  0.02    0.06     0.6     0
      Memo SupplementMemo
        **Supplement store**

        The script GrazeForageCrop allows for optional supplementary feeding. In order to support that feeding it is necessary to include the Supplement model in the simulation. All the buying and feeding out is handled in GrazeForageCrop but here we name the supplement (“silage”) and give it some properties including the quality parameters of the supplement.

        In the quality parameters, note that we set the dry matter percentage to 100. This is does not affect the feeding quality of the supplement but means that all buy, sell, feed, etc. commands are given on a dry matter rather than wet matter basis. Once these quality parameters are set against a named supplement they are retained and all that is needed is to buy, sell or feed the named supplement.
      Stock: RandSeed=9999
      Forages
        Parameters:
          Name                          LiveDigestibility  DeadDigestibility  LiveFractionConsumable  DeadFractionConsumable  LiveMinimumBiomass  DeadMinimumBiomass
          SurfaceOrganicMatter.Residue  0.7                0.3                1                       1                       100                 0
          PlantainForage.Leaf           0.7                0.3                1                       1                       100                 0
          PlantainForage.Stem           0.7                0.3                1                       1                       100                 0
          PlantainForage.Inflorescence  0.7                0.3                1                       1                       100                 0
          PlantainForage.Taproot        0.7                0.3                1                       1                       100                 0
          PlantainForage.Root           0.7                0.3                1                       1                       100                 0
      Memo Stock Memo
        **Stock**

        All the paramters for Stock are set in GrazeForageCrop.
      Manager GrazeForageCrop
        Genotype = Friesian
        Sex = Female
        Age = 12
        Weight = 180
        Pregnant = 0
        Lactating = 0
        YoungNumber = 0
        YoungWt = 0
        StockingRate = 50
        CurrentLocation = Away
        PreGrazingDM = 2000
        MinGrazingDays = 7
        PostGrazingDM = 1500
        DoNoGrazingWindow = False
        NoGrazeStart = 1-Jun
        NoGrazeEnd = 31-Jul
        SupplementName = silage
        SupplementFirst = False
        SupplementEveryDay = 2
        SupplementOnPastureMass = 2
        TriggerPastureMass = 2500
```csharp
using Models.PMF.Interfaces;
using System.Diagnostics;
using Models.AgPasture;
using System.Linq;
using System.Collections.Generic;
using System.Collections;
using Models.Soils;
using Models.PMF;
using System.Xml.Serialization;
using APSIM.Shared.Utilities;
using Models.GrazPlan;
using Models.Utilities;
using Models.Core;
using Models;
using System;

namespace Models
{

    [Serializable]
    public class Script : Model
    {
        [Link] Clock clock;
        [Link] Stock stock;
        [Link] Supplement supplement;
        [Link] List<Zone> paddocks;
        [Link] ISummary summary;
        [Link] Simulation farm;
        [Link] List<IOrganDamage> forages = null;

        private int CurrentGroupNum = 1;    // animal group number
        private int CurrentLocationNum { get; set; }
        private string CurrentZone;

        [Separator("Stock type info, the same type of stock are brought onto the paddock at each grazing")]

        [Description("Stock: genotype (e.g. Small Merino, Angus, Friesian):")] 
        [Display(Values="GetGenotypes")]
        public string Genotype { get; set; }

        [Description("Stock: sex (Female, Male, Castrate):")] 
        public ReproductiveType Sex { get; set; }

        [Description("Stock: age (months):")] 
        public double Age { get; set; }

        [Description("Stock: weight (kg liveweight /head):")] 
        public double Weight { get; set; }

        [Description("Stock: fertility status (0 if non-pregnant or days since conception):")] 
        public int Pregnant { get; set; }

        [Description("Stock: lactation status (0 if non-lactating or days since parturition):")]
        public int Lactating { get; set; }

        [Description("Stock: number of unweaned young:")]
        public int YoungNumber { get; set; }

        [Description("Stock: weight of unweaned young:")] 
        public double YoungWt { get; set; }

        [Separator("Grazing event information")]

        [Description("Paddock stocking rate (head/ha): ")] 
        public double StockingRate { get; set; }

        [Description("Initial location of the stock (give either the paddock name or 'Away'): ")] 
        public string CurrentLocation { get; set; }

        [Description("Standing biomass at which to bring the stock into the simulation (kg DM/ha): ")] 
        public double PreGrazingDM { get; set; }

        [Description("Require > X days of grazable forage before moving stock: ")] 
        [Tooltip("To prevent stock being moved too often, require that there be a minimum number of grazing-days of forage available before moving the stock on. The forage needed is very simply set as 3% of the stock liveweight")] 
        public int MinGrazingDays { get; set; }

        [Description("Standing biomass at which to exit  stock from the simulation (kg DM/ha): ")] 
        public double PostGrazingDM { get; set; }

        [Description("Implement a no-grazing window? (tick for yes): ")] 
        public bool DoNoGrazingWindow { get; set; }

        [Description("Start of the no-grazing window (dd-MMM)")] 
        public string NoGrazeStart { get; set; }

        [Description("End of the no-grazing window (dd-MMM)")] 
        public string NoGrazeEnd { get; set; }

        [Separator("Supplementary feeding")]

        [Description("Name of the supplement to feed: ")] 
        public string SupplementName { get; set; }

        [Description("Feed the supplement first (i.e. before the new forage is available to the stock)?: ")] 
        public bool SupplementFirst { get; set; }

        [Description("Amount of supplementary feeding offered every day (kg DM /head /day): ")] 
        public double SupplementEveryDay { get; set; }

        [Description("Additional amount of supplement offered when available biomass is low (kg DM /head /day): ")] 
        public double SupplementOnPastureMass { get; set; }

        [Description("Trigger biomass for above rule (kg DM /ha): ")] 
        public double TriggerPastureMass { get; set; }

        public int NumStock { get; set; }
        public bool GrazingSeasonIsOpen { get; set; } // number of stock on the whole farm
        public double HarvestableBiomass { get; set; }
        public double HarvestableBiomassYesterday { get; set; }

        // Return a list of genotypes to the properties tab.
        public string[] GetGenotypes()
        {
            if (stock != null)
                return stock.Genotypes.Names.ToArray();
            return null;
        }

        [EventSubscribe("StartOfSimulation")]
        private void OnStartOfSimulation(object sender, EventArgs e)
        {
            CurrentZone = CurrentLocation;

            //Debugger.Break();

            summary.WriteMessage(this, "Initialising the paddock information", MessageType.Diagnostic);

            NumStock = (int)(Math.Round(StockingRate * farm.Area, 0));

            if (CurrentZone.ToLower() != "away")
            {
                BuyStock();
                stock.Move(CurrentZone);
                summary.WriteMessage(this, " The Stock have been moved to " + CurrentZone, MessageType.Diagnostic);
            }

            summary.WriteMessage(this, "     The number of animals has been rounded to " + NumStock + " from " + (StockingRate * farm.Area), MessageType.Diagnostic);
            summary.WriteMessage(this, "     The animals will begin in " + CurrentZone + " which is paddock number " + CurrentLocationNum + " in the simulation", MessageType.Diagnostic);
            summary.WriteMessage(this, "     The area of the whole farm is " + farm.Area + " ha", MessageType.Diagnostic);

        }

        [EventSubscribe("DoManagement")]
        private void OnDoManagement(object sender, EventArgs e)
        {
            GrazingSeasonIsOpen = true;
            if (DoNoGrazingWindow)
                GrazingSeasonIsOpen = !DateUtilities.WithinDates(NoGrazeStart, clock.Today, NoGrazeEnd);

            bool sellSomeStock = false;
            if (!GrazingSeasonIsOpen)
                sellSomeStock = true;

            // Calculate forage mass in the paddock
            HarvestableBiomass = forages.Where(forage => forage.IsAboveGround)
            						    .Sum(forage => forage.Live.Wt + forage.Dead.Wt);
            
            HarvestableBiomass *= 10;  // Convert to kg/ha

            if (clock.Today == clock.StartDate)
                HarvestableBiomassYesterday = HarvestableBiomass;

            double deltaHarvestableBiomass = Math.Max(0.0, HarvestableBiomass - HarvestableBiomassYesterday);

            if (HarvestableBiomass <= PostGrazingDM)
                sellSomeStock = true;

            if (CurrentZone == "Away")
                sellSomeStock = false;

            // The 0.03 is the propostion of body mass that the stock might eat
            double minFodder = Math.Max(PreGrazingDM, Math.Max(0.0, (0.03 * MinGrazingDays * NumStock * Weight) - (deltaHarvestableBiomass * MinGrazingDays))); 
            HarvestableBiomassYesterday = HarvestableBiomass;

            if (CurrentZone == "Away" && (HarvestableBiomass >= PreGrazingDM) && HarvestableBiomass >= (PostGrazingDM + minFodder) && GrazingSeasonIsOpen)
            {
                CurrentZone = paddocks[0].Name;
                CurrentLocationNum = paddocks[0].Index;
                BuyStock();
                stock.Move(CurrentZone);
                summary.WriteMessage(this, "     Buying stock ", MessageType.Diagnostic);
            }

            if (sellSomeStock)
            {
                CurrentZone = "Away";
                CurrentLocationNum = -1;
                SellStock();
                summary.WriteMessage(this, "     Selling stock ", MessageType.Diagnostic);
            }

            if (CurrentZone != "Away")
            {
                if (SupplementEveryDay > 0)
                {
                    double silageOnHand = supplement.Stores[2 - 1].Stored;
                    if (silageOnHand < SupplementEveryDay * stock.NumberAll)
                    {
                        supplement.Buy(SupplementEveryDay * 30.0 * stock.NumberAll, SupplementName);  // i.e. 1 months worth
                        summary.WriteMessage(this, "SupplementEveryDay: Buying " + SupplementName + " of total amount : " + (SupplementEveryDay * 90 * stock.NumberAll) + " kg DM", MessageType.Diagnostic);
                    }
                    supplement.Feed(SupplementName, SupplementEveryDay * stock.NumberAll, CurrentZone, SupplementFirst);
                }

                if (SupplementOnPastureMass > 0 && HarvestableBiomass <= TriggerPastureMass)
                {
                    double silageOnHand = supplement.Stores[2 - 1].Stored;
                    if (silageOnHand < SupplementOnPastureMass * stock.NumberAll)
                    {
                        supplement.Buy(SupplementOnPastureMass * 30.0 * stock.NumberAll, SupplementName);  // i.e. 1 months worth
                        summary.WriteMessage(this, "SupplementOnBiomass: Buying " + SupplementName + " of total amount : " + (SupplementOnPastureMass * 90 * stock.NumberAll) + " kg DM", MessageType.Diagnostic);
                    }
                    supplement.Feed(SupplementName, SupplementOnPastureMass * stock.NumberAll, CurrentZone, SupplementFirst);
                }
            }
        }


        public void BuyStock()
        {
            CurrentGroupNum = stock.NoGroups + 1;
            StockBuy purchase = new StockBuy();
            purchase.Genotype = Genotype;
            purchase.Number = NumStock;
            purchase.Sex = Sex;
            purchase.Age = Age;       // age in months
            purchase.Weight = Weight;  // live weight in kg
            purchase.UseTag = CurrentGroupNum + 1;
            purchase.MatedTo = purchase.Genotype;
            purchase.Pregnant = Pregnant;  // days pregnant, 0 = non pregnant, 1 = pregnant
            purchase.Lactating = Lactating;  // 0 for dry, 1 for lactating
            purchase.NumYoung = YoungNumber;
            purchase.YoungWt = YoungWt;

            stock.Buy(purchase);
        }

        public void SellStock()
        {
            int NumGroups = stock.NoGroups;

            NumGroups = stock.NoGroups;
            for (int gg = 1; gg <= NumGroups; gg++)
            {
                stock.Sell(stock.Number[gg - 1]);
            }
        }
    }
}
```
      Memo GrazeForageCrop Memo
        **GrazeForageCrop**

        This is a Manager script that undertakes several duties.

        The first stack of parameters in GrazeForageCrop sets the type of animals that will be bought and then managed during the simulation. The available options are accessible using a combination of dropdown boxes and data entry fields.

        The middle stack of parameters sets:

        * The paddock stocking rate – the number of head bought is this times the area of the paddock (click on “Field” to set this away from its default of 1 ha).
        * At the start of the simulation the stock can be on the simulated paddock (enter the name of the paddock) absent from the simulation (enter “Away”). If the paddock name is given the stock will be bought at the beginning of the first day and drafted to the paddock.
        * The third parameter sets the forage crop biomass that triggers the buying of stock and drafting them onto the paddock. If there are multiple forage species in the paddock the biomass will be the sum of all.
        * When forage crop growth rates closely match animal demand, the simulation can oscillate with stock bought just above the grazing trigger and then during that day they graze below the exit value and are sold with the pattern repeating a few days later. To prevent this it is desirable to set a minimum gazing duration. Here this is done very simply by assuming a maximum intake of 3% of liveweight per day.
        * The fifth parameter is the biomass at which t terminate the grazing event and sell the stock.
        * The last three parameters allow the user to set a no-grazing window of time that overrides the parameters above. To enable this set a tick in the box and enter the date range as dd-mmm. The same window is used each year. Windows can cross year boundaries (e.g. 15-Dec to 10-Jan).

        The final stack of parameters set some options for supplementary feeding. As noted above, a type of silage has been set up in the supplement store. In this stack of parameters:

        * Give the name (case matters) of the supplement type.
        * Indicate if the supplement is to be fed before the stock have access to the crop. The alternative is that it is available day-long and the stock can select between supplement and crop. Ticking the box for feeding first will increase the intake of supplement and decrease the intake of crop. The magnitude of this will depend on the stock, the total feed on offer and the qualities of the supplement and crop.
        * The third parameter allows the user to feed the stock supplement on a per head basis every day regardless of the amount of forage crop available.
        * The last two parameters allow for feeding only when the forage crop biomass is low with an additional amount of supplement per head per day when the crop biomass is below a given value.
      Report: EventNames=[Clock].EndOfDay
        VariableNames:
          [Clock].Today as Date
          Mean of [Stock].NumberAll from [Report].DayAfterLastOutput to [Clock].Today as NumStock
          Mean of [Stock].IntakeAll.Weight from [Report].DayAfterLastOutput to [Clock].Today as AveDMIntake
          Mean of [Stock].MEIntakeAll from [Report].DayAfterLastOutput to [Clock].Today as AveMEIntake
          Mean of [Stock].WeightAll from [Report].DayAfterLastOutput to [Clock].Today as AveBodyMass
          Mean of [Stock].CondScoreAll from [Report].DayAfterLastOutput to [Clock].Today as AveConditionScore
          Mean of [Stock].MilkWtAll from [Report].DayAfterLastOutput to [Clock].Today as AveMilkWeight4pcCorr
          Mean of ([Stock].MilkWtAll * 0.04 * 1.8) from [Report].DayAfterLastOutput to [Clock].Today as AveMilkSolids // note the "0.04" is to convert the 4% fat corrected to dry milk fat, the "1.8" is on the assumption that protein is 80% of the fat content
          Last of [GrazeForageCrop].Script.HarvestableBiomass from [Report].DayAfterLastOutput to [Clock].Today as HarvestableBiomass
          Last of [Supplement].stores[2].Stored from [Report].DayAfterLastOutput to [Clock].Today as SupplementRemaining
          Last of [Field].PlantainForage.AboveGround.Wt * 10.0 from [Report].DayAfterLastOutput to [Clock].Today as PlantainMass
          //Last of [GrazeForageCrop].Script.CurrentLocation from [Report].DayAfterLastOutput to [Clock].Today as StockLocation
          [GrazeForageCrop].Script.CurrentLocation as StockLocation
          Mean of [Stock].PastIntakeAll.Weight from [Report].DayAfterLastOutput to [Clock].Today as AvePlantainIntake
          Mean of ([Stock].SuppIntakeAll.Weight + [Stock].PastIntakeAll.Weight)  from [Report].DayAfterLastOutput to [Clock].Today as AveSilagePlusPlantainIntake
          Mean of ([Stock].PastIntakeAll.N / ([Stock].PastIntakeAll.Weight + 0.001)) from [Report].DayAfterLastOutput to [Clock].Today as AvePlantainNContent
          Mean of [Field].PlantainForage.AboveGround.NConc
          Mean of [Stock].MEIntakeAll / ([Stock].IntakeAll.Weight + 0.001) from [Report].DayAfterLastOutput to [Clock].Today as AveMEConcIntake
      Memo Memo1
        The first plot shows the location of the stock (on the paddock or ‘away’), the grazable biomass in the paddock and the supplement remaining in the store. The second plot shows average body mass and average dry matter intake. Note how body mass resets to a consistent value at the start of each grazing event. This is because a new mob of animals is bought at the start of each grazing event.

        The shaded area behind the plots shows the location of the stock (get this to show but adding a "ShadedBarsOnGraph" model to a Graph|Series). Click-and-holding on one of the shaded areas will pop up the name of the location.
      Zone Field: Area=1; Slope=0; AspectAngle=0; Altitude=50
        Manager SowingRule
          StartDate = 1-oct
          EndDate = 30-oct
          MinESW = 50
          MinRain = 30
          RainDays = 5
          mustSow = yes
          SowingFreq = 3
          CultivarName = Tonic
          SowingDepth = 10
          RowSpacing = 150
          Population = 200
          Amount = 60
          CropAge = 0
```csharp
using Models.Interfaces;
using System.Linq;
using System;
using Models.Core;
using Models.PMF;
using Models.Soils;
using Models.Utilities;
using APSIM.Shared.Utilities;
using Models.Climate;

namespace Models
{
    [Serializable]
    public class Script : Model
    {
        [Link] private Clock Clock;
        [Link] private Fertiliser Fertiliser;
        [Link] private Summary Summary;
        [Link] private Plant PlantainForage;
        [Link] private Soil Soil;
        private Accumulator accumulatedRain;
        [Link]
        private ISoilWater waterBalance;

        [Separator("======= Sowing conditions =======")]
        [Description("Start of sowing window (dd-mmm)")] public string StartDate { get; set;}
        [Description("End of sowing window (dd-mmm)")] public string EndDate { get; set;}
        [Description("Minimum extractable soil water for sowing (mm)")] public double MinESW { get; set;}
        [Description("Accumulated rainfall required for sowing (mm)")] public double MinRain { get; set;}
        [Description("Duration of rainfall accumulation (d)")] public int RainDays { get; set;}
        [Description("Must sow at the end of the window?")] public answerType mustSow { get; set; }
        [Description("Frequency of sowing (years)")] public int SowingFreq { get; set; }
    

        [Separator("======= Sowing data =======")]
        [Description("Cultivar to be sown")] public string CultivarName { get; set;}
        [Description("Sowing depth (mm)")] public double SowingDepth { get; set;}        
        [Description("Row spacing (mm)")] public double RowSpacing { get; set;}    
        [Description("Plant population (/m2)")] public double Population { get; set;}    

        [Separator("======= Sowing fertiliser =======")]
        [Description("Amount of fertiliser to be applied (kg/ha)")] public double Amount { get; set;}


        public double CropAge { get; set; }

           public enum answerType
        {
            /// <summary>a positive answer</summary>
            yes,
            /// <summary>a negative answer</summary>
            no
        }

        
        [EventSubscribe("StartOfSimulation")]
        private void OnSimulationCommencing(object sender, EventArgs e)
        {
            accumulatedRain = new Accumulator(this, "[Weather].Rain", RainDays);
            CropAge = SowingFreq + 1.0;
        }
        

        [EventSubscribe("DoManagement")]
        private void OnDoManagement(object sender, EventArgs e)
        {
            accumulatedRain.Update();
            CropAge += 1.0 / 365.25;

            bool doSowing = false;
            if (DateUtilities.WithinDates(StartDate,Clock.Today,EndDate) && !PlantainForage.IsAlive)
                doSowing = true;
            if ((MathUtilities.Sum(waterBalance.ESW) < MinESW) || (accumulatedRain.Sum < MinRain))
                doSowing = false;
            if ((mustSow == answerType.yes) && (DateUtilities.DatesEqual(EndDate, Clock.Today)))
                doSowing = true;
            if (CropAge < SowingFreq)
                doSowing = false;
            
            if (doSowing)
            {
               PlantainForage.Sow(population:Population, cultivar:CultivarName, depth:SowingDepth, rowSpacing:RowSpacing);
               Fertiliser.Apply(Amount: Amount, Type: Fertiliser.Types.NO3N);    
               CropAge = 0.0;
            }
        
        }
        
    }
}
```
        Manager AutomaticIrrigation
          allowIrrigation = yes
          seasonStart = 15-Sep
          seasonEnd = 30-Apr
          seasonsAllocation = 10000
          triggerDeficit = 75
          targetDeficit = 95
          returndays = 3
          maximumAmount = 15
          depthPAWC = 500
          TopSWdeficit = 0
          TopSWC = 0
          DaysSinceIrrigation = 0
          AmountToApply = 0
          SeasonAppliedAmount = 0
```csharp
using Newtonsoft.Json;
using Models.PMF.Phen;
using APSIM.Shared.Utilities;
using System.Xml.Serialization;
using Models.Soils;
using Models.PMF;
using Models.Core;
using System;
using System.Linq;
using Models.Interfaces;

        
namespace Models
{
    [Serializable] 
    [System.Xml.Serialization.XmlInclude(typeof(Model))]
    public class Script : Model
    {
        [Link] private ISummary summary;
        [Link] private Irrigation Irrigation;
        [Link] private Clock Clock;
        [Link] private Soil Soil;
        [Link(IsOptional = true)] private Plant existingCrop;
        private DateTime StartDate;
        private DateTime EndDate;
        private double TopDUL;
        private double TopLL;
        private int nLayers;
        [Link(IsOptional = true)]
        private Phenology phenology;
        [Link]
        private IPhysical soilPhysical;
        [Link]
        private ISoilWater waterBalance;
        //Communication to other modules
       
        //User inputs from properties tab
        [Description("Turn irrigation on?")]
        public answerType allowIrrigation { get; set; }
        [Description("Start of irrigation season (dd-MMM)")]
        public string seasonStart { get; set; }
        [Description("End of irrigation season (dd-MMM)")]
        public string seasonEnd { get; set; }
        [Description("Season allocation (mm)")]
        public double seasonsAllocation { get; set; }
        [Description("Deficit to trigger irrigation (% PAWC)")]
        public double triggerDeficit { get; set; }
        [Description("Deficit to stop irrigaton (% PAWC)")]
        public double targetDeficit { get; set; }
        [Description("Minimum days for irrigation to return")]
        public double returndays { get; set; }
        [Description("Maximum irrigation application (mm/day)")]
        public double maximumAmount { get; set; }
        [Description("Depth to calculate PAWC (mm)")]
        public double depthPAWC { get; set; }
       
        public enum answerType
        {
            /// <summary>a positive answer</summary>
            yes,
            /// <summary>a negative answer</summary>
            no
        }

        //Class members
        [JsonIgnore] public double TopSWdeficit { get; set; }
        [JsonIgnore] public double TopSWC { get; set; }
        [JsonIgnore] public double DaysSinceIrrigation { get; set; }
        [JsonIgnore] public double AmountToApply { get; set; }
        [JsonIgnore] public double SeasonAppliedAmount { get; set; }
        
        private bool IrrigationIsAllowed { get; set; }
        private bool SeasonIsOpen { get; set; }
        private bool CropIsActive { get; set; }
        private bool IrrigatorIsAvailable { get; set; }
        private bool SoilIsDry { get; set; }

    
        //Calculate static soil variables
        [EventSubscribe("StartOfSimulation")]
        private void OnStartOfSimulation(object sender, EventArgs e)
        {   
            //Set the season dates
            StartDate = DateTime.Parse(seasonStart + "-" + Clock.Today.Year.ToString());
            EndDate = DateTime.Parse(seasonEnd + "-" + Clock.Today.Year.ToString());
            
            //Can we irrigate at all?
            IrrigationIsAllowed = false; 
            if (allowIrrigation == answerType.yes)
                IrrigationIsAllowed = true; 

            //Calculate soil water variables
            double depthFromSurface = 0.0;
            double fracLayer = 0.0;
            nLayers = soilPhysical.Thickness.Length;
            for (int layer = 0; layer < nLayers; layer++)
            {
                fracLayer = Math.Min(1.0, (depthPAWC - depthFromSurface) / soilPhysical.Thickness[layer]);
                TopLL += soilPhysical.LL15mm[layer] * fracLayer;
                TopDUL += soilPhysical.DULmm[layer] * fracLayer;
                depthFromSurface += soilPhysical.Thickness[layer];
                if (depthFromSurface >= depthPAWC)
                    layer = nLayers;
            }
        }
             
        //Determine daily requirement for irrigation
        [EventSubscribe("StartOfDay")]
        private void OnStartOfDay(object sender, EventArgs e)
        {
            //Can we irrigate today?          
            SeasonIsOpen = isBetween(Clock.Today, StartDate, EndDate);

            //Is there a crop in the ground that needs irrigation?
            CropIsActive = false;
            if ((existingCrop != null) && (existingCrop.IsAlive))
                CropIsActive = true;
            //if ((phenology.Stage >= 3.0) && (phenology.Stage < 6.0))
          
            //Is the irrigator available?
            IrrigatorIsAvailable = false;
            DaysSinceIrrigation += 1;
            if (DaysSinceIrrigation >= returndays)
                IrrigatorIsAvailable = true;
          
            //Is the soil dry enough to require irrigation?
            SoilIsDry = false;
            double depthFromSurface = 0.0;
            double fracLayer = 0.0;
            TopSWC = 0.0;
            for (int layer = 0; layer < nLayers; layer++)
            {
                fracLayer = Math.Min(1.0, (depthPAWC - depthFromSurface) / soilPhysical.Thickness[layer]);
                TopSWC += waterBalance.SWmm[layer] * fracLayer;
                depthFromSurface += soilPhysical.Thickness[layer];
                if (depthFromSurface >= depthPAWC)
                    layer = nLayers;
            }
            
            TopSWdeficit = TopSWC - TopDUL;
            if (Math.Max(0.0, -TopSWdeficit) >= (TopDUL - TopLL) * (100 - triggerDeficit) / 100)
                SoilIsDry = true;
                
            //Are all the conditions ratifying irrigation
            if (IrrigationIsAllowed && SeasonIsOpen && CropIsActive && IrrigatorIsAvailable && SoilIsDry)
            {
                //Lets bloody well irrigate then!!!!
                AmountToApply = TopDUL * targetDeficit / 100 - TopSWC;
                //AmountToApply = Math.Max(0.0, Math.Min(AmountToApply, seasonsAllocation - SeasonAppliedAmount));
                AmountToApply = maximumAmount;
                Irrigation.Apply(AmountToApply);
                DaysSinceIrrigation = 0;
                SeasonAppliedAmount += AmountToApply;
            }
        }
        
        ///Checks whether theDate is between iniDate and endDate (non-year specific)
        private bool isBetween(DateTime theDay, DateTime iniDate, DateTime endDate)
        {
            bool result = false;
            if (iniDate.DayOfYear < endDate.DayOfYear)
            {
                // period is within one year, ex: summer in the northern hemisphere
                if ((theDay.DayOfYear >= iniDate.DayOfYear) && (theDay.DayOfYear <= endDate.DayOfYear))
                    result = true;
            }
            else
            {
                // period goes over the end of the year, ex: summer in the southern hemisphere
                if ((theDay.DayOfYear >= iniDate.DayOfYear) || (theDay.DayOfYear <= endDate.DayOfYear))
                    result = true;
            }
            
            return result;
        }
    }
}
```
        Manager Fertilise on fixed dates
          EachYear = True
          Dates = 20-sep, 20-nov, 20-jan, 20-mar
          UseCritNThreshold = False
          CritNThreshold = 50
          CritNDepth = 75
          Depth = 50
          Amount = 30
          FertiliserType = UreaN
```csharp
using Models.Interfaces;
using System.Linq;
using APSIM.Shared.Utilities;
using Models.PMF;
using Models.Soils;
using Models.Soils.Nutrients;
using Models.Core;
using System;
using Models.Soils.Nutrients;

namespace Models
{
    [Serializable]
    public class Script : Model
    {
        [Link] private Clock clock;
        [Link] private Fertiliser fertiliser;
        [Link] private ISummary summary;
        [Link] private Soil soil;
        private Nutrient nutrient;
        private Nutrient soilN;
        [Link]
        private IPhysical soilPhysical;
        [Link]
        private Nutrient Nutrient;
        [Link(Path="[SurfaceOrganicMatter].SurfaceResidue.Decomposition")]
        private OrganicFlow ResidueDecomposition;


        [Separator("Fertiliser will be applied on the date(s) below")]
        [Description("Apply fertiliser on the same day(s) each year? If no, then must include the year of appliaction below")]
        public bool EachYear { get; set; }

        [Description("Dates for one or more fertiliser applications (dd-mmm or dd-mmm-yyyy) as a list with a comma between dates")]
        public string[] Dates { get; set; }

        [Separator("Test for the mineral N in the soil and don't apply the fertiliser if greater than X kgN/ha is stored in the soil above a depth of Y mm")]
        [Description("Use a critical soil mineral N to prevent application above a threshold?")]
        public bool UseCritNThreshold { get; set; }

        [Description("Don't add fertiliser if N in the soil to the depth below exceeds (kg/ha)")]
        public double CritNThreshold { get; set; }

        [Description("Depth to which the amount of N in the soil should be calculated (mm)")]
        public double CritNDepth { get; set; }

        [Separator("Fertiliser application details")]
        [Description("Depth at which to apply the fertiliser (mm)")]
        public double Depth { get; set; }

        [Description("Amount of fertiliser to apply (kg N /ha) per application")]
        public double Amount { get; set; }

        [Description("Fertiliser type - select from the list")]
        public Fertiliser.Types FertiliserType { get; set; }


        [EventSubscribe("StartOfSimulation")]
        private void FindSoilNOrNutrient(object sender, EventArgs e)
        {
            nutrient = this.FindInScope<Nutrient>() as Nutrient;
            soilN = this.FindInScope<Nutrient>() as Nutrient;

            if (nutrient == null && soilN == null)
                throw new Exception(string.Format("Error in script {0}: Unable to find nutrient or soilN.", Name));
        }

        [EventSubscribe("DoManagement")]
        private void OnDoManagement(object sender, EventArgs e)
        {
            if (OnApplicationDate())
            {
                if (NContentBelowThreshold())
                    fertiliser.Apply(Amount, FertiliserType, Depth);
                else
                    summary.WriteMessage(this, "Skipping fertiliser application due to soil mineral N content being above critical threshold.", MessageType.Diagnostic);
            }
        }

        /// <summary>Checks if today's date is one of the specified fertiliser application dates.</summary>
        private bool OnApplicationDate()
        {
            if (EachYear)
                return Dates.Any(d => DateUtilities.DatesEqual(d, clock.Today));
            
            DateTime[] dates = Dates.Select(d => DateTime.ParseExact(d, "d-MMM-yyyy", null)).ToArray();
            return dates.Any(d => SameDate(d, clock.Today));
        }

        /// <summary>Checks if N content in soil is below critical threshold.</summary>
        private bool NContentBelowThreshold()
        {
            if (!UseCritNThreshold)
                return true;
            
            double[] weights = GetLayerWeights();
            double cumSoilN = 0;

            for (int i = 0; i < soilPhysical.Thickness.Length; i++)
            {
                if (nutrient != null)
                    cumSoilN += weights[i] * nutrient.MineralN[i];
                else if (soilN != null)
                    cumSoilN += weights[i] * soilN.MineralN[i];
            }

            return cumSoilN <= CritNThreshold;
        }

        private double[] GetLayerWeights()
        {
            double[] weights = new double[soilPhysical.Thickness.Length];
            double cumDepth = 0;

            for (int i = 0; i < soilPhysical.Thickness.Length; i++)
            {
                cumDepth += soilPhysical.Thickness[i];
                if (cumDepth < CritNDepth)
                    weights[i] = 1;
                else if (cumDepth - soilPhysical.Thickness[i] <= CritNDepth)
                    weights[i] = (CritNDepth - (cumDepth - soilPhysical.Thickness[i])) / soilPhysical.Thickness[i];
                else
                    weights[i] = 0;
            }

            return weights;
        }

        private bool SameDate(DateTime d1, DateTime d2)
        {
            return d1.Year == d2.Year && d1.DayOfYear == d2.DayOfYear;
        }
    }
}
```
        Irrigation
        Fertiliser
        SurfaceOrganicMatter: InitialResidueName=grass; InitialResidueType=grass; InitialResidueMass=500; InitialStandingFraction=0; InitialCPR=0; InitialCNR=40
        Soil: SoilType=Generic medium texture; Region=Canterbury; Country=New Zealand; Latitude=0; Longitude=0
          Chemical: Thickness=[150, 150, 200, 250, 250, 500]; PH=[6, 6, 6, 6, 6, 6]; PHUnits=Water
          Physical
            Thickness  ParticleSizeClay  BD    AirDry  LL15  DUL   SAT   KS
            150        20                1.3   0.05    0.15  0.36  0.45  4500
            150        20                1.4   0.17    0.17  0.34  0.42  2500
            200        20                1.5   0.19    0.19  0.33  0.38  200
            250        15                1.6   0.17    0.17  0.3   0.36  1500
            250        10                1.45  0.1     0.1   0.2   0.38  5000
            500        10                1.35  0.1     0.1   0.2   0.39  10000
            SoilCrop PlantainForageSoil: LL=[0.15, 0.17, 0.19, 0.17, 0.1, 0.1]; KL=[0.1, 0.08, 0.05, 0.02, 0.01, 0.01]; XF=[1, 1, 1, 1, 1, 0.5]
          WaterBalance SoilWater: SummerDate=21-Sep; SummerU=6; SummerCona=3.5; WinterDate=23-Mar; WinterU=6; WinterCona=2.5; DiffusConst=88; DiffusSlope=35; Salb=0.2; CN2Bare=0.7; CNRed=20; CNCov=0.8; PSIDul=-100; Thickness=[150, 150, 200, 250, 250, 500]; SWCON=[0.45, 0.35, 0.1, 0.15, 0.3, 0.2]
          Organic: FOMCNRatio=40; CarbonUnits=Total
            Thickness  Carbon  SoilCNRatio  FBiom  FInert  FOM
            150        2.5     12           0.04   0.4     358.617
            150        1.25    12           0.025  0.6     265.67
            200        0.5     12           0.015  0.8     178.084
            250        0.2     12           0.01   0.9     108.013
            250        0.15    12           0.008  0.95    65.5135
            500        0.1     12           0.008  0.98    24.1011
          Water: Thickness=[150, 150, 200, 250, 250, 500]; InitialValues=[0.339, 0.323, 0.316, 0.287, 0.19, 0.19]; InitialPAWmm=173.25; RelativeTo=LL15; FilledFromTop=false
          CERESSoilTemperature Temperature
          Nutrient
          Solute NO3: Thickness=[150, 150, 200, 250, 250, 500]; InitialValues=[9.43396, 6.59293, 3.6821, 2.19178, 2.19178, 0.740741]; InitialValuesUnits=ppm; WaterTableConcentration=0; D0=0; DepthConstant=0; MaxDepthSoluteAccessible=0; RunoffEffectivenessAtMovingSolute=0; MaxEffectiveRunoff=0
          Solute NH4: Thickness=[150, 150, 200, 250, 250, 500]; InitialValuesUnits=ppm; WaterTableConcentration=0; D0=0; DepthConstant=0; MaxDepthSoluteAccessible=0; RunoffEffectivenessAtMovingSolute=0; MaxEffectiveRunoff=0
            InitialValues=[0.377358, 0.240729, 0.113604, 0.0547945, 0.0547945, 0.0296296]
          Solute Urea: Thickness=[150, 150, 200, 250, 250, 500]; InitialValues=[0, 0, 0, 0, 0, 0]; InitialValuesUnits=kg/ha; WaterTableConcentration=0; D0=0; DepthConstant=0; MaxDepthSoluteAccessible=0; RunoffEffectivenessAtMovingSolute=0; MaxEffectiveRunoff=0
        Plant PlantainForage
  Folder Simple Rotational Grazing Example
    Memo Simple Rotational Grazing Explained
      “Simple Rotational Grazing” is an example of a simple 5-paddock set-duration rotation.

      Stock are bought (see the Manager component “BuyStock”) as the simulation initialises and they remain in the simulation for the duration (not continually bought and sold). This component has a user input of the desired whole-farm stocking rate. It scans the simulation for all the paddocks and sums their areas to give the area of the whole farm and then buys sufficient head of stock to achieve the user input of stocking rate. The user also sets the type of stock to buy.

      The Manager component “TargetRotationLength” moves the stock between paddocks, optionally harvests unutilised herbage and also optionally feeds silage to the stock.

      The scripts provide examples of:

      * setting several commonly-needed stock characteristics
      * buying stock
      * finding out the current location of the stock
      * changing the location of the stock
      * feeding supplements based on a range of criteria
      * harvesting excess biomass
    Simulation A Simple Rotational Grazing
      Clock: Start=2001-07-01; End=2003-06-30
      Summary SummaryFile
      SoilArbitrator
      MicroClimate: a_interception=0; b_interception=0; c_interception=0; d_interception=0; SoilHeatFluxFraction=0.4; MinimumHeightDiffForNewLayer=0; NightInterceptionFraction=0.5; ReferenceHeight=2
      Weather: FileName=%root%/Examples/WeatherFiles/NZ_Lincoln.met; Latitude=-43.624; Tav=11.4; Amp=11.5
      Stock: RandSeed=9999
      Forages
        Parameters:
          Name                          LiveDigestibility  DeadDigestibility  LiveFractionConsumable  DeadFractionConsumable  LiveMinimumBiomass  DeadMinimumBiomass
          SurfaceOrganicMatter.Residue  0.7                0.3                1                       1                       100                 0
          AGPRyegrass.Leaf              0.7                0.3                1                       1                       100                 0
          AGPRyegrass.Stem              0.7                0.3                1                       1                       100                 0
          AGPRyegrass.Stolon            0.7                0.3                1                       1                       100                 0
          AGPWhiteClover.Leaf           0.7                0.3                1                       1                       100                 0
          AGPWhiteClover.Stem           0.7                0.3                1                       1                       100                 0
          AGPWhiteClover.Stolon         0.7                0.3                1                       1                       100                 0
      Supplement: SpoilageTime=0
        Stores:
          Name                Stored  IsRoughage  DMContent  DMD   MEContent  CPConc  ProtDg  PConc   SConc   EEConc  ADIP2CP  AshAlk  MaxPassage
          fodder              0       true        0.85       0     0          0       0       0       0       0       0        0       0
          silage_highquality  0       true        1          0.85  12         0.16    0.7     0.0032  0.0024  0.02    0.06     0.6     0
      Manager BuyStock
        StockingRate = 5
        Genotype = Angus
        Sex = Castrate
        Age = 12
        Weight = 100
        Pregnant = 0
        Lactating = 0
        YoungNumber = 0
        YoungWt = 0
```csharp
using Models.PMF.Interfaces;
using System.Diagnostics;
using Models.AgPasture;
using System.Linq;
using System.Collections.Generic;
using System.Collections;
using Models.Soils;
using Models.PMF;
using System.Xml.Serialization;
using APSIM.Shared.Utilities;
using Models.GrazPlan;
using Models.Utilities;
using Models.Core;
using Models;
using System;

namespace Models
{

    [Serializable]
    public class Script : Model
    {
        [Link] Clock clock;
        [Link] Stock stock;
        [Link] Supplement supplement;
        [Link] List<Zone> paddocks;
        [Link] ISummary summary;
        [Link] Simulation farm;
        [Link] List<IPlantDamage> forages = null;

        private int CurrentGroupNum = 1;    // animal group number
        private int CurrentLocationNum { get; set; }

        [Separator("Stock type info - these stock are bought at the start of the simulation")]

        [Description("Whole-farm stocking rate (head/ha): ")] 
        public double StockingRate { get; set; } 

        [Description("Stock: genotype (e.g. Small Merino, Angus, Friesian):")] 
        [Display(Values="GetGenotypes")]
        public string Genotype { get; set; }

        [Description("Stock: sex (Female, Male, Castrate):")] 
        public ReproductiveType Sex { get; set; }

        [Description("Stock: age (months):")] 
        public double Age { get; set; }

        [Description("Stock: weight (kg liveweight /head):")] 
        public double Weight { get; set; }

        [Description("Stock: fertility status (0 if non-pregnant or days since conception):")] 
        public int Pregnant { get; set; }

        [Description("Stock: lactation status (0 if non-lactating or days since parturition):")]
        public int Lactating { get; set; }

        [Description("Stock: number of unweaned young:")]
        public int YoungNumber { get; set; }

        [Description("Stock: weight of unweaned young:")] 
        public double YoungWt { get; set; }

        public int NumStock { get; set; }

        // Return a list of genotypes to the properties tab.
        public string[] GetGenotypes()
        {
            if (stock != null)
                return stock.Genotypes.Names.ToArray();
            return null;
        }

        [EventSubscribe("StartOfSimulation")]
        private void OnStartOfSimulation(object sender, EventArgs e)
        {

            //Debugger.Break();

            summary.WriteMessage(this, "Initialising the paddock information", MessageType.Diagnostic);

            NumStock = (int)(Math.Round(StockingRate * farm.Area, 0));

            BuyStock();
            summary.WriteMessage(this, "     Number of stock bought is " + NumStock, MessageType.Diagnostic);
            summary.WriteMessage(this, "     The number of animals has been rounded to " + NumStock + " from " + (StockingRate * farm.Area), MessageType.Diagnostic);
            summary.WriteMessage(this, "     The area of the whole farm is " + farm.Area + " ha", MessageType.Diagnostic);

        }

        public void BuyStock()
        {
            CurrentGroupNum = stock.NoGroups + 1;
            StockBuy purchase = new StockBuy();
            purchase.Genotype = Genotype;
            purchase.Number = NumStock;
            purchase.Sex = Sex;
            purchase.Age = Age;       // age in months
            purchase.Weight = Weight;  // live weight in kg
            purchase.UseTag = CurrentGroupNum + 1;
            purchase.MatedTo = purchase.Genotype;
            purchase.Pregnant = Pregnant;  // days pregnant, 0 = non pregnant, 1 = pregnant
            purchase.Lactating = Lactating;  // 0 for dry, 1 for lactating
            purchase.NumYoung = YoungNumber;
            purchase.YoungWt = YoungWt;

            stock.Buy(purchase);
        }

    }
}
```
      Manager TargetRotationLength
        DoVerbose = True
        InitialLocation = [Paddock01]
        TargetRotationLength = 20
        PostGrazingResidual = 1500
        PostCuttingResidual = 1000
        HarvestExcessHerbage = True
        SilageEveryDay = 0
        SilageOnPastureMass = 10
        TriggerPastureMass = 2000
        StockingRate = 5
```csharp
using System.Diagnostics;
using Models.AgPasture;
using System.Collections.Generic;
using System.Collections;
using Models.Soils;
using Models.PMF;
using System.Xml.Serialization;
using APSIM.Shared.Utilities;
using Models.GrazPlan;
using Models.Utilities;
using Models.Core;
using System;
using System.Linq;
using Models.ForageDigestibility;

namespace Models
{

    [Serializable]
    public class Script : Model
    {
        [Link] Clock Clock;
        [Link] Stock Cows;
        [Link] Supplement Supplement;
        [Link] Zone[] Paddocks;
        [Link] ISummary summary = null;
        [Link] Simulation Farm;
        [Link] Forages forages = null;

        //List<AgPasture.PastureSpecies> Pasture = new List<AgPasture.PastureSpecies>();

        [Serializable]
        public class PaddockInfo
        {
            public Zone Field { get; }
            public IEnumerable<ModelWithDigestibleBiomass> Forages { get; }
            public double HarvestableBiomass
            {
                get
                {
                    double total = 0;
                    foreach (var model in Forages)
                        foreach (var material in model.Material)
                            total += material.Consumable.Wt * 10; // g/m2 to kg/ha
                    return total;            
                }
            }
            
            
            public PaddockInfo(IEnumerable<ModelWithDigestibleBiomass> forages, Zone field)
            {
                Field = field;
                Forages = forages;
            }
        }

        [Description("Do verbose reporting from this script (tick for yes): ")] 
        public bool DoVerbose { get; set; }

        [Separator("Whole farm and initial location")]

        [Description("Initial location of the cows (paddock name):")] 
        [Display(Type=DisplayType.Model, ModelType=typeof(Zone))]
        public IModel InitialLocation { get; set; }

       [Description("Whole-farm stocking rate (head/ha): ")]
        public double StockingRate { get; set; } 

        [Separator("Settings for the rotation")]

        [Description("Target rotation length (days/paddock): ")] 
        public int TargetRotationLength { get; set; }

        [Description("Post-grazing residual to trigger pasture conservation (kgDM/ha): ")] 
        public double PostGrazingResidual { get; set; }

        [Description("Post-cutting residual (kgDM/ha): ")] 
        public double PostCuttingResidual { get; set; }

        [Description("Harvest excess herbage above residual when cows leave the paddock?: ")] 
        public bool HarvestExcessHerbage { get; set; }

        [Separator("Settings for supplementary feeding")]

        [Description("Baseline (i.e. every day) feeding of silage (kgDM/head/day): ")] 
        public double SilageEveryDay { get; set; }

        [Description("Low pre-grazing pasture mass feeding (additional to baseline) of silage (kgDM/head/day): ")] 
        public double SilageOnPastureMass { get; set; }

        [Description("Trigger pre-grazing pasture mass for the rule above (kgDM/ha): ")] 
        public double TriggerPastureMass { get; set; }

        public int NumCows { get; set; } // number of cows on the whole farm
        public string pastLocationName { get; set; }  // 
        public string newLocationName { get; set; }  // 
        public int CurrentLocationNum { get; set; }  // name of the paddock that the cows are currently in
        public string CurrentLocationName { get; set; }
        public int NumPaddocks { get; set; }
        public double SilageHarvested { get; set; } // RAmount of silage harvested (kg DM /ha)

        //public double[] HarvestableBiomass { get; set; }

        private int group_count; // how many groups are there in the simulation
        private int g = 1;      // index to the groups of animals

        //private int DaysPerPaddock;
        private int DaysInThisPaddock;
        private bool MoveToday = false;
        private bool Initialised = false;
        public double BiomassInCurrentPaddock;

        public event BiomassRemovedDelegate BiomassRemoved;
        public List<PaddockInfo> listOfPaddockInfo { get; set; }


        private void Initialise()
        {
            summary.WriteMessage(this, "Initialising the paddock information", MessageType.Diagnostic);
            listOfPaddockInfo = new List<PaddockInfo>();
            CurrentLocationName = InitialLocation.Name;

            GetPaddockInfo();
            //HarvestableBiomass = Farm.

            NumCows = (int)(Math.Round(StockingRate * Farm.Area, 0));

            //SetInitialCowStuff();

            if (NumCows > 0)
                Cows.Move(CurrentLocationName);

            summary.WriteMessage(this, "     The number of animals has been rounded to " + NumCows + " from " + (StockingRate * Farm.Area), MessageType.Diagnostic);
            summary.WriteMessage(this, "     The animals will begin in " + CurrentLocationName + " which is paddock number " + CurrentLocationNum + " in the simulation", MessageType.Diagnostic);
            summary.WriteMessage(this, "     The area of the whole farm is " + Farm.Area + " ha", MessageType.Diagnostic);

            DaysInThisPaddock = -1;
            SilageHarvested = 0.0;
            Initialised = true;
        }

        [EventSubscribe("DoManagement")]
        private void OnDoManagement(object sender, EventArgs e)
        {
            if (!Initialised)
                Initialise();
            SilageHarvested = 0.0;

            // WTF is this?
            if ((Cows.LactatingAll > 2) && (Cows.NoSucklingAll > 0))
                WeanCalves();
            if ((Cows.LactatingAll > 4) && (Cows.LactatingAll < 6))
                SellCalves();

            MoveToday = false;
            // how many days in this paddock?  Ready to move?
            DaysInThisPaddock += 1;
            if (DaysInThisPaddock >= TargetRotationLength)
            {
                MoveToday = true;

                pastLocationName = CurrentLocationName;
                if (CurrentLocationNum < NumPaddocks - 1)
                {
                    CurrentLocationNum += 1;
                    newLocationName = listOfPaddockInfo[CurrentLocationNum].Field.Name;
                }
                else
                {
                    CurrentLocationNum = 0;
                    newLocationName = listOfPaddockInfo[CurrentLocationNum].Field.Name;
                }
                CurrentLocationName = listOfPaddockInfo[CurrentLocationNum].Field.Name;


                if (HarvestExcessHerbage)
                {
                    foreach (Zone paddock in Paddocks)
                    {
                        if (paddock.Name == pastLocationName)
                        {
                            double pastPaddockBiomass = 0.0;
                            foreach (var forage in forages.ModelsWithDigestibleBiomass.Where(f => f.Zone.Name == pastLocationName))
                                pastPaddockBiomass += forage.Material.Sum(f => f.Total.Wt) * 10;   // kg/ha 

                            if (pastPaddockBiomass > PostGrazingResidual)  //why the 250? Because don't harvest very small amounts ...
                            {
                                foreach (var forage in forages.ModelsWithDigestibleBiomass.Where(f => f.Zone.Name == pastLocationName))
                                {
                                    var aboveGroundWt = forage.Material.Sum(f => f.Total.Wt) * 10;  // kg/ha 
                                    var amountToRemove = aboveGroundWt / pastPaddockBiomass * PostCuttingResidual;
                                    forage.RemoveBiomass(type: "SetResidueAmount", amount: amountToRemove / 10);
                                    SilageHarvested += amountToRemove;
                                }


                            }
                        }
                    }
                }

                if (NumCows > 0)
                    Cows.Move(listOfPaddockInfo[CurrentLocationNum].Field.Name);
                   
                if (DoVerbose)
                    summary.WriteMessage(this, "moving Stock to " + listOfPaddockInfo[CurrentLocationNum].Field.Name, MessageType.Diagnostic);

                DaysInThisPaddock = 0;
            }

            if (SilageEveryDay > 0)
            {
            // see how much supplement there is - buy more if needed
            // Stores 1 is from a pasture component so bought supplements start at 2
                double silageOnHand = Supplement.Stores[2 - 1].Stored;
                if (silageOnHand < SilageEveryDay * Cows.NumberAll)
                {
                    Supplement.Buy(SilageEveryDay * 180 * Cows.NumberAll, "silage_highquality");  // i.e. 6 months worth
                    summary.WriteMessage(this, "SilageEveryDay: Buying silage_highquality of total amount : " + (SilageEveryDay * 180 * Cows.NumberAll) + " kg DM", MessageType.Diagnostic);
                }
                Supplement.Feed("silage_highquality", SilageEveryDay * Cows.NumberAll, CurrentLocationName, false);
            }

            if ((SilageOnPastureMass > 0) && (listOfPaddockInfo[CurrentLocationNum].HarvestableBiomass < TriggerPastureMass))
            {
                double silageOnHand = Supplement.Stores[2 - 1].Stored;
                if (silageOnHand < SilageOnPastureMass * Cows.NumberAll)
                {
                    Supplement.Buy(SilageOnPastureMass * 180 * Cows.NumberAll, "silage_highquality");
                    summary.WriteMessage(this, "SilageOnPastureMass: Buying silage_highquality of total amount : " + (SilageOnPastureMass * 180 * Cows.NumberAll) + " kg DM", MessageType.Diagnostic);
                }
                Supplement.Feed("silage_highquality", SilageOnPastureMass * Cows.NumberAll, CurrentLocationName, false);
            }

            // capture the pre-grazing biomass before the DoStock event
            BiomassInCurrentPaddock = listOfPaddockInfo[CurrentLocationNum].HarvestableBiomass;

        } // End of Do Management


        public void WeanCalves()
        {
                Cows.Wean(Cows.NumberAll, weanMales:true, weanFemales:true);
        }

        public void SellCalves()
        {
            double weanAge = 0.25 * 365;

            Cows.SplitByAge(Convert.ToInt32(weanAge));

              foreach (var animalGroup in Cows.AnimalGroups)
              {
                  if (animalGroup.AgeDays < weanAge)
                      Cows.Sell(animalGroup.NoAnimals);
              }
        }


        public void GetPaddockInfo()
        {
            NumPaddocks = 0;
            CurrentLocationNum = 0;

            foreach (Zone paddock in Paddocks)
            {
                NumPaddocks += 1;

                var paddockInfo = new PaddockInfo(forages.ModelsWithDigestibleBiomass.Where(f => f.Zone == paddock), paddock);
                listOfPaddockInfo.Add(paddockInfo);

                summary.WriteMessage(this, "     Paddock " + NumPaddocks + " is called " + paddock.Name + ", has an area of " + paddock.Area + " ha and an initial harvestable biomass of " + paddockInfo.HarvestableBiomass + " kg DM / ha", MessageType.Diagnostic);

            }
            
            CurrentLocationNum = listOfPaddockInfo.FindIndex(p => p.Field.Name == CurrentLocationName);
            if (CurrentLocationNum == -1)
                throw new Exception($"Cannot find paddock {CurrentLocationName}");

        }
    }
}
```
      Report ReportFarm: EventNames=[Clock].EndOfDay
        VariableNames:
          [Clock].Today
          [TargetRotationLength].Script.CurrentLocationNum as CurrentLocNum
          [Stock].PastIntakeAll.Weight as IntakePast
          [Stock].SuppIntakeAll.Weight as IntakeSupp
          [Stock].IntakeAll.Weight as IntakePastSupp
          //[Stock].Paddock as StockInPaddockName
          [TargetRotationLength].Script.CurrentLocationNum as StockInPaddockNum
          [Stock].NumberAll
          [Stock].BaseWtAll
          [Stock].CondScoreAll
          [Stock].IntakeAll.Weight * [Stock].NumberAll as TotalIntake
          //([Paddock00].AGPRyegrass.HerbageGrowthWt + [Paddock00].AGPWhiteClover.HerbageGrowthWt) * [Paddock00].Area + ([Paddock01].AGPRyegrass.HerbageGrowthWt + [Paddock01].AGPWhiteClover.HerbageGrowthWt) * [Paddock01].Area + ([Paddock02].AGPRyegrass.HerbageGrowthWt + [Paddock02].AGPWhiteClover.HerbageGrowthWt) * [Paddock02].Area as TotalGrowth
          [Supplement].Stores[2].Stored
          [Stock].Paddock
          [TargetRotationLength].Script.SilageHarvested as SilageHarvested
      Memo Memo1
        These plots (working left to right and top to bottom) show:

        * The liveweight and condition score of the stock. By the end of the simulation the stock (Angus steers – see the BuyStock component) are reaching their mature liveweight and gains have levelled off. The blue shaded background shows the location of the stock at any time with different intensities of blue for different paddocks. Click and hold on the shading to see the location value.
        * The pasture intake (on a per head basis) and total intake. Total intake is greater than the pasture intake when there is silage supplementation.
        * The standing pasture biomass in each of the paddocks (the lines) with the head count of the stock as symbols. The decline in head count is because there are some deaths. The farm us under-stocked in the second year with paddocks accumulating high biomass values.
        * Growth rates in the paddocks and an accumulation of harvested silage
      Zone Paddock01: Area=10; Slope=0; AspectAngle=0; Altitude=50
        Irrigation
        Fertiliser
        SurfaceOrganicMatter: InitialResidueName=Sward; InitialResidueType=grass; InitialResidueMass=1000; InitialStandingFraction=0; InitialCPR=0; InitialCNR=15
        PastureSpecies AGPRyegrass: doyGermination=275; daysEmergenceToAnthesis=120; daysAnthesisToMaturity=85; degreesDayForAnthesis=1100; degreesDayForMaturity=900; daysAnnualsFactor=45; CanopyType=PastureSpecies; InitialShootDM=2100; InitialRootDM=450; InitialRootDepth=750; initialDMFractionsGrasses=[0.15, 0.25, 0.25, 0.05, 0.05, 0.1, 0.1, 0.05, 0, 0, 0]; initialDMFractionsForbs=[0.2, 0.2, 0.15, 0.05, 0.1, 0.15, 0.1, 0.05, 0, 0, 0]; PhotosyntheticEfficiency=0.01; PhotosynthesisCurveFactor=0.8; FractionPAR=0.5; ReferenceCO2=380; CO2EffectScaleFactor=700; CO2EffectOffsetFactor=600; CO2EffectMinimum=0.7; CO2EffectExponent=2; ReproSeasonDurationCoeff=2; ReproSeasonShouldersLengthFactor=1; ReproSeasonOnsetDurationFactor=0.6; RelativeTurnoverEmerging=2; DetachmentDroughtCoefficient=3; DetachmentDroughtEffectMin=0.1; TurnoverStockFactor=0.01; TurnoverDefoliationEffectMin=0.025; MinimumGreenLeafProp=0.8; MinimumGreenRootProp=0.5
          initialDMFractionsLegumes=[0.16, 0.23, 0.22, 0.05, 0.03, 0.05, 0.05, 0.01, 0.04, 0.08, 0.08]
          LinearInterpolationFunction FVPDFunction
        PastureSpecies AGPWhiteClover: doyGermination=275; daysEmergenceToAnthesis=120; daysAnthesisToMaturity=85; degreesDayForAnthesis=1100; degreesDayForMaturity=900; daysAnnualsFactor=45; CanopyType=PastureSpecies; InitialShootDM=700; InitialRootDM=150; InitialRootDepth=350; initialDMFractionsGrasses=[0.15, 0.25, 0.25, 0.05, 0.05, 0.1, 0.1, 0.05, 0, 0, 0]; initialDMFractionsForbs=[0.2, 0.2, 0.15, 0.05, 0.1, 0.15, 0.1, 0.05, 0, 0, 0]; PhotosyntheticEfficiency=0.01; PhotosynthesisCurveFactor=0.8; FractionPAR=0.5; ReferenceCO2=380; CO2EffectScaleFactor=700; CO2EffectOffsetFactor=600; CO2EffectMinimum=0.7; CO2EffectExponent=2; ReproSeasonDurationCoeff=2; ReproSeasonShouldersLengthFactor=1; ReproSeasonOnsetDurationFactor=0.6; RelativeTurnoverEmerging=2; DetachmentDroughtCoefficient=3; DetachmentDroughtEffectMin=0.1; TurnoverStockFactor=0.01; TurnoverDefoliationEffectMin=0.025; MinimumGreenLeafProp=0.8; MinimumGreenRootProp=0.5
          initialDMFractionsLegumes=[0.16, 0.23, 0.22, 0.05, 0.03, 0.05, 0.05, 0.01, 0.04, 0.08, 0.08]
          LinearInterpolationFunction FVPDFunction
        Soil LismoreSoil: SoilType=NZ_Sedimentary; LocalName=Lismore; Site=Winchmore; NearestTown=Ashburton; Region=Canterbury; Country=New Zealand; Latitude=-48.48; Longitude=0
          Chemical: Thickness=[150, 150, 200, 150, 250, 300, 300]; PH=[6, 6, 6, 6, 6, 6, 6]; PHUnits=Water
          Physical
            Thickness  ParticleSizeClay  BD    AirDry  LL15   DUL    SAT   KS
            150        20                1.3   0.05    0.15   0.36   0.45  5000
            150        15                1.35  0.12    0.14   0.34   0.43  2500
            200        12                1     0.055   0.055  0.19   0.25  3000
            150        8                 0.53  0.015   0.015  0.065  0.15  10000
            250        6                 0.31  0.01    0.01   0.04   0.11  17500
            300        5                 0.3   0.01    0.01   0.03   0.11  20000
            300        5                 0.3   0.01    0.01   0.03   0.11  20000
            SoilCrop AGPRyegrassSoil: LL=[0.15, 0.14, 0.06, 0.02, 0.01, 0.01, 0.01]; KL=[0.1, 0.1, 0.08, 0.04, 0.01, 0, 0]; XF=[1, 1, 1, 1, 1, 0, 0]
            SoilCrop AGPWhiteCloverSoil: LL=[0.15, 0.14, 0.06, 0.02, 0.01, 0.01, 0.01]; KL=[0.1, 0.1, 0.08, 0.04, 0.01, 0, 0]; XF=[1, 1, 1, 1, 1, 0, 0]
          WaterBalance SoilWater: SummerDate=1-Nov; SummerU=6; SummerCona=3.5; WinterDate=1-apr; WinterU=2; WinterCona=2; DiffusConst=88; DiffusSlope=35; Salb=0.13; CN2Bare=73; CNRed=20; CNCov=0.8; DischargeWidth=0; CatchmentArea=0; PSIDul=-100
            Thickness  SWCON  KLAT
            150        0.5    0
            150        0.52   0
            200        0.55   0
            150        0.6    0
            250        0.65   0
            300        0.65   0
            300        0.65   0
          Organic: FOMCNRatio=40; CarbonUnits=Total
            Thickness  Carbon  SoilCNRatio  FBiom  FInert  FOM
            150        3       12           0.04   0.5     331.337
            150        1       12           0.02   0.7     245.461
            200        0.6     12           0.02   0.83    164.537
            150        0.4     12           0.01   0.9     121.892
            250        0.25    12           0.01   0.95    73.9313
            300        0.15    12           0      0.99    40.5743
            300        0.1     12           0      0.99    22.2677
          Water: Thickness=[150, 150, 200, 150, 250, 300, 300]; InitialValues=[0.3495, 0.33, 0.18325, 0.0625, 0.0385, 0.029, 0.029]; InitialPAWmm=109.725; RelativeTo=LL15; FilledFromTop=false
          CERESSoilTemperature Temperature
          Nutrient
          Solute NO3: Thickness=[150, 150, 200, 150, 250, 300, 300]; InitialValues=[5, 2.5, 1, 0.75, 0.5, 0.5, 0.5]; InitialValuesUnits=ppm; WaterTableConcentration=0; D0=0; DepthConstant=0; MaxDepthSoluteAccessible=0; RunoffEffectivenessAtMovingSolute=0; MaxEffectiveRunoff=0
          Solute NH4: Thickness=[150, 150, 200, 150, 250, 300, 300]; InitialValues=[0.1, 0.1, 0.1, 0.1, 0.1, 0.1, 0.1]; InitialValuesUnits=ppm; WaterTableConcentration=0; D0=0; DepthConstant=0; MaxDepthSoluteAccessible=0; RunoffEffectivenessAtMovingSolute=0; MaxEffectiveRunoff=0
          Solute Urea: Thickness=[150, 150, 200, 150, 250, 300, 300]; InitialValues=[0, 0, 0, 0, 0, 0, 0]; InitialValuesUnits=kg/ha; WaterTableConcentration=0; D0=0; DepthConstant=0; MaxDepthSoluteAccessible=0; RunoffEffectivenessAtMovingSolute=0; MaxEffectiveRunoff=0
        Report PdkReport: EventNames=[Clock].EndOfDay
          VariableNames:
            [Clock].Today
            [AGPRyegrass].AboveGroundWt + [AGPWhiteClover].AboveGroundWt as PaddockBiomass
            [AGPRyegrass].HerbageGrowthWt + [AGPWhiteClover].HerbageGrowthWt as PastureGrowthRate
            ([AGPRyegrass].HerbageGrowthWt + [AGPWhiteClover].HerbageGrowthWt) * [Zone].Area as PaddockFeedAccum  // why did I have this?
      Zone Paddock02: Area=10; Slope=0; AspectAngle=0; Altitude=50
        Irrigation
        Fertiliser
        SurfaceOrganicMatter: InitialResidueName=Sward; InitialResidueType=grass; InitialResidueMass=1000; InitialStandingFraction=0; InitialCPR=0; InitialCNR=15
        PastureSpecies AGPRyegrass: doyGermination=275; daysEmergenceToAnthesis=120; daysAnthesisToMaturity=85; degreesDayForAnthesis=1100; degreesDayForMaturity=900; daysAnnualsFactor=45; CanopyType=PastureSpecies; InitialShootDM=1950; InitialRootDM=450; InitialRootDepth=750; initialDMFractionsGrasses=[0.15, 0.25, 0.25, 0.05, 0.05, 0.1, 0.1, 0.05, 0, 0, 0]; initialDMFractionsForbs=[0.2, 0.2, 0.15, 0.05, 0.1, 0.15, 0.1, 0.05, 0, 0, 0]; PhotosyntheticEfficiency=0.01; PhotosynthesisCurveFactor=0.8; FractionPAR=0.5; ReferenceCO2=380; CO2EffectScaleFactor=700; CO2EffectOffsetFactor=600; CO2EffectMinimum=0.7; CO2EffectExponent=2; ReproSeasonDurationCoeff=2; ReproSeasonShouldersLengthFactor=1; ReproSeasonOnsetDurationFactor=0.6; RelativeTurnoverEmerging=2; DetachmentDroughtCoefficient=3; DetachmentDroughtEffectMin=0.1; TurnoverStockFactor=0.01; TurnoverDefoliationEffectMin=0.025; MinimumGreenLeafProp=0.8; MinimumGreenRootProp=0.5
          initialDMFractionsLegumes=[0.16, 0.23, 0.22, 0.05, 0.03, 0.05, 0.05, 0.01, 0.04, 0.08, 0.08]
          LinearInterpolationFunction FVPDFunction
        PastureSpecies AGPWhiteClover: doyGermination=275; daysEmergenceToAnthesis=120; daysAnthesisToMaturity=85; degreesDayForAnthesis=1100; degreesDayForMaturity=900; daysAnnualsFactor=45; CanopyType=PastureSpecies; InitialShootDM=650; InitialRootDM=150; InitialRootDepth=350; initialDMFractionsGrasses=[0.15, 0.25, 0.25, 0.05, 0.05, 0.1, 0.1, 0.05, 0, 0, 0]; initialDMFractionsForbs=[0.2, 0.2, 0.15, 0.05, 0.1, 0.15, 0.1, 0.05, 0, 0, 0]; PhotosyntheticEfficiency=0.01; PhotosynthesisCurveFactor=0.8; FractionPAR=0.5; ReferenceCO2=380; CO2EffectScaleFactor=700; CO2EffectOffsetFactor=600; CO2EffectMinimum=0.7; CO2EffectExponent=2; ReproSeasonDurationCoeff=2; ReproSeasonShouldersLengthFactor=1; ReproSeasonOnsetDurationFactor=0.6; RelativeTurnoverEmerging=2; DetachmentDroughtCoefficient=3; DetachmentDroughtEffectMin=0.1; TurnoverStockFactor=0.01; TurnoverDefoliationEffectMin=0.025; MinimumGreenLeafProp=0.8; MinimumGreenRootProp=0.5
          initialDMFractionsLegumes=[0.16, 0.23, 0.22, 0.05, 0.03, 0.05, 0.05, 0.01, 0.04, 0.08, 0.08]
          LinearInterpolationFunction FVPDFunction
        Soil LismoreSoil: same as Simple Rotational Grazing Example.A Simple Rotational Grazing.Paddock01.LismoreSoil
        Report PdkReport: same as Simple Rotational Grazing Example.A Simple Rotational Grazing.Paddock01.PdkReport
      Zone Paddock03: Area=10; Slope=0; AspectAngle=0; Altitude=50
        Irrigation
        Fertiliser
        SurfaceOrganicMatter: InitialResidueName=Sward; InitialResidueType=grass; InitialResidueMass=1000; InitialStandingFraction=0; InitialCPR=0; InitialCNR=15
        PastureSpecies AGPRyegrass: doyGermination=275; daysEmergenceToAnthesis=120; daysAnthesisToMaturity=85; degreesDayForAnthesis=1100; degreesDayForMaturity=900; daysAnnualsFactor=45; CanopyType=PastureSpecies; InitialShootDM=1800; InitialRootDM=450; InitialRootDepth=750; initialDMFractionsGrasses=[0.15, 0.25, 0.25, 0.05, 0.05, 0.1, 0.1, 0.05, 0, 0, 0]; initialDMFractionsForbs=[0.2, 0.2, 0.15, 0.05, 0.1, 0.15, 0.1, 0.05, 0, 0, 0]; PhotosyntheticEfficiency=0.01; PhotosynthesisCurveFactor=0.8; FractionPAR=0.5; ReferenceCO2=380; CO2EffectScaleFactor=700; CO2EffectOffsetFactor=600; CO2EffectMinimum=0.7; CO2EffectExponent=2; ReproSeasonDurationCoeff=2; ReproSeasonShouldersLengthFactor=1; ReproSeasonOnsetDurationFactor=0.6; RelativeTurnoverEmerging=2; DetachmentDroughtCoefficient=3; DetachmentDroughtEffectMin=0.1; TurnoverStockFactor=0.01; TurnoverDefoliationEffectMin=0.025; MinimumGreenLeafProp=0.8; MinimumGreenRootProp=0.5
          initialDMFractionsLegumes=[0.16, 0.23, 0.22, 0.05, 0.03, 0.05, 0.05, 0.01, 0.04, 0.08, 0.08]
          LinearInterpolationFunction FVPDFunction
        PastureSpecies AGPWhiteClover: doyGermination=275; daysEmergenceToAnthesis=120; daysAnthesisToMaturity=85; degreesDayForAnthesis=1100; degreesDayForMaturity=900; daysAnnualsFactor=45; CanopyType=PastureSpecies; InitialShootDM=600; InitialRootDM=150; InitialRootDepth=350; initialDMFractionsGrasses=[0.15, 0.25, 0.25, 0.05, 0.05, 0.1, 0.1, 0.05, 0, 0, 0]; initialDMFractionsForbs=[0.2, 0.2, 0.15, 0.05, 0.1, 0.15, 0.1, 0.05, 0, 0, 0]; PhotosyntheticEfficiency=0.01; PhotosynthesisCurveFactor=0.8; FractionPAR=0.5; ReferenceCO2=380; CO2EffectScaleFactor=700; CO2EffectOffsetFactor=600; CO2EffectMinimum=0.7; CO2EffectExponent=2; ReproSeasonDurationCoeff=2; ReproSeasonShouldersLengthFactor=1; ReproSeasonOnsetDurationFactor=0.6; RelativeTurnoverEmerging=2; DetachmentDroughtCoefficient=3; DetachmentDroughtEffectMin=0.1; TurnoverStockFactor=0.01; TurnoverDefoliationEffectMin=0.025; MinimumGreenLeafProp=0.8; MinimumGreenRootProp=0.5
          initialDMFractionsLegumes=[0.16, 0.23, 0.22, 0.05, 0.03, 0.05, 0.05, 0.01, 0.04, 0.08, 0.08]
          LinearInterpolationFunction FVPDFunction
        Soil LismoreSoil: same as Simple Rotational Grazing Example.A Simple Rotational Grazing.Paddock01.LismoreSoil
        Report PdkReport: same as Simple Rotational Grazing Example.A Simple Rotational Grazing.Paddock01.PdkReport
      Zone Paddock04: Area=10; Slope=0; AspectAngle=0; Altitude=50
        Irrigation
        Fertiliser
        SurfaceOrganicMatter: InitialResidueName=Sward; InitialResidueType=grass; InitialResidueMass=1000; InitialStandingFraction=0; InitialCPR=0; InitialCNR=15
        PastureSpecies AGPRyegrass: doyGermination=275; daysEmergenceToAnthesis=120; daysAnthesisToMaturity=85; degreesDayForAnthesis=1100; degreesDayForMaturity=900; daysAnnualsFactor=45; CanopyType=PastureSpecies; InitialShootDM=1650; InitialRootDM=450; InitialRootDepth=750; initialDMFractionsGrasses=[0.15, 0.25, 0.25, 0.05, 0.05, 0.1, 0.1, 0.05, 0, 0, 0]; initialDMFractionsForbs=[0.2, 0.2, 0.15, 0.05, 0.1, 0.15, 0.1, 0.05, 0, 0, 0]; PhotosyntheticEfficiency=0.01; PhotosynthesisCurveFactor=0.8; FractionPAR=0.5; ReferenceCO2=380; CO2EffectScaleFactor=700; CO2EffectOffsetFactor=600; CO2EffectMinimum=0.7; CO2EffectExponent=2; ReproSeasonDurationCoeff=2; ReproSeasonShouldersLengthFactor=1; ReproSeasonOnsetDurationFactor=0.6; RelativeTurnoverEmerging=2; DetachmentDroughtCoefficient=3; DetachmentDroughtEffectMin=0.1; TurnoverStockFactor=0.01; TurnoverDefoliationEffectMin=0.025; MinimumGreenLeafProp=0.8; MinimumGreenRootProp=0.5
          initialDMFractionsLegumes=[0.16, 0.23, 0.22, 0.05, 0.03, 0.05, 0.05, 0.01, 0.04, 0.08, 0.08]
          LinearInterpolationFunction FVPDFunction
        PastureSpecies AGPWhiteClover: doyGermination=275; daysEmergenceToAnthesis=120; daysAnthesisToMaturity=85; degreesDayForAnthesis=1100; degreesDayForMaturity=900; daysAnnualsFactor=45; CanopyType=PastureSpecies; InitialShootDM=550; InitialRootDM=150; InitialRootDepth=350; initialDMFractionsGrasses=[0.15, 0.25, 0.25, 0.05, 0.05, 0.1, 0.1, 0.05, 0, 0, 0]; initialDMFractionsForbs=[0.2, 0.2, 0.15, 0.05, 0.1, 0.15, 0.1, 0.05, 0, 0, 0]; PhotosyntheticEfficiency=0.01; PhotosynthesisCurveFactor=0.8; FractionPAR=0.5; ReferenceCO2=380; CO2EffectScaleFactor=700; CO2EffectOffsetFactor=600; CO2EffectMinimum=0.7; CO2EffectExponent=2; ReproSeasonDurationCoeff=2; ReproSeasonShouldersLengthFactor=1; ReproSeasonOnsetDurationFactor=0.6; RelativeTurnoverEmerging=2; DetachmentDroughtCoefficient=3; DetachmentDroughtEffectMin=0.1; TurnoverStockFactor=0.01; TurnoverDefoliationEffectMin=0.025; MinimumGreenLeafProp=0.8; MinimumGreenRootProp=0.5
          initialDMFractionsLegumes=[0.16, 0.23, 0.22, 0.05, 0.03, 0.05, 0.05, 0.01, 0.04, 0.08, 0.08]
          LinearInterpolationFunction FVPDFunction
        Soil LismoreSoil: same as Simple Rotational Grazing Example.A Simple Rotational Grazing.Paddock01.LismoreSoil
        Report PdkReport: same as Simple Rotational Grazing Example.A Simple Rotational Grazing.Paddock01.PdkReport
      Zone Paddock05: Area=10; Slope=0; AspectAngle=0; Altitude=50
        Irrigation
        Fertiliser
        SurfaceOrganicMatter: InitialResidueName=Sward; InitialResidueType=grass; InitialResidueMass=1000; InitialStandingFraction=0; InitialCPR=0; InitialCNR=15
        PastureSpecies AGPRyegrass: doyGermination=275; daysEmergenceToAnthesis=120; daysAnthesisToMaturity=85; degreesDayForAnthesis=1100; degreesDayForMaturity=900; daysAnnualsFactor=45; CanopyType=PastureSpecies; InitialShootDM=1500; InitialRootDM=450; InitialRootDepth=750; initialDMFractionsGrasses=[0.15, 0.25, 0.25, 0.05, 0.05, 0.1, 0.1, 0.05, 0, 0, 0]; initialDMFractionsForbs=[0.2, 0.2, 0.15, 0.05, 0.1, 0.15, 0.1, 0.05, 0, 0, 0]; PhotosyntheticEfficiency=0.01; PhotosynthesisCurveFactor=0.8; FractionPAR=0.5; ReferenceCO2=380; CO2EffectScaleFactor=700; CO2EffectOffsetFactor=600; CO2EffectMinimum=0.7; CO2EffectExponent=2; ReproSeasonDurationCoeff=2; ReproSeasonShouldersLengthFactor=1; ReproSeasonOnsetDurationFactor=0.6; RelativeTurnoverEmerging=2; DetachmentDroughtCoefficient=3; DetachmentDroughtEffectMin=0.1; TurnoverStockFactor=0.01; TurnoverDefoliationEffectMin=0.025; MinimumGreenLeafProp=0.8; MinimumGreenRootProp=0.5
          initialDMFractionsLegumes=[0.16, 0.23, 0.22, 0.05, 0.03, 0.05, 0.05, 0.01, 0.04, 0.08, 0.08]
          LinearInterpolationFunction FVPDFunction
        PastureSpecies AGPWhiteClover: doyGermination=275; daysEmergenceToAnthesis=120; daysAnthesisToMaturity=85; degreesDayForAnthesis=1100; degreesDayForMaturity=900; daysAnnualsFactor=45; CanopyType=PastureSpecies; InitialShootDM=500; InitialRootDM=150; InitialRootDepth=350; initialDMFractionsGrasses=[0.15, 0.25, 0.25, 0.05, 0.05, 0.1, 0.1, 0.05, 0, 0, 0]; initialDMFractionsForbs=[0.2, 0.2, 0.15, 0.05, 0.1, 0.15, 0.1, 0.05, 0, 0, 0]; PhotosyntheticEfficiency=0.01; PhotosynthesisCurveFactor=0.8; FractionPAR=0.5; ReferenceCO2=380; CO2EffectScaleFactor=700; CO2EffectOffsetFactor=600; CO2EffectMinimum=0.7; CO2EffectExponent=2; ReproSeasonDurationCoeff=2; ReproSeasonShouldersLengthFactor=1; ReproSeasonOnsetDurationFactor=0.6; RelativeTurnoverEmerging=2; DetachmentDroughtCoefficient=3; DetachmentDroughtEffectMin=0.1; TurnoverStockFactor=0.01; TurnoverDefoliationEffectMin=0.025; MinimumGreenLeafProp=0.8; MinimumGreenRootProp=0.5
          initialDMFractionsLegumes=[0.16, 0.23, 0.22, 0.05, 0.03, 0.05, 0.05, 0.01, 0.04, 0.08, 0.08]
          LinearInterpolationFunction FVPDFunction
        Soil LismoreSoil: same as Simple Rotational Grazing Example.A Simple Rotational Grazing.Paddock01.LismoreSoil
        Report PdkReport: same as Simple Rotational Grazing Example.A Simple Rotational Grazing.Paddock01.PdkReport
  Folder Wheat Feedlot Sheep Grazing Example
    Simulation WheatSheepFeedlot
      Memo
        **Sheep grazing wheat and fed in feedlot**

        In this example simulation sheep are bought and sold on specified date.
        They are fed supplement in a feedlot at a set rate, but graze a wheat crop when crop biomass >= 2.4 t/ha.
        Sheep are moved from the wheat crop and back to feedlot when crop biomass reaches 0.5 t/ha or crop zadok = 31.

        Based on _Sprague SJ, Kirkegaard JA, Dove H, Graham JM, McDonald SE, Kelman WM (2015) Integrating dual-purpose wheat and canola into high-rainfall livestock systems in south-eastern Australia. 1. Crop forage and grain yield. Crop and Pasture Science 66(4), 365-376._

        **Activities in this manager:**

        1. Buy animals at start of year & put in feedlot
        2. Move animals from feedlot to crop when ready to graze
        3. Move animals from crop to feedlot
        4. Shear all animals on specified date
        5. Sell all animals at end of year

        **NOTES**

        1. When the animals are in the feedlot and an animal dies during the day, the supplement has already been fed into the feedlot
           based on the number of animals in the feedlot at the start of the day. This means the remaining animals have access to slightly
           more supplement and causes a spike in supp intake graph.
        2. When sheep are culled for age + purchased to maintain stocking rate, several groups of sheep are created.
           This causes irregular amounts of supplement to be fed.
      Clock: Start=1992-01-01; End=1996-06-30
      Summary SummaryFile
      Weather: FileName=%root%/Examples/WeatherFiles/AU_WaggaWagga.met; Latitude=-35; Tav=16.25; Amp=17.5
      SoilArbitrator
      Stock: RandSeed=9999
      Forages
        Parameters:
          Name                          LiveDigestibility  DeadDigestibility  LiveFractionConsumable  DeadFractionConsumable  LiveMinimumBiomass  DeadMinimumBiomass
          SurfaceOrganicMatter.Residue  0.7                0.3                1                       1                       100                 0
          Wheat.Grain                   0.7                0.3                1                       1                       100                 0
          Wheat.Root                    0.7                0.3                1                       1                       100                 0
          Wheat.Leaf                    0.7                0.3                1                       1                       100                 0
          Wheat.Spike                   0.7                0.3                1                       1                       100                 0
          Wheat.Stem                    0.7                0.3                1                       1                       100                 0
      Supplement: SpoilageTime=0
        Stores:
          Name            Stored  IsRoughage  DMContent  DMD  MEContent  CPConc  ProtDg  PConc   SConc   EEConc  ADIP2CP  AshAlk  MaxPassage
          fodder          0       true        0.85       0    0          0       0       0       0       0       0        0       0
          wheat, crushed  500     false       1          0.9  13.8       0.14    0.92    0.0038  0.0014  0.02    0.02     0.18    0
      Manager ManageStock
        Buying = True
        Genotype = Small Merino
        Sex = Female
        BuyDate = 1-Jan
        BuyAge = 12
        BuyWeight = 30
        BuyLactating = 0
        NumAntoBuy = 50
        Selling = True
        SaleFirstDate = 20-Dec
        SaleLastDate = 20-Dec
        SellPolicy = CulledForAge
        SaleAge = 36
        SaleWeight = -
        SalePercentAnimals = 100
        PaddockToMoveAnimalsTo = [WheatSheep]
        GrazingWindowStartDate = 1-Jan
        GrazingWindowEndDate = 31-Dec
        ExpressionToMoveAnimalsToField = Wheat.Phenology.Zadok > 0 && Wheat.Phenology.Zadok < 31 && Wheat.AboveGround.Wt >= 240
        ExpressionToMoveAnimalsToFeedlot = Wheat.Phenology.Zadok >= 31 || Wheat.AboveGround.Wt <= 50
        ShearDate = 15-dec
        Dummy =
```csharp
/*-------------------------------------------------------------------------------------
Sheep grazing wheat when conditions are suitable, and in feedlot the rest of the time.
---------------------------------------------------------------------------------------

In this script animals are bought and sold within a specified date window.
They are fed supplement in a feedlot at a set rate, but graze a wheat crop when a criteria is met.
Animals are moved from the wheat crop and back to feedlot when a second criteria is met.

Based on Sprague SJ, Kirkegaard JA, Dove H, Graham JM, McDonald SE, Kelman WM (2015) Integrating dual-purpose wheat and canola into high-rainfall livestock systems in south-eastern Australia. 1. Crop forage and grain yield. Crop and Pasture Science 66(4), 365-376. 

Activities in this manager:
1. Buy animals at start of year & put in feedlot
2. Move animals from feedlot to crop when ready to graze
3. Move animals from crop to feedlot 
4. Shear all animals on specified date
5. Sell all animals at end of year

NOTES
1. When the animals are in the feedlot and an animal dies during the day, the supplement has already been fed into the feedlot
   based on the number of animals in the feedlot at the start of the day. This means the remaining animals have access to slightly
   more supplement and causes a spike in supp intake graph
2. When sheep are culled for age + purchased to maintain stocking rate, several groups of sheep are created.
   This causes irregular amounts of supplement to be fed.
--------------------------------------------------------------------------------------*/


using System.Linq;
using System;
using System.Collections.Generic;
using Models.Core;
using Models.PMF;
using Models.Functions;
using Models.Soils;
using Models.Utilities;
using Models.GrazPlan;
using APSIM.Shared.Utilities;
using System.Diagnostics;

namespace Models
{
    [Serializable]
    [Description(
        "<p><b>Animals grazing a crop when conditions are suitable, and in feedlot the rest of the time.</b></p>" +
        "In this script animals are bought and sold within a specified date window. " +
        "They are fed supplement in a feedlot at a set rate, but graze a wheat crop when a criteria is met. " +
        "Animals are moved from the wheat crop and back to feedlot when a second criteria is met.")]    
    public class Script : Model
    {
        [Link] Clock clock;
        [Link] Stock Animals;
        [Link] Supplement Feed;
        [Link] Summary Summary;
        [Link] IPlant plant;
        [Link] Soil Soil;
        [Link] Zone Paddock;
        [Link] ScriptCompiler compiler;

        private IBooleanFunction expressionMoveAnimalsToField;
        private IBooleanFunction expressionMoveAnimalsToFeedlot;

        public enum SellPolicyType
        {
            Date,
            PercentageHerdWhenAverageWeightGreaterThan,
            PercentageHerdWhenAverageAgeGreaterThan,
            CulledForAge,
            CulledForWeight,
            SellYoung
        }

        ////////////////////////////////////////////////////////
        [Separator("Buying of animals")]

        [Description("Buy animals?")] 
        public bool Buying { get; set; }

        [Description("Stock: genotype (e.g. Small Merino, Angus, Friesian):")] 
        [Display(Values = "GetGenotypes")]
        public string Genotype { get; set; }

        [Description("Stock: sex (Female, Male, Castrate):")] 
        public ReproductiveType Sex { get; set; }

        [Description("Date to buy animals (dd-mmm)")] 
        [Display(EnabledCallback = "BuyingEnabled")]
        public string BuyDate { get; set; }

        [Description("Age of bought animals (months): ")] 
        [Display(EnabledCallback = "BuyingEnabled")]
        public double BuyAge { get; set; }

        [Description("Weight of bought animals (kg): ")] 
        [Display(EnabledCallback = "BuyingEnabled")]
        public double BuyWeight { get; set; }

        [Description("Zero denotes not lactating; 1 or more denotes the time (days) since parturition:")] 
        [Display(EnabledCallback = "BuyingEnabled")]
        public int BuyLactating { get; set; }

        [Description("Number of animals to buy: ")] 
        [Display(EnabledCallback = "BuyingEnabled")]
        public int NumAntoBuy { get; set; }

        ////////////////////////////////////////////////////////
        [Separator("Selling of animals")]

        [Description("Selling animals?")] 
        public bool Selling { get; set; }

        [Description("First date to consider selling animals (dd-mmm)")] 
        public string SaleFirstDate { get; set; }

        [Description("Last date to consider selling animals (dd-mmm)")] 
        public string SaleLastDate { get; set; }

        [Description("Selling policy ")] 
        [Display(EnabledCallback = "SellingEnabled")]
        public SellPolicyType SellPolicy { get; set; }

        [Description("Age at which to sell (months): ")] 
        [Display(EnabledCallback = "SellingAgeEnabled")]
        public int SaleAge { get; set; }

        [Description("Weight at which to sell (kg): ")] 
        [Display(EnabledCallback = "SellingWeightEnabled")]
        public double SaleWeight { get; set; }

        [Description("Percentage of animals to sell (%)")] 
        [Display(EnabledCallback = "SellingEnabled")]
        public double SalePercentAnimals { get; set; }

        ////////////////////////////////////////////////////////
        [Separator("Rule for moving animals into and out of paddock")]

        [Description("Name of paddock to move animals in to:")] 
        [Display(Type = DisplayType.Model, ModelType = typeof(Zone))]
        public IModel PaddockToMoveAnimalsTo { get; set; }

        [Description("First date to consider moving animals:")] 
        public string GrazingWindowStartDate { get; set; }

        [Description("Last date to consider moving animals:")] 
        public string GrazingWindowEndDate { get; set; }

        [Description("Criteria to move animals to field")]
        public string ExpressionToMoveAnimalsToField { get; set; }

        [Description("Criteria to move animals to feedlot")]
        public string ExpressionToMoveAnimalsToFeedlot { get; set; }


        ////////////////////////////////////////////////////////
        [Separator("Shearing")]
        [Description("Date to shear animals (dd-mmm)")] 
        public string ShearDate { get; set; }

        [Description(" ")] 
        public string Dummy { get; set; }

        ////////////////////////////////////////////////////////////////////////////
        // Callback properties to control disabling of properties.
        ////////////////////////////////////////////////////////////////////////////
        public bool BuyingEnabled { get { return Buying; } }

        public bool SellingEnabled { get { return Selling; } }

        public bool SellingAgeEnabled
        { 
            get
            { 
                return Selling &&
                (SellPolicy == SellPolicyType.PercentageHerdWhenAverageAgeGreaterThan || SellPolicy == SellPolicyType.CulledForAge);
            } 
        }

        public bool SellingWeightEnabled
        { 
            get
            { 
                return Selling &&
                (SellPolicy == SellPolicyType.PercentageHerdWhenAverageWeightGreaterThan || SellPolicy == SellPolicyType.CulledForWeight);
            } 
        }

        ////////////////////////////////////////////////////////////////////////////
        // Outputs
        ////////////////////////////////////////////////////////////////////////////
        // <summary>Number of animals sold.</summary>
        public int NumberSold { get; set; }

        // <summary>Description of something that has happened.</summary>
        public string EventName { get; set; }

        // <summary>Return a list of genotypes to the properties tab.</summary>
        public string[] GetGenotypes()
        {
            if (Animals != null)
                return Animals.Genotypes.Names.ToArray();
            return null;
        }

        public string CurrentLocation { get; set; }  // location of the sheep



        // ============================================================
        // Called once at beginning of simulation run
        // ============================================================
        [EventSubscribe("StartOfSimulation")]
        private void OnStartOfSimulation(object sender, EventArgs e)
        {
            if (string.IsNullOrEmpty(ExpressionToMoveAnimalsToField))
                throw new Exception("You must specify a criteria for moving animals to the field");
                
            if (CSharpExpressionFunction.Compile(ExpressionToMoveAnimalsToField, this, compiler, out IBooleanFunction function, out string errorMessages))
                expressionMoveAnimalsToField = function;
            else
                throw new Exception(errorMessages);
                        
            if (string.IsNullOrEmpty(ExpressionToMoveAnimalsToFeedlot))
                throw new Exception("You must specify a criteria for moving animals to the feedlot");
            if (CSharpExpressionFunction.Compile(ExpressionToMoveAnimalsToFeedlot, this, compiler, out IBooleanFunction function2, out string errorMessages2))
                expressionMoveAnimalsToFeedlot = function2;
            else
                throw new Exception(errorMessages2);

            CurrentLocation = "";
        }



        // ============================================================
        // Management that happens every day.
        // ============================================================
        [EventSubscribe("DoManagement")]
        private void OnDoManagement(object sender, EventArgs e)
        {
            EventName = string.Empty;

            // Buy animals
            if (Buying && DateUtilities.DatesAreEqual(BuyDate, clock.Today))
            {
                var purchase = new StockBuy();
                purchase.Genotype = Genotype;   // "small merino"
                purchase.Number = NumAntoBuy;
                purchase.Sex = Sex;               // "wethers"
                purchase.Age = BuyAge;
                purchase.Weight = BuyWeight;
                purchase.Lactating = BuyLactating;
                Animals.Buy(purchase);
                Animals.Move("Feedlot");
                EventName = NumAntoBuy + " animals bought";

                CurrentLocation = "Feedlot";
            }

            // Sell animals
            if (SellingEnabled && DateUtilities.WithinDates(SaleFirstDate, clock.Today, SaleLastDate))
            { 
                if (SellPolicy == SellPolicyType.PercentageHerdWhenAverageWeightGreaterThan || 
                    SellPolicy == SellPolicyType.PercentageHerdWhenAverageAgeGreaterThan)
                {
                    bool doSell = false;
                    if (SellPolicy == SellPolicyType.Date)
                        doSell = true;
                    else if (SellPolicy == SellPolicyType.PercentageHerdWhenAverageWeightGreaterThan && Animals.WeightAll >= SaleWeight)
                        doSell = true;
                    else if (SellPolicy == SellPolicyType.PercentageHerdWhenAverageAgeGreaterThan && Animals.AgeMonthsAll >= SaleAge)
                        doSell = true;

                    if (doSell)
                    {
                        NumberSold = Convert.ToInt32(Animals.NumberAll * SalePercentAnimals / 100.0);
                        Animals.Sell(NumberSold);
                        EventName = NumberSold + " animals sold";
                    }
                }
                else
                {
                    IEnumerable<AnimalGroup> animalsToSell = null;
                    if (SellPolicy == SellPolicyType.CulledForAge)
                    {
                        // split older animals into a new group
                        animalsToSell = Animals.SplitByAge(Convert.ToInt32(SaleAge * 30)); // months to days
                    }
                    else if (SellPolicy == SellPolicyType.CulledForWeight)
                    {
                        // split heavier animals into a new group
                        animalsToSell = Animals.SplitByWeight(SaleWeight);
                    }
                    else if (SellPolicy == SellPolicyType.SellYoung)
                    {
                        // split young (offspring) into new groups
                        animalsToSell = Animals.SplitByYoung();
                    }
                    if (animalsToSell != null)
                    {
                        var numberSellableAnimals = animalsToSell.Sum(g => g.NoAnimals);
                        var numberAnimalsToSell = Convert.ToInt32(numberSellableAnimals * SalePercentAnimals / 100.0);
                        if (numberAnimalsToSell > 0)
                            Animals.Sell(numberAnimalsToSell, animalsToSell);
                    }
                }
            }


            // Determine whether the animals are in the feedlot.
            bool animalsAreInFeedlot = Animals.AnimalGroups.FirstOrDefault(group => group.PaddOccupied.Name == "Feedlot") != null;
            bool inGrazingWindow = DateUtilities.WithinDates(GrazingWindowStartDate, clock.Today, GrazingWindowEndDate);

            if (animalsAreInFeedlot)
            {
                   // Animals are in feedlot. Determine if they can be moved to paddock.
                if (inGrazingWindow && expressionMoveAnimalsToField.Value())
                {
                    Animals.Move(PaddockToMoveAnimalsTo.Name);
                    EventName = "Animals moved to paddock";
                    CurrentLocation = "Paddock";
                }
            }
            else
            {
                // Animals are in paddock. Determine if they need to be moved to feedlot.
                if (!inGrazingWindow || expressionMoveAnimalsToFeedlot.Value())
                {
                    Animals.Move("Feedlot");
                    CurrentLocation = "Feedlot";
                    EventName = "Animals moved to feedlot";
                }
            }

            // Shear all animals on specified date
            if (DateUtilities.DatesEqual(ShearDate, clock.Today))
            {
                Animals.Shear(shearAdults: true, shearYoung: true);
                EventName = "Animals shorn";
            }
        }
    }
}
```
      Manager ManageSupplement
        FeedlotZone = [Feedlot]
        SupplementAmount = 0.5
        SupplementType = wheat, crushed
        SupplementMinAmount = 500
        SupplementMaxAmount = 5000
```csharp
using APSIM.Shared.Utilities;
using Models.GrazPlan;
using Models.Utilities;
using Models.Soils;
using Models.PMF;
using Models.Core;
using System;
using System.Linq;

namespace Models
{
    [Description(
    "<b>Supplement store management.</b>" +
    "<li> When animals are in feedlot, they are fed a set amount each day.</li>" +
    "<li> Will restock the supplement store when the store reaches a minimum level.</li>"
    )]
    [Serializable]
    public class Script : Model
    {
        [Link] Clock clock;
        [Link] Stock animals;
        [Link] Supplement supplement;

        [Description("Name of zone representing the feedlot")]
        [Display(Type=DisplayType.Model, ModelType=typeof(Zone))]
        public IModel FeedlotZone { get; set; }

        [Description("The amount of supplement to feed each animal each day (kg DM /head /day)")]
        public double SupplementAmount { get; set; }

        [Description("The type of supplement to feed the animals")]
        public string SupplementType { get; set; }

        [Description("Amount of supplement remaining before the store is replenished - i.e. to trigger a buy supplement event (kg DM)")]
        public double SupplementMinAmount { get; set; }

        [Description("Maximum supplement store - top up the store to this value when buying (kg DM)")]
        public double SupplementMaxAmount { get; set; }

        // ============================================================
        // Called every day to perform management actions
        // ============================================================
        [EventSubscribe("DoManagement")]
        private void OnDoManagement(object sender, EventArgs e)
        {
            // Determine how many animals are in feedlot.
            var animalGroupsInFeedlot = animals.AnimalGroups.Where(group => group.PaddOccupied.Name == FeedlotZone.Name);
            var totalNumAnimalsInFeedlot = animalGroupsInFeedlot.Sum(group => group.NoAnimals);

            // If there are animals in feedlot then feed them.
            if (totalNumAnimalsInFeedlot > 0)
                supplement.Feed(SupplementType, SupplementAmount * totalNumAnimalsInFeedlot, FeedlotZone.Name);     

            // Restock the supplement store if amount falls below SupplementMinAmount kg DM
            if (supplement.Stores[1].Stored <= SupplementMinAmount)       
                supplement.Buy(SupplementMaxAmount - supplement.Stores[1].Stored, SupplementType);
        }
    }
}
```
      Report ReportStock: EventNames=[Clock].EndOfDay
        VariableNames:
          [Clock].Today
          [ManageStock].Script.CurrentLocation as CurrentLocation
          [Stock].NumberAll as TotalHeadCount
          [Stock].NumberAll / [WheatSheep].Area as Stockrate //(sheep/ha)
          [Stock].Weight as SheepWeight // (kg)
          [Stock].AgeMonths as SheepAgeMonths //(month)
          [Stock].NoGroups
          [Stock].SuppIntakeAll.Weight as IntakeOfSupplementOnFeedlot
          [Stock].PastIntakeAll.Weight as IntakeOfWheatOnPaddock
          [Stock].PastIntakeAll.Weight * [Stock].NumberAll as BiomassRemovedBySheep
          [Supplement].stores[2].Stored as SupplementStored // (kg)
      Report ReportBiomass: EventNames=[Clock].EndOfDay
        VariableNames:
          [Clock].Today
          [ManageStock].Script.CurrentLocation as CurrentLocation
          [WheatSheep].Wheat.AboveGround.Wt*10 as TotalBiomass
          [WheatSheep].Wheat.Grain.Wt*10 as TotalYield
          [WheatNotGrazed].Wheat.AboveGround.Wt*10 as TotalBiomassUngrazed
          [WheatNotGrazed].Wheat.Grain.Wt*10 as TotalYieldUngrazed
          [WheatSheep].Wheat.Phenology.Zadok.Stage as Zadok
      Zone WheatSheep: Area=1; Slope=0; AspectAngle=0; Altitude=50
        Fertiliser
        Soil: ASCOrder=Podzolic; SoilType=?; Site=Canberra; NearestTown=Canberra; Region=Gungahlin District; State=Australian Capital Territory; Country=Australia; ApsoilNumber=580-YP; Latitude=-35.201; Longitude=149.082
          DataSource=YP. Ginnenderra Experiment Station (GES). Data provided by James Hunt, based on measurements by John Kirkegaard, characterisation done by Julianne Lilley. Ginnenderra Experiment Station
          Physical
            Thickness  BD    AirDry  LL15   DUL   SAT
            100        1.42  0.04    0.059  0.21  0.408
            100        1.42  0.04    0.064  0.21  0.408
            200        1.48  0.05    0.085  0.21  0.427
            100        1.48  0.06    0.114  0.21  0.427
            200        1.48  0.08    0.13   0.21  0.427
            100        1.48  0.08    0.137  0.21  0.427
            200        1.48  0.09    0.141  0.21  0.427
            300        1.48  0.11    0.15   0.21  0.427
            300        1.48  0.11    0.161  0.21  0.427
            200        1.48  0.11    0.174  0.21  0.427
            200        1.48  0.11    0.174  0.21  0.427
            SoilCrop WheatSoil
              LL=[0.059, 0.064, 0.085, 0.114, 0.13, 0.137, 0.141, 0.15, 0.161, 0.174, 0.174]
              KL=[0.08, 0.08, 0.06, 0.05, 0.04, 0.03, 0.03, 0.02, 0.02, 0.01, 0.01]
              XF=[1, 1, 1, 1, 1, 1, 1, 1, 0.7, 0.4, 0]
          WaterBalance SoilWater: SummerDate=1-Nov; SummerU=6; SummerCona=2; WinterDate=1-Apr; WinterU=2; WinterCona=2; DiffusConst=88; DiffusSlope=35.4; Salb=0.13; CN2Bare=72; CNRed=20; CNCov=0.8; PSIDul=-100; Thickness=[100, 100, 200, 100, 200, 100, 200, 300, 300, 200, 200]; SWCON=[0.8, 0.8, 0.8, 0.8, 0.8, 0.8, 0.8, 0.8, 0.6, 0.6, 0.6]
          Organic: FOMCNRatio=80; CarbonUnits=Total
            Thickness  Carbon  SoilCNRatio  FBiom  FInert  FOM
            100        2.2     10           0.06   0       671.213
            100        0.5     10           0.05   0       577.718
            200        0.3     10           0.03   0.3     427.984
            100        0.2     10           0.02   0.4     368.37
            200        0.2     10           0.02   0.5     272.895
            100        0.15    10           0.01   0.6     234.883
            200        0.15    10           0.01   0.8     174.005
            300        0.1     10           0.01   0.9     110.951
            300        0.08    10           0.01   1       70.7453
            200        0.06    10           0.01   1       52.4094
            200        0.04    10           0.01   1       38.8259
          Chemical: Thickness=[100, 100, 200, 100, 200, 100, 200, 300, 300, 200, 200]; PH=[5.1, 5.1, 5.3, 5.3, 5.9, 5.9, 6.4, 6.4, 6.8, 6.8, 6.8]; PHUnits=Water
          Water: Thickness=[100, 100, 200, 100, 200, 100, 200, 300, 300, 200, 200]; InitialPAWmm=148.5; RelativeTo=LL15; FilledFromTop=true
            InitialValues=[0.21, 0.21, 0.21, 0.21, 0.21, 0.21, 0.21, 0.21, 0.21, 0.21, 0.21]
          CERESSoilTemperature Temperature
          Nutrient
          Solute NO3: Thickness=[100, 100, 200, 100, 200, 100, 200, 300, 300, 200, 200]; InitialValuesUnits=ppm; WaterTableConcentration=0; D0=0; DepthConstant=0; MaxDepthSoluteAccessible=0; RunoffEffectivenessAtMovingSolute=0; MaxEffectiveRunoff=0
            InitialValues=[0.377074, 0.377074, 0.377074, 0.377074, 0.377074, 0.377074, 0.377074, 0.377074, 0.377074, 0.377074, 1]
          Solute NH4: Thickness=[100, 100, 200, 100, 200, 100, 200, 300, 300, 200, 200]; InitialValuesUnits=ppm; WaterTableConcentration=0; D0=0; DepthConstant=0; MaxDepthSoluteAccessible=0; RunoffEffectivenessAtMovingSolute=0; MaxEffectiveRunoff=0
            InitialValues=[0.0377074, 0.0377074, 0.0377074, 0.0377074, 0.0377074, 0.0377074, 0.0377074, 0.0377074, 0.0377074, 0.0377074, 0.2]
          Solute Urea: Thickness=[100, 100, 200, 100, 200, 100, 200, 300, 300, 200, 200]; InitialValues=[0, 0, 0, 0, 0, 0, 0, 0, 0, 0, 0]; InitialValuesUnits=kg/ha; WaterTableConcentration=0; D0=0; DepthConstant=0; MaxDepthSoluteAccessible=0; RunoffEffectivenessAtMovingSolute=0; MaxEffectiveRunoff=0
        SurfaceOrganicMatter: InitialResidueName=wheat_stubble; InitialResidueType=wheat; InitialResidueMass=500; InitialStandingFraction=0; InitialCPR=0; InitialCNR=100
        Plant Wheat
        MicroClimate: a_interception=0; b_interception=1; c_interception=0; d_interception=0; SoilHeatFluxFraction=0.4; MinimumHeightDiffForNewLayer=0; NightInterceptionFraction=0.5; ReferenceHeight=2
        Manager SowingRule
          StartDate = 1-mar
          EndDate = 30-mar
          MinESW = 0
          MinRain = 0
          RainDays = 0
          CultivarName = MacKellar
          SowingDepth = 30
          RowSpacing = 180
          Population = 200
```csharp
using Models.Interfaces;
using APSIM.Shared.Utilities;
using Models.Utilities;
using Models.Soils;
using Models.PMF;
using Models.Core;
using System;
using System.Linq;
using Models.Climate;

namespace Models
{
    [Serializable]
    public class Script : Model
    {
        [Link] private Clock Clock;
        [Link] private Fertiliser Fertiliser;
        [Link] private Summary Summary;
        [Link] private Plant Wheat;
        [Link] private Soil Soil;
        private Accumulator accumulatedRain;
        [Link]
        private ISoilWater waterBalance;
        
        [Description("Start of sowing window (d-mmm)")]
        public string StartDate { get; set;}
        [Description("End of sowing window (d-mmm)")]
        public string EndDate { get; set;}
        [Description("Minimum extractable soil water for sowing (mm)")]
        public double MinESW { get; set;}
        [Description("Accumulated rainfall required for sowing (mm)")]
        public double MinRain { get; set;}
        [Description("Duration of rainfall accumulation (d)")]
        public int RainDays { get; set;}
        [Description("Cultivar to be sown")]
        [Display(Type=DisplayType.CultivarName)]
        public string CultivarName { get; set;}
        [Description("Sowing depth (mm)")]
        public double SowingDepth { get; set;}        
        [Description("Row spacing (mm)")]
        public double RowSpacing { get; set;}    
        [Description("Plant population (/m2)")]
        public double Population { get; set;}    
        
        
        [EventSubscribe("StartOfSimulation")]
        private void OnSimulationCommencing(object sender, EventArgs e)
        {
            accumulatedRain = new Accumulator(this, "[Weather].Rain", RainDays);
        }
        

        [EventSubscribe("DoManagement")]
        private void OnDoManagement(object sender, EventArgs e)
        {
            accumulatedRain.Update();
            
            if (DateUtilities.WithinDates(StartDate,Clock.Today,EndDate) &&
                !Wheat.IsAlive &&
                MathUtilities.Sum(waterBalance.ESW) > MinESW &&
                accumulatedRain.Sum > MinRain)
            {
               Wheat.Sow(population:Population, cultivar:CultivarName, depth:SowingDepth, rowSpacing:RowSpacing);    
            }
        
        }
        
    }
}
```
        Manager SowingFertiliser
          Amount = 130
          CropName = wheat
```csharp
using Models.Soils;
using System.Linq;
using System;
using Models.Core;
using Models.PMF;
namespace Models
{
    [Serializable]
    public class Script : Model
    {
        [Link] Clock Clock;
        [Link] Fertiliser Fertiliser;
        [Link] Summary Summary;
        
        
        [Description("Amount of fertiliser to be applied (kg/ha)")]
        public double Amount { get; set;}
        
        [Description("Crop to be fertilised")]
        public string CropName { get; set;}
        
        
        

        [EventSubscribe("Sowing")]
        private void OnSowing(object sender, EventArgs e)
        {
            Model crop = sender as Model;
            if (crop.Name.ToLower()==CropName.ToLower())
                Fertiliser.Apply(Amount: Amount, Type: Fertiliser.Types.NO3N);
        }
        
    }
}
```
        Manager Harvest
      Zone Feedlot: Area=10; Slope=0; AspectAngle=0; Altitude=50
        Soil: same as Wheat Feedlot Sheep Grazing Example.WheatSheepFeedlot.WheatSheep.Soil
        SurfaceOrganicMatter: InitialResidueName=wheat_stubble; InitialResidueType=wheat; InitialResidueMass=0; InitialStandingFraction=0; InitialCPR=0; InitialCNR=100
        MicroClimate: a_interception=0; b_interception=1; c_interception=0; d_interception=0; SoilHeatFluxFraction=0.4; MinimumHeightDiffForNewLayer=0; NightInterceptionFraction=0.5; ReferenceHeight=2
        Report: VariableNames=[Clock].Today
      Zone WheatNotGrazed: Area=1; Slope=0; AspectAngle=0; Altitude=50
        Fertiliser
        Soil: same as Wheat Feedlot Sheep Grazing Example.WheatSheepFeedlot.WheatSheep.Soil
        SurfaceOrganicMatter: InitialResidueName=wheat_stubble; InitialResidueType=wheat; InitialResidueMass=500; InitialStandingFraction=0; InitialCPR=0; InitialCNR=100
        Plant Wheat
        MicroClimate: a_interception=0; b_interception=1; c_interception=0; d_interception=0; SoilHeatFluxFraction=0.4; MinimumHeightDiffForNewLayer=0; NightInterceptionFraction=0.5; ReferenceHeight=2
        Manager SowingRule: same as Wheat Feedlot Sheep Grazing Example.WheatSheepFeedlot.WheatSheep.SowingRule
        Manager SowingFertiliser: same as Wheat Feedlot Sheep Grazing Example.WheatSheepFeedlot.WheatSheep.SowingFertiliser
        Manager Harvest
```csharp
using APSIM.Shared.Utilities;
using Models.Utilities;
using Models.Soils;
using Models.PMF;
using Models.Core;
using System;
using System.Linq;

namespace Models
{
    [Serializable]
    public class Script : Model
    {
        [Link] Plant Wheat;

        [EventSubscribe("DoManagement")]
        private void OnDoManagement(object sender, EventArgs e)
        {
            if (Wheat.IsReadyForHarvesting)
            {
               Wheat.Harvest();
               Wheat.EndCrop();    
            }
        
        }
        
    }
}
```
      Memo Memo1
        These plots (working left to right and top to bottom) show:

        * The background colour shows the total head count while the two lines show the age of the stock in each group. Because the sheep are bought at 12 months and culled for age at 36 months (see the ManageStock component) there are two groups of sheep. Stock automatically manages groups so when you report characteristics of a particular group through a simulation you cannot guarantee that you are reporting about the same animals. Here when the sheep in group 1 are sold at 36 months of age at the end of 1993, the sheep previously in group 2 (the sheep bought at 12 months of age at the start of 1993) then become group 1. This is a point to be wary of when reporting from more complex stock management simulations. Tags (see the main documentation) can assist here.
        * This plot shows the liveweight of the two groups against a background of their location.
        * The yellow area shows the biomass of the wheat in the ungrazed paddock while the lines show the biomass of the grazed wheat and (on the right axis) the daily intake of the sheep while on the wheat crop.
        * The yellow area in the background shows the grain yield of the wheat in the ungrazed paddock while the line shows the yield of the grazed wheat. The background shows the location of the sheep. Note that there was no yield in 1995.
        * Feed intake per head per day and type of feed.
        * Remaining supplement stores against a background of the location of the sheep.
  Folder Changing Stock Genetic Parameters
    Memo Changing Stock Parameters
      # Changing Stock Genetic Parameters

      ## Overview

      The Stock model is an implementation of the CSIRO’s Australian Feeding Standards as expressed in the Grazplan (https://grazplan.csiro.au/) model.

      The technical paper describing Grazplan can be found at https://grazplan.csiro.au/wp-content/uploads/2007/08/TechPaperMay12.pdf

      The structure of the stock parameter strings (which can be found after adding a "Genotype" model to the "Stock" node) is not user friendly but they are needed so the code stays aligned with Grazplan.

      Note that changing default values may have unintended and drastic consequences on other animal growth and production processes.

      A useful resource to decipher the stock parameter strings are the Sheep and Cattle Explorer Excel spreadsheets. The Explorers are also useful to explore the effect of changing parameter values and they can be found at:

      * https://grazplan.csiro.au/wp-content/uploads/2007/08/SheepExplorer.xlsx for sheep and
      * https://grazplan.csiro.au/wp-content/uploads/2007/08/CattleExplorer.xlsx for cattle

      ## Example

      An example on how to change a parameter value is shown below. In the example, the Growth rate constant (CN1), which controls growth (and hence potential intake) will be changed from its default of 0.0115 to 0.02. There are two simulations in this file - one with the default value ("Default") and the changed value ("Changed"). The resultant differences are graphed in the "Difference graph", in this case milk solids have been plotted.

      1. in the Cattle Explorer Excel sheet, go to the "Pot.Intake" worksheet and confirm that the default Growth rate constant (CN1) is 0.0115 (cell B6). Note also any other numbers listed above or below the desired parameter - this is to double check you have the right value in the Stock GUI

      2. in the Genotype node (the "Friesian" node under the main Stock node; this is where the animal's default parameters are defined) look for the appropriate name in the left hand column i.e. Growth
      3. this name is followed by notation ("Growth C c-n-") in which the last two characters match that in the Explorer (CN)
      4. ensure that the default value (0.0115) in the Cattle Explorer is found in the array in the right hand column along with the other numbers next to the default value of interest. This is just to ensure that you are dealing with the right parameter value
      5. double click the array and change the default value to the new, desired value (0.02)
      6. click away to save the changed value
      7. run the simulations and note the difference(s)
    Memo Feedlot memo
      ## A note about how the feedlot is used in these simulations

      The Feedlot simulation is a simple illustration of the Stock model by using animals entering a feedlot, being fed and milked and leaving the feedlot. In addition to the Stock model itself and the Supplement specification GUI, at its core is the ChangeLactatingCowNumber GUI, the Stock operations and the Supplement operations. Both the operation files are based on stock and pasture/supplement data from the LUDF dataset (see the Validation memo for details). In the Stock operations, data on actual LUDF weekly changes in cow number have been collated from 1/08/2004 to 30/06/2017. Positive numbers denote lactating cows have been bought and moved to the feedlot while negative numbers are when cows are dried off and removed from the feedlot. It was assumed that cows were bought at weekly intervals. For the Supplement operations, six types of supplements labelled "silage_11me", "pasture_11.5me", "pasture_12me", "pasture_12.5me", "pasture_13me", and "pasture_13.5me" are bought. An excess amount of each supplement is bought (enough to last longer than the simulation) and their characteristics must be specified in the Supplement node. The LUDF dataseet is based on weekly reports - the daily pasture and supplements supplied (and their characteristics such as ME content) listed in the Supplement operations was extrapolated from the weekly data to the intervening days.
    Simulation Default
      Clock: Start=2004-08-01; End=2006-06-30
      Weather: FileName=%root%/Examples/WeatherFiles/NZ_Lincoln.met; Latitude=-43.624; Tav=11.4; Amp=11.5
      MicroClimate: a_interception=0; b_interception=1; c_interception=0; d_interception=0; SoilHeatFluxFraction=0.4; MinimumHeightDiffForNewLayer=0; NightInterceptionFraction=0.5; ReferenceHeight=2
      Manager ChangeLactatingCowNumber
        Genotype = Friesian
        Sex = Female
        Age = 48
        Weight = 480
        Pregnant = 0
        Lactating = 2
        NumYoung = 0
```csharp
using Models.Soils;
using System.Linq;
using System;
using Models.Core;
using Models.Utilities;
using Models.GrazPlan;
using APSIM.Shared.Utilities;
using System.Diagnostics;

namespace Models
{

    [Serializable]
    public class Script : Model
    {
        [Link] Clock clock;
        [Link] Stock stock;
        [Link] Supplement supplement;
        [Link] ISummary summary;
        [Link] Simulation farm;

        public enum Genotypes
        {
            Friesian,
            Jersey,
            EternalKiwiCross
        }

        [Separator("Stock type info, the same type of stock are brought onto the paddock at each grazing")]

        [Description("Stock: genotype (e.g. Friesian, Jersey):")] 
        public Genotypes Genotype { get; set; }

        [Description("Stock: sex (Female, Male, Castrate):")] 
        public ReproductiveType Sex { get; set; }

        [Description("Stock: age (months):")] 
        public double Age { get; set; }

        [Description("Stock: weight (kg liveweight /head):")] 
        public double Weight { get; set; }

        [Description("Stock: fertility status (0 if non-pregnant or days since conception):")] 
        public int Pregnant { get; set; }

        [Description("Stock: lactation status (0 if non-lactating or days since parturition):")]
        public int Lactating { get; set; }

        [Description("Stock: Number of young (foetuses or calves):")]
        public int NumYoung { get; set; }

        public void ChangeStockNum(int NumCowsToChange, string NewLocation)
        {
            if (NumCowsToChange > 0)
            {
                int preg = Pregnant;
                int lact = Lactating;
                int numyoung = NumYoung;

                if (stock.AnimalGroups.Count == 2)
                {
                    preg = stock.AnimalGroups[1].Pregnancy;
                    lact = stock.AnimalGroups[1].Lactation;
                    numyoung = stock.AnimalGroups[1].NoFoetuses;
                }

                StockBuy purchase = new StockBuy();
                purchase.Genotype = ReflectionUtilities.EnumToString(Genotype);
                purchase.Number = NumCowsToChange; //from the Operations file; positive is buy, negative is sell
                purchase.Sex = Sex;
                purchase.Age = Age;       // age in months
                purchase.Weight = Weight;  // liveweight in kg
                purchase.UseTag = 1;
                purchase.MatedTo = purchase.Genotype;
                purchase.Pregnant = preg;   // days pregnant
                purchase.Lactating = lact;  // days lactating
                purchase.NumYoung = numyoung;    // cows can be bought lactating with no young

                stock.Buy(purchase);

                stock.Move(NewLocation);

            }

            if (NumCowsToChange < 0)
                stock.Sell(-NumCowsToChange);
        }
    
    }
}
```
      Operations Stock operations
        2004-09-04  [ChangeLactatingCowNumber].Script.ChangeStockNum(390,Feedlot)
        2004-09-11  [ChangeLactatingCowNumber].Script.ChangeStockNum(54,Feedlot)
        2004-09-18  [ChangeLactatingCowNumber].Script.ChangeStockNum(46,Feedlot)
        2004-09-25  [ChangeLactatingCowNumber].Script.ChangeStockNum(47,Feedlot)
        2004-09-27  [ChangeLactatingCowNumber].Script.ChangeStockNum(18,Feedlot)
        2004-10-04  [ChangeLactatingCowNumber].Script.ChangeStockNum(20,Feedlot)
        2004-10-11  [ChangeLactatingCowNumber].Script.ChangeStockNum(23,Feedlot)
        2004-10-18  [ChangeLactatingCowNumber].Script.ChangeStockNum(34,Feedlot)
        2004-10-25  [ChangeLactatingCowNumber].Script.ChangeStockNum(8,Feedlot)
        2004-10-28  [ChangeLactatingCowNumber].Script.ChangeStockNum(9,Feedlot)
        2005-03-25  [ChangeLactatingCowNumber].Script.ChangeStockNum(-5,Feedlot)
        2005-03-28  [ChangeLactatingCowNumber].Script.ChangeStockNum(-6,Feedlot)
        2005-04-04  [ChangeLactatingCowNumber].Script.ChangeStockNum(-32,Feedlot)
        2005-04-11  [ChangeLactatingCowNumber].Script.ChangeStockNum(2,Feedlot)
        2005-04-18  [ChangeLactatingCowNumber].Script.ChangeStockNum(-9,Feedlot)
        2005-04-25  [ChangeLactatingCowNumber].Script.ChangeStockNum(0,Feedlot)
        2005-04-27  [ChangeLactatingCowNumber].Script.ChangeStockNum(-51,Feedlot)
        2005-05-04  [ChangeLactatingCowNumber].Script.ChangeStockNum(-67,Feedlot)
        2005-05-11  [ChangeLactatingCowNumber].Script.ChangeStockNum(-82,Feedlot)
        2005-05-18  [ChangeLactatingCowNumber].Script.ChangeStockNum(2,Feedlot)
        2005-05-19  [ChangeLactatingCowNumber].Script.ChangeStockNum(-401,Feedlot)
        2005-08-04  [ChangeLactatingCowNumber].Script.ChangeStockNum(98,Feedlot)
        2005-08-11  [ChangeLactatingCowNumber].Script.ChangeStockNum(90,Feedlot)
        2005-08-18  [ChangeLactatingCowNumber].Script.ChangeStockNum(152,Feedlot)
        2005-08-25  [ChangeLactatingCowNumber].Script.ChangeStockNum(44,Feedlot)
        2005-08-28  [ChangeLactatingCowNumber].Script.ChangeStockNum(43,Feedlot)
        2005-09-04  [ChangeLactatingCowNumber].Script.ChangeStockNum(22,Feedlot)
        2005-09-11  [ChangeLactatingCowNumber].Script.ChangeStockNum(31,Feedlot)
        2005-09-18  [ChangeLactatingCowNumber].Script.ChangeStockNum(44,Feedlot)
        2005-09-25  [ChangeLactatingCowNumber].Script.ChangeStockNum(28,Feedlot)
        2005-09-27  [ChangeLactatingCowNumber].Script.ChangeStockNum(33,Feedlot)
        2005-10-04  [ChangeLactatingCowNumber].Script.ChangeStockNum(18,Feedlot)
        2005-10-11  [ChangeLactatingCowNumber].Script.ChangeStockNum(17,Feedlot)
        2005-10-18  [ChangeLactatingCowNumber].Script.ChangeStockNum(7,Feedlot)
        2005-10-25  [ChangeLactatingCowNumber].Script.ChangeStockNum(6,Feedlot)
        2005-10-28  [ChangeLactatingCowNumber].Script.ChangeStockNum(2,Feedlot)
        2005-11-04  [ChangeLactatingCowNumber].Script.ChangeStockNum(7,Feedlot)
        2005-11-11  [ChangeLactatingCowNumber].Script.ChangeStockNum(9,Feedlot)
        2006-03-04  [ChangeLactatingCowNumber].Script.ChangeStockNum(-7,Feedlot)
        2006-03-11  [ChangeLactatingCowNumber].Script.ChangeStockNum(-1,Feedlot)
        2006-03-18  [ChangeLactatingCowNumber].Script.ChangeStockNum(-2,Feedlot)
        2006-03-25  [ChangeLactatingCowNumber].Script.ChangeStockNum(-8,Feedlot)
        2006-03-28  [ChangeLactatingCowNumber].Script.ChangeStockNum(-2,Feedlot)
        2006-04-04  [ChangeLactatingCowNumber].Script.ChangeStockNum(-11,Feedlot)
        2006-04-11  [ChangeLactatingCowNumber].Script.ChangeStockNum(-11,Feedlot)
        2006-04-18  [ChangeLactatingCowNumber].Script.ChangeStockNum(-1,Feedlot)
        2006-04-25  [ChangeLactatingCowNumber].Script.ChangeStockNum(-2,Feedlot)
        2006-04-27  [ChangeLactatingCowNumber].Script.ChangeStockNum(0,Feedlot)
        2006-05-04  [ChangeLactatingCowNumber].Script.ChangeStockNum(-41,Feedlot)
        2006-05-11  [ChangeLactatingCowNumber].Script.ChangeStockNum(-37,Feedlot)
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        2006-05-18  [ChangeLactatingCowNumber].Script.ChangeStockNum(4,Feedlot)
        2006-05-25  [ChangeLactatingCowNumber].Script.ChangeStockNum(-251,Feedlot)
        2006-05-26  [ChangeLactatingCowNumber].Script.ChangeStockNum(-281,Feedlot)
        2006-07-25  [ChangeLactatingCowNumber].Script.ChangeStockNum(26,Feedlot)
        2006-08-04  [ChangeLactatingCowNumber].Script.ChangeStockNum(45,Feedlot)
        2006-08-11  [ChangeLactatingCowNumber].Script.ChangeStockNum(87,Feedlot)
        2006-08-18  [ChangeLactatingCowNumber].Script.ChangeStockNum(124,Feedlot)
        2006-08-25  [ChangeLactatingCowNumber].Script.ChangeStockNum(86,Feedlot)
        2006-09-04  [ChangeLactatingCowNumber].Script.ChangeStockNum(62,Feedlot)
        2006-09-11  [ChangeLactatingCowNumber].Script.ChangeStockNum(41,Feedlot)
        2006-10-25  [ChangeLactatingCowNumber].Script.ChangeStockNum(11,Feedlot)
        2006-10-28  [ChangeLactatingCowNumber].Script.ChangeStockNum(3,Feedlot)
        2006-11-11  [ChangeLactatingCowNumber].Script.ChangeStockNum(1,Feedlot)
        2007-03-04  [ChangeLactatingCowNumber].Script.ChangeStockNum(-22,Feedlot)
        2007-03-11  [ChangeLactatingCowNumber].Script.ChangeStockNum(-23,Feedlot)
        2007-03-18  [ChangeLactatingCowNumber].Script.ChangeStockNum(-4,Feedlot)
        2007-03-25  [ChangeLactatingCowNumber].Script.ChangeStockNum(-3,Feedlot)
        2007-05-04  [ChangeLactatingCowNumber].Script.ChangeStockNum(-94,Feedlot)
        2007-05-11  [ChangeLactatingCowNumber].Script.ChangeStockNum(-10,Feedlot)
        2007-05-18  [ChangeLactatingCowNumber].Script.ChangeStockNum(-18,Feedlot)
        2007-05-25  [ChangeLactatingCowNumber].Script.ChangeStockNum(-25,Feedlot)
        2007-05-26  [ChangeLactatingCowNumber].Script.ChangeStockNum(-461,Feedlot)
        2007-07-28  [ChangeLactatingCowNumber].Script.ChangeStockNum(74,Feedlot)
        2007-08-04  [ChangeLactatingCowNumber].Script.ChangeStockNum(39,Feedlot)
        2007-08-18  [ChangeLactatingCowNumber].Script.ChangeStockNum(106,Feedlot)
        2007-08-25  [ChangeLactatingCowNumber].Script.ChangeStockNum(69,Feedlot)
        2007-09-11  [ChangeLactatingCowNumber].Script.ChangeStockNum(36,Feedlot)
        2007-09-25  [ChangeLactatingCowNumber].Script.ChangeStockNum(25,Feedlot)
        2007-09-29  [ChangeLactatingCowNumber].Script.ChangeStockNum(27,Feedlot)
        2007-10-06  [ChangeLactatingCowNumber].Script.ChangeStockNum(16,Feedlot)
        2007-10-20  [ChangeLactatingCowNumber].Script.ChangeStockNum(14,Feedlot)
        2007-10-27  [ChangeLactatingCowNumber].Script.ChangeStockNum(10,Feedlot)
        2008-03-08  [ChangeLactatingCowNumber].Script.ChangeStockNum(-34,Feedlot)
        2008-05-03  [ChangeLactatingCowNumber].Script.ChangeStockNum(-38,Feedlot)
        2008-05-10  [ChangeLactatingCowNumber].Script.ChangeStockNum(-210,Feedlot)
        2008-05-17  [ChangeLactatingCowNumber].Script.ChangeStockNum(-24,Feedlot)
        2008-05-18  [ChangeLactatingCowNumber].Script.ChangeStockNum(-370,Feedlot)
        2008-08-02  [ChangeLactatingCowNumber].Script.ChangeStockNum(63,Feedlot)
        2008-08-16  [ChangeLactatingCowNumber].Script.ChangeStockNum(72,Feedlot)
        2008-08-23  [ChangeLactatingCowNumber].Script.ChangeStockNum(121,Feedlot)
        2008-08-30  [ChangeLactatingCowNumber].Script.ChangeStockNum(83,Feedlot)
        2008-09-13  [ChangeLactatingCowNumber].Script.ChangeStockNum(59,Feedlot)
        2009-02-21  [ChangeLactatingCowNumber].Script.ChangeStockNum(-30,Feedlot)
        2009-03-28  [ChangeLactatingCowNumber].Script.ChangeStockNum(-33,Feedlot)
        2009-04-11  [ChangeLactatingCowNumber].Script.ChangeStockNum(-19,Feedlot)
        2009-04-25  [ChangeLactatingCowNumber].Script.ChangeStockNum(-48,Feedlot)
        2009-05-09  [ChangeLactatingCowNumber].Script.ChangeStockNum(-65,Feedlot)
        2009-05-16  [ChangeLactatingCowNumber].Script.ChangeStockNum(-61,Feedlot)
        2009-05-24  [ChangeLactatingCowNumber].Script.ChangeStockNum(-335,Feedlot)
        2009-08-15  [ChangeLactatingCowNumber].Script.ChangeStockNum(70,Feedlot)
        2009-08-22  [ChangeLactatingCowNumber].Script.ChangeStockNum(107,Feedlot)
        2009-08-29  [ChangeLactatingCowNumber].Script.ChangeStockNum(118,Feedlot)
        2009-09-19  [ChangeLactatingCowNumber].Script.ChangeStockNum(51,Feedlot)
        2009-09-26  [ChangeLactatingCowNumber].Script.ChangeStockNum(19,Feedlot)
        2010-05-02  [ChangeLactatingCowNumber].Script.ChangeStockNum(-29,Feedlot)
        2010-05-15  [ChangeLactatingCowNumber].Script.ChangeStockNum(-128,Feedlot)
        2010-05-22  [ChangeLactatingCowNumber].Script.ChangeStockNum(-78,Feedlot)
        2010-05-23  [ChangeLactatingCowNumber].Script.ChangeStockNum(-334,Feedlot)
        2010-07-31  [ChangeLactatingCowNumber].Script.ChangeStockNum(42,Feedlot)
        2010-08-14  [ChangeLactatingCowNumber].Script.ChangeStockNum(56,Feedlot)
      Operations Supplement operations
        2004-09-04  [Supplement].Buy(2E+18,"silage_11me")
        2004-09-04  [Supplement].Buy(2E+18,"pasture_11.5me")
        2004-09-04  [Supplement].Buy(2E+18,"pasture_12me")
        2004-09-04  [Supplement].Buy(2E+18,"pasture_12.5me")
        2004-09-04  [Supplement].Buy(2E+18,"pasture_13me")
        2004-09-04  [Supplement].Buy(2E+18,"pasture_13.5me")
        2004-09-04  [Supplement].Feed("pasture_13me",3861,"Feedlot")
        2004-09-05  [Supplement].Feed("pasture_13me",3861,"Feedlot")
        2004-09-06  [Supplement].Feed("pasture_13me",3861,"Feedlot")
        2004-09-07  [Supplement].Feed("pasture_13me",3861,"Feedlot")
        2004-09-08  [Supplement].Feed("pasture_13me",3861,"Feedlot")
        2004-09-09  [Supplement].Feed("pasture_13me",3861,"Feedlot")
        2004-09-10  [Supplement].Feed("pasture_13me",3861,"Feedlot")
        2004-09-11  [Supplement].Feed("pasture_13me",4351.2,"Feedlot")
        2004-09-12  [Supplement].Feed("pasture_13me",4351.2,"Feedlot")
        2004-09-13  [Supplement].Feed("pasture_13me",4351.2,"Feedlot")
        2004-09-14  [Supplement].Feed("pasture_13me",4351.2,"Feedlot")
        2004-09-15  [Supplement].Feed("pasture_13me",4351.2,"Feedlot")
        2004-09-16  [Supplement].Feed("pasture_13me",4351.2,"Feedlot")
        2004-09-17  [Supplement].Feed("pasture_13me",4351.2,"Feedlot")
        2004-09-18  [Supplement].Feed("pasture_13me",4459,"Feedlot")
        2004-09-19  [Supplement].Feed("pasture_13me",4459,"Feedlot")
        2004-09-20  [Supplement].Feed("pasture_13me",4459,"Feedlot")
        2004-09-21  [Supplement].Feed("pasture_13me",4459,"Feedlot")
        2004-09-22  [Supplement].Feed("pasture_13me",4459,"Feedlot")
        2004-09-23  [Supplement].Feed("pasture_13me",4459,"Feedlot")
        2004-09-24  [Supplement].Feed("pasture_13me",4459,"Feedlot")
        2004-09-25  [Supplement].Feed("pasture_13me",6981,"Feedlot")
        2004-09-26  [Supplement].Feed("pasture_13me",6981,"Feedlot")
        2004-09-27  [Supplement].Feed("pasture_13me",8991,"Feedlot")
        2004-09-28  [Supplement].Feed("pasture_13me",8991,"Feedlot")
        2004-09-29  [Supplement].Feed("pasture_13me",8991,"Feedlot")
        2004-09-30  [Supplement].Feed("pasture_13me",8991,"Feedlot")
        2004-10-01  [Supplement].Feed("pasture_13me",8991,"Feedlot")
        2004-10-02  [Supplement].Feed("pasture_13me",8991,"Feedlot")
        2004-10-03  [Supplement].Feed("pasture_13me",8991,"Feedlot")
        2004-10-04  [Supplement].Feed("pasture_13me",7820,"Feedlot")
        2004-10-05  [Supplement].Feed("pasture_13me",7820,"Feedlot")
        2004-10-06  [Supplement].Feed("pasture_13me",7820,"Feedlot")
        2004-10-07  [Supplement].Feed("pasture_13me",7820,"Feedlot")
        2004-10-08  [Supplement].Feed("pasture_13me",7820,"Feedlot")
        2004-10-09  [Supplement].Feed("pasture_13me",7820,"Feedlot")
        2004-10-10  [Supplement].Feed("pasture_13me",7820,"Feedlot")
        2004-10-11  [Supplement].Feed("pasture_13me",9209.2,"Feedlot")
        2004-10-12  [Supplement].Feed("pasture_13me",9209.2,"Feedlot")
        2004-10-13  [Supplement].Feed("pasture_13me",9209.2,"Feedlot")
        2004-10-14  [Supplement].Feed("pasture_13me",9209.2,"Feedlot")
        2004-10-15  [Supplement].Feed("pasture_13me",9209.2,"Feedlot")
        2004-10-16  [Supplement].Feed("pasture_13me",9209.2,"Feedlot")
        2004-10-17  [Supplement].Feed("pasture_13me",9209.2,"Feedlot")
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        2004-10-18  [Supplement].Feed("pasture_13me",9353.6,"Feedlot")
        2004-10-25  [Supplement].Feed("pasture_12.5me",10368,"Feedlot")
        2004-10-28  [Supplement].Feed("pasture_12.5me",10189.3,"Feedlot")
        2004-11-04  [Supplement].Feed("pasture_12me",12319.5,"Feedlot")
        2004-11-11  [Supplement].Feed("pasture_12.5me",10852.8,"Feedlot")
        2004-11-18  [Supplement].Feed("pasture_12.5me",11469.6,"Feedlot")
        2004-11-25  [Supplement].Feed("pasture_12.5me",11033,"Feedlot")
        2004-11-27  [Supplement].Feed("pasture_12.5me",10968.1,"Feedlot")
        2004-12-04  [Supplement].Feed("pasture_12.5me",9475.4,"Feedlot")
        2004-12-11  [Supplement].Feed("pasture_12.5me",10157.9,"Feedlot")
        2004-12-18  [Supplement].Feed("pasture_12.5me",9590.4,"Feedlot")
        2004-09-04  [Supplement].Feed("silage_11me",507,"Feedlot")
        2004-09-11  [Supplement].Feed("silage_11me",0,"Feedlot")
        2004-12-04  [Supplement].Feed("silage_11me",2271.5,"Feedlot")
        2004-12-11  [Supplement].Feed("silage_11me",517.6,"Feedlot")
        2004-12-18  [Supplement].Feed("silage_11me",1490.4,"Feedlot")
        2004-12-25  [Supplement].Feed("silage_11me",1932,"Feedlot")
        2004-12-28  [Supplement].Feed("silage_11me",388.2,"Feedlot")
        2005-01-25  [Supplement].Feed("silage_11me",841.1,"Feedlot")
        2005-01-28  [Supplement].Feed("silage_11me",905.8,"Feedlot")
        2005-02-04  [Supplement].Feed("silage_11me",1485.8,"Feedlot")
        2005-02-11  [Supplement].Feed("silage_11me",832,"Feedlot")
        2005-03-04  [Supplement].Feed("silage_11me",2503.8,"Feedlot")
        2005-03-11  [Supplement].Feed("silage_11me",2115.3,"Feedlot")
        2005-03-18  [Supplement].Feed("silage_11me",4050.9,"Feedlot")
        2005-03-25  [Supplement].Feed("silage_11me",3799.6,"Feedlot")
        2005-03-28  [Supplement].Feed("silage_11me",4083.2,"Feedlot")
        2005-04-04  [Supplement].Feed("silage_11me",2605.8,"Feedlot")
        2005-04-11  [Supplement].Feed("silage_11me",2796.8,"Feedlot")
        2005-04-18  [Supplement].Feed("silage_11me",3534.1,"Feedlot")
        2005-04-25  [Supplement].Feed("silage_11me",3414.3,"Feedlot")
        2005-04-27  [Supplement].Feed("silage_11me",3945.6,"Feedlot")
        2005-05-04  [Supplement].Feed("silage_11me",3222.7,"Feedlot")
        2005-05-11  [Supplement].Feed("silage_11me",2513.7,"Feedlot")
        2005-05-18  [Supplement].Feed("silage_11me",2566.4,"Feedlot")
        2005-09-18  [Supplement].Feed("silage_11me",4034.8,"Feedlot")
        2005-10-04  [Supplement].Feed("silage_11me",1869.3,"Feedlot")
        2005-10-11  [Supplement].Feed("silage_11me",3038,"Feedlot")
        2005-10-18  [Supplement].Feed("silage_11me",752.4,"Feedlot")
        2005-11-18  [Supplement].Feed("silage_11me",1367.1,"Feedlot")
        2005-11-25  [Supplement].Feed("silage_11me",7203.9,"Feedlot")
        2005-11-27  [Supplement].Feed("silage_11me",4314.8,"Feedlot")
        2005-12-04  [Supplement].Feed("silage_11me",2206.6,"Feedlot")
        2005-12-28  [Supplement].Feed("silage_11me",1038.4,"Feedlot")
        2006-01-04  [Supplement].Feed("silage_11me",1425.6,"Feedlot")
        2006-01-11  [Supplement].Feed("silage_11me",1099.9,"Feedlot")
        2006-02-11  [Supplement].Feed("silage_11me",1733.4,"Feedlot")
        2006-02-18  [Supplement].Feed("silage_11me",2957.8,"Feedlot")
        2006-03-04  [Supplement].Feed("silage_11me",1288,"Feedlot")
        2006-03-11  [Supplement].Feed("silage_11me",2636.3,"Feedlot")
        2006-03-18  [Supplement].Feed("silage_11me",2756.3,"Feedlot")
        2006-03-25  [Supplement].Feed("silage_11me",3544.8,"Feedlot")
        2006-03-28  [Supplement].Feed("silage_11me",4101.5,"Feedlot")
        2006-04-04  [Supplement].Feed("silage_11me",3472,"Feedlot")
        2006-04-11  [Supplement].Feed("silage_11me",3105.9,"Feedlot")
        2006-04-18  [Supplement].Feed("silage_11me",3648,"Feedlot")
        2006-04-25  [Supplement].Feed("silage_11me",2787.6,"Feedlot")
        2006-04-27  [Supplement].Feed("silage_11me",2060.4,"Feedlot")
        2006-05-04  [Supplement].Feed("silage_11me",2203.5,"Feedlot")
        2006-05-11  [Supplement].Feed("silage_11me",2006.4,"Feedlot")
        Memo Supplement operations memo
          The Supplement operation file is based on pasture/supplement data from the LUDF dataset (see the Validation memo for details).  For the Supplement operations, there are six types of supplements labelled "silage_11me", "pasture_11.5me", "pasture_12me", "pasture_12.5me", "pasture_13me", and "pasture_13.5me" that are bought at the start of the simulation. An excess amount, expressed in kilograms, of each supplement is bought - enough to last longer than the simulation (2E+18 kg in the LUDF validation) and their characteristics must be specified in the Supplement node. The LUDF dataset is based on weekly reports - the daily pasture and supplements supplied (and their characteristics such as ME content) listed in the Supplement operations was extrapolated from the weekly data to the intervening days.

          To specify the buy and feeding out in the Supplement operation file the following can be used:

          * to buy: "2004-09-04 [Supplement].Buy(2E+18,"pasture_13.5me")" (without enclosing quotation marks) where "2004-09-04" is the date of the operation, and "[Supplement].Buy(2E+18,"pasture_13.5me")" is to buy 2E+18 kg of supplement type "pasture_13.5me". Remember that type of supplement must be specified in the Supplement node.

          * to feed out: "2004-09-04 [Supplement].Feed("pasture_13me",3861,"Feedlot")" (without enclosing quotation marks) where "2004-09-04" is the date of the operation and "[Supplement].Feed("pasture_13me",3861,"Feedlot")" means to feed out 3861 kg of supplement "pasture_13me". Again, the fed out supplement must be specified in the Supplement node.
      Supplement: SpoilageTime=0
        Stores:
          Name            Stored  IsRoughage  DMContent  DMD   MEContent  CPConc  ProtDg  PConc   SConc   EEConc  ADIP2CP  AshAlk  MaxPassage
          fodder          0       true        0.85       0     0          0       0       0       0       0       0        0       0
          silage_11me     0       true        1          0.8   11         0.16    0.8     0.0032  0.0024  0.02    0.06     0.6     0
          pasture_11me    0       true        1          0.76  11         0.16    0.8     0.0032  0.0024  0.02    0.06     0.6     0
          pasture_11.5me  0       true        1          0.76  11.5       0.16    0.8     0.0032  0.0024  0.02    0.06     0.6     0
          pasture_12me    0       true        1          0.76  12         0.16    0.8     0.0032  0.0024  0.02    0.06     0.6     0
          pasture_12.5me  0       true        1          0.76  12.5       0.16    0.8     0.0032  0.0024  0.02    0.06     0.6     0
          pasture_13me    0       true        1          0.76  13         0.16    0.8     0.0032  0.0024  0.02    0.06     0.6     0
          pasture_13.5me  0       true        1          0.76  13.5       0.16    0.8     0.0032  0.0024  0.02    0.06     0.6     0
      Stock: RandSeed=9999
        Genotype Friesian: sEditor=Andrew Moore; sEditDate=30 Jan 2013; Animal=1; FDairyIntakePeak=1; SRWScalars=[1.2, 1.4]; MaxFleeceDiam=0; bDairyBreed=true; MortRate=[0, 5.53e-05, 5.53e-05]; MortAge=[0, 300, 365]; MortIntensity=0.3; MortCondConst=0.6; MortWtDiff=0.1; GrowthC=[0, 0.0115, 0.27, 0.4, 1.1]; IntakeLactC=[0, 0.85, 0.577, 0.9]; DgProtC=[0, 0.3, 0.25, 0.1, 0.007, 0.005, 0.35, 0.1, 0.1]; ProtC=[0, 0.05, 0.85, 5.5, 0.178, 0.92, 1, 0.6, 0.25, 0.9]; PregScale=[0, 1, 1.15, 0]; BirthWtScale=[0, 0.07, 0.055, 0]; PeakLactC=[0, 0.5, 0.62, 0]; WoolC=[0, 0, 0, 0, 0, 0, 0, 0, 0, 0, 0, 0, 0, 0, 0]; SulfC=[0, 0.07, 0.07, 0, 0.00114]; MethC=[0, 18.4, 0.013, 0.00752, 0.0237, 0.00336, 18.1, 25.29]; AshAlkC=[0, 0.34, 0.28, 1.1]; OvulationPeriod=21; Puberty=[183, 365]; DayLengthConst=[0, 0, 0, 0]; F2=[0, 0.7, 5, 0]; F3=[0, 5.89, 5.89, 0]; ToxaemiaSigs=[0, 0]; DystokiaSigs=[0, 0]; ExposureConsts=[0, 0, 0, 0]; SelfWeanPropn=0.05; MaxYoung=0; BreedSRW=550; PotFleeceWt=0; FleeceRatio=0; PeakMilk=50; ConceiveSigs=[[0, 0], [0.7, 5.89], [5, 5.89], [0, 0]]; FertWtDiff=0
          IntakeC=[0, 0.04, 1.7, 0.22, 60, 0.02, 25, 22, 81, 1.7, 0.6, 0.05, 0.15, 0.005, 0.002, 0.5, 1, 0.01, 20, 3, 1.5, 0.7]
          GrazeC=[0, 0.8, 0.17, 1.7, 0.00078, 0.6, 0.00074, 0.5, 150, 0.14, 0.28, 10.5, 0.8, 0.35, 1, 0, 0, 0.012, 1, 1, 11.5]
          EfficC=[0, 0.5, 0.02, 0.85, 0.7, 0.4, 0.02, 0.6, 0.133, 0.95, 0.84, 0.8, 0.7, 0.035, 0.33, 0.12, 0.043]
          MaintC=[0, 0.09, 0.36, 8e-05, 0.84, 0.23, 0.0025, 0.9, 5.2e-05, 0.16, 0.0152, 0.000526, 0.0161, 0.0422, 0.00011, 0.15, 0.0026, 5]
          PregC=[0, 285, 2.2, 1.77, 0.33, 1.8, 2.42, 1.16, 4.11, 343.5, 0.0164, 0.134, 6.22, 0.747]
          LactC=[0, 4, 30, 0.6, 0.105, 0.94, 3.1, 1.17, 0, 0, 0.04, 90, 0.42, 0.58, 0.0357, 0.032, 0.7, 0.01, 0.1, 1.6, 4, 0.0027, 0.004, 3, 0.6, 1.03]
          ChillC=[0, 0.09, 4.1, 1.6, 0.5, 0.7, 0.15, 0.481, 0.619, 1.1, 0.322, 39, 1.5, 5, 0.15, 10, 0.38]
          GainC=[0, 0.6, 0.7, 0.8, -6, 0.4, 0.9, 0.97, 27, 20.3, 2, 13.8, 0.072, 0.14, 0.008, 0.115, 1, 0.5, 1.09]
          PhosC=[0, 0.7, 0.95, 2e-05, 0.003, 4.4e-05, 0.0041, 0.001, 0, 0.00051, 3.7e-06, 0.00051, 3.7e-06, 0.0012, 0.004635, 0.22]
      Forages
        Parameters:
          {Name=SurfaceOrganicMatter.Residue, LiveDigestibility=0.7, DeadDigestibility=0.3, LiveFractionConsumable=1, DeadFractionConsumable=1, LiveMinimumBiomass=100, DeadMinimumBiomass=0}
      Summary SummaryFile
      Zone Feedlot: Area=10; Slope=0; AspectAngle=0; Altitude=50
        Soil: ASCOrder=Vertosol; ASCSubOrder=Black; SoilType=Clay; Site=Norwin; NearestTown=Norwin; Region=Darling Downs and Granite Belt; State=Queensland; Country=Australia; NaturalVegetation=Qld. Bluegrass, possible Qld. Blue gum; ApsoilNumber=900; Latitude=-27.581836; Longitude=151.320206; LocationAccuracy=+/- 20m
          DataSource=CSIRO Sustainable Ecosystems, Toowoomba; Characteriesd as part of the GRDC funded project"Doing it better, doing it smarter, managing soil water in Australian agriculture' 2011
          Comments=OC, CLL for all crops estimated-based on Bongeen Mywybilla Soil No1
          Physical
            Thickness  BD       AirDry    LL15      DUL       SAT       KS
            150        1.01056  0.13025   0.2605    0.521     0.588655  20
            150        1.07146  0.198689  0.248362  0.496723  0.565677  20
            300        1.09394  0.28      0.28      0.488438  0.557193  20
            300        1.15861  0.28      0.28      0.480297  0.532787  20
            300        1.17301  0.28      0.28      0.471584  0.527354  20
            300        1.16287  0.28      0.28      0.457071  0.53118   20
            300        1.1875   0.28      0.28      0.452332  0.521888  20
            SoilCrop WheatSoil: LL=[0.261, 0.248, 0.28, 0.306, 0.36, 0.392, 0.446]; KL=[0.06, 0.06, 0.06, 0.04, 0.04, 0.02, 0.01]; XF=[1, 1, 1, 1, 1, 1, 1]
          WaterBalance SoilWater: SummerDate=1-Nov; SummerU=5; SummerCona=5; WinterDate=1-Apr; WinterU=5; WinterCona=5; DiffusConst=40; DiffusSlope=16; Salb=0.12; CN2Bare=73; CNRed=20; CNCov=0.8; PSIDul=-100; Thickness=[150, 150, 300, 300, 300, 300, 300]; SWCON=[0.3, 0.3, 0.3, 0.3, 0.3, 0.3, 0.3]
          Organic: FOMCNRatio=40; CarbonUnits=Total
            Thickness  Carbon  SoilCNRatio  FBiom  FInert  FOM
            150        1.2     12           0.04   0.4     347.129
            150        0.96    12           0.02   0.6     270.344
            300        0.6     12           0.02   0.8     163.972
            300        0.3     12           0.02   1       99.4541
            300        0.18    12           0.01   1       60.322
            300        0.12    12           0.01   1       36.5871
            300        0.12    12           0.01   1       22.1912
          Chemical: Thickness=[150, 150, 300, 300, 300, 300, 300]; PH=[8, 8, 8, 8, 8, 8, 8]; PHUnits=Water
          Water: Thickness=[150, 150, 300, 300, 300, 300, 300]; InitialPAWmm=361.245; RelativeTo=LL15; FilledFromTop=false
            InitialValues=[0.521, 0.496723, 0.488438, 0.480297, 0.471584, 0.457071, 0.452332]
          CERESSoilTemperature Temperature
          Nutrient
          Solute NO3: Thickness=[150, 150, 300, 300, 300, 300, 300]; InitialValues=[1, 1, 1, 1, 1, 1, 1]; InitialValuesUnits=ppm; WaterTableConcentration=0; D0=0; DepthConstant=0; MaxDepthSoluteAccessible=0; RunoffEffectivenessAtMovingSolute=0; MaxEffectiveRunoff=0
          Solute NH4: Thickness=[150, 150, 300, 300, 300, 300, 300]; InitialValues=[0.1, 0.1, 0.1, 0.1, 0.1, 0.1, 0.1]; InitialValuesUnits=ppm; WaterTableConcentration=0; D0=0; DepthConstant=0; MaxDepthSoluteAccessible=0; RunoffEffectivenessAtMovingSolute=0; MaxEffectiveRunoff=0
          Solute Urea: Thickness=[150, 150, 300, 300, 300, 300, 300]; InitialValues=[0, 0, 0, 0, 0, 0, 0]; InitialValuesUnits=kg/ha; WaterTableConcentration=0; D0=0; DepthConstant=0; MaxDepthSoluteAccessible=0; RunoffEffectivenessAtMovingSolute=0; MaxEffectiveRunoff=0
        SurfaceOrganicMatter: InitialResidueName=wheat_stubble; InitialResidueType=wheat; InitialResidueMass=0; InitialStandingFraction=0; InitialCPR=0; InitialCNR=100
        MicroClimate: a_interception=0; b_interception=1; c_interception=0; d_interception=0; SoilHeatFluxFraction=0.4; MinimumHeightDiffForNewLayer=0; NightInterceptionFraction=0.5; ReferenceHeight=2
      Report DefaultGeneticReport: EventNames=[Clock].EndOfDay
        VariableNames:
          [Clock].Today as Date
          ([Stock].MilkWtAll * 0.04 * 0.80 + [Stock].MilkWtAll * 0.04) as MilkSolids // kg MS /head /day - 0.80 is the average Protein:Fat ratio from LUDF data, the NZ national average is 0.77 https://www.dairynz.co.nz/media/816845/WEB_Protein-to-fat-ratio.pdf
    Simulation Changed
      Clock: Start=2004-08-01; End=2006-06-30
      Weather: FileName=%root%/Examples/WeatherFiles/NZ_Lincoln.met; Latitude=-43.624; Tav=11.4; Amp=11.5
      MicroClimate: a_interception=0; b_interception=1; c_interception=0; d_interception=0; SoilHeatFluxFraction=0.4; MinimumHeightDiffForNewLayer=0; NightInterceptionFraction=0.5; ReferenceHeight=2
      Manager ChangeLactatingCowNumber: same as Changing Stock Genetic Parameters.Default.ChangeLactatingCowNumber
      Operations Stock operations: same as Changing Stock Genetic Parameters.Default.Stock operations
      Operations Supplement operations: same as Changing Stock Genetic Parameters.Default.Supplement operations
      Supplement: same as Changing Stock Genetic Parameters.Default.Supplement
      Stock: RandSeed=9999
        Genotype Friesian: sEditor=Andrew Moore; sEditDate=30 Jan 2013; Animal=1; FDairyIntakePeak=1; SRWScalars=[1.2, 1.4]; MaxFleeceDiam=0; bDairyBreed=true; MortRate=[0, 5.53e-05, 5.53e-05]; MortAge=[0, 300, 365]; MortIntensity=0.3; MortCondConst=0.6; MortWtDiff=0.1; GrowthC=[0, 0.02, 0.27, 0.4, 1.1]; IntakeLactC=[0, 0.85, 0.577, 0.9]; DgProtC=[0, 0.3, 0.25, 0.1, 0.007, 0.005, 0.35, 0.1, 0.1]; ProtC=[0, 0.05, 0.85, 5.5, 0.178, 0.92, 1, 0.6, 0.25, 0.9]; PregScale=[0, 1, 1.15, 0]; BirthWtScale=[0, 0.07, 0.055, 0]; PeakLactC=[0, 0.5, 0.62, 0]; WoolC=[0, 0, 0, 0, 0, 0, 0, 0, 0, 0, 0, 0, 0, 0, 0]; SulfC=[0, 0.07, 0.07, 0, 0.00114]; MethC=[0, 18.4, 0.013, 0.00752, 0.0237, 0.00336, 18.1, 25.29]; AshAlkC=[0, 0.34, 0.28, 1.1]; OvulationPeriod=21; Puberty=[183, 365]; DayLengthConst=[0, 0, 0, 0]; F2=[0, 0.7, 5, 0]; F3=[0, 5.89, 5.89, 0]; ToxaemiaSigs=[0, 0]; DystokiaSigs=[0, 0]; ExposureConsts=[0, 0, 0, 0]; SelfWeanPropn=0.05; MaxYoung=0; BreedSRW=550; PotFleeceWt=0; FleeceRatio=0; PeakMilk=50; ConceiveSigs=[[0, 0], [0.7, 5.89], [5, 5.89], [0, 0]]; FertWtDiff=0
          IntakeC=[0, 0.04, 1.7, 0.22, 60, 0.02, 25, 22, 81, 1.7, 0.6, 0.05, 0.15, 0.005, 0.002, 0.5, 1, 0.01, 20, 3, 1.5, 0.7]
          GrazeC=[0, 0.8, 0.17, 1.7, 0.00078, 0.6, 0.00074, 0.5, 150, 0.14, 0.28, 10.5, 0.8, 0.35, 1, 0, 0, 0.012, 1, 1, 11.5]
          EfficC=[0, 0.5, 0.02, 0.85, 0.7, 0.4, 0.02, 0.6, 0.133, 0.95, 0.84, 0.8, 0.7, 0.035, 0.33, 0.12, 0.043]
          MaintC=[0, 0.09, 0.36, 8e-05, 0.84, 0.23, 0.0025, 0.9, 5.2e-05, 0.16, 0.0152, 0.000526, 0.0161, 0.0422, 0.00011, 0.15, 0.0026, 5]
          PregC=[0, 285, 2.2, 1.77, 0.33, 1.8, 2.42, 1.16, 4.11, 343.5, 0.0164, 0.134, 6.22, 0.747]
          LactC=[0, 4, 30, 0.6, 0.105, 0.94, 3.1, 1.17, 0, 0, 0.04, 90, 0.42, 0.58, 0.0357, 0.032, 0.7, 0.01, 0.1, 1.6, 4, 0.0027, 0.004, 3, 0.6, 1.03]
          ChillC=[0, 0.09, 4.1, 1.6, 0.5, 0.7, 0.15, 0.481, 0.619, 1.1, 0.322, 39, 1.5, 5, 0.15, 10, 0.38]
          GainC=[0, 0.6, 0.7, 0.8, -6, 0.4, 0.9, 0.97, 27, 20.3, 2, 13.8, 0.072, 0.14, 0.008, 0.115, 1, 0.5, 1.09]
          PhosC=[0, 0.7, 0.95, 2e-05, 0.003, 4.4e-05, 0.0041, 0.001, 0, 0.00051, 3.7e-06, 0.00051, 3.7e-06, 0.0012, 0.004635, 0.22]
      Forages
        Parameters:
          {Name=SurfaceOrganicMatter.Residue, LiveDigestibility=0.7, DeadDigestibility=0.3, LiveFractionConsumable=1, DeadFractionConsumable=1, LiveMinimumBiomass=100, DeadMinimumBiomass=0}
      Summary SummaryFile
      Zone Feedlot: same as Changing Stock Genetic Parameters.Default.Feedlot
      Report ChangedGeneticReport: same as Changing Stock Genetic Parameters.Default.DefaultGeneticReport
  Folder Using Tags to Manage Stock
    Simulation UsingTagsExample
      Memo
        ##Using tages to manage stock

        This is a simple example of managing animals by tag.

        In this example, 4-month old weaned merino lambs are bought every year on 1 January and retained for 18 months until they are sold. As they are bought, each group is sequentially tagged. Once the simulation is running for more than a year there are therefore two tags of animals at any one time.

        There is a Feedlot and a Pasture paddock in the simulation. All animals can be on the Feedlot and when they are there they can have 0.75 kg DM /head /day of crushed wheat. Animals with a tag value of 3 (i.e. bought at the beginning of the third year of the simulation) also have access to Pasture when the biomass in the pasture is between 1500 and 2800 kg DM /ha.

        For the first two years (before Tag 3 animals are bought) Pasture is cut every couple of weeks. After that pasture biomass is removed by grazing (Tag 3 animals only) only.

        Supplement stores are topped up once a year only. The rate of decline in the stored amount is related to the number of animals on the Feedlot (as opposed to pasture)

        The first plot shows the increasing age of the tagged groups of animals with Tag = 3 highlighted with markers. The black line shows the pasture being frequently cut in the first two years, grazed starting in 1997 when Tag 3 animals are bought. Late in 1997 the pasture growth rate exceeds the intake by Tag 3 animals. In the last 6 months of the simulation (Tag 3 have been sold) there is no grazing and no cutting.

        The second plot shows the rate of decline in the stored supplement. The rate of decline in 1995 is low but steady as there is only one group of animals. In the first six months of 1996 the rate declines steeply until the original (Tag 1) animals are sold on 30 June and then the decline is less steep. In 1997 and the first part of 1998 the rate of decline is uneven as the Tag 3 animals move between Pasture and Feedlot. The Pasture biomass is shown as a reference.
      Clock: Start=1995-01-01; End=1998-12-31
      Summary SummaryFile
      Weather: FileName=%root%/Examples/WeatherFiles/NZ_Lincoln.met; Latitude=-43.624; Tav=11.4; Amp=11.5
      SoilArbitrator
      Stock: RandSeed=9999
      Forages
        Parameters:
          Name                          LiveDigestibility  DeadDigestibility  LiveFractionConsumable  DeadFractionConsumable  LiveMinimumBiomass  DeadMinimumBiomass
          SurfaceOrganicMatter.Residue  0.7                0.3                1                       1                       100                 0
          AGPRyegrass.Leaf              FromModel          FromModel          1                       1                       100                 0
          AGPRyegrass.Stem              FromModel          FromModel          1                       1                       100                 0
          AGPRyegrass.Stolon            FromModel          FromModel          1                       1                       100                 0
          AGPWhiteClover.Leaf           FromModel          FromModel          1                       1                       100                 0
          AGPWhiteClover.Stem           FromModel          FromModel          1                       1                       100                 0
          AGPWhiteClover.Stolon         FromModel          FromModel          1                       1                       100                 0
      Supplement: same as Wheat Feedlot Sheep Grazing Example.WheatSheepFeedlot.Supplement
      Manager ManageStockUsingTags
        Buying = True
        Genotype = Small Merino
        Sex = Female
        BuyDate = 1-Jan
        BuyAge = 4
        BuyWeight = 20
        BuyLactating = 0
        NumAntoBuy = 300
        Selling = True
        SaleFirstDate = 30-Jun
        SaleLastDate = 30-Jun
        SellPolicy = CulledForAge
        tagForPastureAccess = 3
        PaddockToMoveAnimalsTo = [Pasture]
        GrazingWindowStartDate = 1-Jan
        GrazingWindowEndDate = 31-Dec
        ExpressionToMoveAnimalsToField = (AGPRyegrass.AboveGroundWt + AGPWhiteClover.AboveGroundWt)  >= 2800
        ExpressionToMoveAnimalsToFeedlot = (AGPRyegrass.AboveGroundWt + AGPWhiteClover.AboveGroundWt)  <= 1500
        ShearDate = 15-dec
        Dummy =
```csharp
/*-------------------------------------------------------------------------------------
TBA
---------------------------------------------------------------------------------------


--------------------------------------------------------------------------------------*/




using System.Linq;
using System;
using System.Collections.Generic;
using Models.Core;
using Models.PMF;
using Models.Functions;
using Models.Soils;
using Models.Utilities;
using Models.GrazPlan;
using APSIM.Shared.Utilities;
using System.Diagnostics;
using Models.AgPasture;

namespace Models
{
    [Serializable]
    [Description(
        "<p><b>An example of managing stock using tags.</b></p>")]    
    public class Script : Model
    {
        [Link] Clock clock;
        [Link] Stock Animals;
        [Link] Supplement Feed;
        [Link] Summary summary;
        [Link] IPlant plant;
        [Link] Soil Soil;
        [Link] Zone Paddock;
        [Link] ScriptCompiler compiler;
        [Link] Zone[] Paddocks;


        private IBooleanFunction expressionMoveAnimalsToField;
        private IBooleanFunction expressionMoveAnimalsToFeedlot;

        public enum SellPolicyType
        {
            Date,
            PercentageHerdWhenAverageWeightGreaterThan,
            PercentageHerdWhenAverageAgeGreaterThan,
            CulledForAge,
            CulledForWeight,
            SellYoung
        }

        ////////////////////////////////////////////////////////
        [Separator("Buying of animals")]

        [Description("Buy animals and assign a tag of the year bought?")] 
        public bool Buying { get; set; }

        [Description("Stock: genotype (e.g. Small Merino, Angus, Friesian):")] 
        [Display(Values = "GetGenotypes")]
        public string Genotype { get; set; }

        [Description("Stock: sex (Female, Male, Castrate):")] 
        public ReproductiveType Sex { get; set; }

        [Description("Date to buy animals (dd-mmm)")] 
        [Display(EnabledCallback = "BuyingEnabled")]
        public string BuyDate { get; set; }

        [Description("Age of bought animals (months): ")] 
        [Display(EnabledCallback = "BuyingEnabled")]
        public double BuyAge { get; set; }

        [Description("Weight of bought animals (kg): ")] 
        [Display(EnabledCallback = "BuyingEnabled")]
        public double BuyWeight { get; set; }

        [Description("Zero denotes not lactating; 1 or more denotes the time (days) since parturition:")] 
        [Display(EnabledCallback = "BuyingEnabled")]
        public int BuyLactating { get; set; }

        [Description("Number of animals to buy: ")] 
        [Display(EnabledCallback = "BuyingEnabled")]
        public int NumAntoBuy { get; set; }

        ////////////////////////////////////////////////////////
        [Separator("Selling of animals")]

        [Description("Sell animals that were bought the previous year?")] 
        public bool Selling { get; set; }

        [Description("First date to consider selling animals (dd-mmm)")] 
        public string SaleFirstDate { get; set; }

        [Description("Last date to consider selling animals (dd-mmm)")] 
        public string SaleLastDate { get; set; }

        [Description("Selling policy ")] 
        [Display(EnabledCallback = "SellingEnabled")]
        public SellPolicyType SellPolicy { get; set; }

        /*[Description("Age at which to sell (months): ")] 
        [Display(EnabledCallback = "SellingAgeEnabled")]
        public int SaleAge { get; set; }

        [Description("Weight at which to sell (kg): ")] 
        [Display(EnabledCallback = "SellingWeightEnabled")]
        public double SaleWeight { get; set; }

        [Description("Percentage of animals to sell (%)")] 
        [Display(EnabledCallback = "SellingEnabled")]
        public double SalePercentAnimals { get; set; } */

        ////////////////////////////////////////////////////////
        [Separator("Rule for moving a particular tagged group of animals into and out of pasture")]

        [Description("Which tag group of stock will have access to pasture? :")] 
        public int tagForPastureAccess { get; set; }

        [Description("Name of paddock to move animals in to:")] 
        [Display(Type = DisplayType.Model, ModelType = typeof(Zone))]
        public IModel PaddockToMoveAnimalsTo { get; set; }

        [Description("First date to consider moving animals:")] 
        public string GrazingWindowStartDate { get; set; }

        [Description("Last date to consider moving animals:")] 
        public string GrazingWindowEndDate { get; set; }

        [Description("Criteria to move animals to field")]
        public string ExpressionToMoveAnimalsToField { get; set; }

        [Description("Criteria to move animals to feedlot")]
        public string ExpressionToMoveAnimalsToFeedlot { get; set; }


        ////////////////////////////////////////////////////////
        [Separator("Shearing")]
        [Description("Date to shear animals (dd-mmm)")] 
        public string ShearDate { get; set; }

        [Description(" ")] 
        public string Dummy { get; set; }

        ////////////////////////////////////////////////////////////////////////////
        // Callback properties to control disabling of properties.
        ////////////////////////////////////////////////////////////////////////////
        public bool BuyingEnabled { get { return Buying; } }

        public bool SellingEnabled { get { return Selling; } }

        public bool SellingAgeEnabled
        { 
            get
            { 
                return Selling &&
                (SellPolicy == SellPolicyType.PercentageHerdWhenAverageAgeGreaterThan || SellPolicy == SellPolicyType.CulledForAge);
            } 
        }

        public bool SellingWeightEnabled
        { 
            get
            { 
                return Selling &&
                (SellPolicy == SellPolicyType.PercentageHerdWhenAverageWeightGreaterThan || SellPolicy == SellPolicyType.CulledForWeight);
            } 
        }

        ////////////////////////////////////////////////////////////////////////////
        // Outputs
        ////////////////////////////////////////////////////////////////////////////
        // <summary>Number of animals sold.</summary>
        public int NumberSold { get; set; }

        // <summary>Description of something that has happened.</summary>
        public string EventName { get; set; }

        // <summary>Return a list of genotypes to the properties tab.</summary>
        public string[] GetGenotypes()
        {
            if (Animals != null)
                return Animals.Genotypes.Names.ToArray();
            return null;
        }

        public string CurrentLocation { get; set; }  // location of the sheep



        // ============================================================
        // Called once at beginning of simulation run
        // ============================================================
        [EventSubscribe("StartOfSimulation")]
        private void OnStartOfSimulation(object sender, EventArgs e)
        {
            if (string.IsNullOrEmpty(ExpressionToMoveAnimalsToField))
                throw new Exception("You must specify a criteria for moving animals to the field");
            
            if (CSharpExpressionFunction.Compile(ExpressionToMoveAnimalsToField, this, compiler, out IBooleanFunction function, out string errorMessages))
                expressionMoveAnimalsToField = function;
            else
                throw new Exception(errorMessages);

            if (string.IsNullOrEmpty(ExpressionToMoveAnimalsToFeedlot))
                throw new Exception("You must specify a criteria for moving animals to the feedlot");
            
            if (CSharpExpressionFunction.Compile(ExpressionToMoveAnimalsToFeedlot, this, compiler, out IBooleanFunction function2, out string errorMessages2))
                expressionMoveAnimalsToFeedlot = function2;
            else
                throw new Exception(errorMessages2);

            CurrentLocation = "NotYetBought";
        }



        // ============================================================
        // Management that happens every day.
        // ============================================================
        [EventSubscribe("DoManagement")]
        private void OnDoManagement(object sender, EventArgs e)
        {
            EventName = string.Empty;

            // Buy animals
            if (Buying && DateUtilities.DatesAreEqual(BuyDate, clock.Today))
            {
                var purchase = new StockBuy();
                purchase.Genotype = Genotype;   // "small merino"
                purchase.Number = NumAntoBuy;
                purchase.Sex = Sex;               // "wethers"
                purchase.Age = BuyAge;
                purchase.Weight = BuyWeight;
                purchase.Lactating = BuyLactating;

                purchase.UseTag = clock.Today.Year - clock.StartDate.Year + 1;   // give the new stock a tag value starting at 1 and incrementing each year

                Animals.Buy(purchase);
                Animals.Move("Feedlot");
                EventName = NumAntoBuy + " animals bought";

                if (clock.Today.Year - clock.StartDate.Year + 1 == tagForPastureAccess)
                    CurrentLocation = "Feedlot";
            }

            // Sell animals
            if (SellingEnabled && DateUtilities.WithinDates(SaleFirstDate, clock.Today, SaleLastDate))
            { 
               IEnumerable<AnimalGroup> animalsToSell = null;

               // put all the animals with the tag of last year into the sell list
               animalsToSell = Animals.ByTag(clock.Today.Year - clock.StartDate.Year + 1 - 1);  // i.e. last year's purchases

               if (animalsToSell != null)
               {
                  var numberSellableAnimals = animalsToSell.Sum(g => g.NoAnimals);
                  var numberAnimalsToSell = Convert.ToInt32(numberSellableAnimals);
                  if (numberAnimalsToSell > 0)
                      Animals.Sell(numberAnimalsToSell, animalsToSell);
                  if ((clock.Today.Year - clock.StartDate.Year + 1 - 1) == tagForPastureAccess)
                      CurrentLocation = "Sold";
                }
            }


            double pastureBiomass = 0.0;
            foreach (Zone paddock in Paddocks)
            {
                if (paddock.Name == "Pasture")
                {
                     foreach (PastureSpecies plant in paddock.FindAllChildren<PastureSpecies>().OfType<IModel>().ToList())
                            pastureBiomass += plant.AboveGroundWt;
                }
             }


            // Determine whether the animals are in the feedlot.
            bool animalsAreInFeedlot = Animals.AnimalGroups.FirstOrDefault(group => group.PaddOccupied.Name == "Feedlot") != null;
            bool inGrazingWindow = DateUtilities.WithinDates(GrazingWindowStartDate, clock.Today, GrazingWindowEndDate);

            if (inGrazingWindow && expressionMoveAnimalsToField.Value())
            {
                   foreach (var g in Animals.ByTag(tagForPastureAccess))  //(var g in Animals.ByTag(clock.Today.Year - clock.StartDate.Year + 1)) 
                {
                    Animals.Move(PaddockToMoveAnimalsTo.Name, g);
                     EventName = "Animals in tag " + (clock.Today.Year - clock.StartDate.Year + 1).ToString() + " moved to pasture";
                       CurrentLocation = "Pasture";
                }
            }

            // Animals are in paddock. Determine if they need to be moved to feedlot.
            if (!inGrazingWindow || expressionMoveAnimalsToFeedlot.Value())
            {
                Animals.Move("Feedlot");
                CurrentLocation = "Feedlot";
                EventName = "Animals moved to feedlot";
            }

            // Shear all animals on specified date
            if (DateUtilities.DatesEqual(ShearDate, clock.Today))
            {
                Animals.Shear(shearAdults: true, shearYoung: true);
                EventName = "Animals shorn";
            }
        }
    }
}
```
      Manager ManageSupplement
        FeedlotZone = [Feedlot]
        SupplementAmount = 0.75
        SupplementType = wheat, crushed
        SupplementMaxAmount = 150000
        SupplementReplenishCriteriaType = ReplenishOnDate
        SupplementMinAmount = 500
        SupplementReplenishDate = 01-Jan
```csharp
using APSIM.Shared.Utilities;
using Models.GrazPlan;
using Models.Utilities;
using Models.Soils;
using Models.PMF;
using Models.Core;
using System;
using System.Linq;

namespace Models
{
    [Description(
    "<b>Supplement store management.</b>" +
    "<li> When animals are in feedlot, they are fed a set amount each day.</li>" +
    "<li> Will restock the supplement store when the store reaches a minimum level.</li>"
    )]
    [Serializable]
    public class Script : Model
    {
        [Link] Clock clock;
        [Link] Stock animals;
        [Link] Supplement supplement;

        [Description("Name of zone representing the feedlot")]
        [Display(Type=DisplayType.Model, ModelType=typeof(Zone))]
        public IModel FeedlotZone { get; set; }

        [Description("The amount of supplement to feed each animal each day (kg DM /head /day)")]
        public double SupplementAmount { get; set; }

        [Description("The type of supplement to feed the animals")]
        public string SupplementType { get; set; }

        [Description("Maximum supplement store - top up the store to this value when buying (kg DM)")]
        public double SupplementMaxAmount { get; set; }

        [Description("Criteria upon which to replenish the supplement store - ReplenishOnDate or ReplenishOnMinimum")]
        public string SupplementReplenishCriteriaType { get; set; }

        [Description("If 'ReplenishOnMinimum' then give the amount to trigger a buy supplement event (kg DM)")]
        public double SupplementMinAmount { get; set; }

        [Description("If 'ReplenishOnDate' then give the date to trigger a buy supplement event (dd-mmm)")]
        public string SupplementReplenishDate { get; set; }



        // ============================================================
        // Called every day to perform management actions
        // ============================================================
        [EventSubscribe("DoManagement")]
        private void OnDoManagement(object sender, EventArgs e)
        {
            // Determine how many animals are in feedlot.
            var animalGroupsInFeedlot = animals.AnimalGroups.Where(group => group.PaddOccupied.Name == FeedlotZone.Name);
            var totalNumAnimalsInFeedlot = animalGroupsInFeedlot.Sum(group => group.NoAnimals);

            // If there are animals in feedlot then feed them.
            if (totalNumAnimalsInFeedlot > 0)
                supplement.Feed(SupplementType, SupplementAmount * totalNumAnimalsInFeedlot, FeedlotZone.Name);     

            // Restock the supplement store if amount falls below SupplementMinAmount kg DM
            if (SupplementReplenishCriteriaType == "ReplenishOnDate" && DateUtilities.DatesAreEqual(SupplementReplenishDate, clock.Today))
                supplement.Buy(SupplementMaxAmount - supplement.Stores[1].Stored, SupplementType);
            if (SupplementReplenishCriteriaType == "ReplenishOnMinimum" && supplement.Stores[1].Stored < SupplementMinAmount)
                  supplement.Buy(SupplementMaxAmount - supplement.Stores[1].Stored, SupplementType);
        }
    }
}
```
      Report ReportStockTags: EventNames=[Clock].EndOfDay
        VariableNames:
          [Clock].Today
          [Stock].NumberAll as TotalHeadCount
          [Stock].NumberAll / [Pasture].Area as Stockrate //(sheep/ha)
          [Stock].NoGroups
          [Stock].SuppIntakeAll.Weight as IntakeOfSupplementOnFeedlot
          [Stock].PastIntakeAll.Weight as IntakeOfpasture
          [Stock].SuppEaten
          [Supplement].stores[2].Stored as SupplementStored // (kg)
          [Stock].WeightTag
          [Stock].AgeMonthsTag
          [ManageStockUsingTags].Script.CurrentLocation
          //[Stock].Weight as SheepWeight // (kg)
          //[Stock].AgeMonths as SheepAgeMonths //(month)
          //[Stock].PastIntakeAll.Weight * [Stock].NumberAll as BiomassRemovedBySheep
      Zone Feedlot: Area=1; Slope=0; AspectAngle=0; Altitude=50
        Soil: same as Wheat Feedlot Sheep Grazing Example.WheatSheepFeedlot.WheatSheep.Soil
        SurfaceOrganicMatter: InitialResidueName=wheat_stubble; InitialResidueType=wheat; InitialResidueMass=0; InitialStandingFraction=0; InitialCPR=0; InitialCNR=100
        MicroClimate: a_interception=0; b_interception=1; c_interception=0; d_interception=0; SoilHeatFluxFraction=0.4; MinimumHeightDiffForNewLayer=0; NightInterceptionFraction=0.5; ReferenceHeight=2
        Report: VariableNames=[Clock].Today
      Zone Pasture: Area=1; Slope=0; AspectAngle=0; Altitude=50
        SimpleGrazing: GrazingRotationType=2; SimpleGrazingFrequencyString=21; SimpleMinGrazable=0; SimpleGrazingResidual=1500; FlexibleGrazePostDM=0; FractionDefoliatedBiomassToSoil=[1]; FractionDefoliatedNToSoil=[1]; FractionExcretedNToDung=[0.45]; DepthUrineIsAdded=250; SendDungElsewhere=0; SendUrineElsewhere=0; FractionPopulationDecline=0; TramplingOn=false; MaximumPropLitterMovedToSoil=0.1; PastureConsumedAtMaximumRateOfLitterRemoval=1200
          PreGrazeDMArray=[1000, 1000, 1000, 1000, 1000, 1000, 1000, 1000, 1000, 1000, 1000, 1000]
          PostGrazeDMArray=[2000, 2000, 2000, 2000, 2000, 2000, 2000, 2000, 2000, 2000, 2000, 2000]
        Operations Cutting
          1995-01-01  [SimpleGrazing].GrazeToResidual(1000)
          1995-02-01  [SimpleGrazing].GrazeToResidual(1000)
          1995-03-01  [SimpleGrazing].GrazeToResidual(1000)
          1995-04-01  [SimpleGrazing].GrazeToResidual(1000)
          1995-05-01  [SimpleGrazing].GrazeToResidual(1000)
          1995-06-01  [SimpleGrazing].GrazeToResidual(1000)
          1995-07-01  [SimpleGrazing].GrazeToResidual(1000)
          1995-08-01  [SimpleGrazing].GrazeToResidual(1000)
          1995-09-01  [SimpleGrazing].GrazeToResidual(1000)
          1995-10-01  [SimpleGrazing].GrazeToResidual(1000)
          1995-11-01  [SimpleGrazing].GrazeToResidual(1000)
          1995-12-01  [SimpleGrazing].GrazeToResidual(1000)
          1995-01-08  [SimpleGrazing].GrazeToResidual(1000)
          1995-02-08  [SimpleGrazing].GrazeToResidual(1000)
          1995-03-08  [SimpleGrazing].GrazeToResidual(1000)
          1995-04-08  [SimpleGrazing].GrazeToResidual(1000)
          1995-05-08  [SimpleGrazing].GrazeToResidual(1000)
          1995-06-08  [SimpleGrazing].GrazeToResidual(1000)
          1995-07-08  [SimpleGrazing].GrazeToResidual(1000)
          1995-08-08  [SimpleGrazing].GrazeToResidual(1000)
          1995-09-08  [SimpleGrazing].GrazeToResidual(1000)
          1995-10-08  [SimpleGrazing].GrazeToResidual(1000)
          1995-11-08  [SimpleGrazing].GrazeToResidual(1000)
          1995-12-08  [SimpleGrazing].GrazeToResidual(1000)
          1995-01-15  [SimpleGrazing].GrazeToResidual(1000)
          1995-02-15  [SimpleGrazing].GrazeToResidual(1000)
          1995-03-15  [SimpleGrazing].GrazeToResidual(1000)
          1995-04-15  [SimpleGrazing].GrazeToResidual(1000)
          1995-05-15  [SimpleGrazing].GrazeToResidual(1000)
          1995-06-15  [SimpleGrazing].GrazeToResidual(1000)
          1995-07-15  [SimpleGrazing].GrazeToResidual(1000)
          1995-08-15  [SimpleGrazing].GrazeToResidual(1000)
          1995-09-15  [SimpleGrazing].GrazeToResidual(1000)
          1995-10-15  [SimpleGrazing].GrazeToResidual(1000)
          1995-11-15  [SimpleGrazing].GrazeToResidual(1000)
          1995-12-15  [SimpleGrazing].GrazeToResidual(1000)
          1995-01-22  [SimpleGrazing].GrazeToResidual(1000)
          1995-02-22  [SimpleGrazing].GrazeToResidual(1000)
          1995-03-22  [SimpleGrazing].GrazeToResidual(1000)
          1995-04-22  [SimpleGrazing].GrazeToResidual(1000)
          1995-05-22  [SimpleGrazing].GrazeToResidual(1000)
          1995-06-22  [SimpleGrazing].GrazeToResidual(1000)
          1995-07-22  [SimpleGrazing].GrazeToResidual(1000)
          1995-08-22  [SimpleGrazing].GrazeToResidual(1000)
          1995-09-22  [SimpleGrazing].GrazeToResidual(1000)
          1995-10-22  [SimpleGrazing].GrazeToResidual(1000)
          1995-11-22  [SimpleGrazing].GrazeToResidual(1000)
          1995-12-22  [SimpleGrazing].GrazeToResidual(1000)
          1995-01-30  [SimpleGrazing].GrazeToResidual(1000)
          1995-02-28  [SimpleGrazing].GrazeToResidual(1000)
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        Manager FertiliseFixedDates
          EachYear = True
          Dates = 5-jan, 5-feb, 5-mar, 5-apr, 5-aug, 5-sep, 5-oct, 5-nov, 5-dec
          UseCritNThreshold = False
          CritNThreshold = 50
          CritNDepth = 75
          Depth = 50
          Amount = 50
          FertiliserType = UreaN
          script: same as in Agistment Grazing Example.Agistment Grazing.Field.Fertilise on fixed dates
        Manager AutomaticIrrigation
          allowIrrigation = True
          seasonStart = 1-sep
          seasonEnd = 30-apr
          seasonsAllocation = 10000
          triggerDeficit = 90
          targetDeficit = 99
          returndays = 2
          maximumAmount = 30
          depthPAWC = 300
```csharp
using Newtonsoft.Json;
using APSIM.Shared.Utilities;
using System.Xml.Serialization;
using Models.Soils;
using Models.PMF;
using Models.Core;
using System;
using System.Linq;
using Models.Interfaces;


        
namespace Models
{
    [Serializable] 
    [System.Xml.Serialization.XmlInclude(typeof(Model))]
    public class Script : Model
    {
        [Link] private ISummary summary;
        [Link] private Irrigation Irrigation;
        [Link] private Clock Clock;
        [Link] private Soil Soil;
        [Link(IsOptional = true)] private IPlant existingCrop;
        private DateTime StartDate;
        private DateTime EndDate;
        private double TopDUL;
        private double TopLL;
        private int nLayers;
        [Link]
        private IPhysical soilPhysical;
        [Link]
        private ISoilWater waterBalance;
        //Communication to other modules
       
        //User inputs from properties tab
        [Description("Turn irrigation on?")]
        public bool allowIrrigation { get; set; }
        [Description("Start of irrigation season (dd-MMM)")]
        public string seasonStart { get; set; }
        [Description("End of irrigation season (dd-MMM)")]
        public string seasonEnd { get; set; }
        [Description("Season allocation (mm)")]
        public double seasonsAllocation { get; set; }
        [Description("Deficit to trigger irrigation (% PAWC)")]
        public double triggerDeficit { get; set; }
        [Description("Deficit to stop irrigaton (% PAWC)")]
        public double targetDeficit { get; set; }
        [Description("Minimum days for irrigation to return")]
        public double returndays { get; set; }
        [Description("Maximum irrigation application (mm/day)")]
        public double maximumAmount { get; set; }
        [Description("Depth to calculate PAWC (mm)")]
        public double depthPAWC { get; set; }

        //Class members
        [JsonIgnore] public double TopSWdeficit { get; set; }
        [JsonIgnore] public double TopSWC { get; set; }
        [JsonIgnore] public double DaysSinceIrrigation { get; set; }
        [JsonIgnore] public double AmountToApply { get; set; }
        [JsonIgnore] public double SeasonAppliedAmount { get; set; }
        
        private bool IrrigationIsAllowed { get; set; }
        private bool SeasonIsOpen { get; set; }
        private bool CropIsActive { get; set; }
        private bool IrrigatorIsAvailable { get; set; }
        private bool SoilIsDry { get; set; }

    
        //Calculate static soil variables
        [EventSubscribe("StartOfSimulation")]
        private void OnStartOfSimulation(object sender, EventArgs e)
        {   
            //Set the season dates
            StartDate = DateTime.Parse(seasonStart + "-" + Clock.Today.Year.ToString());
            EndDate = DateTime.Parse(seasonEnd + "-" + Clock.Today.Year.ToString());
            
            //Can we irrigate at all?
            IrrigationIsAllowed = false; 
            if (allowIrrigation)
                IrrigationIsAllowed = true; 

            //Calculate soil water variables
            double depthFromSurface = 0.0;
            double fracLayer = 0.0;
            nLayers = soilPhysical.Thickness.Length;
            for (int layer = 0; layer < nLayers; layer++)
            {
                fracLayer = Math.Min(1.0, (depthPAWC - depthFromSurface) / soilPhysical.Thickness[layer]);
                TopLL += soilPhysical.LL15mm[layer] * fracLayer;
                TopDUL += soilPhysical.DULmm[layer] * fracLayer;
                depthFromSurface += soilPhysical.Thickness[layer];
                if (depthFromSurface >= depthPAWC)
                    layer = nLayers;
            }
        }
             
        //Determine daily requirement for irrigation
        [EventSubscribe("StartOfDay")]
        private void OnStartOfDay(object sender, EventArgs e)
        {
            //Can we irrigate today?          
            SeasonIsOpen = isBetween(Clock.Today, StartDate, EndDate);
            if (!SeasonIsOpen)
                SeasonAppliedAmount = 0;

            //Is there a crop in the ground that needs irrigation?
            CropIsActive = false;
            if ((existingCrop != null) && (existingCrop.IsAlive))
                CropIsActive = true;
            //if ((existingCrop.Phenology.Stage >= 3.0) && (existingCrop.Phenology.Stage < 6.0))
          
            //Is the irrigator available?
            IrrigatorIsAvailable = false;
            DaysSinceIrrigation += 1;
            if (DaysSinceIrrigation >= returndays)
                IrrigatorIsAvailable = true;
          
            //Is the soil dry enough to require irrigation?
            SoilIsDry = false;
            double depthFromSurface = 0.0;
            double fracLayer = 0.0;
            TopSWC = 0.0;
            for (int layer = 0; layer < nLayers; layer++)
            //for (int layer = 0; depthFromSurface < depthPAWC + soilPhysical.Thickness[layer]; layer++)
            {
                fracLayer = Math.Min(1.0, (depthPAWC - depthFromSurface) / soilPhysical.Thickness[layer]);
                TopSWC += waterBalance.SWmm[layer] * fracLayer;
                depthFromSurface += soilPhysical.Thickness[layer];
                if (depthFromSurface >= depthPAWC)
                    layer = nLayers;
            }
            
            TopSWdeficit = TopSWC - TopDUL;
            if (Math.Max(0.0, -TopSWdeficit) >= (TopDUL - TopLL) * (100 - triggerDeficit) / 100)
                SoilIsDry = true;
                
            //Are all the conditions ratifying irrigation
            if (IrrigationIsAllowed && SeasonIsOpen && CropIsActive && IrrigatorIsAvailable && SoilIsDry)
            {
                //Lets bloody well irrigate then!!!!
                AmountToApply = TopDUL * targetDeficit / 100 - TopSWC;
                AmountToApply = Math.Max(0.0, Math.Min(AmountToApply, seasonsAllocation - SeasonAppliedAmount));
                Irrigation.Apply(AmountToApply);
                DaysSinceIrrigation = 0;
                SeasonAppliedAmount += AmountToApply;
            }
        }
        
        ///Checks whether theDate is between iniDate and endDate (non-year specific)
        private bool isBetween(DateTime theDay, DateTime iniDate, DateTime endDate)
        {
            bool result = false;
            if (iniDate.DayOfYear < endDate.DayOfYear)
            {
                // period is within one year, ex: summer in the northern hemisphere
                if ((theDay.DayOfYear >= iniDate.DayOfYear) && (theDay.DayOfYear <= endDate.DayOfYear))
                    result = true;
            }
            else
            {
                // period goes over the end of the year, ex: summer in the southern hemisphere
                if ((theDay.DayOfYear >= iniDate.DayOfYear) || (theDay.DayOfYear <= endDate.DayOfYear))
                    result = true;
            }
            
            return result;
        }
    }
}
```
        MicroClimate: a_interception=0; b_interception=1; c_interception=0; d_interception=0; SoilHeatFluxFraction=0.4; MinimumHeightDiffForNewLayer=0; NightInterceptionFraction=0.5; ReferenceHeight=2
        Irrigation
        Fertiliser
        SurfaceOrganicMatter: InitialResidueName=Sward; InitialResidueType=grass; InitialResidueMass=1000; InitialStandingFraction=0; InitialCPR=0; InitialCNR=15
        Soil: same as Simple Rotational Grazing Example.A Simple Rotational Grazing.Paddock01.LismoreSoil
        PastureSpecies AGPRyegrass: same as Simple Rotational Grazing Example.A Simple Rotational Grazing.Paddock05.AGPRyegrass
        PastureSpecies AGPWhiteClover: same as Simple Rotational Grazing Example.A Simple Rotational Grazing.Paddock05.AGPWhiteClover
        Report Pasture: EventNames=[Clock].EndOfDay
          VariableNames:
            [Clock].Today
            [AGPRyegrass].AboveGroundWt + [AGPWhiteClover].AboveGroundWt as PastureBiomass
            [Irrigation].IrrigationApplied
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