Simulations: Version=201
  DataStore
  Simulation TestSTRUM
    Clock: Start=2021-01-01; End=2024-12-31
    Summary SummaryFile
    Weather: FileName=C:/GitHubRepos/ApsimX/Prototypes/Apple/la tallada.met
    MicroClimate: a_interception=0; b_interception=1; c_interception=0; d_interception=0; SoilHeatFluxFraction=0.4; MinimumHeightDiffForNewLayer=0; NightInterceptionFraction=0.5; ReferenceHeight=2
    SoilArbitrator Soil Arbitrator
    Manager AutoIrrigationDeficitBased
      AllowIrrigation = True
      depthPAWC = 1000
      triggerDeficit = 80
      irrigateAmount = 15
      returndays = 3
      IrrigateAlley = True
```csharp
using APSIM.Core;
using Models.Interfaces;
using System;
using Models.Core;
using Models.PMF;
using Models.Soils;
using System.Xml.Serialization;
using APSIM.Shared.Utilities;
using Newtonsoft.Json;

        
namespace Models
{
    [Serializable] 
    [System.Xml.Serialization.XmlInclude(typeof(Model))]
    public class Script : Model, IStructureDependency
    {
        [Link] private Clock Clock;
        [Link] private Zone patch;
        [Link] private ISummary summary;
        [Link] private Soil Soil;
        [Link(IsOptional = true)] private IPlant existingCrop;
        [Link] private IPhysical soilPhysical;
        [Link] private ISoilWater waterBalance;
        [Link(Type = LinkType.Scoped, ByName = true)] private Zone Row;
        [Link(Type = LinkType.Scoped, ByName = true)] private Zone Alley;
        private double TopDUL;
        private double TopLL;
        private int nLayers;
        public IStructure Structure { private get; set; }
        //[Link] private Irrigation Irrigation;
       
        // Parameters from user interface
        [Separator("Manager for controlling automatic irrigation")]
        [Description(" Allow this manager to control irrigation?")]
        public bool AllowIrrigation { get; set; }
      
        [Separator(" Parameters for the irrigation system")]
        [Description(" Depth to calculate PAWC and deficit (mm)")]
        public double depthPAWC { get; set; }
        [Description(" Deficit to trigger irrigations (% PAWC)")]
        public double triggerDeficit { get; set; }
        [Description(" Irrigation amount to apply each event (mm)")]
        public double irrigateAmount { get; set; }
        [Description(" Minimum days for irrigation to return")]
        public double returndays { get; set; }
        
        [Description("Is the Alley zone irrigated?")]
        public bool IrrigateAlley {get; set;}

        //Class members
        [JsonIgnore] public double IrrigLayerSWDeficit { get; set; }
        [JsonIgnore] public double TopSWC { get; set; }
        [JsonIgnore] public double DaysSinceIrrigation { get; set; }
        [JsonIgnore] public double AmountToApply { get; set; }
        [JsonIgnore] public double SeasonAppliedAmount { get; set; }
        
        private bool IrrigationIsAllowed { get; set; }
        private bool CropIsActive { get; set; }
        private bool IrrigatorIsAvailable { get; set; }
        private bool SoilIsDry { get; set; }

    
        //Calculate static soil variables

        

        [EventSubscribe("StartOfSimulation")]
        private void OnStartOfSimulation(object sender, EventArgs e)
        {
            
            //Can we irrigate at all?
            IrrigationIsAllowed = false; 
            if (AllowIrrigation)
                IrrigationIsAllowed = true; 

            //Calculate soil water variables
            double depthFromSurface = 0.0;
            double fracLayer = 0.0;
            nLayers = soilPhysical.Thickness.Length;
            for (int layer = 0; layer < nLayers; layer++)
            {
                fracLayer = Math.Min(1.0, (depthPAWC - depthFromSurface) / soilPhysical.Thickness[layer]);
                TopLL += soilPhysical.LL15mm[layer] * fracLayer;
                TopDUL += soilPhysical.DULmm[layer] * fracLayer;
                depthFromSurface += soilPhysical.Thickness[layer];
                if (depthFromSurface >= depthPAWC)
                    layer = nLayers;
            }
        }
             
        //Determine daily requirement for irrigation
        [EventSubscribe("StartOfDay")]
        private void OnStartOfDay(object sender, EventArgs e)
        {
            AmountToApply = 0.0;
            DaysSinceIrrigation += 1;

            //Is the row crop actively growing?
            CropIsActive = false;
            double StageCode = (double)Structure.Get("STRUM.Phenology.Stage", relativeTo: Row);
            if ((StageCode > 3.0) && (StageCode<5.0))
            {
                CropIsActive = true;
            }
          
            //Is the irrigator available?
            IrrigatorIsAvailable = false;
            if (DaysSinceIrrigation >= returndays)
                IrrigatorIsAvailable = true;
          
            //Is the soil dry enough to require irrigation?
            SoilIsDry = false;
            double depthFromSurface = 0.0;
            double fracLayer = 0.0;
            TopSWC = 0.0;
            for (int layer = 0; layer < nLayers; layer++)
            //for (int layer = 0; depthFromSurface < depthPAWC + soilPhysical.Thickness[layer]; layer++)
            {
                fracLayer = Math.Min(1.0, (depthPAWC - depthFromSurface) / soilPhysical.Thickness[layer]);
                TopSWC += waterBalance.SWmm[layer] * fracLayer;
                depthFromSurface += soilPhysical.Thickness[layer];
                if (depthFromSurface >= depthPAWC)
                    layer = nLayers;
            }
            
            IrrigLayerSWDeficit = TopSWC - TopDUL;
            if (Math.Max(0.0, -IrrigLayerSWDeficit) >= (TopDUL - TopLL) * (100 - triggerDeficit) / 100)
                SoilIsDry = true;

            //Are all the conditions ratifying irrigation
            if (IrrigationIsAllowed && CropIsActive && IrrigatorIsAvailable && SoilIsDry)
            {
                //Lets irrigate well !!!!
                Irrigation irrigRow = (Irrigation)Structure.Get("Irrigation", relativeTo: Row);
                irrigRow.Apply(irrigateAmount, depth: 0);
                DaysSinceIrrigation = 0;
                if (IrrigateAlley)
                {
                   Irrigation irrigAlley = (Irrigation)Structure.Get("Irrigation", relativeTo: Alley);
                   irrigAlley.Apply(irrigateAmount , depth: 0);           
                }
            }
        }
    }
}
```
    Manager AutomaticFertiliser
      AllowFertiliser = yes
      Depth2SoilN = 1500
      CriticalSoilN = 30
      FertNAmount = 50
      FertType = UreaN
      FertApplicationDepth = 10
      FertMinimumDays = 15
```csharp
using APSIM.Core;
using System;
using Models.Core;
using Models.PMF;
using Models.Soils;
using APSIM.Shared.Utilities;
using System.Xml.Serialization;
using Models.Interfaces;
using Models.Soils.Nutrients;
using Newtonsoft.Json;

namespace Models
{
    [Serializable]
    public class Script : Model, IStructureDependency
    {
        [Link] private Clock Clock;
        [Link] private Fertiliser fertiliser;
        [Link] private ISummary summary;
        [Link] private Soil Soil;
        [Link(Type = LinkType.Scoped, ByName = true)] private Zone Row;
        private DateTime lastApplicationDate;
        private bool fertiliserIsAllowed;
        private int nLayers;
        [Link(ByName = true)]
        private ISolute NO3;
        [Link(ByName = true)]
        private ISolute NH4;
        [Link(ByName = true)]
        private ISolute Urea;
        [Link]
        private IPhysical soilPhysical;
        public IStructure Structure { private get; set; }

        //User inputs from properties tab
        [Description("Turn fertiliser applications on? ")]
        public yesnoType AllowFertiliser { get; set; }
        
        [Description("Depth to calculate available soil N (mm): ")]
        public double Depth2SoilN { get; set; }

        [Description("Minimum available N, triggers an application (kgN/ha): ")]
        public double CriticalSoilN { get; set; }

        [Description("Amount of N fertiliser for each application (kgN/ha): ")]
        public double FertNAmount { get; set; }

        [Description("Type of N fertiliser to apply: ")]
        [Display(Type = DisplayType.FertiliserType)]public string FertType { get; set; }

        [Description("Depth at which to apply the fertiliser (mm): ")]
        public double FertApplicationDepth { get; set; }
       
        [Description("Minimum period between applications (days): ")]
        public double FertMinimumDays { get; set; }
       
        public enum yesnoType
        {
            /// <summary>a positive answer</summary>
            yes,
            /// <summary>a negative answer</summary>
            no
        }

        [JsonIgnore] public double TopMineralN { get; set; }
        private bool CropIsActive { get; set; }
        


        

        [EventSubscribe("StartOfSimulation")]
        private void OnStartOfSimulation(object sender, EventArgs e)
        {
            fertiliserIsAllowed = (AllowFertiliser == yesnoType.yes);
            nLayers = soilPhysical.Thickness.Length;
        }

        [EventSubscribe("DoManagement")]
        private void OnDoManagement(object sender, EventArgs e)
        {
            double daysSinceLastApplication = (Clock.Today - lastApplicationDate).TotalDays;
            
            //Is the row crop actively growing?
            CropIsActive = false;
            double StageCode = (double)Structure.Get("STRUM.Phenology.Stage", relativeTo: Row);
            if ((StageCode > 3.0) && (StageCode<5.0))
            {
                CropIsActive = true;
            }
            
            // get the N stored in the soil
            double depthFromSurface = 0.0;
            double fracLayer = 0.0;
            TopMineralN = 0.0;
            for (int layer = 0; layer < nLayers; layer++)
            {
                fracLayer = Math.Min(1.0, (Depth2SoilN - depthFromSurface) / soilPhysical.Thickness[layer]);
                TopMineralN += (NO3.kgha[layer]
                + NH4.kgha[layer]
                + Urea.kgha[layer])
                * fracLayer;
                depthFromSurface += soilPhysical.Thickness[layer];
                if (depthFromSurface >= Depth2SoilN)
                    layer = nLayers;
            }

            if (fertiliserIsAllowed && CropIsActive && (daysSinceLastApplication >= FertMinimumDays) && (TopMineralN <= CriticalSoilN))
            {
                fertiliser.Apply(FertNAmount, FertType, FertApplicationDepth);
                lastApplicationDate = Clock.Today;
            }
        }
    }
}
```
    ZoneAgregate
    Report ZoneAgregateReport: EventNames=[Clock].DoReport
      VariableNames:
        [Clock].Today
        [ZoneAgregate].SimulationArea
        [ZoneAgregate].Eop.Amount
        [ZoneAgregate].Eop.Pm2
        [ZoneAgregate].Eop.AmountByZone[1]
        [ZoneAgregate].Eop.AmountByZone[2]
        [ZoneAgregate].Ro.Amount
        [ZoneAgregate].Ro.Pm2
        [ZoneAgregate].Ro.AmountByZone[1]
        [ZoneAgregate].Ro.AmountByZone[2]
        [ZoneAgregate].Ri.Amount
        [ZoneAgregate].Ri.Pm2
        [ZoneAgregate].Ri.AmountByZone[1]
        [ZoneAgregate].Ri.AmountByZone[2]
        [ZoneAgregate].Et.Amount
        [ZoneAgregate].Et.Pm2
        [ZoneAgregate].Et.AmountByZone[1]
        [ZoneAgregate].Et.AmountByZone[2]
        [ZoneAgregate].AccumulatedIrrigation.Amount
        [ZoneAgregate].AccumulatedIrrigation.Pm2
        [ZoneAgregate].AccumulatedIrrigation.AmountByZone[1]
        [ZoneAgregate].AccumulatedIrrigation.AmountByZone[2]
        [ZoneAgregate].AccumulatedNitrogen.Amount
        [ZoneAgregate].AccumulatedNitrogen.Pm2
        [ZoneAgregate].AccumulatedNitrogen.AmountByZone[1]
        [ZoneAgregate].AccumulatedNitrogen.AmountByZone[2]
        [ZoneAgregate].FintTreeGreen
        [ZoneAgregate].FintTreeDead
        [ZoneAgregate].FintTreeTotal
        [ZoneAgregate].FintUnderstoryGreen
        [ZoneAgregate].FintUnderstoryDead
    RectangularZone Row: Length=100; Width=1.3; CanopyType=TreeRow; Slope=0; AspectAngle=0; Altitude=50
      Soil: Latitude=0; Longitude=0
        LayerStructure: Thickness=[200, 200, 200, 200, 200, 200, 300, 300, 400, 800]
        Chemical: PHUnits=Water
          Thickness  PH   CEC
          100        6.6  12.44
          200        6.2  11.6525
          300        5.7  11.045
          300        5.5  10.6625
          300        5.5  9.4025
          300        5.5  9.4025
          CEC source: Calculated
        Water: Thickness=[300, 300, 300, 300, 300, 300, 1200]; InitialValues=[0.42, 0.41, 0.5, 0.46, 0.45, 0.43, 0.43]; FilledFromTop=false
        WaterBalance SoilWater: SummerDate=1-Nov; SummerU=9; SummerCona=4.4; WinterDate=1-Apr; WinterU=9; WinterCona=4.4; DiffusConst=88; DiffusSlope=35.4; Salb=0.3; CN2Bare=68; CNRed=20; CNCov=0.8; DischargeWidth=0; CatchmentArea=0; PSIDul=-100
          Thickness  SWCON  KLAT
          300        0.55   0
          300        0.55   0
          300        0.55   0
          300        0.55   0
          300        0.1    0
          300        0.02   0
          400        0.02   0
          800        0      0
        Organic: FOMCNRatio=30; CarbonUnits=Total
          Thickness  Carbon  SoilCNRatio  FBiom  FInert  FOM
          100        1.82    11.5         0.025  0.3     1243.931
          200        1.47    11.5         0.025  0.4     833.832
          300        1.2     11.5         0.015  0.75    457.617
          300        1.03    11.5         0.01   0.9     251.145
          300        0.47    11.5         0.01   0.96    137.831
          300        0.47    11.5         0.01   0.96    75.644
        OutputLayers: Thickness=[300, 300, 300, 300, 300, 300]
        Solute NO3: Thickness=[100, 200, 300, 300, 300, 300]; InitialValues=[217, 15, 1.66667, 1.66667, 0, 0]; InitialValuesUnits=ppm; WaterTableConcentration=0; D0=0; DepthConstant=0; MaxDepthSoluteAccessible=0; RunoffEffectivenessAtMovingSolute=0; MaxEffectiveRunoff=0
        Solute NH4: Thickness=[100, 200, 300, 300, 300, 300]; InitialValues=[0, 0, 0, 0, 0, 0]; InitialValuesUnits=ppm; WaterTableConcentration=0; D0=0; DepthConstant=0; MaxDepthSoluteAccessible=0; RunoffEffectivenessAtMovingSolute=0; MaxEffectiveRunoff=0
        Solute Urea: Thickness=[100, 200, 300, 300, 300, 300]; InitialValues=[0, 0, 0, 0, 0, 0]; InitialValuesUnits=kg/ha; WaterTableConcentration=0; D0=0; DepthConstant=0; MaxDepthSoluteAccessible=0; RunoffEffectivenessAtMovingSolute=0; MaxEffectiveRunoff=0
        Physical
          Thickness  ParticleSizeSand  ParticleSizeSilt  ParticleSizeClay  Rocks     BD  AirDry  LL15  DUL   SAT   KS
          300        5                 65                30                0.136527  1   0.2     0.2   0.4   0.5   100
          300        5                 65                30                0.136527  1   0.2     0.2   0.4   0.5   100
          300        5                 65                30                0.136527  1   0.25    0.25  0.3   0.5   50
          300        5                 65                30                0.136527  1   0.2     0.2   0.3   0.5   40
          300        5                 65                30                0.136527  1   0.2     0.2   0.25  0.5   40
          300        5                 65                30                0         1   0.2     0.2   0.25  0.53  40
          1200       5                 65                30                0         1   0.2     0.2   0.25  0.53  40
          Rocks, ParticleSizeSand, ParticleSizeSilt, ParticleSizeClay source: Calculated
          SoilCrop STRUMSoil: LL=[0.2, 0.2, 0.2, 0.2, 0.2, 0.2, 0.2]; KL=[1, 1, 1, 1, 1, 1, 1]; XF=[1, 1, 1, 1, 1, 1, 1]
          SoilCrop SPRUMSoil: LL=[0.2, 0.2, 0.2, 0.2, 0.2, 0.2, 0.2]; KL=[0.11, 0.11, 0.11, 0.11, 0.11, 0.11, 0.11]; XF=[1, 1, 1, 1, 1, 1, 1]
        Nutrient
        SoilTemperature Temperature
      SurfaceOrganicMatter: InitialResidueName=wheat_stubble; InitialResidueType=wheat; InitialResidueMass=500; InitialStandingFraction=0; InitialCPR=0; InitialCNR=100
      Fertiliser
      Irrigation
      Plant STRUM
      StrumTreeInstance Apple: TreeType=Deciduous; RowSpacing=5; InterRowSpacing=1; AlleyZoneWidthFrac=0.6; AgeAtSimulationStart=1; YearsToMaxDimension=6; TrunkMassAtMaxDimension=50; BudBreakDate=1-Feb; StartFullCanopyDate=15-Jun; StartLeafFallDate=30-Oct; EndLeafFallDate=5-Dec; GRINZ=true; MaxRD=3000; Proot=0.15; Pleaf=0.15; Ptrunk=0.5; CanopyBaseHeight=1000; MaxPrunedHeight=2500; MaxHeight=3500; MaxWidth=4500; MaxPrunedWidth=3500; RootNConc=0.01; LeafNConc=0.02; TrunkNConc=0.01; FruitNConc=0.02; ExtinctCoeff=0.6; BaseCover=0; MaxCover=0.95; RUE=1.6; PSBaseT=5; PSLOptT=20; PSUOptT=25; PSMaxT=35; GSMax=0.006; R50=100; SurfaceKL=0.1; WaterStress=false; Number=50; PotentialFWPerFruit=175; DMC=0.2; FruitDensity=0.75; DateMaxBloom=1-Feb; DAFStartLinearGrowth=30; DAFEndLinearGrowth=90; DAFMaxSize=150
      BiomassRemovalEvents Pick: NameOfPlantToRemoveFrom=STRUM; RemovalType=0; RemovalDates=[1-may]
        BiomassRemovalFractions:
          PlantName  OrganName  TypeString  LiveToRemove  DeadToRemove  LiveToResidue  DeadToResidue
          STRUM      Root       Cutting     0             0             0              0
          STRUM      Leaf       Cutting     0             0             0.05           0
          STRUM      Trunk      Cutting     0             0             0.05           0
          STRUM      Fruit      Cutting     0.85          0             0.05           0
      BiomassRemovalEvents Prune: NameOfPlantToRemoveFrom=STRUM; RemovalType=3; RemovalDates=[1-Jun]
        BiomassRemovalFractions:
          PlantName  OrganName  TypeString  LiveToRemove  DeadToRemove  LiveToResidue  DeadToResidue
          STRUM      Root       Pruning     0             0             0              0
          STRUM      Leaf       Pruning     0             0             1              1
          STRUM      Trunk      Pruning     0             0             0.15           0.9
          STRUM      Fruit      Pruning     0             0             1              1
      Report RowZoneReport: EventNames=[Clock].DoReport
        VariableNames:
          [Clock].Today
          [Row].Area
          [Row].STRUM.CanopyArea
          [Row].STRUM.RootUptakesArbitrator.WaterDemand.Amount
          [Row].STRUM.RootUptakesArbitrator.WaterDemand.mm
          [Row].STRUM.RootUptakesArbitrator.NitrogenDemand.Amount
          [Row].STRUM.Root.Network.WtByLayerZone1
          [Row].STRUM.Root.Network.WtByLayerZone2
          [Row].STRUM.Arbitrator.Carbon.TotalPlantDemand
          [Row].STRUM.Arbitrator.Carbon.TotalPlantSupply
          [Row].STRUM.Arbitrator.Carbon.TotalPlantDemandsAllocated
          [Row].STRUM.Arbitrator.Fn
          [Row].STRUM.Arbitrator.Nitrogen.TotalPlantDemand
          [Row].STRUM.Arbitrator.Nitrogen.TotalPlantSupply
          [Row].STRUM.Arbitrator.Nitrogen.TotalPlantDemandsAllocated
          [Row].STRUM.Fruit.TotalCarbonDemand.RelativeFruitMass.Delta.Integral
          [Row].STRUM.Fruit.Allocated.Carbon.Total
          [Row].STRUM.Fruit.Allocated.Nitrogen.Total
          [Row].STRUM.Fruit.Carbon.Demands.Structural
          [Row].STRUM.Fruit.Carbon.Demands.Total
          [Row].STRUM.Fruit.DMC
          [Row].STRUM.Fruit.FreshWtPerFruit
          [Row].STRUM.Fruit.NextYearsFruitingBudSurvival
          [Row].STRUM.Fruit.Number.BudsSurvivalFromLastYear
          [Row].STRUM.Fruit.N
          [Row].STRUM.Fruit.Nitrogen.Demands.Total
          [Row].STRUM.Fruit.Number
          [Row].STRUM.Fruit.Diameter
          [Row].STRUM.Fruit.VolumePerFruit
          [Row].STRUM.Fruit.Wt
          [Row].STRUM.Fruit.PotentialDWPerFruit
          [Row].STRUM.Fruit.TotalCarbonDemand.RelativeFruitMass
          [Row].STRUM.Fruit.TotalCarbonDemand.CarbonConc
          [Row].STRUM.Height
          [Row].STRUM.Height.CanopyBaseHeight
          [Row].STRUM.Height.CanopyBaseHeight  + [Row].STRUM.Height.PrunedCanopyDepth
          [Row].STRUM.Height.CanopyBaseHeight  + [Row].STRUM.Height.PrunedCanopyDepth + [Row].STRUM.Height.SeasonalGrowth
          [Row].STRUM.Leaf.Allocated.Carbon.Total
          [Row].STRUM.Leaf.Allocated.Nitrogen.Total
          [Row].STRUM.Leaf.Canopy.CoverGreen
          [Row].STRUM.Leaf.Dead.Wt
          [Row].STRUM.Leaf.Carbon.Demands.Structural
          [Row].STRUM.Leaf.Carbon.Demands.Total
          [Row].STRUM.Leaf.Fn
          [Row].STRUM.Leaf.Canopy.Fw
          [Row].STRUM.Leaf.Canopy.LAI
          [Row].STRUM.Leaf.Live.Wt
          [Row].STRUM.Leaf.N
          [Row].STRUM.Leaf.Nitrogen.Demands.Total
          [Row].STRUM.Leaf.Canopy.PotentialEP
          [Row].STRUM.Leaf.Canopy.RadiationIntercepted
          [Row].STRUM.Leaf.Senesced.Weight.Structural
          [Row].STRUM.Leaf.SenescenceRate
          [Row].STRUM.Leaf.Canopy.Transpiration
          [Row].STRUM.Leaf.Canopy.WaterDemand
          [Row].STRUM.Leaf.Canopy.WaterAllocation
          [Row].STRUM.Leaf.Canopy.Width
          [Row].STRUM.Leaf.Canopy.GreenExtinctionCoefficient
          [Row].STRUM.Leaf.Wt
          [Row].STRUM.Phenology.Age.YearDecimal
          [Row].STRUM.Phenology.Age.Years
          [Row].STRUM.Phenology.CurrentStageName
          [Row].STRUM.Phenology.DaysSinceFlowering
          [Row].STRUM.Phenology.Stage
          [Row].STRUM.RelativeSeasonalDimension
          [Row].STRUM.RelativeAnnualDimension
          [Row].STRUM.Root.Allocated.Carbon.Total
          [Row].STRUM.Root.Allocated.Nitrogen.Total
          [Row].STRUM.Root.Network.Depth
          [Row].STRUM.Root.Carbon.Demands.Structural
          [Row].STRUM.Root.Carbon.Demands.Total
          [Row].STRUM.Root.N
          [Row].STRUM.Root.Nitrogen.Demands.Total
          [Row].STRUM.RootUptakesArbitrator.WaterUptake.AmountByZone
          [Row].STRUM.RootUptakesArbitrator.WaterUptake.Mm
          [Row].STRUM.RootUptakesArbitrator.WaterUptake.Amount
          [Row].STRUM.RootUptakesArbitrator.NitrogenUptake.AmountByZone
          [Row].STRUM.RootUptakesArbitrator.NitrogenUptake.Gpm2
          [Row].STRUM.RootUptakesArbitrator.NitrogenUptake.Amount
          [Row].STRUM.RootUptakesArbitrator.WaterSupply.AmountByZone
          [Row].STRUM.RootUptakesArbitrator.WaterSupply.Mm
          [Row].STRUM.RootUptakesArbitrator.WaterSupply.Amount
          [Row].STRUM.RootUptakesArbitrator.NitrogenSupply.AmountByZone
          [Row].STRUM.RootUptakesArbitrator.NitrogenSupply.Gpm2
          [Row].STRUM.RootUptakesArbitrator.NitrogenSupply.Amount
          [Row].STRUM.Root.Wt
          [Row].STRUM.TranspirationPerTree
          [Row].STRUM.Trunk.Allocated.Carbon.Total
          [Row].STRUM.Trunk.Allocated.Nitrogen.Total
          [Row].STRUM.Trunk.Carbon.Demands.Structural
          [Row].STRUM.Trunk.Carbon.Demands.Total
          [Row].STRUM.Trunk.EnergyBalance.CoverTotal
          [Row].STRUM.Trunk.EnergyBalance.DeadAreaIndex
          [Row].STRUM.Trunk.EnergyBalance.LAIDead
          [Row].STRUM.Trunk.EnergyBalance.RadiationInterceptedByDead
          [Row].STRUM.Trunk.EnergyBalance.Transpiration
          [Row].STRUM.Trunk.N
          [Row].STRUM.Trunk.Nitrogen.Demands.Total
          [Row].STRUM.Trunk.Wt
          [Row].STRUM.Width
          [Row].STRUM.Width.PrunedWidth
          [Row].STRUM.Width.PrunedWidth + [Row].STRUM.Width.SeasonalGrowth
          [Row].STRUM.TranspirationPerLeafArea
          [Row].SurfaceOrganicMatter.N
          [Row].SurfaceOrganicMatter.Wt
          [Row].Irrigation.IrrigationApplied
          [Row].Fertiliser.NitrogenApplied
          sum([Row].Soil.OutputLayers.SWmm)
          ([Row].Soil.OutputLayers.SWmm[1] + [Row].Soil.OutputLayers.SWmm[1] + [Row].Soil.OutputLayers.SWmm[1]) as SWmm90
          [Row].Soil.OutputLayers.SW
          [Row].Soil.OutputLayers.SAT
          [Row].Soil.OutputLayers.DUL
          [Row].Soil.OutputLayers.LL15
          [Row].Soil.SoilWater.Evaporation
          [Row].Soil.SoilWater.Eo
          [Weather].PanEvap
          [Weather].Radn
          [Weather].Rain
    RectangularZone Alley: Length=100; Width=2.2; CanopyType=TreeRow; Slope=0; AspectAngle=0; Altitude=50
      Report AlleyZoneReport: EventNames=[Clock].DoReport
        VariableNames:
          [Clock].Today
          [Alley].Area
          [Alley].SPRUM.RootUptakesArbitrator.WaterDemand.Amount
          [Alley].SPRUM.RootUptakesArbitrator.WaterSupply.Amount
          [Alley].SPRUM.RootUptakesArbitrator.WaterUptake.Amount
          [Alley].SPRUM.RootUptakesArbitrator.NitrogenDemand.Amount
          [Alley].SPRUM.RootUptakesArbitrator.NitrogenSupply.Amount
          [Alley].SPRUM.RootUptakesArbitrator.NitrogenUptake.Amount
          [Alley].SPRUM.Root.Network.WtByLayerZone1
          [Alley].SPRUM.Root.Network.WtByLayerZone2
          [Alley].SPRUM.Arbitrator.Carbon.TotalPlantDemand
          [Alley].SPRUM.Arbitrator.Carbon.TotalPlantSupply
          [Alley].SPRUM.Arbitrator.Carbon.TotalPlantDemandsAllocated
          [Alley].SPRUM.Arbitrator.Fn
          [Alley].SPRUM.Arbitrator.Nitrogen.TotalPlantDemand
          [Alley].SPRUM.Arbitrator.Nitrogen.TotalPlantSupply
          [Alley].SPRUM.Arbitrator.Nitrogen.TotalPlantDemandsAllocated
          [Alley].SPRUM.Height
          [Alley].SPRUM.Leaf.Allocated.Carbon.Total
          [Alley].SPRUM.Leaf.Allocated.Nitrogen.Total
          [Alley].SPRUM.Leaf.Canopy.CoverGreen
          [Alley].SPRUM.Leaf.Dead.Wt
          [Alley].SPRUM.Leaf.Carbon.Demands.Structural
          [Alley].SPRUM.Leaf.Carbon.Demands.Total
          [Alley].SPRUM.Leaf.Fn
          [Alley].SPRUM.Leaf.Canopy.Fw
          [Alley].SPRUM.Leaf.Canopy.LAI
          [Alley].SPRUM.Leaf.Live.Wt
          [Alley].SPRUM.Leaf.N
          [Alley].SPRUM.Leaf.Nitrogen.Demands.Total
          [Alley].SPRUM.Leaf.Canopy.PotentialEP
          [Alley].SPRUM.Leaf.Canopy.RadiationIntercepted
          [Alley].SPRUM.Leaf.Senesced.Weight.Structural
          [Alley].SPRUM.Leaf.SenescenceRate
          [Alley].SPRUM.Leaf.Canopy.Transpiration
          [Alley].SPRUM.Leaf.Canopy.WaterDemand
          [Alley].SPRUM.Leaf.Canopy.WaterAllocation
          [Alley].SPRUM.Leaf.Canopy.Width
          [Alley].SPRUM.Leaf.Wt
          [Alley].SPRUM.Phenology.Age.YearDecimal
          [Alley].SPRUM.Phenology.Age.Years
          [Alley].SPRUM.Phenology.CurrentStageName
          [Alley].SPRUM.Phenology.Stage
          [Alley].SPRUM.RelativeAnnualDimension
          [Alley].SPRUM.Root.Allocated.Carbon.Total
          [Alley].SPRUM.Root.Allocated.Nitrogen.Total
          [Alley].SPRUM.Root.Network.Depth
          [Alley].SPRUM.Root.Carbon.Demands.Structural
          [Alley].SPRUM.Root.Carbon.Demands.Total
          [Alley].SPRUM.Root.N
          [Alley].SPRUM.Root.Nitrogen.Demands.Total
          [Alley].SPRUM.RootUptakesArbitrator.WaterUptake.AmountByZone
          [Alley].SPRUM.RootUptakesArbitrator.WaterUptake.Mm
          [Alley].SPRUM.RootUptakesArbitrator.WaterUptake.Amount
          [Alley].SPRUM.RootUptakesArbitrator.NitrogenUptake.AmountByZone
          [Alley].SPRUM.RootUptakesArbitrator.NitrogenUptake.Gpm2
          [Alley].SPRUM.RootUptakesArbitrator.NitrogenUptake.Amount
          [Alley].SPRUM.RootUptakesArbitrator.WaterSupply.AmountByZone
          [Alley].SPRUM.RootUptakesArbitrator.WaterSupply.Mm
          [Alley].SPRUM.RootUptakesArbitrator.WaterSupply.Amount
          [Alley].SPRUM.RootUptakesArbitrator.NitrogenSupply.AmountByZone
          [Alley].SPRUM.RootUptakesArbitrator.NitrogenSupply.Gpm2
          [Alley].SPRUM.RootUptakesArbitrator.NitrogenSupply.Amount
          [Alley].SPRUM.Root.Wt
          [Alley].SPRUM.Residue.Allocated.Carbon.Total
          [Alley].SPRUM.Residue.Allocated.Nitrogen.Total
          [Alley].SPRUM.Residue.Carbon.Demands.Structural
          [Alley].SPRUM.Residue.Carbon.Demands.Total
          [Alley].SPRUM.Residue.N
          [Alley].SPRUM.Residue.Nitrogen.Demands.Total
          [Alley].SPRUM.Residue.Wt
          [Alley].SurfaceOrganicMatter.N
          [Alley].SurfaceOrganicMatter.Wt
          [Alley].Irrigation.IrrigationApplied
          [Alley].Fertiliser.NitrogenApplied
          sum([Alley].Soil.OutputLayers.SWmm)
          ([Alley].Soil.OutputLayers.SWmm[1] + [Alley].Soil.OutputLayers.SWmm[1] + [Alley].Soil.OutputLayers.SWmm[1]) as SWmm90
          [Alley].Soil.OutputLayers.SW
          [Alley].Soil.OutputLayers.SAT
          [Alley].Soil.OutputLayers.DUL
          [Alley].Soil.OutputLayers.LL15
          [Alley].Soil.SoilWater.Drainage
          [Alley].Soil.SoilWater.Evaporation
          [Alley].Soil.SoilWater.Eo
          [Weather].PanEvap
          [Weather].Radn
          [Weather].Rain
      Soil: Latitude=0; Longitude=0
        LayerStructure: Thickness=[200, 200, 200, 200, 200, 200, 300, 300, 400, 800]
        Chemical: same as TestSTRUM.Row.Soil.Chemical
        Water: Thickness=[300, 300, 300, 300, 300, 300, 1200]; InitialValues=[0.4, 0.4, 0.4, 0.46, 0.45, 0.43, 0.43]; FilledFromTop=false
        WaterBalance SoilWater: same as TestSTRUM.Row.Soil.SoilWater
        Organic: FOMCNRatio=30; CarbonUnits=Total
          Thickness  Carbon  SoilCNRatio  FBiom  FInert  FOM
          100        1.82    11.5         0.025  0.3     1243.93
          200        1.47    11.5         0.025  0.4     833.832
          300        1.2     11.5         0.015  0.75    457.617
          300        1.03    11.5         0.01   0.9     251.145
          300        0.47    11.5         0.01   0.96    137.831
          300        0.47    11.5         0.01   0.96    75.6435
        OutputLayers: Thickness=[300, 300, 300, 300, 300, 300]
        Solute NO3: same as TestSTRUM.Row.Soil.NO3
        Solute NH4: same as TestSTRUM.Row.Soil.NH4
        Solute Urea: same as TestSTRUM.Row.Soil.Urea
        Physical
          Thickness  ParticleSizeSand  ParticleSizeSilt  ParticleSizeClay  Rocks     BD  AirDry  LL15  DUL   SAT   KS
          300        5                 65                30                0.136527  1   0.2     0.2   0.4   0.5   100
          300        5                 65                30                0.136527  1   0.2     0.2   0.4   0.5   100
          300        5                 65                30                0.136527  1   0.25    0.25  0.3   0.5   50
          300        5                 65                30                0.136527  1   0.2     0.2   0.21  0.5   40
          300        5                 65                30                0.136527  1   0.2     0.2   0.21  0.5   40
          300        5                 65                30                0         1   0.2     0.2   0.21  0.53  40
          1200       5                 65                30                0         1   0.2     0.2   0.21  0.53  40
          Rocks, ParticleSizeSand, ParticleSizeSilt, ParticleSizeClay source: Calculated
          SoilCrop STRUMSoil: LL=[0.2, 0.2, 0.2, 0.2, 0.2, 0.2, 0.2]; KL=[1, 1, 1, 1, 1, 1, 1]; XF=[1, 1, 1, 1, 1, 1, 1]
          SoilCrop SPRUMSoil: LL=[0.2, 0.2, 0.2, 0.2, 0.2, 0.2, 0.2]; KL=[0.11, 0.11, 0.11, 0.11, 0.11, 0.11, 0.11]; XF=[1, 1, 1, 1, 1, 1, 1]
        Nutrient
        SoilTemperature Temperature
      SurfaceOrganicMatter: InitialResidueName=wheat_stubble; InitialResidueType=wheat; InitialResidueMass=500; InitialStandingFraction=0; InitialCPR=0; InitialCNR=100
      Fertiliser
      Irrigation
      Plant SPRUM
      SprumPastureInstance UnderStoryPasture: AgeAtSimulationStart=0; YearsToMaxDimension=1; RUE=1; Presidue=0; RsenRate=0; Proot=0.1; PSBaseT=5; PSLOptT=20; PSUOptT=25; PSMaxT=30; GRINZ=true; MaxRD=600; MaxHeight=300; MaxPrunedHeight=100; MaxCover=0.97; MinCover=0.5; ExtinctCoeff=0.5; RegrowthDuration=300; FullCanopyDuration=0; BaseT=3; OptT=25; MaxT=35; RootNConc=0.01; LeafNConc=0.05; ResidueNConc=0.01; LegumePropn=0.2; GSMax=0.004; R50=150; SurfaceKL=0.1; WaterStress=true
      BiomassRemovalEvents Mow: NameOfPlantToRemoveFrom=SPRUM; RemovalType=0
        BiomassRemovalFractions:
          PlantName  OrganName  TypeString  LiveToRemove  DeadToRemove  LiveToResidue  DeadToResidue
          SPRUM      Residue    Cutting     0             0             0.5            0.5
          SPRUM      Leaf       Cutting     0             0             1              1
          SPRUM      Nodule     Cutting     0             0             0              0
          SPRUM      Root       Cutting     0             0             0              0
  Simulation TestApple
    Clock: Start=2021-01-01; End=2024-12-31
    Summary SummaryFile
    Weather: FileName=C:/GitHubRepos/ApsimX/Prototypes/Apple/la tallada.met
    MicroClimate: a_interception=0; b_interception=1; c_interception=0; d_interception=0; SoilHeatFluxFraction=0.4; MinimumHeightDiffForNewLayer=0; NightInterceptionFraction=0.5; ReferenceHeight=2
    SoilArbitrator Soil Arbitrator
    Manager AutoIrrigationDeficitBased
      AllowIrrigation = True
      depthPAWC = 1000
      triggerDeficit = 80
      irrigateAmount = 15
      returndays = 3
      IrrigateAlley = True
```csharp
using APSIM.Core;
using Models.Interfaces;
using System;
using Models.Core;
using Models.PMF;
using Models.Soils;
using System.Xml.Serialization;
using APSIM.Shared.Utilities;
using Newtonsoft.Json;

        
namespace Models
{
    [Serializable] 
    [System.Xml.Serialization.XmlInclude(typeof(Model))]
    public class Script : Model, IStructureDependency
    {
        [Link] private Clock Clock;
        [Link] private Zone patch;
        [Link] private ISummary summary;
        [Link] private Soil Soil;
        [Link(IsOptional = true)] private IPlant existingCrop;
        [Link] private IPhysical soilPhysical;
        [Link] private ISoilWater waterBalance;
        [Link(Type = LinkType.Scoped, ByName = true)] private Zone Row;
        [Link(Type = LinkType.Scoped, ByName = true)] private Zone Alley;
        private double TopDUL;
        private double TopLL;
        private int nLayers;
        public IStructure Structure { private get; set; }
        //[Link] private Irrigation Irrigation;
       
        // Parameters from user interface
        [Separator("Manager for controlling automatic irrigation")]
        [Description(" Allow this manager to control irrigation?")]
        public bool AllowIrrigation { get; set; }
      
        [Separator(" Parameters for the irrigation system")]
        [Description(" Depth to calculate PAWC and deficit (mm)")]
        public double depthPAWC { get; set; }
        [Description(" Deficit to trigger irrigations (% PAWC)")]
        public double triggerDeficit { get; set; }
        [Description(" Irrigation amount to apply each event (mm)")]
        public double irrigateAmount { get; set; }
        [Description(" Minimum days for irrigation to return")]
        public double returndays { get; set; }
        
        [Description("Is the Alley zone irrigated?")]
        public bool IrrigateAlley {get; set;}

        //Class members
        [JsonIgnore] public double IrrigLayerSWDeficit { get; set; }
        [JsonIgnore] public double TopSWC { get; set; }
        [JsonIgnore] public double DaysSinceIrrigation { get; set; }
        [JsonIgnore] public double AmountToApply { get; set; }
        [JsonIgnore] public double SeasonAppliedAmount { get; set; }
        
        private bool IrrigationIsAllowed { get; set; }
        private bool CropIsActive { get; set; }
        private bool IrrigatorIsAvailable { get; set; }
        private bool SoilIsDry { get; set; }

    
        //Calculate static soil variables

        

        [EventSubscribe("StartOfSimulation")]
        private void OnStartOfSimulation(object sender, EventArgs e)
        {
            
            //Can we irrigate at all?
            IrrigationIsAllowed = false; 
            if (AllowIrrigation)
                IrrigationIsAllowed = true; 

            //Calculate soil water variables
            double depthFromSurface = 0.0;
            double fracLayer = 0.0;
            nLayers = soilPhysical.Thickness.Length;
            for (int layer = 0; layer < nLayers; layer++)
            {
                fracLayer = Math.Min(1.0, (depthPAWC - depthFromSurface) / soilPhysical.Thickness[layer]);
                TopLL += soilPhysical.LL15mm[layer] * fracLayer;
                TopDUL += soilPhysical.DULmm[layer] * fracLayer;
                depthFromSurface += soilPhysical.Thickness[layer];
                if (depthFromSurface >= depthPAWC)
                    layer = nLayers;
            }
        }
             
        //Determine daily requirement for irrigation
        [EventSubscribe("StartOfDay")]
        private void OnStartOfDay(object sender, EventArgs e)
        {
            AmountToApply = 0.0;
            DaysSinceIrrigation += 1;

            //Is the row crop actively growing?
            CropIsActive = false;
            double StageCode = (double)Structure.Get("Apple.Phenology.Stage", relativeTo: Row);
            if ((StageCode > 3.0) && (StageCode<5.0))
            {
                CropIsActive = true;
            }
          
            //Is the irrigator available?
            IrrigatorIsAvailable = false;
            if (DaysSinceIrrigation >= returndays)
                IrrigatorIsAvailable = true;
          
            //Is the soil dry enough to require irrigation?
            SoilIsDry = false;
            double depthFromSurface = 0.0;
            double fracLayer = 0.0;
            TopSWC = 0.0;
            for (int layer = 0; layer < nLayers; layer++)
            //for (int layer = 0; depthFromSurface < depthPAWC + soilPhysical.Thickness[layer]; layer++)
            {
                fracLayer = Math.Min(1.0, (depthPAWC - depthFromSurface) / soilPhysical.Thickness[layer]);
                TopSWC += waterBalance.SWmm[layer] * fracLayer;
                depthFromSurface += soilPhysical.Thickness[layer];
                if (depthFromSurface >= depthPAWC)
                    layer = nLayers;
            }
            
            IrrigLayerSWDeficit = TopSWC - TopDUL;
            if (Math.Max(0.0, -IrrigLayerSWDeficit) >= (TopDUL - TopLL) * (100 - triggerDeficit) / 100)
                SoilIsDry = true;

            //Are all the conditions ratifying irrigation
            if (IrrigationIsAllowed && CropIsActive && IrrigatorIsAvailable && SoilIsDry)
            {
                //Lets irrigate well !!!!
                Irrigation irrigRow = (Irrigation)Structure.Get("Irrigation", relativeTo: Row);
                irrigRow.Apply(irrigateAmount, depth: 0);
                DaysSinceIrrigation = 0;
                if (IrrigateAlley)
                {
                   Irrigation irrigAlley = (Irrigation)Structure.Get("Irrigation", relativeTo: Alley);
                   irrigAlley.Apply(irrigateAmount , depth: 0);           
                }
            }
        }
    }
}
```
    Manager AutomaticFertiliser
      AllowFertiliser = yes
      Depth2SoilN = 1500
      CriticalSoilN = 30
      FertNAmount = 50
      FertType = UreaN
      FertApplicationDepth = 10
      FertMinimumDays = 15
```csharp
using APSIM.Core;
using System;
using Models.Core;
using Models.PMF;
using Models.Soils;
using APSIM.Shared.Utilities;
using System.Xml.Serialization;
using Models.Interfaces;
using Models.Soils.Nutrients;
using Newtonsoft.Json;

namespace Models
{
    [Serializable]
    public class Script : Model, IStructureDependency
    {
        [Link] private Clock Clock;
        [Link] private Fertiliser fertiliser;
        [Link] private ISummary summary;
        [Link] private Soil Soil;
        [Link(Type = LinkType.Scoped, ByName = true)] private Zone Row;
        private DateTime lastApplicationDate;
        private bool fertiliserIsAllowed;
        private int nLayers;
        [Link(ByName = true)]
        private ISolute NO3;
        [Link(ByName = true)]
        private ISolute NH4;
        [Link(ByName = true)]
        private ISolute Urea;
        [Link]
        private IPhysical soilPhysical;
        public IStructure Structure { private get; set; }

        //User inputs from properties tab
        [Description("Turn fertiliser applications on? ")]
        public yesnoType AllowFertiliser { get; set; }
        
        [Description("Depth to calculate available soil N (mm): ")]
        public double Depth2SoilN { get; set; }

        [Description("Minimum available N, triggers an application (kgN/ha): ")]
        public double CriticalSoilN { get; set; }

        [Description("Amount of N fertiliser for each application (kgN/ha): ")]
        public double FertNAmount { get; set; }

        [Description("Type of N fertiliser to apply: ")]
        [Display(Type = DisplayType.FertiliserType)]public string FertType { get; set; }

        [Description("Depth at which to apply the fertiliser (mm): ")]
        public double FertApplicationDepth { get; set; }
       
        [Description("Minimum period between applications (days): ")]
        public double FertMinimumDays { get; set; }
       
        public enum yesnoType
        {
            /// <summary>a positive answer</summary>
            yes,
            /// <summary>a negative answer</summary>
            no
        }

        [JsonIgnore] public double TopMineralN { get; set; }
        private bool CropIsActive { get; set; }
        


        

        [EventSubscribe("StartOfSimulation")]
        private void OnStartOfSimulation(object sender, EventArgs e)
        {
            fertiliserIsAllowed = (AllowFertiliser == yesnoType.yes);
            nLayers = soilPhysical.Thickness.Length;
        }

        [EventSubscribe("DoManagement")]
        private void OnDoManagement(object sender, EventArgs e)
        {
            double daysSinceLastApplication = (Clock.Today - lastApplicationDate).TotalDays;
            
            //Is the row crop actively growing?
            CropIsActive = false;
            double StageCode = (double)Structure.Get("Apple.Phenology.Stage", relativeTo: Row);
            if ((StageCode > 3.0) && (StageCode<5.0))
            {
                CropIsActive = true;
            }
            
            // get the N stored in the soil
            double depthFromSurface = 0.0;
            double fracLayer = 0.0;
            TopMineralN = 0.0;
            for (int layer = 0; layer < nLayers; layer++)
            {
                fracLayer = Math.Min(1.0, (Depth2SoilN - depthFromSurface) / soilPhysical.Thickness[layer]);
                TopMineralN += (NO3.kgha[layer]
                + NH4.kgha[layer]
                + Urea.kgha[layer])
                * fracLayer;
                depthFromSurface += soilPhysical.Thickness[layer];
                if (depthFromSurface >= Depth2SoilN)
                    layer = nLayers;
            }

            if (fertiliserIsAllowed && CropIsActive && (daysSinceLastApplication >= FertMinimumDays) && (TopMineralN <= CriticalSoilN))
            {
                fertiliser.Apply(FertNAmount, FertType, FertApplicationDepth);
                lastApplicationDate = Clock.Today;
            }
        }
    }
}
```
    ZoneAgregate
    Report ZoneAgregateReport: same as TestSTRUM.ZoneAgregateReport
    RectangularZone Row: Length=100; Width=1.3; CanopyType=TreeRow; Slope=0; AspectAngle=0; Altitude=50
      Soil: Latitude=0; Longitude=0
        LayerStructure: Thickness=[200, 200, 200, 200, 200, 200, 300, 300, 400, 800]
        Chemical: same as TestSTRUM.Row.Soil.Chemical
        Water: Thickness=[300, 300, 300, 300, 300, 300, 1200]; InitialValues=[0.42, 0.41, 0.5, 0.46, 0.45, 0.43, 0.43]; FilledFromTop=false
        WaterBalance SoilWater: same as TestSTRUM.Row.Soil.SoilWater
        Organic: same as TestSTRUM.Row.Soil.Organic
        OutputLayers: Thickness=[300, 300, 300, 300, 300, 300]
        Solute NO3: same as TestSTRUM.Row.Soil.NO3
        Solute NH4: same as TestSTRUM.Row.Soil.NH4
        Solute Urea: same as TestSTRUM.Row.Soil.Urea
        Physical
          Thickness  ParticleSizeSand  ParticleSizeSilt  ParticleSizeClay  Rocks     BD  AirDry  LL15  DUL   SAT   KS
          300        5                 65                30                0.136527  1   0.2     0.2   0.4   0.5   100
          300        5                 65                30                0.136527  1   0.2     0.2   0.4   0.5   100
          300        5                 65                30                0.136527  1   0.25    0.25  0.3   0.5   50
          300        5                 65                30                0.136527  1   0.2     0.2   0.3   0.5   40
          300        5                 65                30                0.136527  1   0.2     0.2   0.25  0.5   40
          300        5                 65                30                0         1   0.2     0.2   0.25  0.53  40
          1200       5                 65                30                0         1   0.2     0.2   0.25  0.53  40
          Rocks, ParticleSizeSand, ParticleSizeSilt, ParticleSizeClay source: Calculated
          SoilCrop AppleSoil: LL=[0.2, 0.2, 0.2, 0.2, 0.2, 0.2, 0.2]; KL=[1, 1, 1, 1, 1, 1, 1]; XF=[1, 1, 1, 1, 1, 1, 1]
          SoilCrop SPRUMSoil: LL=[0.2, 0.2, 0.2, 0.2, 0.2, 0.2, 0.2]; KL=[0.11, 0.11, 0.11, 0.11, 0.11, 0.11, 0.11]; XF=[1, 1, 1, 1, 1, 1, 1]
        Nutrient
        SoilTemperature Temperature
      SurfaceOrganicMatter: InitialResidueName=wheat_stubble; InitialResidueType=wheat; InitialResidueMass=500; InitialStandingFraction=0; InitialCPR=0; InitialCNR=100
      Fertiliser
      Irrigation
      Plant Apple
      OrchardSetUp AppleParams: TreeType=Deciduous; RowSpacing=5; InterRowSpacing=1; AlleyZoneWidthFrac=0.6; AgeAtSimulationStart=1; YearsToMaxDimension=6; TrunkMassAtMaxDimension=50; BudBreakDate=1-Feb; StartFullCanopyDate=15-Jun; StartLeafFallDate=30-Oct; EndLeafFallDate=5-Dec; GRINZ=true; MaxRD=3000; Proot=0.15; Pleaf=0.15; Ptrunk=0.5; CanopyBaseHeight=1000; MaxPrunedHeight=2500; MaxHeight=3500; MaxWidth=4500; MaxPrunedWidth=3500; RootNConc=0.01; LeafNConc=0.02; TrunkNConc=0.01; FruitNConc=0.02; ExtinctCoeff=0.6; BaseCover=0; MaxCover=0.95; RUE=1.6; PSBaseT=5; PSLOptT=20; PSUOptT=25; PSMaxT=35; GSMax=0.006; R50=100; SurfaceKL=0.1; WaterStress=false; Number=50; PotentialFWPerFruit=175; DMC=0.2; FruitDensity=0.75; DateMaxBloom=1-Feb; DAFStartLinearGrowth=30; DAFEndLinearGrowth=90; DAFMaxSize=150
      BiomassRemovalEvents Pick: NameOfPlantToRemoveFrom=Apple; RemovalType=0; RemovalDates=[1-may]
        BiomassRemovalFractions:
          PlantName  OrganName  TypeString  LiveToRemove  DeadToRemove  LiveToResidue  DeadToResidue
          Apple      Root       Cutting     0             0             0              0
          Apple      Leaf       Cutting     0             0             0.05           0
          Apple      Trunk      Cutting     0             0             0.05           0
          Apple      Fruit      Cutting     0.85          0             0.05           0
      BiomassRemovalEvents Prune: NameOfPlantToRemoveFrom=Apple; RemovalType=3; RemovalDates=[1-Jun]
        BiomassRemovalFractions:
          PlantName  OrganName  TypeString  LiveToRemove  DeadToRemove  LiveToResidue  DeadToResidue
          Apple      Root       Pruning     0             0             0              0
          Apple      Leaf       Pruning     0             0             1              1
          Apple      Trunk      Pruning     0             0             0.15           0.9
          Apple      Fruit      Pruning     0             0             1              1
      Report RowZoneReport: EventNames=[Clock].DoReport
        VariableNames:
          [Clock].Today
          [Row].Area
          [Row].Apple.CanopyArea
          [Row].Apple.RootUptakesArbitrator.WaterDemand.Amount
          [Row].Apple.RootUptakesArbitrator.WaterDemand.mm
          [Row].Apple.RootUptakesArbitrator.NitrogenDemand.Amount
          [Row].Apple.Root.Network.WtByLayerZone1
          [Row].Apple.Root.Network.WtByLayerZone2
          [Row].Apple.Arbitrator.Carbon.TotalPlantDemand
          [Row].Apple.Arbitrator.Carbon.TotalPlantSupply
          [Row].Apple.Arbitrator.Carbon.TotalPlantDemandsAllocated
          [Row].Apple.Arbitrator.Fn
          [Row].Apple.Arbitrator.Nitrogen.TotalPlantDemand
          [Row].Apple.Arbitrator.Nitrogen.TotalPlantSupply
          [Row].Apple.Arbitrator.Nitrogen.TotalPlantDemandsAllocated
          [Row].Apple.Fruit.TotalCarbonDemand.RelativeFruitMass.Delta.Integral
          [Row].Apple.Fruit.Allocated.Carbon.Total
          [Row].Apple.Fruit.Allocated.Nitrogen.Total
          [Row].Apple.Fruit.Carbon.Demands.Structural
          [Row].Apple.Fruit.Carbon.Demands.Total
          [Row].Apple.Fruit.DMC
          [Row].Apple.Fruit.FreshWtPerFruit
          [Row].Apple.Fruit.NextYearsFruitingBudSurvival
          [Row].Apple.Fruit.Number.BudsSurvivalFromLastYear
          [Row].Apple.Fruit.N
          [Row].Apple.Fruit.Nitrogen.Demands.Total
          [Row].Apple.Fruit.Number
          [Row].Apple.Fruit.Diameter
          [Row].Apple.Fruit.VolumePerFruit
          [Row].Apple.Fruit.Wt
          [Row].Apple.Fruit.PotentialDWPerFruit
          [Row].Apple.Fruit.TotalCarbonDemand.RelativeFruitMass
          [Row].Apple.Fruit.TotalCarbonDemand.CarbonConc
          [Row].Apple.Height
          [Row].Apple.Height.CanopyBaseHeight
          [Row].Apple.Height.CanopyBaseHeight  + [Row].Apple.Height.PrunedCanopyDepth
          [Row].Apple.Height.CanopyBaseHeight  + [Row].Apple.Height.PrunedCanopyDepth + [Row].Apple.Height.SeasonalGrowth
          [Row].Apple.Leaf.Allocated.Carbon.Total
          [Row].Apple.Leaf.Allocated.Nitrogen.Total
          [Row].Apple.Leaf.Canopy.CoverGreen
          [Row].Apple.Leaf.Dead.Wt
          [Row].Apple.Leaf.Carbon.Demands.Structural
          [Row].Apple.Leaf.Carbon.Demands.Total
          [Row].Apple.Leaf.Fn
          [Row].Apple.Leaf.Canopy.Fw
          [Row].Apple.Leaf.Canopy.LAI
          [Row].Apple.Leaf.Live.Wt
          [Row].Apple.Leaf.N
          [Row].Apple.Leaf.Nitrogen.Demands.Total
          [Row].Apple.Leaf.Canopy.PotentialEP
          [Row].Apple.Leaf.Canopy.RadiationIntercepted
          [Row].Apple.Leaf.Senesced.Weight.Structural
          [Row].Apple.Leaf.SenescenceRate
          [Row].Apple.Leaf.Canopy.Transpiration
          [Row].Apple.Leaf.Canopy.WaterDemand
          [Row].Apple.Leaf.Canopy.WaterAllocation
          [Row].Apple.Leaf.Canopy.Width
          [Row].Apple.Leaf.Canopy.GreenExtinctionCoefficient
          [Row].Apple.Leaf.Wt
          [Row].Apple.Phenology.Age.YearDecimal
          [Row].Apple.Phenology.Age.Years
          [Row].Apple.Phenology.CurrentStageName
          [Row].Apple.Phenology.DaysSinceFlowering
          [Row].Apple.Phenology.Stage
          [Row].Apple.RelativeSeasonalDimension
          [Row].Apple.RelativeAnnualDimension
          [Row].Apple.Root.Allocated.Carbon.Total
          [Row].Apple.Root.Allocated.Nitrogen.Total
          [Row].Apple.Root.Network.Depth
          [Row].Apple.Root.Carbon.Demands.Structural
          [Row].Apple.Root.Carbon.Demands.Total
          [Row].Apple.Root.N
          [Row].Apple.Root.Nitrogen.Demands.Total
          [Row].Apple.RootUptakesArbitrator.WaterUptake.AmountByZone
          [Row].Apple.RootUptakesArbitrator.WaterUptake.Mm
          [Row].Apple.RootUptakesArbitrator.WaterUptake.Amount
          [Row].Apple.RootUptakesArbitrator.NitrogenUptake.AmountByZone
          [Row].Apple.RootUptakesArbitrator.NitrogenUptake.Gpm2
          [Row].Apple.RootUptakesArbitrator.NitrogenUptake.Amount
          [Row].Apple.RootUptakesArbitrator.WaterSupply.AmountByZone
          [Row].Apple.RootUptakesArbitrator.WaterSupply.Mm
          [Row].Apple.RootUptakesArbitrator.WaterSupply.Amount
          [Row].Apple.RootUptakesArbitrator.NitrogenSupply.AmountByZone
          [Row].Apple.RootUptakesArbitrator.NitrogenSupply.Gpm2
          [Row].Apple.RootUptakesArbitrator.NitrogenSupply.Amount
          [Row].Apple.Root.Wt
          [Row].Apple.TranspirationPerTree
          [Row].Apple.Trunk.Allocated.Carbon.Total
          [Row].Apple.Trunk.Allocated.Nitrogen.Total
          [Row].Apple.Trunk.Carbon.Demands.Structural
          [Row].Apple.Trunk.Carbon.Demands.Total
          [Row].Apple.Trunk.EnergyBalance.CoverTotal
          [Row].Apple.Trunk.EnergyBalance.DeadAreaIndex
          [Row].Apple.Trunk.EnergyBalance.LAIDead
          [Row].Apple.Trunk.EnergyBalance.RadiationInterceptedByDead
          [Row].Apple.Trunk.EnergyBalance.Transpiration
          [Row].Apple.Trunk.N
          [Row].Apple.Trunk.Nitrogen.Demands.Total
          [Row].Apple.Trunk.Wt
          [Row].Apple.Width
          [Row].Apple.Width.PrunedWidth
          [Row].Apple.Width.PrunedWidth + [Row].Apple.Width.SeasonalGrowth
          [Row].Apple.TranspirationPerLeafArea
          [Row].SurfaceOrganicMatter.N
          [Row].SurfaceOrganicMatter.Wt
          [Row].Irrigation.IrrigationApplied
          [Row].Fertiliser.NitrogenApplied
          sum([Row].Soil.OutputLayers.SWmm)
          ([Row].Soil.OutputLayers.SWmm[1] + [Row].Soil.OutputLayers.SWmm[1] + [Row].Soil.OutputLayers.SWmm[1]) as SWmm90
          [Row].Soil.OutputLayers.SW
          [Row].Soil.OutputLayers.SAT
          [Row].Soil.OutputLayers.DUL
          [Row].Soil.OutputLayers.LL15
          [Row].Soil.SoilWater.Evaporation
          [Row].Soil.SoilWater.Eo
          [Weather].PanEvap
          [Weather].Radn
          [Weather].Rain
    RectangularZone Alley: Length=100; Width=2.2; CanopyType=TreeRow; Slope=0; AspectAngle=0; Altitude=50
      Report AlleyZoneReport: same as TestSTRUM.Alley.AlleyZoneReport
      Soil: Latitude=0; Longitude=0
        LayerStructure: Thickness=[200, 200, 200, 200, 200, 200, 300, 300, 400, 800]
        Chemical: same as TestSTRUM.Row.Soil.Chemical
        Water: Thickness=[300, 300, 300, 300, 300, 300, 1200]; InitialValues=[0.4, 0.4, 0.4, 0.46, 0.45, 0.43, 0.43]; FilledFromTop=false
        WaterBalance SoilWater: same as TestSTRUM.Row.Soil.SoilWater
        Organic: same as TestSTRUM.Alley.Soil.Organic
        OutputLayers: Thickness=[300, 300, 300, 300, 300, 300]
        Solute NO3: same as TestSTRUM.Row.Soil.NO3
        Solute NH4: same as TestSTRUM.Row.Soil.NH4
        Solute Urea: same as TestSTRUM.Row.Soil.Urea
        Physical
          Thickness  ParticleSizeSand  ParticleSizeSilt  ParticleSizeClay  Rocks     BD  AirDry  LL15  DUL   SAT   KS
          300        5                 65                30                0.136527  1   0.2     0.2   0.4   0.5   100
          300        5                 65                30                0.136527  1   0.2     0.2   0.4   0.5   100
          300        5                 65                30                0.136527  1   0.25    0.25  0.3   0.5   50
          300        5                 65                30                0.136527  1   0.2     0.2   0.21  0.5   40
          300        5                 65                30                0.136527  1   0.2     0.2   0.21  0.5   40
          300        5                 65                30                0         1   0.2     0.2   0.21  0.53  40
          1200       5                 65                30                0         1   0.2     0.2   0.21  0.53  40
          Rocks, ParticleSizeSand, ParticleSizeSilt, ParticleSizeClay source: Calculated
          SoilCrop AppleSoil: LL=[0.2, 0.2, 0.2, 0.2, 0.2, 0.2, 0.2]; KL=[1, 1, 1, 1, 1, 1, 1]; XF=[1, 1, 1, 1, 1, 1, 1]
          SoilCrop SPRUMSoil: LL=[0.2, 0.2, 0.2, 0.2, 0.2, 0.2, 0.2]; KL=[0.11, 0.11, 0.11, 0.11, 0.11, 0.11, 0.11]; XF=[1, 1, 1, 1, 1, 1, 1]
        Nutrient
        SoilTemperature Temperature
      SurfaceOrganicMatter: InitialResidueName=wheat_stubble; InitialResidueType=wheat; InitialResidueMass=500; InitialStandingFraction=0; InitialCPR=0; InitialCNR=100
      Fertiliser
      Irrigation
      Plant SPRUM
      SprumPastureInstance UnderStoryPasture: same as TestSTRUM.Alley.UnderStoryPasture
      BiomassRemovalEvents Mow: same as TestSTRUM.Alley.Mow
  Folder Replacements
    Plant Apple: PlantType=Apple
      Memo TitlePage
        Apple is a copy of Apple that we can add more detail to as we go
      BiomassArbitrator Arbitrator
        Memo
          The partitioning of biomass to fodder beet organs follows a "Relative Allocation" routine (see Arbitrator module documentation) guided by coefficients derived from the October sowing date data of the test dataset
        PlantNutrientsDelta Carbon
        PlantNutrientsDelta Nitrogen
      RootUptakesArbitrator
      DimensionsOverZones: PlantArea=0
      Phenology
        Constant ThermalTime: FixedValue=1; Units=days
        GenericPhase ZeroPhase: Start=ModelInitialisation; End=Dormant; IsEmerged=false
          Memo
            It is necessary to have a phase before Dormancy otherwise the rewind doesn't work
          VariableReference Progression: VariableName=[Phenology].ThermalTime
          Constant Target: FixedValue=0; Units=oCd
        DatePhase SpringDormancy: Start=Dormant; End=BudBreak; IsEmerged=true
        DatePhase CanopyExpansion: Start=BudBreak; End=StartFullCanopy; IsEmerged=true
        DatePhase FullCanopy: Start=StartFullCanopy; End=StartLeafFall; IsEmerged=true
        DatePhase LeafFall: Start=StartLeafFall; End=BareTree; IsEmerged=true
        DatePhase WinterDormancy: Start=BareTree; End=SpringDormant; IsEmerged=true
        GotoPhase: Start=BareTree; IsEmerged=false; PhaseNameToGoto=SpringDormancy; RemovalType=5
        GenericPhase PlaceHolderPhase: Start=AlreadyGoneDormant; End=Eternity; IsEmerged=true
          Memo
            phase after dormancy so we can accumulate things after that
          VariableReference Progression: VariableName=[Phenology].ThermalTime
          Constant Target: FixedValue=1000; Units=oCd
        Age: AnniversaryOnWinterSolstice=false
        AddFunction AgeDecimal
          VariableReference AgeInt: VariableName=[Phenology].Age
          DivideFunction Decimal
            VariableReference DOY: VariableName=[Weather].DaysSinceWinterSolstice
            Constant DaysInAYear: FixedValue=365
        AccumulateFunctionGeneral DaysSinceFlowering: AccumulateToday=false; AccumulateEventName=[Clock].StartOfDay; StartDate=15-Oct; FractionRemovedOnStage=0; FractionRemovedOnEvent=0; ReduceDates=[15-Oct]; FractionRemovedOnDate=1
          Constant Day: FixedValue=1; Units=d
      Organ Root: Cconc=0.4; IsAboveGround=false
        Constant InitialWt: FixedValue=0.5; Units=g/tree
        Respiration
          Constant MaintenanceRespirationFunction: FixedValue=0; Units=0-1
          NutrientFunctions AssimilationCostFunctions
            Constant C: FixedValue=0; Units=0-1
            Constant N: FixedValue=0; Units=0-1
            Constant P: FixedValue=0; Units=0-1
            Constant K: FixedValue=0; Units=0-1
          NutrientFunctions MobilisationCostFunctions: same as Replacements.Apple.Root.Respiration.AssimilationCostFunctions
        MultiplyFunction SenescenceRate
          ExponentialFunction: A=0; B=1; C=1
            DivideFunction
              SubtractFunction
                SoilTemperatureDepthFunction: Depth=100
                Constant: FixedValue=20
              Constant: FixedValue=10
          Constant Coefficient: FixedValue=0.015
        Constant DetachmentRate: FixedValue=0.1; Units=/d
        OrganNutrientDelta Carbon: MaxCDelta=0
          OrganNutrientSupplies Supplies: Fixation=0; Uptake=0
            NutrientPoolsState ReAllocation
            NutrientPoolsState ReTranslocation
          NutrientDemandFunctions DemandFunctions
            PhaseLookupValue Structural: Start=BudBreak; End=StartLeafFall
              VariableReference Structural: VariableName=[Apple].Root.TotalCarbonDemand
            Constant Metabolic: FixedValue=0
            Constant Storage: FixedValue=0
            Constant QStructuralPriority: FixedValue=1
            Constant QMetabolicPriority: FixedValue=0
            Constant QStoragePriority: FixedValue=0
          NutrientSupplyFunctions SupplyFunctions
            Constant Fixation: FixedValue=0
            Constant Uptake: FixedValue=0
            NutrientPoolFunctions ReAllocation
              Constant Structural: FixedValue=0
              Constant Metabolic: FixedValue=0
              Constant Storage: FixedValue=0
            NutrientPoolFunctions ReTranslocation: same as Replacements.Apple.Root.Carbon.SupplyFunctions.ReAllocation
          NutrientProportionFunctions PoolFractions
            Constant Structural: FixedValue=1
            Constant Metabolic: FixedValue=0
            Constant Storage: FixedValue=0
        OrganNutrientDelta Nitrogen: MaxCDelta=0
          OrganNutrientSupplies Supplies: Fixation=0; Uptake=0
            NutrientPoolsState ReAllocation
            NutrientPoolsState ReTranslocation
          NutrientDemandFunctions DemandFunctions
            DeficitDemandFunction Structural
            DeficitDemandFunction Storage
            DeficitDemandFunction Metabolic
            Constant QStructuralPriority: FixedValue=1
            Constant QMetabolicPriority: FixedValue=0
            Constant QStoragePriority: FixedValue=0
          NutrientSupplyFunctions SupplyFunctions: same as Replacements.Apple.Root.Carbon.SupplyFunctions
          NutrientConcentrationFunctions ConcFunctions
            Constant Maximum: FixedValue=0
              Memo Param value set at establishment
                Apple calculates this parameter value during run-time when the crop is established from parameter values set in the relevent Appletree object
            VariableReference Critical: VariableName=[Root].Nitrogen.ConcFunctions.Maximum
            VariableReference Minimum: VariableName=[Root].Nitrogen.ConcFunctions.Maximum
        RootNetwork Network
          RootShapeCylinder RootShape
          MultiplyFunction KLModifier
            KLModiferVsDepthFunction DepthReduction
              VariableReference LayerDepth: VariableName=[Physical].DepthMidPoints
              VariableReference MaximumRootDepth: VariableName=[Root].Network.MaximumRootDepth
            Constant SurfaceKL: FixedValue=0.1
          Constant SoilWaterEffect: FixedValue=1; Units=0-1
          Constant MaximumRootDepth: FixedValue=3000; Units=mm
          DivideFunction RootFrontVelocity
            VariableReference MaxRootDepth: VariableName=[Root].Network.MaximumRootDepth
            MultiplyFunction RootGrowthDuration
              Constant YearsToMaxDepth: FixedValue=0; Units=years
                Memo Param value set at establishment
                  Apple calculates this parameter value during run-time when the crop is established from parameter values set in the relevent Appletree object
              Constant DaysInAYear: FixedValue=365
          Constant KNO3: FixedValue=0.02
          Constant KNH4: FixedValue=0
          LinearInterpolationFunction NUptakeSWFactor
            XYPairs: X=[0, 1]; Y=[0, 1]
            VariableReference XValue: VariableName=[Root].Network.RWC
          Constant SpecificRootLength: FixedValue=105; Units=m/g
          Constant RootDepthStressFactor: FixedValue=1
          Constant MaxDailyNUptake: FixedValue=10; Units=kg/ha
        MultiplyFunction TotalCarbonDemand
          MultiplyFunction TotalDMDemand
            VariableReference PotentialPhotosynthesis: VariableName=[Leaf].Photosynthesis
            Constant PartitionFraction: FixedValue=0
          VariableReference CarbonConc: VariableName=[Root].Cconc
        BiomassRemoval BiomassRemovalDefaults: HarvestFractionLiveToRemove=0; HarvestFractionDeadToRemove=0; HarvestFractionLiveToResidue=0; HarvestFractionDeadToResidue=0
      Organ Leaf: Cconc=0.4; IsAboveGround=true
        Constant InitialWt: FixedValue=0; Units=g/tree
        Respiration: same as Replacements.Apple.Root.Respiration
        AddFunction SenescenceRate
          PhaseLookup DecidiousSensecence
            PhaseLookupValue LeafFall: Start=StartLeafFall; End=BareTree
              MultiplyFunction
                Constant Switch: FixedValue=1
                ProtectedDivideFunction: NumeratorErrVal=0; DenominatorErrVal=0
                  BoundFunction LAIReduction
                    Constant Upper: FixedValue=10000; Units=0-1
                    Constant Lower: FixedValue=0; Units=0-1
                    MultiplyFunction LeafAreaLoss
                      DeltaFunction DeltaLeafArea
                        VariableReference Integral: VariableName=[Apple].Leaf.Canopy.GreenAreaIndex
                      Constant Inverter: FixedValue=-1; Units=0-1
                  HoldFunction LAIatStartLeafFall: WhenToHold=StartLeafFall
                    VariableReference LAI: VariableName=[Leaf].Canopy.GreenAreaIndex
          MultiplyFunction EvergreenSenescence
            Constant Coefficient: FixedValue=0.005
            ExponentialFunction: same as Replacements.Apple.Root.SenescenceRate.ExponentialFunction
        Constant DetachmentRate: FixedValue=0.05; Units=/d
        OrganNutrientDelta Carbon: MaxCDelta=0
          OrganNutrientSupplies Supplies: Fixation=0; Uptake=0
            NutrientPoolsState ReAllocation
            NutrientPoolsState ReTranslocation
          NutrientDemandFunctions DemandFunctions
            PhaseLookupValue Structural: Start=BudBreak; End=BareTree
              VariableReference Structural: VariableName=[Apple].Leaf.TotalCarbonDemand
            Constant Metabolic: FixedValue=0
            PhaseLookupValue Storage: Start=BudBreak; End=StartLeafFall
              Constant Metabolic: FixedValue=0
            Constant QStructuralPriority: FixedValue=1
            Constant QMetabolicPriority: FixedValue=0
            Constant QStoragePriority: FixedValue=0
          NutrientSupplyFunctions SupplyFunctions
            MultiplyFunction Fixation
              VariableReference Fixation: VariableName=[Leaf].Photosynthesis
              VariableReference Cconc: VariableName=[Leaf].Cconc
            Constant Uptake: FixedValue=0
            NutrientPoolFunctions ReAllocation: same as Replacements.Apple.Root.Carbon.SupplyFunctions.ReAllocation
            NutrientPoolFunctions ReTranslocation
              Constant Structural: FixedValue=0
              Constant Metabolic: FixedValue=0
              MultiplyFunction Storage
                VariableReference Storage: VariableName=[Leaf].Live.Carbon.Storage
                Constant Fraction: FixedValue=0
          NutrientProportionFunctions PoolFractions: same as Replacements.Apple.Root.Carbon.PoolFractions
        OrganNutrientDelta Nitrogen: MaxCDelta=0
          OrganNutrientSupplies Supplies: Fixation=0; Uptake=0
            NutrientPoolsState ReAllocation
            NutrientPoolsState ReTranslocation
          NutrientDemandFunctions DemandFunctions
            DeficitDemandFunction Structural
            DeficitDemandFunction Metabolic
            DeficitDemandFunction Storage
            Constant QStructuralPriority: FixedValue=1
            Constant QMetabolicPriority: FixedValue=0
            Constant QStoragePriority: FixedValue=0
          NutrientSupplyFunctions SupplyFunctions: same as Replacements.Apple.Root.Carbon.SupplyFunctions
          NutrientConcentrationFunctions ConcFunctions
            Constant Maximum: FixedValue=0
              Memo Param value set at establishment
                Apple calculates this parameter value during run-time when the crop is established from parameter values set in the relevent Appletree object
            VariableReference Critical: VariableName=[Leaf].Nitrogen.ConcFunctions.Maximum
            VariableReference Minimum: VariableName=[Leaf].Nitrogen.ConcFunctions.Maximum
        EnergyBalance Canopy: Albedo=0.18; Gsmax350=0; R50=0; KDead=0; LAIDead=0
          MinimumFunction FRGRer
            LinearInterpolationFunction NResponse
              XYPairs: X=[0, 0.8, 0.9, 1]; Y=[1, 1, 1, 1]
              VariableReference XValue: VariableName=[Leaf].Fn
            WeightedTemperatureFunction FT: MaximumTemperatureWeighting=0.75
              XYPairs: X=[5, 20, 25, 40]; Y=[1, 1, 1, 0]
          StomatalConductanceCO2Modifier
            VariableReference PhotosynthesisCO2Modifier: VariableName=[Leaf].Photosynthesis.FCO2
          VariableReference Tallness: VariableName=[Apple].Height
          SubtractFunction Deepness
            VariableReference Tallness: VariableName=[Apple].Height
            VariableReference CanopyBase: VariableName=[Apple].Height.CanopyBaseHeight
          Constant DeadAreaIndex: FixedValue=0; Units=m^2/m^2
          AddFunction GreenAreaIndex
            MultiplyFunction Winter
              Constant BaseArea: FixedValue=0; Units=m2/m2
              VariableReference RelativeAnnualDimension: VariableName=[Apple].RelativeAnnualDimension
            MultiplyFunction SeasonalGrowth
              Constant AnnualDelta: FixedValue=0; Units=m2/m2
              LinearInterpolationFunction RelativeSeasonalDimension
                XYPairs: X=[3, 4, 5, 6]; Y=[0, 0.95, 1, 0]
                VariableReference XValue: VariableName=[Phenology].Stage
              Constant FrostFactor: FixedValue=1
          MultiplyFunction GreenExtinctionCoefficient
            Constant UnstressedCoeff: FixedValue=0
              Memo Param value set at establishment
                SCRUM calculates this parameter value during run-time when the crop is established from parameter values set in the relevent SCRUMcrop and SCRUMmanagement objects
            LinearInterpolationFunction WaterStressFactor
              XYPairs: X=[0, 0.7, 1]; Y=[0.1, 1, 1]
              VariableReference XValue: VariableName=[Leaf].Canopy.Fw
          Constant DeadExtinctionCoefficient: FixedValue=0
          VariableReference Wideness: VariableName=[Apple].Width
        RUEModel Photosynthesis
          Constant RUE: FixedValue=1.2
          Constant FVPD: FixedValue=1
          LinearInterpolationFunction Fw
            XYPairs: X=[0.05, 0.5, 1]; Y=[0, 0.2, 1]
            VariableReference XValue: VariableName=[Leaf].Canopy.Fw
          WeightedTemperatureFunction FT: MaximumTemperatureWeighting=0.75
            XYPairs: X=[5, 20, 25, 35]; Y=[0, 1, 1, 0]
          RUECO2Function FCO2: PhotosyntheticPathway=C3
          VariableReference RadnInt: VariableName=[Leaf].Canopy.RadiationIntercepted
          Constant FN: FixedValue=1
        MultiplyFunction TotalCarbonDemand
          MultiplyFunction TotalDMDemand
            VariableReference PotentialPhotosynthesis: VariableName=[Leaf].Photosynthesis
            Constant PartitionFraction: FixedValue=0
          VariableReference CarbonConc: VariableName=[Leaf].Cconc
        Constant SpecificArea: FixedValue=0.015; Units=m<sup>2</sup>/g
        BiomassRemoval BiomassRemovalDefaults: HarvestFractionLiveToRemove=0; HarvestFractionDeadToRemove=0; HarvestFractionLiveToResidue=0; HarvestFractionDeadToResidue=0
      Organ Trunk: Cconc=0.4; IsAboveGround=true
        Constant InitialWt: FixedValue=1; Units=g/tree
        Constant MatureWt: FixedValue=12000; Units=g/tree
        Respiration: same as Replacements.Apple.Root.Respiration
        Constant SenescenceRate: FixedValue=0; Units=/d
        Constant DetachmentRate: FixedValue=0; Units=/d
        OrganNutrientDelta Carbon: MaxCDelta=0
          OrganNutrientSupplies Supplies: Fixation=0; Uptake=0
            NutrientPoolsState ReAllocation
            NutrientPoolsState ReTranslocation
          NutrientDemandFunctions DemandFunctions
            VariableReference Structural: VariableName=[Apple].Trunk.TotalCarbonDemand
            Constant Metabolic: FixedValue=0
            Constant Storage: FixedValue=0
            Constant QStructuralPriority: FixedValue=1
            Constant QMetabolicPriority: FixedValue=0
            Constant QStoragePriority: FixedValue=0
          NutrientSupplyFunctions SupplyFunctions: same as Replacements.Apple.Root.Carbon.SupplyFunctions
          NutrientProportionFunctions PoolFractions: same as Replacements.Apple.Root.Carbon.PoolFractions
        OrganNutrientDelta Nitrogen: MaxCDelta=0
          OrganNutrientSupplies Supplies: Fixation=0; Uptake=0
            NutrientPoolsState ReAllocation
            NutrientPoolsState ReTranslocation
          NutrientDemandFunctions DemandFunctions: same as Replacements.Apple.Leaf.Nitrogen.DemandFunctions
          NutrientSupplyFunctions SupplyFunctions: same as Replacements.Apple.Root.Carbon.SupplyFunctions
          NutrientConcentrationFunctions ConcFunctions
            Constant Maximum: FixedValue=0
              Memo Param value set at establishment
                Apple calculates this parameter value during run-time when the crop is established from parameter values set in the relevent Appletree object
            VariableReference Critical: VariableName=[Trunk].Nitrogen.ConcFunctions.Maximum
            VariableReference Minimum: VariableName=[Trunk].Nitrogen.ConcFunctions.Maximum
        BiomassRemoval BiomassRemovalDefaults: HarvestFractionLiveToRemove=0; HarvestFractionDeadToRemove=0; HarvestFractionLiveToResidue=1; HarvestFractionDeadToResidue=1
        MultiplyFunction TotalCarbonDemand
          MinimumFunction TotalDMDemand
            MultiplyFunction Available
              VariableReference PotentialPhotosynthesis: VariableName=[Leaf].Photosynthesis
              Constant PartitionFraction: FixedValue=0
            MultiplyFunction SizeDemand
              Constant Rate: FixedValue=0.02
              SubtractFunction TotalDemand
                MultiplyFunction TargetWt
                  VariableReference AgePattern: VariableName=[Apple].RelativeAnnualDimension
                  VariableReference MatureWt: VariableName=[Trunk].MatureWt
                VariableReference CurrentWt: VariableName=[Trunk].Wt
          VariableReference CarbonConc: VariableName=[Leaf].Cconc
        EnergyBalance: Albedo=0.1; Gsmax350=0; R50=0; KDead=0; LAIDead=0
          Constant FRGRer: FixedValue=0
          Constant StomatalConductanceCO2Modifier: FixedValue=1
          VariableReference Tallness: VariableName=[Apple].Height
          VariableReference Deepness: VariableName=[Apple].Height
          Constant GreenAreaIndex: FixedValue=0
          Constant GreenExtinctionCoefficient: FixedValue=0
          Constant DeadAreaIndex: FixedValue=1
          Constant DeadExtinctionCoefficient: FixedValue=0.3
          VariableReference Wideness: VariableName=[Apple].Width
      Organ Fruit: Cconc=0.4; IsAboveGround=true
        Respiration: same as Replacements.Apple.Root.Respiration
        OrganNutrientDelta Carbon: MaxCDelta=0
          OrganNutrientSupplies Supplies: Fixation=0; Uptake=0
            NutrientPoolsState ReAllocation
            NutrientPoolsState ReTranslocation
          NutrientDemandFunctions DemandFunctions
            VariableReference Structural: VariableName=[Apple]Fruit.TotalCarbonDemand
            Constant Metabolic: FixedValue=0
            Constant Storage: FixedValue=0
            Constant QStructuralPriority: FixedValue=10000
            Constant QMetabolicPriority: FixedValue=0
            Constant QStoragePriority: FixedValue=0
          NutrientSupplyFunctions SupplyFunctions: same as Replacements.Apple.Root.Carbon.SupplyFunctions
          NutrientProportionFunctions PoolFractions: same as Replacements.Apple.Root.Carbon.PoolFractions
        OrganNutrientDelta Nitrogen: MaxCDelta=0
          OrganNutrientSupplies Supplies: Fixation=0; Uptake=0
            NutrientPoolsState ReAllocation
            NutrientPoolsState ReTranslocation
          NutrientDemandFunctions DemandFunctions
            DeficitDemandFunction Structural
            DeficitDemandFunction Metabolic
            DeficitDemandFunction Storage
            Constant QStructuralPriority: FixedValue=10000
            Constant QMetabolicPriority: FixedValue=0
            Constant QStoragePriority: FixedValue=0
          NutrientSupplyFunctions SupplyFunctions: same as Replacements.Apple.Root.Carbon.SupplyFunctions
          NutrientConcentrationFunctions ConcFunctions
            Constant Maximum: FixedValue=0
              Memo Param value set at establishment
                Apple calculates this parameter value during run-time when the crop is established from parameter values set in the relevent Appletree object
            VariableReference Critical: VariableName=[Fruit].Nitrogen.ConcFunctions.Maximum
            VariableReference Minimum: VariableName=[Fruit].Nitrogen.ConcFunctions.Maximum
        BiomassRemoval BiomassRemovalDefaults: HarvestFractionLiveToRemove=0.8; HarvestFractionDeadToRemove=0; HarvestFractionLiveToResidue=0.2; HarvestFractionDeadToResidue=1
        MultiplyFunction TotalCarbonDemand
          MaximumFunction RelativeFruitMass
            DeltaFunction Delta
              LinearInterpolationFunction Integral
                XYPairs: X=[0, 100, 200, 300]; Y=[0, 0.01, 0.9, 1]
                  Memo
                    The x values that define the shape of the fruit biomass demand are set at establishment from values defined in AppleTreeInstance
                VariableReference XValue: VariableName=[Apple].Phenology.DaysSinceFlowering
            Constant Zero: FixedValue=0
          VariableReference Number: VariableName=[Fruit].Number
          VariableReference PotentialDW: VariableName=[Fruit].PotentialDWPerFruit
          VariableReference CarbonConc: VariableName=[Fruit].Cconc
        Constant SenescenceRate: FixedValue=0; Units=/d
        Constant DetachmentRate: FixedValue=0; Units=/d
        Constant MaximumSize: FixedValue=0; Units=mm
        Constant Density: FixedValue=0; Units=g/cm3
        Constant DMC: FixedValue=0; Units=g/g
        MultiplyFunction FreshWt
          DivideFunction FreshWtConversion
            Constant: FixedValue=1
            VariableReference DMconc: VariableName=[Fruit].DMC
          VariableReference DryWt: VariableName=[Fruit].Wt
        MultiplyFunction Number
          Constant RetainedPostThinning: Units=fruit/m row length
          VariableReference RelativeAnnualDimension: VariableName=[Apple].RelativeAnnualDimension
          VariableReference BudsSurvivalFromLastYear: VariableName=[Apple].Fruit.NextYearsFruitingBudSurvival
        DivideFunction FreshWtPerFruit
          VariableReference FreshWt: VariableName=[Fruit].FreshWt
          VariableReference Number: VariableName=[Fruit].Number
        DivideFunction VolumePerFruit
          VariableReference FreshWtPerFruit: VariableName=[Fruit].FreshWtPerFruit
          VariableReference Density: VariableName=[Fruit].Density
        SetOnEvent NextYearsFruitingBudSurvival: SetStageName=SpringDormant
          Memo
            This value is set on the day the tree goes dormant using the water stress accumulated over the preceeding growth cycle.  This value is then held until next year so it can represent the effects of last seasons stress on the survival of fruting buds into the current produciton season.
          Constant PreSetValue: FixedValue=1
          LinearInterpolationFunction PostSetValue
            XYPairs: X=[0, 70, 90, 150, 200]; Y=[1, 1, 0.9, 0.6, 0]
            VariableReference XValue: VariableName=[AccumulatedWaterStress]
        ExpressionFunction Diameter: Units=cm; Expression=(6*[Fruit].VolumePerFruit/3.1415926)^(1/3)
        Constant PotentialFWPerFruit: FixedValue=250; Units=g
        MultiplyFunction PotentialDWPerFruit
          VariableReference PotentialFWPerFruit: VariableName=[Fruit].PotentialFWPerFruit
          VariableReference DMC: VariableName=[Fruit].DMC
        Constant InitialWt: FixedValue=0; Units=g/tree
        MultiplyFunction FreshYield_kgPerHa
          ProtectedDivideFunction Yield_gPerM2: NumeratorErrVal=0; DenominatorErrVal=0
            VariableReference FreshYeildPerTree: VariableName=[Apple].Fruit.FreshWt
            VariableReference CanopyArea: VariableName=[Apple].CanopyArea
          Constant GPerm2TokgPerHa: FixedValue=10; Units=m/ha
      AccumulateFunctionGeneral AccumulatedWaterStress: AccumulateToday=false; StartStageName=StartFullCanopy; EndStageName=StartLeafFall; ReduceStageName=StartFullCanopy; FractionRemovedOnStage=1; FractionRemovedOnEvent=0; FractionRemovedOnDate=0
        Memo
          Water Stress is accumulated while the tree has a canopy and reset each year at the start of canopy expansion.  This value is referenced by NextYearsFruitingBudSurvival when the tree goes dormand to determine to set the proportion of buds that will have survived this year.  That value is held over into the following season so stress effects on fruiting bud number from this season are carried over to affect fruit load for next season.
        Constant Day: FixedValue=1; Units=d
        SubtractFunction StressIndex
          Constant One: FixedValue=1
          LinearInterpolationFunction FW
            XYPairs: X=[0.1, 0.9, 1.5]; Y=[0, 1, 1]
            VariableReference XValue: VariableName=[Leaf].Canopy.Fw
      CompositeStates AboveGround
        Propertys=[[Leaf].Live, [Leaf].Dead, [Fruit].Live, [Fruit].Dead, [Trunk].Live, [Trunk].Dead]
      CompositeStates AboveGroundDead: Propertys=[[Leaf].Dead, [Fruit].Dead, [Trunk].Dead]
      CompositeStates BelowGround: Propertys=[[Root].Live, [Root].Dead]
      CompositeStates Total
        Propertys=[[Leaf].Live, [Leaf].Dead, [Fruit].Live, [Fruit].Dead, [Trunk].Live, [Trunk].Dead, [Root].Live, [Root].Dead]
      CompositeStates TotalLive: Propertys=[[Leaf].Live, [Fruit].Live, [Trunk].Live, [Root].Live]
      CompositeStates TotalDead: Propertys=[[Leaf].Dead, [Fruit].Dead, [Trunk].Dead, [Root].Dead]
      Constant SeedMortalityRate: FixedValue=0
      Constant MaxPrunedHeight: FixedValue=0
      Constant MortalityRate: FixedValue=0
      AddFunction Height
        MultiplyFunction CanopyBaseHeight
          Constant Maximum: FixedValue=0
          VariableReference Age pattern: VariableName=[Apple].RelativeAnnualDimension
        MultiplyFunction PrunedCanopyDepth
          SubtractFunction Maximum
            VariableReference MaxPrunedHeight: VariableName=[Apple].MaxPrunedHeight
            VariableReference MaxBaseHeight: VariableName=[Apple].Height.CanopyBaseHeight.Maximum
          VariableReference Age pattern: VariableName=[Apple].RelativeAnnualDimension
        MultiplyFunction SeasonalGrowth
          VariableReference Seasonal pattern: VariableName=[Apple].RelativeSeasonalDimension
          Constant Maximum: FixedValue=100; Units=mm
          VariableReference Age pattern: VariableName=[Apple].RelativeAnnualDimension
      AddFunction Width
        MultiplyFunction PrunedWidth
          VariableReference Age pattern: VariableName=[Apple].RelativeAnnualDimension
          Constant Maximum: FixedValue=500; Units=mm
        MultiplyFunction SeasonalGrowth
          VariableReference Seasonal pattern: VariableName=[Apple].RelativeSeasonalDimension
          Constant Maximum: FixedValue=500; Units=mm
      LinearInterpolationFunction RelativeAnnualDimension
        XYPairs: X=[0, 6]; Y=[0.3, 1]
        VariableReference XValue: VariableName=[Phenology].Age.Years
      LinearInterpolationFunction RelativeSeasonalDimension
        XYPairs: X=[3, 4, 5]; Y=[0, 0.6, 1]
        VariableReference XValue: VariableName=[Phenology].Stage
      AddFunction RadiationIntercepted
        VariableReference LeafInterception: VariableName=[Apple].Leaf.RadiationIntercepted
        VariableReference TrunkInterception: VariableName=[Apple].Trunk.EnergyBalance.RadiationInterceptedByDead
      Constant RowWidth: FixedValue=0
      MultiplyFunction TranspirationPerTree
        VariableReference Transpiration_mm: VariableName=[Leaf].Canopy.Transpiration
        VariableReference RowWidth: VariableName=[Apple].RowWidth
        VariableReference InterRowSpacing: VariableName=[Apple].InterRowSpacing
      Constant InterRowSpacing
      ProtectedDivideFunction CanopyArea: NumeratorErrVal=0; DenominatorErrVal=0
        MultiplyFunction CanopyAreaMM2
          VariableReference WidthMM: VariableName=[Apple].Width
          MinimumFunction
            VariableReference WidthMM: VariableName=[Apple].Width
            MultiplyFunction InterRowSpacingMM
              VariableReference InterRowSpacing: VariableName=[Apple].InterRowSpacing
              Constant MtoMM: FixedValue=1000; Units=mm per m
        Constant MM2toM2: FixedValue=1000000; Units=mm2 per m2
      ProtectedDivideFunction TranspirationPerLeafArea: NumeratorErrVal=0; DenominatorErrVal=0
        VariableReference Transpiration: VariableName=[RootUptakesArbitrator].WaterUptake.amount
        MultiplyFunction LeafArea
          VariableReference CanopyArea: VariableName=[Apple].CanopyArea
          VariableReference LAI: VariableName=[Leaf].Canopy.LAI
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