Simulations: Version=216
  DataStore
    ExcelInput: FileNames=[FAHMA_Observed.xlsx]; SheetNames=[Observed]
    PredictedObserved HarvestObsPred: PredictedTableName=HarvestReport; ObservedTableName=Observed; FieldNameUsedForMatch=SimulationName; FieldName2UsedForMatch=Lentil.Phenology.CurrentStageName; AllColumns=true
    PredictedObserved DailyObsPred: PredictedTableName=DailyReport; ObservedTableName=Observed; FieldNameUsedForMatch=SimulationName; FieldName2UsedForMatch=Clock.Today; AllColumns=false
  Folder Replacements
    Report DailyReport: EventNames=[Clock].EndOfDay
      VariableNames:
        [Clock].Today
        [Simulation].Name
        [IWeather].MeanT
        [Irrigation].IrrigationApplied
        [Lentil].AboveGround.Wt
        [Lentil].AboveGroundDead.Wt
        [Lentil].Fruit.Wt
        [Lentil].Leaf.Canopy.CoverGreen
        [Lentil].Leaf.Canopy.CoverTotal
        [Lentil].Leaf.Canopy.SpecificArea
        [Lentil].Leaf.Live.Wt
        [Lentil].Leaf.Dead.Wt
        [Lentil].Leaf.Wt
        [Lentil].Leaf.BranchNumber
        [Lentil].Leaf.Canopy.LAI
        [Lentil].Leaf.TotalCarbonDemand.TotalDMDemand.DeltaLAIPotential.Vegetative.Delta.BranchNumber
        [Lentil].Leaf.Canopy.Fw
        [Lentil].Leaf.NodeNumber
        [Lentil].Leaf.SpecificAreaTotal
        [Lentil].Phenology.CurrentStageName
        [Lentil].Phenology.AbortedFlowerBuds
        [Lentil].Phenology.AccumulatedTT
        [Lentil].Phenology.ThermalTime
        [Lentil].Phenology.Stage
        [Lentil].Phenology.Photoperiod
        [Lentil].Phenology.AccumulatedVernalisation
        [Lentil].Phenology.VernalisationSaturation
        [Lentil].Phenology.EarlyWaterStress
        [Lentil].Phenology.FloweringWaterStress
        [Lentil].Root.Network.Depth
        [Lentil].Stem.Dead.Wt
        [Lentil].Stem.Wt
        [Lentil].Grain.Dead.Wt
        [Lentil].Grain.Wt
        [Lentil].Pod.Dead.Wt
        [Lentil].Pod.Wt
        [Lentil].Pod.ViableNodesPerPlant
        [Lentil].Pod.Number
        [Lentil].Pod.GrainNumber
        [Lentil].Root.Wt
        [Lentil].Nodule.Dead.Wt
        [Lentil].Nodule.Wt
        [Soil].Water.Volumetric
        sum([Soil].Water.MM)
    Report HarvestReport: EventNames=[Lentil].Harvesting
      VariableNames:
        [Clock].Today
        [Clock].StartDate
        [Lentil].SowingDate
        [Lentil].SowingData.Cultivar
        [Lentil].SowingData.Population
        [Lentil].SowingDate.DayOfYear
        [Lentil].SowingData.RowSpacing
        [IWeather].Latitude
        [IWeather].Longitude
        [IWeather].FileName
        [Simulation].Name
        [Lentil].Phenology.EmergenceDAS
        [Lentil].Phenology.StartBuddingDAS
        [Lentil].Phenology.StartFloweringDAS
        [Lentil].Phenology.StartPoddingDAS
        [Lentil].Phenology.MaturityDAS
        [Lentil].Phenology.EarlyWaterStress
        [Lentil].Phenology.FloweringWaterStress
        [Lentil].Phenology.GrainFillingWaterStress
        [Lentil].Grain.Wt
        [Lentil].Grain.Size
        [Lentil].Grain.Number
        [Lentil].Grain.HarvestIndex
        [Lentil].AboveGround.Wt
        [Lentil].Grain.HarvestIndex
        [Lentil].Phenology.CurrentStageName
        [Lentil].Phenology.EmergenceTt
        [Lentil].Phenology.StartBuddingTt
        [Lentil].Phenology.StartFloweringTt
        [Lentil].Phenology.StartPoddingTt
        [Lentil].Phenology.MaturityTt
    Manager Harvesting
```csharp
using Models.PMF.Phen;
using System;
using Models.Core;
using System.Collections.Generic;
using System.Text;
using Models.Soils;
using Models.PMF;
using Models;
using System.Xml.Serialization;
using APSIM.Shared.Utilities;
using APSIM.Core;


namespace Models
{
    [Serializable] 
    public class Script : Model, IStructureDependency
    {      
        [Link] private Plant Lentil;
        [Link] private Clock clock;
        [Link] private Simulation sim;
        [Link] private Zone zone;
        [Link] private Phenology phenology;
        
        private bool Harvested {get; set;}
        
        public IStructure Structure { private get; set; }
                    
        
        [EventSubscribe("StartOfSimulation")]
        private void OnSimulationCommencing(object sender, EventArgs e)
        {
        Harvested = false;
        }       
        
        [EventSubscribe("DoManagement")]
        private void OnDoManagement(object sender, EventArgs e)
        {
        if ((phenology.CurrentPhase.Name=="ReadyForHarvesting")&&(Harvested==false))
           {
           Lentil.Harvest();
           Lentil.EndCrop();
           Harvested = true;
           Structure.Set("Clock.EndDate", clock.Today, relativeTo: sim);  
           }
        }
        
        [EventSubscribe("EndOfDay")]
        private void OnEndOfDay(object sender, EventArgs e)
        {
            if ((clock.Today.Equals(clock.EndDate))&&(Lentil.IsAlive)&&(Harvested==false))
            {
                Lentil.Harvest();
                Lentil.EndCrop();
            }
        }
    }
}
```
  Experiment Gatton23
    Memo
      **Gatton phenology trial:**

      * all treatments are irrigated - specific dates and amounts provided by Ian Lee Long

      * only treatments without lights used

      * phenology measurements up until the time of flowering only are recorded

      * phenological stages will change in apsim as the lentil model is developed:

      From AP: "For the moment:
      NextGen term ‘Start flowering’ – is actually 50% budding.
      NextGen term ‘End flowering’ – is actually 50% flowering.
      And I haven’t yet restructured to do a start podding."

      **Met file** - taken from SILO (same as Jeremy Whish)

      **Simulation started** 15/4, the day before the first irrigation.

      **Soil properties** -

      * Initial SW is unknown - set at 50%

      * Lentil Soil properties may require fine-tuning
    Factors
      Memo
        **Factors at Gatton phenology trial**

        ***Time of sowing - ***

        1. 10 May, 2019
        2. 7 June, 2019
        3. 19 July, 2019

        ***Cultivar - numerous but we select the following subset to work on***

        PBA Ace
        PBA Blitz
        PBA Bolt
        Digger
        PBA Greenfield
        PBA Hallmark XT
        PBA Jumbo
        Nugget
      Permutation
        Factor TOS
          CompositeFactor 1WaterTrtRainFed
            Specifications:
              [Sowing].Script.SowDate = 15-Jun
              [Sowing].Script.EmergeDate = 24-Jun
              [IrrigationEvents]
            Operations IrrigationEvents
              2023-06-15  [Irrigation].Apply(amount:15);
          CompositeFactor 2WaterTrtRainFed
            Specifications:
              [Sowing].Script.SowDate = 26-Jul
              [Sowing].Script.EmergeDate = 3-Aug
              [IrrigationEvents]
            Operations IrrigationEvents
              2023-07-26  [Irrigation].Apply(amount:15);
          CompositeFactor 1WaterTrtIrrigated
            Specifications:
              [Sowing].Script.SowDate = 15-Jun
              [Sowing].Script.EmergeDate = 24-Jun
              [IrrigationEvents]
            Operations IrrigationEvents
              2023-06-15  [Irrigation].Apply(amount:15);
              2023-08-14  [Irrigation].Apply(amount:30);
              2023-08-23  [Irrigation].Apply(amount:30);
              2023-08-31  [Irrigation].Apply(amount:30);
          CompositeFactor 2WaterTrtIrrigated
            Specifications:
              [Sowing].Script.SowDate = 26-Jul
              [Sowing].Script.EmergeDate = 3-Aug
              [IrrigationEvents]
            Operations IrrigationEvents
              2023-07-26  [Irrigation].Apply(amount:15);
              2023-08-14  [Irrigation].Apply(amount:15);
              2023-08-23  [Irrigation].Apply(amount:15);
              2023-08-31  [Irrigation].Apply(amount:15);
              2023-09-04  [Irrigation].Apply(amount:15);
              2023-09-11  [Irrigation].Apply(amount:15);
              2023-09-18  [Irrigation].Apply(amount:15);
        Factor Variety: Specification=[Sowing].Script.CultivarName = Jumbo2
    Simulation Gatton23
      Weather: FileName=%root%/Prototypes/Lentil/Met/GattonUQ.met
      Clock: Start=2023-06-01; End=2023-12-30
      Summary summaryfile
      SoilArbitrator Soil Arbitrator
      Zone Field: Area=1; Slope=0; AspectAngle=0; Altitude=50
        MicroClimate: a_interception=0; b_interception=1; c_interception=0; d_interception=0; SoilHeatFluxFraction=0.4; MinimumHeightDiffForNewLayer=0; NightInterceptionFraction=0.5; ReferenceHeight=1
        Irrigation
        Fertiliser
        SurfaceOrganicMatter: InitialResidueName=maize; InitialResidueType=maize; InitialResidueMass=500; InitialStandingFraction=0; InitialCPR=0; InitialCNR=65
        Report DailyReport: EventNames=[Clock].DoReport
          VariableNames:
            [Clock].Today
            [Soil].Water.Volumetric
            [Soil].SoilWater.Eo
            [Soil].SoilWater.Es
            [Soil].SoilWater.Drainage
            [Soil].SoilWater.Runoff
            [Soil].SoilWater.pond
            sum([Soil].Water.MM) as ProfileWater
            [Soil].NO3.kgha
            [MicroClimate].net_radn
            [MicroClimate].peta
            [MicroClimate].petr
            [Lentil].
        Report HarvestReport: EventNames=[Lentil].Harvesting
          VariableNames:
            [Clock].Today
            [Lentil].Phenology.CurrentStageName as Stage
            [Lentil].Phenology.StartFloweringDAS as StartFloweringDAS
            [Lentil].Phenology.MaturityDAS as MaturityDAS
            [Lentil].Grain.Live.Wt as GrainWt
            [Lentil].AboveGround.Wt
        Manager Harvesting
```csharp
using Models.PMF.Phen;
using System;
using Models.Core;
using System.Collections.Generic;
using System.Text;
using Models.Soils;
using Models.PMF;
using Models;
using System.Xml.Serialization;
using APSIM.Shared.Utilities;

namespace Models
{
    [Serializable] 
    public class Script : Model
    {      
        [Link] private Plant Lentil;
        [Link] private Zone zone;
        [Link]
        private Phenology phenology;
                    
        
        [EventSubscribe("StartOfSimulation")]
        private void OnSimulationCommencing(object sender, EventArgs e)
        {
        }       
        
        [EventSubscribe("DoManagement")]
        private void OnDoManagement(object sender, EventArgs e)
        {
        if (phenology.CurrentPhase.Name=="ReadyForHarvesting")
           {
           Lentil.Harvest();
           //Lentil.EndCrop();
           }
        }
        
        [EventSubscribe("DoManagementCalculations")]
        private void OnDoManagementCalculations(object sender, EventArgs e)
        {
            
        }
    }
}
```
        Manager Sowing
          SowDate =
          EmergeDate =
          CultivarName =
          SowingDepth = 50
          RowSpacing = 230
          Population = 120
```csharp
using APSIM.Shared.Utilities;
using Models.Utilities;
using Models.Soils;
using Models.PMF;
using Models.Core;
using System;

namespace Models
{
    [Serializable]
    public class Script : Model
    {
        [Link] Clock Clock;
        [Link] Fertiliser Fertiliser;
        [Link] Summary Summary;
        [Link] Plant Lentil;
        [Link] Soil Soil;
        Accumulator accumulatedRain;
        
        [Description("Sowing date (d-mmm)")]
        public string SowDate { get; set; }
        [Description("Emergence date (d-mmm)")]
        public string EmergeDate { get; set; }
        [Description("Cultivar to be sown")]
        public string CultivarName { get; set; }
        [Description("Sowing depth (mm)")]
        public double SowingDepth { get; set; }
        [Description("Row spacing (mm)")]
        public double RowSpacing { get; set; }
        [Description("Plant population (/m2)")]
        public double Population { get; set; }
        
        


        [EventSubscribe("DoManagement")]
        private void OnDoManagement(object sender, EventArgs e)
        {
        
            
            if (DateUtilities.WithinDates(SowDate, Clock.Today, SowDate))
            {
                Lentil.Sow(population: Population, cultivar: CultivarName, depth: SowingDepth, rowSpacing: RowSpacing);
                if (EmergeDate != "")
                    Lentil.Phenology.SetPhaseCompletionDate(EmergeDate,"Emerging");    
            }
        
        }
        
    }
}
```
        Soil TypVert2: ASCOrder=Vertosol; SoilType=Clay; Site=Generic-Qld; State=Generic; Country=Australia; NaturalVegetation=NA; ApsoilNumber=514-GENERIC; Latitude=-27.183286; Longitude=151.263748; LocationAccuracy=Regional Soil Type; DataSource=Generic soil. CSIRO Sustainable Ecosystems, Toowoomba
          Comments=Generic soil developed by Allan Peake. 'Typical Vertosol' soil properties have been calculated as the average of vertosols with similar characteristics from within the Apsoil database. Groupings were made on the basis of bulk density. Measured BD, DUL and CLL for the groups were then averaged to derive the characteristics of the typical Vertosols. They can then be used in conjunction with measured soil water to simplify the selection of appropriate Vertosols, for paddocks where full soil characterisations have not yet been completed. For more information see Peake et al. 2010: ‘A rapid method for estimating the plant available water capacity of Vertosols’, 2010 Australian Agronomy Conference. Typical Vertosols are different to 'Generic' soil types elsewhere in the Apsoil database, which are representative of certain soil types and districts, but have not been calculated from large numbers of similar, characterised soils.
          Memo
            Initial SW is a guess - set at 50%.
          Physical
            Thickness  ParticleSizeSand  ParticleSizeSilt  ParticleSizeClay  Rocks  BD    AirDry  LL15   DUL    SAT
            150        5                 65                30                0      1.06  0.13    0.259  0.519  0.569
            150        5                 65                30                0      1.09  0.217   0.271  0.508  0.558
            300        5                 65                30                0      1.11  0.295   0.295  0.501  0.551
            300        5                 65                30                0      1.13  0.295   0.295  0.494  0.544
            300        5                 65                30                0      1.18  0.295   0.295  0.474  0.524
            300        5                 65                30                0      1.23  0.295   0.295  0.457  0.507
            300        5                 65                30                0      1.25  0.295   0.295  0.45   0.5
            Rocks, ParticleSizeSand, ParticleSizeSilt, ParticleSizeClay source: Calculated
            SoilCrop LentilSoil: LL=[0.259, 0.271, 0.295, 0.31, 0.34, 0.368, 0.414]; KL=[0.045, 0.045, 0.045, 0.03, 0.02, 0.02, 0.01]; XF=[1, 1, 1, 1, 1, 1, 1]
              LL source: Field measured and checked for sensibility
            SoilCrop WheatSoil: LL=[0.259, 0.271, 0.295, 0.31, 0.34, 0.368, 0.414]; KL=[0.06, 0.06, 0.06, 0.04, 0.04, 0.02, 0.02]; XF=[1, 1, 1, 1, 1, 1, 1]
              LL source: Field measured and checked for sensibility
            SoilCrop CottonSoil: LL=[0.259, 0.271, 0.295, 0.31, 0.34, 0.368, 0.414]; KL=[0.1, 0.1, 0.1, 0.1, 0.09, 0.07, 0.05]; XF=[1, 1, 1, 1, 1, 1, 1]
              LL source: Field measured and checked for sensibility
            SoilCrop SorghumSoil: LL=[0.259, 0.271, 0.295, 0.31, 0.34, 0.368, 0.414]; KL=[0.07, 0.07, 0.07, 0.05, 0.05, 0.04, 0.03]; XF=[1, 1, 1, 1, 1, 1, 1]
              LL source: Field measured and checked for sensibility
          WaterBalance SoilWater: SummerDate=1-Nov; SummerU=6; SummerCona=3.5; WinterDate=1-Apr; WinterU=4; WinterCona=2.5; DiffusConst=40; DiffusSlope=16; Salb=0.12; CN2Bare=73; CNRed=20; CNCov=0.8; PSIDul=-100; Thickness=[150, 150, 300, 300, 300, 300, 300]; SWCON=[0.3, 0.3, 0.3, 0.3, 0.3, 0.3, 0.3]
          Organic: FOMCNRatio=40; CarbonUnits=Total
            Thickness  Carbon  SoilCNRatio  FBiom  FInert  FOM
            150        1.43    12           0.04   0.4     347.129
            150        1.144   12           0.02   0.6     270.344
            300        0.715   12           0.02   0.8     163.972
            300        0.3575  12           0.02   1       99.4541
            300        0.2145  12           0.01   1       60.322
            300        0.143   12           0.01   1       36.5871
            300        0.143   12           0.01   1       22.1912
          Chemical: Thickness=[150, 150, 300, 300, 300, 300, 300]; PH=[7.3, 7.7, 8.1, 8.5, 8.5, 8.6, 8.6]; PHUnits=Water
          Water: Thickness=[150, 150, 300, 300, 300, 300, 300]; InitialValues=[0.519, 0.508, 0.501, 0.415, 0.295, 0.295, 0.295]; FilledFromTop=false
          Solute NO3: Thickness=[1800]; InitialValues=[30]; InitialValuesUnits=ppm; WaterTableConcentration=0; D0=0; DepthConstant=0; MaxDepthSoluteAccessible=0; RunoffEffectivenessAtMovingSolute=0; MaxEffectiveRunoff=0
          Solute NH4: Thickness=[1800]; InitialValues=[5]; InitialValuesUnits=ppm; WaterTableConcentration=0; D0=0; DepthConstant=0; MaxDepthSoluteAccessible=0; RunoffEffectivenessAtMovingSolute=0; MaxEffectiveRunoff=0
          Solute Urea: Thickness=[150, 150, 300, 300, 300, 300, 300]; InitialValues=[0, 0, 0, 0, 0, 0, 0]; InitialValuesUnits=kg/ha; WaterTableConcentration=0; D0=0; DepthConstant=0; MaxDepthSoluteAccessible=0; RunoffEffectivenessAtMovingSolute=0; MaxEffectiveRunoff=0
          Nutrient
          SoilTemperature Temperature: InteractionsPerDay=8
        Report SowingReport: EventNames=[Clock].EndOfDay
        Plant Lentil
        Operations IrrigationEvents
  Experiment Gatton24
    Memo: same as Gatton23.Memo
    Factors
      Memo
        **Factors at Gatton phenology trial**

        ***Time of sowing - ***

        1. 10 May, 2019
        2. 7 June, 2019
        3. 19 July, 2019

        ***Cultivar - numerous but we select the following subset to work on***

        PBA Ace
        PBA Blitz
        PBA Bolt
        Digger
        PBA Greenfield
        PBA Hallmark XT
        PBA Jumbo
        Nugget
      Permutation
        Factor TOS
          CompositeFactor 1WaterTrtRainFed
            Specifications:
              [Sowing].Script.SowDate = 23-May
              [Sowing].Script.EmergeDate = 30-May
              [IrrigationEvents]
            Operations IrrigationEvents
              2024-05-23  [Irrigation].Apply(amount:20);
          CompositeFactor 2WaterTrtRainFed
            Specifications:
              [Sowing].Script.SowDate = 15-Jul
              [Sowing].Script.EmergeDate = 25-Jul
              [IrrigationEvents]
            Operations IrrigationEvents
              2024-07-19  [Irrigation].Apply(amount:20);
          CompositeFactor 1WaterTrtIrrigated
            Specifications:
              [Sowing].Script.SowDate = 23-May
              [Sowing].Script.EmergeDate = 30-May
              [IrrigationEvents]
            Operations IrrigationEvents
              2024-05-23  [Irrigation].Apply(amount:20);
              2024-08-02  [Irrigation].Apply(amount:30);
              2024-08-08  [Irrigation].Apply(amount:30);
              2024-08-20  [Irrigation].Apply(amount:15);
              2024-09-03  [Irrigation].Apply(amount:15);
          CompositeFactor 2WaterTrtIrrigated
            Specifications:
              [Sowing].Script.SowDate = 15-Jul
              [Sowing].Script.EmergeDate = 25-Jul
              [IrrigationEvents]
            Operations IrrigationEvents
              2024-07-19  [Irrigation].Apply(amount:20);
              2024-08-08  [Irrigation].Apply(amount:15);
              2024-08-20  [Irrigation].Apply(amount:15);
              2024-09-03  [Irrigation].Apply(amount:30);
              2024-09-18  [Irrigation].Apply(amount:15);
        Factor Variety: Specification=[Sowing].Script.CultivarName = HallmarkXT, Terrier
    Simulation Gatton24
      Weather: FileName=%root%/Prototypes/Lentil/Met/GattonUQ.met
      Clock: Start=2024-05-01; End=2024-12-27
      Summary summaryfile
      SoilArbitrator Soil Arbitrator
      Zone Field: same as Gatton23.Gatton23.Field
  Experiment ForestHill25
    Memo: same as Gatton23.Memo
    Factors
      Memo
        **Factors at Gatton phenology trial**

        ***Time of sowing - ***

        1. 10 May, 2019
        2. 7 June, 2019
        3. 19 July, 2019

        ***Cultivar - numerous but we select the following subset to work on***

        PBA Ace
        PBA Blitz
        PBA Bolt
        Digger
        PBA Greenfield
        PBA Hallmark XT
        PBA Jumbo
        Nugget
      Permutation
        Factor TOS
          CompositeFactor 1WaterTrtRainFed
            Specifications:
              [Sowing].Script.SowDate = 13-May
              [sowing].Script.EmergeDate = 19-May
              [IrrigationEvents]
            Operations IrrigationEvents
              2025-05-14  [Irrigation].Apply(amount:15);
          CompositeFactor 2WaterTrtRainFed
            Specifications:
              [Sowing].Script.SowDate = 16-Jun
              [sowing].Script.EmergeDate = 24-Jun
              [IrrigationEvents]
            Operations IrrigationEvents
              2025-06-17  [Irrigation].Apply(amount:15);
          CompositeFactor 1WaterTrtIrrigated
            Specifications:
              [Sowing].Script.SowDate = 13-May
              [sowing].Script.EmergeDate = 19-May
              [IrrigationEvents]
            Operations IrrigationEvents
              2025-05-14  [Irrigation].Apply(amount:15);
              2025-09-02  [Irrigation].Apply(amount:20);
              2025-09-09  [Irrigation].Apply(amount:20);
              2025-09-15  [Irrigation].Apply(amount:20);
              2025-09-23  [Irrigation].Apply(amount:20);
              2025-09-30  [Irrigation].Apply(amount:20);
          CompositeFactor 2WaterTrtIrrigated
            Specifications:
              [Sowing].Script.SowDate = 16-Jun
              [sowing].Script.EmergeDate = 24-Jun
              [IrrigationEvents]
            Operations IrrigationEvents: same as ForestHill25.Factors.Permutation.TOS.1WaterTrtIrrigated.IrrigationEvents
        Factor Variety: Specification=[Sowing].Script.CultivarName = HallmarkXT, Terrier
    Simulation ForestHill25
      Weather: FileName=%root%/Prototypes/Lentil/Met/ForestHill.met
      Clock: Start=2025-05-01; End=2025-12-27
      Summary summaryfile
      SoilArbitrator Soil Arbitrator
      Zone Field: same as Gatton23.Gatton23.Field
  Experiment Wellcamp25
    Memo: same as Gatton23.Memo
    Factors
      Memo
        **Factors at Gatton phenology trial**

        ***Time of sowing - ***

        1. 10 May, 2019
        2. 7 June, 2019
        3. 19 July, 2019

        ***Cultivar - numerous but we select the following subset to work on***

        PBA Ace
        PBA Blitz
        PBA Bolt
        Digger
        PBA Greenfield
        PBA Hallmark XT
        PBA Jumbo
        Nugget
      Permutation
        Factor TOS
          CompositeFactor 1
            Specifications:
              [Sowing].Script.SowDate = 15-Apr
              [Sowing].Script.EmergeDate = 21-Apr
              [IrrigationEvents]
            Operations IrrigationEvents
              2025-04-15  [Irrigation].Apply(amount:15);
          CompositeFactor 2
            Specifications:
              [Sowing].Script.SowDate = 30-Apr
              [Sowing].Script.EmergeDate = 8-May
              [IrrigationEvents]
            Operations IrrigationEvents
              2025-04-29  [Irrigation].Apply(amount:15);
          CompositeFactor 3
            Specifications:
              [Sowing].Script.SowDate = 14-May
              [Sowing].Script.EmergeDate = 21-May
              [IrrigationEvents]
            Operations IrrigationEvents
              2025-05-14  [Irrigation].Apply(amount:15);
          CompositeFactor 4
            Specifications:
              [Sowing].Script.SowDate = 29-May
              [Sowing].Script.EmergeDate = 6-Jun
              [IrrigationEvents]
            Operations IrrigationEvents
              2025-05-29  [Irrigation].Apply(amount:15);
          CompositeFactor 5
            Specifications:
              [Sowing].Script.SowDate = 13-Jun
              [Sowing].Script.EmergeDate = 23-Jun
              [IrrigationEvents]
            Operations IrrigationEvents
              2025-06-13  [Irrigation].Apply(amount:15);
        Factor WaterTrt
          CompositeFactor RainFed: Specifications=[Weather]
            Weather: FileName=%root%/Prototypes/Lentil/Met/Wellcamp.met
        Factor Variety: Specification=[Sowing].Script.CultivarName = HallmarkXT, Terrier
    Simulation Wellcamp25
      Weather: FileName=%root%/Prototypes/Lentil/Met/Wellcamp.met
      Clock: Start=2025-04-01; End=2025-10-17
      Summary summaryfile
      SoilArbitrator Soil Arbitrator
      Zone Field: Area=1; Slope=0; AspectAngle=0; Altitude=50
        Soil Black Vertosol-Waco (Wellcamp No030): ASCOrder=Vertosol; ASCSubOrder=Black; SoilType=Clay; Site=Wellcamp; NearestTown=Toowoomba, Q 4350; Region=Darling Downs and Granite Belt; State=Queensland; Country=Australia; NaturalVegetation=Grassland, mainly Qld Blue grass; ApsoilNumber=30; Latitude=-27.562; Longitude=151.861; LocationAccuracy=+/- 20m; YearOfSampling=0; DataSource=CSIRO Sustainable Ecosystems, Toowoomba; Comments=Clay - oc and ph estimated
          Physical
            Thickness  BD    AirDry  LL15  DUL   SAT
            150        0.9   0.15    0.3   0.52  0.59
            150        1.01  0.272   0.34  0.53  0.59
            300        1.02  0.36    0.36  0.54  0.59
            300        1     0.36    0.36  0.54  0.59
            300        1.06  0.36    0.36  0.52  0.57
            300        1.14  0.36    0.36  0.49  0.54
            300        1.23  0.36    0.36  0.46  0.51
            BD, DUL source: Field measured and checked for sensibility
            AirDry, LL15 source: Estimated based on local knowledge
            SAT source: Calculated from measured, estimated or calculated BD
            SoilCrop LentilSoil: LL=[0.3, 0.34, 0.36, 0.36, 0.4, 0.36, 0.46]; KL=[0.06, 0.06, 0.06, 0.04, 0.04, 0.02, 0.02]; XF=[1, 1, 1, 1, 1, 1, 1]
              LL source: Field measured and checked for sensibility
          WaterBalance SoilWater: SummerDate=1-Nov; SummerU=6; SummerCona=3.5; WinterDate=1-Apr; WinterU=4; WinterCona=2.5; DiffusConst=40; DiffusSlope=16; Salb=0.12; CN2Bare=73; CNRed=20; CNCov=0.8; DischargeWidth=0; CatchmentArea=0; PSIDul=-100; Thickness=[150, 150, 300, 300, 300, 300, 300]; SWCON=[0.3, 0.3, 0.3, 0.3, 0.3, 0.3, 0.3]
          Organic: FOMCNRatio=40; CarbonUnits=WalkleyBlack
            Thickness  Carbon    SoilCNRatio  FBiom  FInert  FOM
            150        0.953846  12           0.04   0.4     347.129
            150        0.953846  12           0.02   0.6     270.344
            300        0.961538  12           0.02   0.8     163.972
            300        0.846154  12           0.02   1       99.4541
            300        0.546154  12           0.01   1       60.322
            300        0.261538  12           0.01   1       36.5871
            300        0.2       12           0.01   1       22.1912
          Chemical: Thickness=[150, 150, 300, 300, 300, 300, 300]; PH=[8, 8, 8, 8, 8, 8, 8]; PHUnits=Water
            PH source: Estimated based on local knowledge
          Nutrient
          Solute NO3: Thickness=[300, 300, 300, 300, 300, 300]; InitialValues=[2, 2, 1, 1, 0, 0]; InitialValuesUnits=ppm; WaterTableConcentration=0; D0=0; DepthConstant=0; MaxDepthSoluteAccessible=0; RunoffEffectivenessAtMovingSolute=0; MaxEffectiveRunoff=0
          Solute NH4: Thickness=[300, 300, 300, 300, 300, 300]; InitialValues=[1, 0, 0, 0, 0, 0]; InitialValuesUnits=ppm; WaterTableConcentration=0; D0=0; DepthConstant=0; MaxDepthSoluteAccessible=0; RunoffEffectivenessAtMovingSolute=0; MaxEffectiveRunoff=0
          Solute Urea: same as Gatton23.Gatton23.Field.TypVert2.Urea
          Water: Thickness=[150, 150, 300, 300, 300, 300, 300]; InitialValues=[0.35, 0.36, 0.54, 0.54, 0.52, 0.49, 0.46]; FilledFromTop=false
          SoilTemperature Temperature: InteractionsPerDay=8
        MicroClimate: a_interception=0; b_interception=1; c_interception=0; d_interception=0; SoilHeatFluxFraction=0.4; MinimumHeightDiffForNewLayer=0; NightInterceptionFraction=0.5; ReferenceHeight=1
        Irrigation
        Fertiliser
        SurfaceOrganicMatter: InitialResidueName=maize; InitialResidueType=maize; InitialResidueMass=500; InitialStandingFraction=0; InitialCPR=0; InitialCNR=65
        Report DailyReport: same as Gatton23.Gatton23.Field.DailyReport
        Report HarvestReport: EventNames=[Lentil].Harvesting
          VariableNames:
            [Clock].Today
            [Lentil].Phenology.CurrentStageName as Stage
            [Lentil].Phenology.StartFloweringDAS as StartFloweringDAS
            [Lentil].Phenology.MaturityDAS as MaturityDAS
            [Lentil].Grain.Live.Wt as GrainWt
            [Lentil].AboveGround.Wt
        Manager Harvesting: same as Gatton23.Gatton23.Field.Harvesting
        Manager Sowing: same as Gatton23.Gatton23.Field.Sowing
        Report SowingReport: EventNames=[Clock].EndOfDay
        Manager IrrigateFixedDates
          IrrigateDates = 13-aug, 14-aug, 15-aug, 26-aug, 31-aug, 03-sep, 25-sep, 30-sep, 1-oct
          Amount = 10
          Depth = 0
          Efficiency = 0.8
          WillRunoff = False
```csharp
using Models.Soils;
using System;
using Models.Core;
using Models.PMF;
using APSIM.Shared.Utilities;
namespace Models
{
    [Serializable]
    public class Script : Model
    {
        [Link] Clock Clock;
        [Link] Irrigation Irrigation;
        
        [Separator("A component to apply irrigation on one or more dates on every year of the simulation")]

        [Description("Enter the irrigation dates as dd-mmm with comma separation (any year information entered will be ignored)")] public string[] IrrigateDates { get; set; }
        
        [Description("Amount of irrigation to be applied (mm)")] public double Amount { get; set; }
        
        [Description("Depth in the soil to apply the  irrigation (mm)")] public double Depth { get; set; }
        
        [Description("Efficiency of irrigation (0-1)")] public double Efficiency { get; set; }
        
        [Description("Will the irrigation runoff?")] public bool WillRunoff { get; set; }
        
        [EventSubscribe("DoManagement")]
        private void OnDoManagement(object sender, EventArgs e)
        {
            foreach (string ddMMM in IrrigateDates)
            {
                if (DateUtilities.DatesEqual(ddMMM, Clock.Today))
                    Irrigation.Apply(amount: Amount, depth: Depth, efficiency: Efficiency, willRunoff: WillRunoff);
            }
        }
    }
}
```
        Plant Lentil
        Operations IrrigationEvents
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