Simulations: Version=216
  DataStore
    ExcelInput: SheetNames=[Observed]
      FileNames=[C:\GitHubRepos\ApsimX\Prototypes\Lentil\NaPA\Observed.xlsx]
    PredictedObserved HarvestObsPred: PredictedTableName=HarvestReport; ObservedTableName=Observed; FieldNameUsedForMatch=SimulationName; FieldName2UsedForMatch=Lentil.Phenology.CurrentStageName; AllColumns=false
  Experiment 2022_Vic_Ouyen_Lentil_Satellite
    Factors
      Permutation
        Factor TOS
          CompositeFactor TOS1
            Specifications:
              [Clock].StartDate = 2/05/2022
              [Clock].EndDate = 31-dec-2022
              [Sowing].Script.SowDate = 2/05/2022
              [Sowing].Script.EmergeDate = 12-May
              [Sowing].Script.SowingDepth = 40.0
              [Sowing].Script.RowSpacing = 28.0
              [Sowing].Script.Population = 100
          CompositeFactor TOS2
            Specifications:
              [Clock].StartDate = 1/06/2022
              [Clock].EndDate = 31-dec-2022
              [Sowing].Script.SowDate = 1/06/2022
              [Sowing].Script.EmergeDate = 11-Jun
              [Sowing].Script.SowingDepth = 40.0
              [Sowing].Script.RowSpacing = 28.0
              [Sowing].Script.Population = 100
        Factor Variety
          Specification=[Sowing].Script.CultivarName = Leader, Bolt, HallmarkXT, Lightning, KelpieXT, Jumbo2
        Factor WaterTrt
          CompositeFactor RainFed: Specifications=[IrrigationApplications]
            Operations IrrigationApplications
    Simulation BaseSim
      Weather: FileName=Met/Vic_Ouyen.met
      Clock
      Summary summaryfile
      SoilArbitrator Soil Arbitrator
      Zone Field: Area=1; Slope=0; AspectAngle=0; Altitude=50
        SurfaceOrganicMatter: InitialResidueName=maize; InitialResidueType=maize; InitialResidueMass=500; InitialStandingFraction=0; InitialCPR=0; InitialCNR=65
        MicroClimate: a_interception=0; b_interception=1; c_interception=0; d_interception=0; SoilHeatFluxFraction=0.4; MinimumHeightDiffForNewLayer=0; NightInterceptionFraction=0.5; ReferenceHeight=1
        Irrigation
        Fertiliser
        Plant Lentil
        Manager Sowing
          SowDate =
          EmergeDate =
          CultivarName =
          SowingDepth = 30
          RowSpacing = 380
          Population = 25
          TrtName =
```csharp
using APSIM.Shared.Utilities;
using Models.Utilities;
using Models.Soils;
using Models.PMF;
using Models.Core;
using System;

namespace Models
{
    [Serializable]
    public class Script : Model
    {
        [Link] Clock Clock;
        [Link] Fertiliser Fertiliser;
        [Link] Summary Summary;
        [Link] Plant Lentil;
        [Link] Soil Soil;
        Accumulator accumulatedRain;
        
        [Description("Sowing date (d-mmm)")]
        public string SowDate { get; set; }
        [Description("Emergence date (d-mmm)")]
        public string EmergeDate { get; set; }
        [Description("Cultivar to be sown")]
        public string CultivarName { get; set; }
        [Description("Sowing depth (mm)")]
        public double SowingDepth { get; set; }
        [Description("Row spacing (mm)")]
        public double RowSpacing { get; set; }
        [Description("Plant population (/m2)")]
        public double Population { get; set; }
        [Description("Population Modifier (0-)")]
        public string TrtName { get; set; }
        
        


        [EventSubscribe("DoManagement")]
        private void OnDoManagement(object sender, EventArgs e)
        {
            if (DateUtilities.WithinDates(SowDate, Clock.Today, SowDate))
            {
                double estPopn = Population;
                if (TrtName == "Density_0.66")
                    estPopn = Population * 0.66;
                Lentil.Sow(population: estPopn  , cultivar: CultivarName, depth: SowingDepth, rowSpacing: RowSpacing);    
                if (EmergeDate != "")
                Lentil.Phenology.SetPhaseCompletionDate(EmergeDate,"Emerging");
            }
        }
    }
}
```
        Operations IrrigationApplications
          2023-05-16  [Fertiliser].Apply(amount:10, type: NO3N");//Pre-sowing simazine at 800g/ha & Treflan at 1L/ha"
          2023-05-16  [Fertiliser].Apply(amount:10, type: NO3N");//NA"
        Operations FertiliserApplications
        Manager ApplyFertiliser
          FertiliserType = UreaN
          FertiliserDates = 1/06/2022
          TrtName = 0kgN
```csharp
using Models.Soils;
using System;
using System.Linq;
using Models.Core;
using Models.PMF;
using APSIM.Shared.Utilities;
using System.Globalization;
using System.Text.RegularExpressions;

namespace Models
{
    [Serializable]
    public class Script : Model
    {
        [Link] Clock Clock;
        [Link] Fertiliser Fertiliser;
        
        [Separator("A component to apply fertiliser on one or more dates on every year of the simulation")]

        [Description("Type of fertiliser to apply? ")] 
        [Display(Type = DisplayType.FertiliserType)]public string FertiliserType { get; set; }

        [Description("Dates to apply fertiliser ")] 
        public string[] FertiliserDates { get; set; } 

        [Description("Amount of fertiliser to be applied (kg /ha)")] 
        public string TrtName { get; set; }
        
        double applicationN = 0;
        
        [EventSubscribe("StartOfSimulation")]
        private void OnSimulationCommencing(object sender, EventArgs e)
        {
            if (TrtName != "none")
            {
                int splits = FertiliserDates.Count();
                string numericPart = new string(TrtName.Where(c => char.IsDigit(c) || c == '.').ToArray());
                double TotalN = double.Parse(numericPart, CultureInfo.InvariantCulture);
                double applicationN = TotalN/splits;
            }
        }    
        
        [EventSubscribe("DoManagement")]
        private void OnDoManagement(object sender, EventArgs e)
        {
            foreach (string ddMMM in FertiliserDates)
            {
                if (DateUtilities.DatesEqual(ddMMM, Clock.Today))
                {
                   Fertiliser.Apply(amount: applicationN, type: FertiliserType);
                }
            }
        }
    }
}
```
        Manager PhotoperiodExtension
          StartDate = 05/26/2023 00:00:00
          EndDate = 12/31/2023 00:00:00
          TrtName = Natural
```csharp
using Models.Soils;
using System.Xml.Serialization;
using Models;
using Models.PMF;
using System.Text;
using System.Collections.Generic;
using APSIM.Shared.Utilities;
using Models.Core;
using System;
using Models.Climate;

namespace Models
{
    [Serializable] 
    [System.Xml.Serialization.XmlInclude(typeof(Model))]
    public class Script : Model
    {
        [Link] Weather Met;
        [Link] Clock Clock;
    
        [Description("Start Date")]
        public DateTime StartDate { get; set; }
        
        [Description("End Date")]
        public DateTime EndDate { get; set; }
 
        [Description("Photoperiod treatment)")]
        public string TrtName { get; set; }
        
        [EventSubscribe("PreparingNewWeatherData")]
        private void OnPreparingNewWeatherData(object sender, EventArgs e)
        {
            if (TrtName == "16_hr")
            {
                if ((Clock.Today.Date >= StartDate) && (Clock.Today.Date <= EndDate))
                    Met.DayLength = 16;
            }
        }
    }
}
```
        Report DailyReport: EventNames=[Clock].EndOfDay
          VariableNames:
            [Clock].Today
            [Simulation].Name
            [IWeather].MeanT
            [Irrigation].IrrigationApplied
            [Lentil].AboveGround.Wt
            [Lentil].AboveGroundDead.Wt
            [Lentil].Fruit.Wt
            [Lentil].Leaf.Canopy.CoverGreen
            [Lentil].Leaf.Canopy.SpecificArea
            [Lentil].Leaf.Live.Wt
            [Lentil].Leaf.Dead.Wt
            [Lentil].Leaf.Wt
            [Lentil].Leaf.Canopy.LAI
            [Lentil].Leaf.TotalCarbonDemand.TotalDMDemand.DeltaLAIPotential.Vegetative.Delta.BranchNumber
            [Lentil].Leaf.Canopy.Fw
            [Lentil].Leaf.NodeNumber
            [Lentil].Leaf.SpecificAreaTotal
            [Lentil].Phenology.CurrentStageName
            [Lentil].Phenology.AbortedFlowerBuds
            [Lentil].Phenology.AccumulatedTT
            [Lentil].Phenology.ThermalTime
            [Lentil].Phenology.Stage
            [Lentil].Phenology.Photoperiod
            [Lentil].Phenology.AccumulatedVernalisation
            [Lentil].Phenology.VernalisationSaturation
            [Lentil].Phenology.EarlyWaterStress
            [Lentil].Phenology.FloweringWaterStress
            [Lentil].Root.Network.Depth
            [Lentil].Stem.Dead.Wt
            [Lentil].Stem.Wt
            [Lentil].Grain.Dead.Wt
            [Lentil].Grain.Wt
            [Lentil].Pod.Dead.Wt
            [Lentil].Pod.Wt
            [Lentil].Root.Wt
            [Lentil].Nodule.Dead.Wt
            [Lentil].Nodule.Wt
            [Soil].Water.Volumetric
            sum([Soil].Water.MM)
            [Lentil].Phenology.StartBuddingTt
            [Lentil].Phenology.StartFloweringTt
            [Lentil].Phenology.StartPoddingTt
            [Lentil].Phenology.MaturityTt
        Report HarvestReport: EventNames=[Lentil].Harvesting
          VariableNames:
            [Clock].Today
            [Clock].StartDate
            [Lentil].SowingDate
            [Lentil].SowingData.Cultivar
            [Lentil].SowingData.Population
            [Lentil].SowingDate.DayOfYear
            [Lentil].SowingData.RowSpacing
            [IWeather].Latitude
            [IWeather].Longitude
            [IWeather].FileName
            [Simulation].Name
            [Lentil].Phenology.EmergenceDAS
            [Lentil].Phenology.StartBuddingDAS
            [Lentil].Phenology.StartFloweringDAS
            [Lentil].Phenology.StartPoddingDAS
            [Lentil].Phenology.MaturityDAS
            [Lentil].Phenology.EarlyWaterStress
            [Lentil].Phenology.FloweringWaterStress
            [Lentil].Phenology.GrainFillingWaterStress
            [Lentil].Grain.Wt
            [Lentil].Grain.Size
            [Lentil].AboveGround.Wt
            [Lentil].Grain.HarvestIndex
            [Lentil].Phenology.CurrentStageName
            [Lentil].Phenology.EmergenceTt
            [Lentil].Phenology.StartBuddingTt
            [Lentil].Phenology.StartFloweringTt
            [Lentil].Phenology.StartPoddingTt
            [Lentil].Phenology.MaturityTt
        Manager Harvesting
```csharp
using Models.PMF.Phen;
using System;
using Models.Core;
using System.Collections.Generic;
using System.Text;
using Models.Soils;
using Models.PMF;
using Models;
using System.Xml.Serialization;
using APSIM.Shared.Utilities;
using APSIM.Core;


namespace Models
{
    [Serializable] 
    public class Script : Model, IStructureDependency
    {      
        [Link] private Plant Lentil;
        [Link] private Clock clock;
        [Link] private Simulation sim;
        [Link] private Zone zone;
        [Link] private Phenology phenology;
        
        private bool Harvested {get; set;}
        
        public IStructure Structure { private get; set; }
                    
        
        [EventSubscribe("StartOfSimulation")]
        private void OnSimulationCommencing(object sender, EventArgs e)
        {
        Harvested = false;
        }       
        
        [EventSubscribe("DoManagement")]
        private void OnDoManagement(object sender, EventArgs e)
        {
        if ((phenology.CurrentPhase.Name=="ReadyForHarvesting")&&(Harvested==false))
           {
           Lentil.Harvest();
           Harvested = true;
           Structure.Set("Clock.EndDate", clock.Today, relativeTo: sim);  
           }
        }
        
        [EventSubscribe("EndOfDay")]
        private void OnEndOfDay(object sender, EventArgs e)
        {
            if ((clock.Today.Equals(clock.EndDate))&&(Lentil.IsAlive)&&(Harvested==false))
            {
                Lentil.Harvest();
            }
        }
    }
}
```
        Soil 2022016_Ouyen: SoilType=Sandy duplex; Site=Ouyen; NearestTown=Ouyen; Region=Mallee; State=Victoria; Country=Australia; ApsoilNumber=1098; Latitude=-34.9949; Longitude=142.173
          DataSource=Birchip Cropping Group and CSIRO as part of GRDC Project ‘Measuring and managing soil water in Australian agriculture’ (2014)
          Comments=Deep sand over sandy loam at depth - WheatLL Observed Rooting Depth was 40cm; CLL wheat field measured, CLL other crops estimated, but note that sensitivity to subsoil constraints may vary.
          Physical
            Thickness  ParticleSizeSand  ParticleSizeSilt  ParticleSizeClay  BD    AirDry  LL15  DUL   SAT
            150        93.11             0.99              5.9               1.37  0.05    0.1   0.23  0.28
            150        94.06             1                 4.94              1.3   0.05    0.1   0.23  0.28
            300        93.04             1                 5.96              1.13  0.105   0.11  0.23  0.28
            300        94.1              0                 5.9               1.24  0.165   0.17  0.23  0.28
            300        92.01             1.01              6.99              1.39  0.185   0.19  0.26  0.31
            300        84.89             3.03              12.07             1.39  0.215   0.22  0.29  0.34
            SoilCrop ChickpeaSoil: LL=[0.1, 0.1, 0.11, 0.17, 0.19, 0.22]; KL=[0.06, 0.06, 0.06, 0.04, 0.04, 0.02]; XF=[1, 1, 1, 1, 1, 1]
            SoilCrop LentilSoil: LL=[0.1, 0.1, 0.11, 0.17, 0.19, 0.22]; KL=[0.06, 0.06, 0.06, 0.04, 0.04, 0.02]; XF=[1, 1, 1, 1, 1, 1]
          WaterBalance SoilWater: SummerDate=1-Nov; SummerU=6; SummerCona=3.5; WinterDate=1-Apr; WinterU=2; WinterCona=2; DiffusConst=250; DiffusSlope=22; Salb=0.13; CN2Bare=68; CNRed=20; CNCov=0.8; PSIDul=-100; Thickness=[150, 150, 300, 300, 300, 300]; SWCON=[0.7, 0.7, 0.7, 0.7, 0.7, 0.7]
          Solute NO3: Thickness=[150, 150, 300, 300, 300, 300]; InitialValuesUnits=ppm; WaterTableConcentration=0; D0=0; DepthConstant=0; MaxDepthSoluteAccessible=0; RunoffEffectivenessAtMovingSolute=0; MaxEffectiveRunoff=0
          Solute NH4: same as 2022_Vic_Ouyen_Lentil_Satellite.BaseSim.Field.2022016_Ouyen.NO3
          Solute Urea: Thickness=[150, 150, 300, 300, 300, 300]; InitialValues=[0, 0, 0, 0, 0, 0]; InitialValuesUnits=kg/ha; WaterTableConcentration=0; D0=0; DepthConstant=0; MaxDepthSoluteAccessible=0; RunoffEffectivenessAtMovingSolute=0; MaxEffectiveRunoff=0
          Water: Thickness=[150, 150, 300, 300, 300, 300]; InitialValues=[0.23, 0.23, 0.23, 0.23, 0.26, 0.29]; FilledFromTop=true
          Organic: FOMCNRatio=40; CarbonUnits=Total
            Thickness  Carbon  SoilCNRatio  FBiom  FInert  FOM
            150        0.55    12           0.04   0.4     390.598
            150        0.42    12           0.02   0.5     289.362
            300        0.39    12           0.02   0.7     158.805
            300        0.33    12           0.02   0.95    87.1541
            300        0.18    12           0.01   0.95    47.8312
            300        0.16    12           0.01   0.95    26.2503
          Chemical: PHUnits=Water
            Thickness  PH   EC     CEC
            150        6.9  0.02   3.4
            150        7.2  0.041  3.7
            300        7.1  0.025  3.1
            300        7.6  0.03   3.5
            300        8.5  0.05   6.3
            300        8.9  0.067  9.3
            EC, CEC, PH source: Measured
            CL source: Measured, Estimated based on local knowledge
          Nutrient
          SoilTemperature Temperature: InteractionsPerDay=8
        Report AnalysisReport: EventNames=[Clock].EndOfDay
          VariableNames:
            [Clock].Today
            [Simulation].Name
            [IWeather].MeanT
            [Irrigation].IrrigationApplied
            [Lentil].AboveGround.Wt
            [Lentil].AboveGroundDead.Wt
            [Lentil].Fruit.Wt
            [Lentil].Leaf.Canopy.CoverGreen
            [Lentil].Leaf.Canopy.SpecificArea
            [Lentil].Leaf.Live.Wt
            [Lentil].Leaf.Dead.Wt
            [Lentil].Leaf.Wt
            [Lentil].Leaf.Canopy.LAI
            [Lentil].Leaf.TotalCarbonDemand.TotalDMDemand.DeltaLAIPotential.Vegetative.Delta.BranchNumber
            [Lentil].Leaf.Canopy.Fw
            [Lentil].Leaf.NodeNumber
            [Lentil].Leaf.SpecificAreaTotal
            [Lentil].Phenology.CurrentStageName
            [Lentil].Phenology.AbortedFlowerBuds
            [Lentil].Phenology.AccumulatedTT
            [Lentil].Phenology.ThermalTime
            [Lentil].Phenology.Stage
            [Lentil].Phenology.Photoperiod
            [Lentil].Phenology.AccumulatedVernalisation
            [Lentil].Phenology.VernalisationSaturation
            [Lentil].Phenology.EarlyWaterStress
            [Lentil].Phenology.FloweringWaterStress
            [Lentil].Root.Network.Depth
            [Lentil].Stem.Dead.Wt
            [Lentil].Stem.Wt
            [Lentil].Grain.Dead.Wt
            [Lentil].Grain.Wt
            [Lentil].Pod.Dead.Wt
            [Lentil].Pod.Wt
            [Lentil].Root.Wt
            [Lentil].Nodule.Dead.Wt
            [Lentil].Nodule.Wt
            [Soil].Water.Volumetric
            sum([Soil].Water.MM)
            [Lentil].SowingDate
            [Lentil].SowingData.Cultivar
            [Lentil].SowingData.Population
            [Lentil].SowingDate.DayOfYear
            [Lentil].SowingData.RowSpacing
            [IWeather].Latitude
            [IWeather].Longitude
            [IWeather].FileName
            [Lentil].Phenology.EmergenceDAS
            [Lentil].Phenology.StartBuddingDAS
            [Lentil].Phenology.StartFloweringDAS
            [Lentil].Phenology.StartPoddingDAS
            [Lentil].Phenology.MaturityDAS
            [Lentil].Phenology.EarlyWaterStress
            [Lentil].Phenology.FloweringWaterStress
            [Lentil].Phenology.GrainFillingWaterStress
            [Lentil].Grain.Size
            [Lentil].AboveGround.Wt
            [Lentil].Grain.HarvestIndex
      Manager LocalWeather
```csharp
using Models.Soils;
using System.Diagnostics;
using System.Collections.Generic;
using System.IO;
using System.Data;
using System.Linq;
using System;
using Models.Interfaces;
using Models.Core;
using APSIM.Shared.Utilities;
namespace Models
{
    [Serializable]
    [System.Xml.Serialization.XmlInclude(typeof(Model))]
    public class Script : Model
    {
        [Link] Clock clock;
        [Link] IWeather weather;
        [Link] Simulation simulation;
        [Link] Summary Summary;
        
        private DataTable data;
        private List<DateTime> dates = new List<DateTime>();

        private string patchFileName { get; set; }
        
        [EventSubscribe("StartOfSimulation")]
        private void OnStartOfSimulation(object sender, EventArgs e)
        {
            //  Set local weather file path
            patchFileName = "Met\\Vic_Ouyen.logger.met";
        
            // Ensure filename is relative to the directory where the .apsimx file is located.
            string fullFileName = PathUtilities.GetAbsolutePath(patchFileName, simulation.FileName);
        
            // Read in data.
            data = ApsimTextFile.ToTable(fullFileName);
            foreach (DataRow row in data.Rows)
                dates.Add(DataTableUtilities.GetDateFromRow(row));
                
            if (! data.Columns.Contains("rain") ||
	              ! data.Columns.Contains("radn") ||
	              ! data.Columns.Contains("mint") ||
	              ! data.Columns.Contains("maxt")) {
	            Summary.WriteMessage(this, "Columns missing from " +fullFileName, MessageType.Warning); 
	        }
        }

        [EventSubscribe("PreparingNewWeatherData")]
        private void OnPreparingNewWeatherData(object sender, EventArgs e)
        {
                // check to see if we have a row of data for today.
                int rowIndex = dates.IndexOf(clock.Today);
                if (rowIndex != -1)
                {
                    // Yes we do have data for today so patch the data.
                    foreach (DataColumn column in data.Columns)
                    {
                        if (column.ColumnName.Equals("rain", StringComparison.InvariantCultureIgnoreCase)) {
                            double val = 0;
                            if (Double.TryParse(data.Rows[rowIndex][column.ColumnName].ToString(), out val)) { 
                                weather.Rain = val;
                            }
                        } else if (column.ColumnName.Equals("maxt", StringComparison.InvariantCultureIgnoreCase)) {
                            double val = 0;
                            if (Double.TryParse(data.Rows[rowIndex][column.ColumnName].ToString(), out val)) { 
                                weather.MaxT = val;
                            }
                        } else if (column.ColumnName.Equals("mint", StringComparison.InvariantCultureIgnoreCase)) {
                            double val = 0;
                            if (Double.TryParse(data.Rows[rowIndex][column.ColumnName].ToString(), out val)) { 
                               weather.MinT = val;
                            }
                        } else if (column.ColumnName.Equals("radn", StringComparison.InvariantCultureIgnoreCase)) {
                            double val = 0;
                            if (Double.TryParse(data.Rows[rowIndex][column.ColumnName].ToString(), out val)) { 
                               weather.Radn = val; 
                            }
                        }
                    }
                }
        }
    }
}
```
  Folder Replacements
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