Simulations: Version=216
  DataStore
    ExcelInput: SheetNames=[Observed]
      FileNames=[C:\GitHubRepos\ApsimX\Prototypes\Lentil\NaPA\Observed.xlsx]
    PredictedObserved HarvestObsPred: PredictedTableName=HarvestReport; ObservedTableName=Observed; FieldNameUsedForMatch=SimulationName; FieldName2UsedForMatch=Lentil.Phenology.CurrentStageName; AllColumns=false
  Experiment 2023_SA_Pinery_Lentil_Detailed
    Factors
      Permutation
        Factor TOS
          CompositeFactor TOS1
            Specifications:
              [Clock].StartDate = 10/05/2023
              [Clock].EndDate = 31-dec-2023
              [Sowing].Script.SowDate = 10/05/2023
              [Sowing].Script.EmergeDate = null
              [Sowing].Script.SowingDepth = 5.0
              [Sowing].Script.RowSpacing = 23.0
              [Sowing].Script.Population = 100
          CompositeFactor TOS2
            Specifications:
              [Clock].StartDate = 28/06/2023
              [Clock].EndDate = 31-dec-2023
              [Sowing].Script.SowDate = 28/06/2023
              [Sowing].Script.EmergeDate = null
              [Sowing].Script.SowingDepth = 5.0
              [Sowing].Script.RowSpacing = 23.0
              [Sowing].Script.Population = 100
        Factor Variety
          Specification=[Sowing].Script.CultivarName = KelpieXT, Jumbo2, Bolt, HallmarkXT
        Factor WaterTrt
          CompositeFactor Irrigated: Specifications=[IrrigationApplications]
            Operations IrrigationApplications
              2023-09-05  [Irrigation].Apply(amount: 40.0)
              2023-08-01  [Irrigation].Apply(amount: 40.0)
          CompositeFactor RainFed: Specifications=[IrrigationApplications]
            Operations IrrigationApplications
    Simulation BaseSim
      Weather: FileName=Met/SA_Pinery.met
      Clock
      Summary summaryfile
      SoilArbitrator Soil Arbitrator
      Zone Field: Area=1; Slope=0; AspectAngle=0; Altitude=50
        SurfaceOrganicMatter: InitialResidueName=maize; InitialResidueType=maize; InitialResidueMass=500; InitialStandingFraction=0; InitialCPR=0; InitialCNR=65
        MicroClimate: a_interception=0; b_interception=1; c_interception=0; d_interception=0; SoilHeatFluxFraction=0.4; MinimumHeightDiffForNewLayer=0; NightInterceptionFraction=0.5; ReferenceHeight=1
        Irrigation
        Fertiliser
        Plant Lentil
        Manager Sowing
          SowDate =
          EmergeDate =
          CultivarName =
          SowingDepth = 30
          RowSpacing = 380
          Population = 25
          TrtName =
```csharp
using APSIM.Shared.Utilities;
using Models.Utilities;
using Models.Soils;
using Models.PMF;
using Models.Core;
using System;

namespace Models
{
    [Serializable]
    public class Script : Model
    {
        [Link] Clock Clock;
        [Link] Fertiliser Fertiliser;
        [Link] Summary Summary;
        [Link] Plant Lentil;
        [Link] Soil Soil;
        Accumulator accumulatedRain;
        
        [Description("Sowing date (d-mmm)")]
        public string SowDate { get; set; }
        [Description("Emergence date (d-mmm)")]
        public string EmergeDate { get; set; }
        [Description("Cultivar to be sown")]
        public string CultivarName { get; set; }
        [Description("Sowing depth (mm)")]
        public double SowingDepth { get; set; }
        [Description("Row spacing (mm)")]
        public double RowSpacing { get; set; }
        [Description("Plant population (/m2)")]
        public double Population { get; set; }
        [Description("Population Modifier (0-)")]
        public string TrtName { get; set; }
        
        


        [EventSubscribe("DoManagement")]
        private void OnDoManagement(object sender, EventArgs e)
        {
            if (DateUtilities.WithinDates(SowDate, Clock.Today, SowDate))
            {
                double estPopn = Population;
                if (TrtName == "Density_0.66")
                    estPopn = Population * 0.66;
                Lentil.Sow(population: estPopn  , cultivar: CultivarName, depth: SowingDepth, rowSpacing: RowSpacing);    
                if (EmergeDate != "")
                Lentil.Phenology.SetPhaseCompletionDate(EmergeDate,"Emerging");
            }
        }
    }
}
```
        Operations IrrigationApplications
          2023-05-16  [Fertiliser].Apply(amount:10, type: NO3N");//Pre-sowing simazine at 800g/ha & Treflan at 1L/ha"
          2023-05-16  [Fertiliser].Apply(amount:10, type: NO3N");//NA"
        Operations FertiliserApplications
        Manager ApplyFertiliser
          FertiliserType = UreaN
          FertiliserDates = 28/06/2023
          TrtName = 0kgN
```csharp
using Models.Soils;
using System;
using System.Linq;
using Models.Core;
using Models.PMF;
using APSIM.Shared.Utilities;
using System.Globalization;
using System.Text.RegularExpressions;

namespace Models
{
    [Serializable]
    public class Script : Model
    {
        [Link] Clock Clock;
        [Link] Fertiliser Fertiliser;
        
        [Separator("A component to apply fertiliser on one or more dates on every year of the simulation")]

        [Description("Type of fertiliser to apply? ")] 
        [Display(Type = DisplayType.FertiliserType)]public string FertiliserType { get; set; }

        [Description("Dates to apply fertiliser ")] 
        public string[] FertiliserDates { get; set; } 

        [Description("Amount of fertiliser to be applied (kg /ha)")] 
        public string TrtName { get; set; }
        
        double applicationN = 0;
        
        [EventSubscribe("StartOfSimulation")]
        private void OnSimulationCommencing(object sender, EventArgs e)
        {
            if (TrtName != "none")
            {
                int splits = FertiliserDates.Count();
                string numericPart = new string(TrtName.Where(c => char.IsDigit(c) || c == '.').ToArray());
                double TotalN = double.Parse(numericPart, CultureInfo.InvariantCulture);
                double applicationN = TotalN/splits;
            }
        }    
        
        [EventSubscribe("DoManagement")]
        private void OnDoManagement(object sender, EventArgs e)
        {
            foreach (string ddMMM in FertiliserDates)
            {
                if (DateUtilities.DatesEqual(ddMMM, Clock.Today))
                {
                   Fertiliser.Apply(amount: applicationN, type: FertiliserType);
                }
            }
        }
    }
}
```
        Manager PhotoperiodExtension
          StartDate = 05/26/2023 00:00:00
          EndDate = 12/31/2023 00:00:00
          TrtName = Natural
```csharp
using Models.Soils;
using System.Xml.Serialization;
using Models;
using Models.PMF;
using System.Text;
using System.Collections.Generic;
using APSIM.Shared.Utilities;
using Models.Core;
using System;
using Models.Climate;

namespace Models
{
    [Serializable] 
    [System.Xml.Serialization.XmlInclude(typeof(Model))]
    public class Script : Model
    {
        [Link] Weather Met;
        [Link] Clock Clock;
    
        [Description("Start Date")]
        public DateTime StartDate { get; set; }
        
        [Description("End Date")]
        public DateTime EndDate { get; set; }
 
        [Description("Photoperiod treatment)")]
        public string TrtName { get; set; }
        
        [EventSubscribe("PreparingNewWeatherData")]
        private void OnPreparingNewWeatherData(object sender, EventArgs e)
        {
            if (TrtName == "16_hr")
            {
                if ((Clock.Today.Date >= StartDate) && (Clock.Today.Date <= EndDate))
                    Met.DayLength = 16;
            }
        }
    }
}
```
        Report DailyReport: EventNames=[Clock].EndOfDay
          VariableNames:
            [Clock].Today
            [Simulation].Name
            [IWeather].MeanT
            [Irrigation].IrrigationApplied
            [Lentil].AboveGround.Wt
            [Lentil].AboveGroundDead.Wt
            [Lentil].Fruit.Wt
            [Lentil].Leaf.Canopy.CoverGreen
            [Lentil].Leaf.Canopy.SpecificArea
            [Lentil].Leaf.Live.Wt
            [Lentil].Leaf.Dead.Wt
            [Lentil].Leaf.Wt
            [Lentil].Leaf.Canopy.LAI
            [Lentil].Leaf.TotalCarbonDemand.TotalDMDemand.DeltaLAIPotential.Vegetative.Delta.BranchNumber
            [Lentil].Leaf.Canopy.Fw
            [Lentil].Leaf.NodeNumber
            [Lentil].Leaf.SpecificAreaTotal
            [Lentil].Phenology.CurrentStageName
            [Lentil].Phenology.AbortedFlowerBuds
            [Lentil].Phenology.AccumulatedTT
            [Lentil].Phenology.ThermalTime
            [Lentil].Phenology.Stage
            [Lentil].Phenology.Photoperiod
            [Lentil].Phenology.AccumulatedVernalisation
            [Lentil].Phenology.VernalisationSaturation
            [Lentil].Phenology.EarlyWaterStress
            [Lentil].Phenology.FloweringWaterStress
            [Lentil].Root.Network.Depth
            [Lentil].Stem.Dead.Wt
            [Lentil].Stem.Wt
            [Lentil].Grain.Dead.Wt
            [Lentil].Grain.Wt
            [Lentil].Pod.Dead.Wt
            [Lentil].Pod.Wt
            [Lentil].Root.Wt
            [Lentil].Nodule.Dead.Wt
            [Lentil].Nodule.Wt
            [Soil].Water.Volumetric
            sum([Soil].Water.MM)
            [Lentil].Phenology.StartBuddingTt
            [Lentil].Phenology.StartFloweringTt
            [Lentil].Phenology.StartPoddingTt
            [Lentil].Phenology.MaturityTt
        Report HarvestReport: EventNames=[Lentil].Harvesting
          VariableNames:
            [Clock].Today
            [Clock].StartDate
            [Lentil].SowingDate
            [Lentil].SowingData.Cultivar
            [Lentil].SowingData.Population
            [Lentil].SowingDate.DayOfYear
            [Lentil].SowingData.RowSpacing
            [IWeather].Latitude
            [IWeather].Longitude
            [IWeather].FileName
            [Simulation].Name
            [Lentil].Phenology.EmergenceDAS
            [Lentil].Phenology.StartBuddingDAS
            [Lentil].Phenology.StartFloweringDAS
            [Lentil].Phenology.StartPoddingDAS
            [Lentil].Phenology.MaturityDAS
            [Lentil].Phenology.EarlyWaterStress
            [Lentil].Phenology.FloweringWaterStress
            [Lentil].Phenology.GrainFillingWaterStress
            [Lentil].Grain.Wt
            [Lentil].Grain.Size
            [Lentil].AboveGround.Wt
            [Lentil].Grain.HarvestIndex
            [Lentil].Phenology.CurrentStageName
            [Lentil].Phenology.EmergenceTt
            [Lentil].Phenology.StartBuddingTt
            [Lentil].Phenology.StartFloweringTt
            [Lentil].Phenology.StartPoddingTt
            [Lentil].Phenology.MaturityTt
        Manager Harvesting
```csharp
using Models.PMF.Phen;
using System;
using Models.Core;
using System.Collections.Generic;
using System.Text;
using Models.Soils;
using Models.PMF;
using Models;
using System.Xml.Serialization;
using APSIM.Shared.Utilities;
using APSIM.Core;


namespace Models
{
    [Serializable] 
    public class Script : Model, IStructureDependency
    {      
        [Link] private Plant Lentil;
        [Link] private Clock clock;
        [Link] private Simulation sim;
        [Link] private Zone zone;
        [Link] private Phenology phenology;
        
        private bool Harvested {get; set;}
        
        public IStructure Structure { private get; set; }
                    
        
        [EventSubscribe("StartOfSimulation")]
        private void OnSimulationCommencing(object sender, EventArgs e)
        {
        Harvested = false;
        }       
        
        [EventSubscribe("DoManagement")]
        private void OnDoManagement(object sender, EventArgs e)
        {
        if ((phenology.CurrentPhase.Name=="ReadyForHarvesting")&&(Harvested==false))
           {
           Lentil.Harvest();
           Harvested = true;
           Structure.Set("Clock.EndDate", clock.Today, relativeTo: sim);  
           }
        }
        
        [EventSubscribe("EndOfDay")]
        private void OnEndOfDay(object sender, EventArgs e)
        {
            if ((clock.Today.Equals(clock.EndDate))&&(Lentil.IsAlive)&&(Harvested==false))
            {
                Lentil.Harvest();
            }
        }
    }
}
```
        Soil 2023024_Pinery: ASCOrder=Calcarosol; ASCSubOrder=Hypercalcic; SoilType=Loamy duplex; Site=Pinery; NearestTown=Owen; Region=Mid North; State=South Australia; Country=Australia; ApsoilNumber=273; Latitude=-34.309; Longitude=138.46; LocationAccuracy=+/- 20m
          DataSource=Characterisation 2006 by University of Adelaide, CSIRO Sustainable Ecosystems and Ag Consulting as part of GRDC project 'Training growers to manage soil water'
          Comments=Loam - OC estimated for all depths; Barley CLL measured, estimated for other crops, LL15, AD all estimated;Root depth: Barley 65cm. Moderate clay soil with moderate-high CEC. High ESP and toxic levels of boron mobilised by high pH will impede root growth below about 65cm; pH also reduces trace element availability. Slaking or dispersion possible at depth.
          Physical
            Thickness  ParticleSizeSand  ParticleSizeSilt  ParticleSizeClay  Rocks  BD    AirDry  LL15   DUL   SAT   KS
            100        56                11                32                0      1.53  0.05    0.1    0.25  0.3   1
            100        53.5              12.5              33.5              0      1.58  0.05    0.1    0.25  0.3   1
            300        43.6667           17.3333           39                0      1.52  0.105   0.11   0.27  0.32  1
            300        29                15                56                0      1.55  0.145   0.15   0.26  0.31  1
            300        39                11                50                0      1.55  0.24    0.245  0.25  0.3   1
            SoilCrop LentilSoil: LL=[0.1, 0.1, 0.11, 0.15, 0.25]; KL=[0.06, 0.06, 0.06, 0.04, 0.04]; XF=[1, 1, 1, 1, 1]
            SoilCrop FababeanSoil: LL=[0.1, 0.1, 0.11, 0.15, 0.25]; KL=[0.06, 0.06, 0.06, 0.04, 0.04]; XF=[1, 1, 1, 1, 1]
          WaterBalance SoilWater: SummerDate=1-Nov; SummerU=6; SummerCona=3.5; WinterDate=1-Apr; WinterU=2; WinterCona=2; DiffusConst=60; DiffusSlope=20; Salb=0.14; CN2Bare=73; CNRed=20; CNCov=0.8; PSIDul=-100; Thickness=[150, 150, 200, 300, 300, 400]; SWCON=[0.4, 0.4, 0.4, 0.3, 0.3, 0.3]
          Solute NO3: Thickness=[150, 150, 200, 300, 300, 400]; InitialValuesUnits=ppm; WaterTableConcentration=0; D0=0; DepthConstant=0; MaxDepthSoluteAccessible=0; RunoffEffectivenessAtMovingSolute=0; MaxEffectiveRunoff=0
          Solute NH4: same as 2023_SA_Pinery_Lentil_Detailed.BaseSim.Field.2023024_Pinery.NO3
          Solute Urea: Thickness=[150, 150, 200, 300, 300, 400]; InitialValues=[0, 0, 0, 0, 0, 0]; InitialValuesUnits=kg/ha; WaterTableConcentration=0; D0=0; DepthConstant=0; MaxDepthSoluteAccessible=0; RunoffEffectivenessAtMovingSolute=0; MaxEffectiveRunoff=0
          Water: Thickness=[100, 100, 300, 300, 300]; InitialValues=[0.25, 0.25, 0.27, 0.26, 0.25]; FilledFromTop=true
          Organic: FOMCNRatio=40; CarbonUnits=WalkleyBlack
            Thickness  Carbon  SoilCNRatio  FBiom  FInert  FOM
            150        1       12           0.04   0.4     366.742
            150        0.8     12           0.02   0.5     271.689
            200        0.5     12           0.02   0.7     182.119
            300        0.25    12           0.02   1       99.949
            300        0.15    12           0.01   1       54.8532
            400        0.1     12           0.01   1       24.6471
          Chemical: PHUnits=Water
            Thickness  PH   EC   ESP      CEC
            150        8.4  0.3  2.69231  26
            150        8.7  0.2  2.57353  27.2
            200        9.3  0.2  7.72358  24.6
            300        9.9  0.5  26.5781  30.1
            300        9.9  0.7  38.8199  32.2
            400        9.7  0.9  39.5604  27.3
            EC, CL, CEC, PH source: Measured
            ESP source: C
          Nutrient
          SoilTemperature Temperature: InteractionsPerDay=8
        Report AnalysisReport: EventNames=[Clock].EndOfDay
          VariableNames:
            [Clock].Today
            [Simulation].Name
            [IWeather].MeanT
            [Irrigation].IrrigationApplied
            [Lentil].AboveGround.Wt
            [Lentil].AboveGroundDead.Wt
            [Lentil].Fruit.Wt
            [Lentil].Leaf.Canopy.CoverGreen
            [Lentil].Leaf.Canopy.SpecificArea
            [Lentil].Leaf.Live.Wt
            [Lentil].Leaf.Dead.Wt
            [Lentil].Leaf.Wt
            [Lentil].Leaf.Canopy.LAI
            [Lentil].Leaf.TotalCarbonDemand.TotalDMDemand.DeltaLAIPotential.Vegetative.Delta.BranchNumber
            [Lentil].Leaf.Canopy.Fw
            [Lentil].Leaf.NodeNumber
            [Lentil].Leaf.SpecificAreaTotal
            [Lentil].Phenology.CurrentStageName
            [Lentil].Phenology.AbortedFlowerBuds
            [Lentil].Phenology.AccumulatedTT
            [Lentil].Phenology.ThermalTime
            [Lentil].Phenology.Stage
            [Lentil].Phenology.Photoperiod
            [Lentil].Phenology.AccumulatedVernalisation
            [Lentil].Phenology.VernalisationSaturation
            [Lentil].Phenology.EarlyWaterStress
            [Lentil].Phenology.FloweringWaterStress
            [Lentil].Root.Network.Depth
            [Lentil].Stem.Dead.Wt
            [Lentil].Stem.Wt
            [Lentil].Grain.Dead.Wt
            [Lentil].Grain.Wt
            [Lentil].Pod.Dead.Wt
            [Lentil].Pod.Wt
            [Lentil].Root.Wt
            [Lentil].Nodule.Dead.Wt
            [Lentil].Nodule.Wt
            [Soil].Water.Volumetric
            sum([Soil].Water.MM)
            [Lentil].SowingDate
            [Lentil].SowingData.Cultivar
            [Lentil].SowingData.Population
            [Lentil].SowingDate.DayOfYear
            [Lentil].SowingData.RowSpacing
            [IWeather].Latitude
            [IWeather].Longitude
            [IWeather].FileName
            [Lentil].Phenology.EmergenceDAS
            [Lentil].Phenology.StartBuddingDAS
            [Lentil].Phenology.StartFloweringDAS
            [Lentil].Phenology.StartPoddingDAS
            [Lentil].Phenology.MaturityDAS
            [Lentil].Phenology.EarlyWaterStress
            [Lentil].Phenology.FloweringWaterStress
            [Lentil].Phenology.GrainFillingWaterStress
            [Lentil].Grain.Size
            [Lentil].AboveGround.Wt
            [Lentil].Grain.HarvestIndex
  Folder Replacements
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