Simulations: Version=216
  DataStore
    ExcelInput: SheetNames=[Observed]
      FileNames=[C:\GitHubRepos\ApsimX\Prototypes\Lentil\NaPA\Observed.xlsx]
    PredictedObserved HarvestObsPred: PredictedTableName=HarvestReport; ObservedTableName=Observed; FieldNameUsedForMatch=SimulationName; FieldName2UsedForMatch=Lentil.Phenology.CurrentStageName; AllColumns=false
  Experiment 2024_Vic_Walpeup_Lentil_Satellite
    Factors
      Permutation
        Factor TOS
          CompositeFactor TOS1
            Specifications:
              [Clock].StartDate = 09/05/2024
              [Clock].EndDate = 31-dec-2024
              [Sowing].Script.SowDate = 09/05/2024
              [Sowing].Script.EmergeDate = 18-May
              [Sowing].Script.SowingDepth = 4.0
              [Sowing].Script.RowSpacing = 28.0
              [Sowing].Script.Population = 100
          CompositeFactor TOS2
            Specifications:
              [Clock].StartDate = 17/06/2024
              [Clock].EndDate = 31-dec-2024
              [Sowing].Script.SowDate = 17/06/2024
              [Sowing].Script.EmergeDate = 14-Jul
              [Sowing].Script.SowingDepth = 4.0
              [Sowing].Script.RowSpacing = 28.0
              [Sowing].Script.Population = 100
        Factor Variety
          Specification=[Sowing].Script.CultivarName = Jumbo2, HallmarkXT, KelpieXT, Bolt
        Factor WaterTrt
          CompositeFactor RainFed: Specifications=[IrrigationApplications]
            Operations IrrigationApplications
              2024-05-24  [Irrigation].Apply(amount: 15.0)
    Simulation BaseSim
      Weather: FileName=Met/Vic_Walpeup.met
      Clock
      Summary summaryfile
      SoilArbitrator Soil Arbitrator
      Zone Field: Area=1; Slope=0; AspectAngle=0; Altitude=50
        SurfaceOrganicMatter: InitialResidueName=maize; InitialResidueType=maize; InitialResidueMass=500; InitialStandingFraction=0; InitialCPR=0; InitialCNR=65
        MicroClimate: a_interception=0; b_interception=1; c_interception=0; d_interception=0; SoilHeatFluxFraction=0.4; MinimumHeightDiffForNewLayer=0; NightInterceptionFraction=0.5; ReferenceHeight=1
        Irrigation
        Fertiliser
        Plant Lentil
        Manager Sowing
          SowDate =
          EmergeDate =
          CultivarName =
          SowingDepth = 30
          RowSpacing = 380
          Population = 25
          TrtName =
```csharp
using APSIM.Shared.Utilities;
using Models.Utilities;
using Models.Soils;
using Models.PMF;
using Models.Core;
using System;

namespace Models
{
    [Serializable]
    public class Script : Model
    {
        [Link] Clock Clock;
        [Link] Fertiliser Fertiliser;
        [Link] Summary Summary;
        [Link] Plant Lentil;
        [Link] Soil Soil;
        Accumulator accumulatedRain;
        
        [Description("Sowing date (d-mmm)")]
        public string SowDate { get; set; }
        [Description("Emergence date (d-mmm)")]
        public string EmergeDate { get; set; }
        [Description("Cultivar to be sown")]
        public string CultivarName { get; set; }
        [Description("Sowing depth (mm)")]
        public double SowingDepth { get; set; }
        [Description("Row spacing (mm)")]
        public double RowSpacing { get; set; }
        [Description("Plant population (/m2)")]
        public double Population { get; set; }
        [Description("Population Modifier (0-)")]
        public string TrtName { get; set; }
        
        


        [EventSubscribe("DoManagement")]
        private void OnDoManagement(object sender, EventArgs e)
        {
            if (DateUtilities.WithinDates(SowDate, Clock.Today, SowDate))
            {
                double estPopn = Population;
                if (TrtName == "Density_0.66")
                    estPopn = Population * 0.66;
                Lentil.Sow(population: estPopn  , cultivar: CultivarName, depth: SowingDepth, rowSpacing: RowSpacing);    
                if (EmergeDate != "")
                Lentil.Phenology.SetPhaseCompletionDate(EmergeDate,"Emerging");
            }
        }
    }
}
```
        Operations IrrigationApplications
          2023-05-16  [Fertiliser].Apply(amount:10, type: NO3N");//Pre-sowing simazine at 800g/ha & Treflan at 1L/ha"
          2023-05-16  [Fertiliser].Apply(amount:10, type: NO3N");//NA"
        Operations FertiliserApplications
        Manager ApplyFertiliser
          FertiliserType = UreaN
          FertiliserDates = 17/06/2024
          TrtName = 0kgN
```csharp
using Models.Soils;
using System;
using System.Linq;
using Models.Core;
using Models.PMF;
using APSIM.Shared.Utilities;
using System.Globalization;
using System.Text.RegularExpressions;

namespace Models
{
    [Serializable]
    public class Script : Model
    {
        [Link] Clock Clock;
        [Link] Fertiliser Fertiliser;
        
        [Separator("A component to apply fertiliser on one or more dates on every year of the simulation")]

        [Description("Type of fertiliser to apply? ")] 
        [Display(Type = DisplayType.FertiliserType)]public string FertiliserType { get; set; }

        [Description("Dates to apply fertiliser ")] 
        public string[] FertiliserDates { get; set; } 

        [Description("Amount of fertiliser to be applied (kg /ha)")] 
        public string TrtName { get; set; }
        
        double applicationN = 0;
        
        [EventSubscribe("StartOfSimulation")]
        private void OnSimulationCommencing(object sender, EventArgs e)
        {
            if (TrtName != "none")
            {
                int splits = FertiliserDates.Count();
                string numericPart = new string(TrtName.Where(c => char.IsDigit(c) || c == '.').ToArray());
                double TotalN = double.Parse(numericPart, CultureInfo.InvariantCulture);
                double applicationN = TotalN/splits;
            }
        }    
        
        [EventSubscribe("DoManagement")]
        private void OnDoManagement(object sender, EventArgs e)
        {
            foreach (string ddMMM in FertiliserDates)
            {
                if (DateUtilities.DatesEqual(ddMMM, Clock.Today))
                {
                   Fertiliser.Apply(amount: applicationN, type: FertiliserType);
                }
            }
        }
    }
}
```
        Manager PhotoperiodExtension
          StartDate = 05/26/2023 00:00:00
          EndDate = 12/31/2023 00:00:00
          TrtName = Natural
```csharp
using Models.Soils;
using System.Xml.Serialization;
using Models;
using Models.PMF;
using System.Text;
using System.Collections.Generic;
using APSIM.Shared.Utilities;
using Models.Core;
using System;
using Models.Climate;

namespace Models
{
    [Serializable] 
    [System.Xml.Serialization.XmlInclude(typeof(Model))]
    public class Script : Model
    {
        [Link] Weather Met;
        [Link] Clock Clock;
    
        [Description("Start Date")]
        public DateTime StartDate { get; set; }
        
        [Description("End Date")]
        public DateTime EndDate { get; set; }
 
        [Description("Photoperiod treatment)")]
        public string TrtName { get; set; }
        
        [EventSubscribe("PreparingNewWeatherData")]
        private void OnPreparingNewWeatherData(object sender, EventArgs e)
        {
            if (TrtName == "16_hr")
            {
                if ((Clock.Today.Date >= StartDate) && (Clock.Today.Date <= EndDate))
                    Met.DayLength = 16;
            }
        }
    }
}
```
        Report DailyReport: EventNames=[Clock].EndOfDay
          VariableNames:
            [Clock].Today
            [Simulation].Name
            [IWeather].MeanT
            [Irrigation].IrrigationApplied
            [Lentil].AboveGround.Wt
            [Lentil].AboveGroundDead.Wt
            [Lentil].Fruit.Wt
            [Lentil].Leaf.Canopy.CoverGreen
            [Lentil].Leaf.Canopy.SpecificArea
            [Lentil].Leaf.Live.Wt
            [Lentil].Leaf.Dead.Wt
            [Lentil].Leaf.Wt
            [Lentil].Leaf.Canopy.LAI
            [Lentil].Leaf.TotalCarbonDemand.TotalDMDemand.DeltaLAIPotential.Vegetative.Delta.BranchNumber
            [Lentil].Leaf.Canopy.Fw
            [Lentil].Leaf.NodeNumber
            [Lentil].Leaf.SpecificAreaTotal
            [Lentil].Phenology.CurrentStageName
            [Lentil].Phenology.AbortedFlowerBuds
            [Lentil].Phenology.AccumulatedTT
            [Lentil].Phenology.ThermalTime
            [Lentil].Phenology.Stage
            [Lentil].Phenology.Photoperiod
            [Lentil].Phenology.AccumulatedVernalisation
            [Lentil].Phenology.VernalisationSaturation
            [Lentil].Phenology.EarlyWaterStress
            [Lentil].Phenology.FloweringWaterStress
            [Lentil].Root.Network.Depth
            [Lentil].Stem.Dead.Wt
            [Lentil].Stem.Wt
            [Lentil].Grain.Dead.Wt
            [Lentil].Grain.Wt
            [Lentil].Pod.Dead.Wt
            [Lentil].Pod.Wt
            [Lentil].Root.Wt
            [Lentil].Nodule.Dead.Wt
            [Lentil].Nodule.Wt
            [Soil].Water.Volumetric
            sum([Soil].Water.MM)
            [Lentil].Phenology.StartBuddingTt
            [Lentil].Phenology.StartFloweringTt
            [Lentil].Phenology.StartPoddingTt
            [Lentil].Phenology.MaturityTt
        Report HarvestReport: EventNames=[Lentil].Harvesting
          VariableNames:
            [Clock].Today
            [Clock].StartDate
            [Lentil].SowingDate
            [Lentil].SowingData.Cultivar
            [Lentil].SowingData.Population
            [Lentil].SowingDate.DayOfYear
            [Lentil].SowingData.RowSpacing
            [IWeather].Latitude
            [IWeather].Longitude
            [IWeather].FileName
            [Simulation].Name
            [Lentil].Phenology.EmergenceDAS
            [Lentil].Phenology.StartBuddingDAS
            [Lentil].Phenology.StartFloweringDAS
            [Lentil].Phenology.StartPoddingDAS
            [Lentil].Phenology.MaturityDAS
            [Lentil].Phenology.EarlyWaterStress
            [Lentil].Phenology.FloweringWaterStress
            [Lentil].Phenology.GrainFillingWaterStress
            [Lentil].Grain.Wt
            [Lentil].Grain.Size
            [Lentil].AboveGround.Wt
            [Lentil].Grain.HarvestIndex
            [Lentil].Phenology.CurrentStageName
            [Lentil].Phenology.EmergenceTt
            [Lentil].Phenology.StartBuddingTt
            [Lentil].Phenology.StartFloweringTt
            [Lentil].Phenology.StartPoddingTt
            [Lentil].Phenology.MaturityTt
        Manager Harvesting
```csharp
using Models.PMF.Phen;
using System;
using Models.Core;
using System.Collections.Generic;
using System.Text;
using Models.Soils;
using Models.PMF;
using Models;
using System.Xml.Serialization;
using APSIM.Shared.Utilities;
using APSIM.Core;


namespace Models
{
    [Serializable] 
    public class Script : Model, IStructureDependency
    {      
        [Link] private Plant Lentil;
        [Link] private Clock clock;
        [Link] private Simulation sim;
        [Link] private Zone zone;
        [Link] private Phenology phenology;
        
        private bool Harvested {get; set;}
        
        public IStructure Structure { private get; set; }
                    
        
        [EventSubscribe("StartOfSimulation")]
        private void OnSimulationCommencing(object sender, EventArgs e)
        {
        Harvested = false;
        }       
        
        [EventSubscribe("DoManagement")]
        private void OnDoManagement(object sender, EventArgs e)
        {
        if ((phenology.CurrentPhase.Name=="ReadyForHarvesting")&&(Harvested==false))
           {
           Lentil.Harvest();
           Harvested = true;
           Structure.Set("Clock.EndDate", clock.Today, relativeTo: sim);  
           }
        }
        
        [EventSubscribe("EndOfDay")]
        private void OnEndOfDay(object sender, EventArgs e)
        {
            if ((clock.Today.Equals(clock.EndDate))&&(Lentil.IsAlive)&&(Harvested==false))
            {
                Lentil.Harvest();
            }
        }
    }
}
```
        Soil Walpeup: SoilType=Sandy duplex; Site=Walpeup; NearestTown=Walpeup; Region=Mallee; State=Victoria; Country=Australia; ApsoilNumber=726; Latitude=-35.031; Longitude=142.156; LocationAccuracy=+/- 1000m
          DataSource=Based on Soil Characterisation undertaken by Birchip Cropping Group during 2005
          Comments=Loamy sand - CMA 2005 site Walpeup MRI, also DPI Soil pit site 2; OC estimated below surface layer; CLL field measured; Observed rooting depth 120cm
          Memo
            Built from APSoil 726 Swale Loamy sand

            still need to update chemistry only no changes made
          Physical
            Thickness  ParticleSizeSand  ParticleSizeSilt  ParticleSizeClay  BD     AirDry  LL15  DUL   SAT
            100        85                2                 11                1.592  0.025   0.05  0.1   0.15
            300        71                3                 22                1.441  0.08    0.16  0.33  0.38
            300        47                1                 40                1.429  0.195   0.2   0.34  0.39
            300        -                 -                 -                 1.522  0.195   0.2   0.35  0.4
            300        -                 -                 -                 1.54   0.195   0.2   0.34  0.39
            SoilCrop WheatSoil: LL=[0.05, 0.16, 0.22, 0.2, 0.2]; KL=[0.06, 0.06, 0.04, 0.04, 0.04]; XF=[1, 1, 1, 1, 1]
              LL source: Field measured and checked for sensibility
            SoilCrop BarleySoil: LL=[0.05, 0.16, 0.22, 0.2, 0.2]; KL=[0.07, 0.07, 0.07, 0.05, 0.05]; XF=[1, 1, 1, 1, 1]
              LL source: Estimated based on local knowledge
            SoilCrop OatsSoil: LL=[0.05, 0.16, 0.22, 0.2, 0.2]; KL=[0.06, 0.06, 0.04, 0.04, 0.04]; XF=[1, 1, 1, 1, 1]
              LL source: Estimated based on local knowledge
            SoilCrop LentilSoil: LL=[0.05, 0.16, 0.2, 0.2, 0.2]; KL=[0.06, 0.06, 0.04, 0.04, 0.04]; XF=[1, 1, 1, 1, 1]
          WaterBalance SoilWater: SummerDate=1-Nov; SummerU=6; SummerCona=3.5; WinterDate=1-Apr; WinterU=2; WinterCona=2; DiffusConst=88; DiffusSlope=35; Salb=0.16; CN2Bare=73; CNRed=20; CNCov=0.8; PSIDul=-100; Thickness=[100, 300, 300, 300, 300]; SWCON=[0.7, 0.7, 0.5, 0.5, 0.5]
          Solute NO3: Thickness=[100, 300, 300, 300, 300]; InitialValuesUnits=ppm; WaterTableConcentration=0; D0=0; DepthConstant=0; MaxDepthSoluteAccessible=0; RunoffEffectivenessAtMovingSolute=0; MaxEffectiveRunoff=0
          Solute NH4: same as 2024_Vic_Walpeup_Lentil_Satellite.BaseSim.Field.Walpeup.NO3
          Solute Urea: Thickness=[100, 300, 300, 300, 300]; InitialValues=[0, 0, 0, 0, 0]; InitialValuesUnits=kg/ha; WaterTableConcentration=0; D0=0; DepthConstant=0; MaxDepthSoluteAccessible=0; RunoffEffectivenessAtMovingSolute=0; MaxEffectiveRunoff=0
          Water: Thickness=[100, 300, 300, 300, 300]; InitialValues=[0.1, 0.33, 0.34, 0.35, 0.34]; FilledFromTop=true
          Organic: FOMCNRatio=40; CarbonUnits=WalkleyBlack
            Thickness  Carbon    SoilCNRatio  FBiom  FInert  FOM
            100        1.1       12           0.04   0.4     515.766
            300        0.876923  12           0.02   0.5     258.099
            300        0.553846  12           0.02   0.7     129.158
            300        0.276923  12           0.02   1       64.6333
            300        0.161538  12           0.01   1       32.3438
          Chemical: PHUnits=Water
            Thickness  PH   EC    ESP  CEC
            100        7.8  0.1   3    7.2
            300        8.1  0.14  4    11
            300        9.6  0.35  18   23
            300        9.9  0.7   34   15.5
            300        9.9  0.7   34   15.5
            EC, CL, CEC, PH source: Measured, Estimated based on local knowledge
            ESP source: C
          Nutrient
          SoilTemperature Temperature: InteractionsPerDay=8
        Report AnalysisReport: EventNames=[Clock].EndOfDay
          VariableNames:
            [Clock].Today
            [Simulation].Name
            [IWeather].MeanT
            [Irrigation].IrrigationApplied
            [Lentil].AboveGround.Wt
            [Lentil].AboveGroundDead.Wt
            [Lentil].Fruit.Wt
            [Lentil].Leaf.Canopy.CoverGreen
            [Lentil].Leaf.Canopy.SpecificArea
            [Lentil].Leaf.Live.Wt
            [Lentil].Leaf.Dead.Wt
            [Lentil].Leaf.Wt
            [Lentil].Leaf.Canopy.LAI
            [Lentil].Leaf.TotalCarbonDemand.TotalDMDemand.DeltaLAIPotential.Vegetative.Delta.BranchNumber
            [Lentil].Leaf.Canopy.Fw
            [Lentil].Leaf.NodeNumber
            [Lentil].Leaf.SpecificAreaTotal
            [Lentil].Phenology.CurrentStageName
            [Lentil].Phenology.AbortedFlowerBuds
            [Lentil].Phenology.AccumulatedTT
            [Lentil].Phenology.ThermalTime
            [Lentil].Phenology.Stage
            [Lentil].Phenology.Photoperiod
            [Lentil].Phenology.AccumulatedVernalisation
            [Lentil].Phenology.VernalisationSaturation
            [Lentil].Phenology.EarlyWaterStress
            [Lentil].Phenology.FloweringWaterStress
            [Lentil].Root.Network.Depth
            [Lentil].Stem.Dead.Wt
            [Lentil].Stem.Wt
            [Lentil].Grain.Dead.Wt
            [Lentil].Grain.Wt
            [Lentil].Pod.Dead.Wt
            [Lentil].Pod.Wt
            [Lentil].Root.Wt
            [Lentil].Nodule.Dead.Wt
            [Lentil].Nodule.Wt
            [Soil].Water.Volumetric
            sum([Soil].Water.MM)
            [Lentil].SowingDate
            [Lentil].SowingData.Cultivar
            [Lentil].SowingData.Population
            [Lentil].SowingDate.DayOfYear
            [Lentil].SowingData.RowSpacing
            [IWeather].Latitude
            [IWeather].Longitude
            [IWeather].FileName
            [Lentil].Phenology.EmergenceDAS
            [Lentil].Phenology.StartBuddingDAS
            [Lentil].Phenology.StartFloweringDAS
            [Lentil].Phenology.StartPoddingDAS
            [Lentil].Phenology.MaturityDAS
            [Lentil].Phenology.EarlyWaterStress
            [Lentil].Phenology.FloweringWaterStress
            [Lentil].Phenology.GrainFillingWaterStress
            [Lentil].Grain.Size
            [Lentil].AboveGround.Wt
            [Lentil].Grain.HarvestIndex
  Folder Replacements
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