Simulations: Version=216
  Memo
    All lentil soils updated and compared to current database on the 30/4/2026

    Fababean lupin and chickpea soils still to check thogh most chickpea should be good.
  DataStore
  Soil 2022001_Gatton: SoilType=AJAR2007; Site=Boorowa; NearestTown=Boorowa; Region=South West Slopes; State=New South Wales; Country=Australia; ApsoilNumber=244; Latitude=-34.48581; Longitude=148.71664; LocationAccuracy=+/- 20m; Comments=Classification based on Particle size analysis.
    DataSource=Data collected as part of the GRDC project ‘Training growers to manage soil water’ by CSIRO Sustainable Ecosystems in collaboration with farmers and Lachlan CMA
    Physical
      Thickness  ParticleSizeSand  ParticleSizeSilt  ParticleSizeClay  BD    AirDry  LL15  DUL   SAT
      150        66.3821           11.146            22.4719           1.17  0.1     0.2   0.47  0.52
      150        65.8435252        11.6845           22.4719           1.19  0.105   0.21  0.47  0.52
      300        48.2995252        11.2765           40.4239           1.29  0.225   0.23  0.47  0.508208
      300        44.2195252        9.64454           46.1359           1.37  0.245   0.25  0.47  0.478019
      300        44.3646           12.3555           43.2799           1.36  0.215   0.22  0.46  0.481792
      300        45.0482           12.8959           42.0559           1.33  0.255   0.26  0.41  0.46
      300        51.4431           10.1729           38.3839           1.39  0.305   0.31  0.4   0.45
      SoilCrop BarleySoil: LL=[0.087, 0.087, 0.173, 0.192, 0.183, 0.215, 0.173]; KL=[0.07, 0.07, 0.07, 0.05, 0.05, 0.03, 0.02]; XF=[1, 1, 1, 1, 1, 1, 1]
      SoilCrop CanolaSoil
        LL=[0.087, 0.0866647, 0.173485, 0.191822, 0.182536, 0.214685, 0.173]
        KL=[0.06, 0.06, 0.06, 0.04, 0.04, 0.02, 0.01]
        XF=[1, 1, 1, 1, 1, 1, 1]
      SoilCrop ChickpeaSoil: LL=[0.087, 0.087, 0.173, 0.192, 0.183, 0.215, 0.173]; KL=[0.06, 0.06, 0.06, 0.06, 0.06, 0.06, 0.06]; XF=[1, 1, 1, 1, 1, 1, 1]
      SoilCrop FababeanSoil: LL=[0.087, 0.087, 0.173, 0.192, 0.183, 0.215, 0.173]; KL=[0.06, 0.06, 0.06, 0.06, 0.06, 0.06, 0.06]; XF=[1, 1, 1, 1, 1, 1, 1]
      SoilCrop FieldpeaSoil: LL=[0.087, 0.087, 0.173, 0.192, 0.183, 0.215, 0.173]; KL=[0.06, 0.06, 0.06, 0.06, 0.06, 0.06, 0.06]; XF=[1, 1, 1, 1, 1, 1, 1]
      SoilCrop MungbeanSoil: LL=[0.087, 0.087, 0.173, 0.249, 0.271667, 0.311, 0.291]; KL=[0.06, 0.06, 0.06, 0.04, 0.04, 0.02, 0.01]; XF=[1, 1, 1, 1, 1, 1, 1]
      SoilCrop WheatSoil: LL=[0.087, 0.087, 0.173, 0.192, 0.183, 0.215, 0.173]; KL=[0.06, 0.06, 0.06, 0.04, 0.04, 0.02, 0.01]; XF=[1, 1, 1, 1, 1, 1, 1]
    WaterBalance SoilWater: SummerDate=1-Nov; SummerU=6; SummerCona=3.5; WinterDate=1-Apr; WinterU=2; WinterCona=2; DiffusConst=88; DiffusSlope=35; Salb=0.13; CN2Bare=73; CNRed=20; CNCov=0.8; PSIDul=-100
      Thickness  SWCON  InitialValues
      150        0.5    0.395506
      150        0.5    0.448187
      300        0.3    0.435687
      300        0.3    0.456625
      300        0.3    0.398875
      300        0.3    0.339363
      300        0.3    0.363699
    Solute NO3: Thickness=[150, 150, 300, 300, 300, 300, 300]; InitialValues=[3.8, 6.875, 33.875, 62.675, 76.475, 62.875, 78.175]; InitialValuesUnits=ppm; WaterTableConcentration=0; D0=0; DepthConstant=0; MaxDepthSoluteAccessible=0; RunoffEffectivenessAtMovingSolute=0; MaxEffectiveRunoff=0
    Solute NH4: Thickness=[150, 150, 300, 300, 300, 300, 300]; InitialValues=[4.675, 4.775, 12.575, 13.325, 12.2, 12, 13.55]; InitialValuesUnits=ppm; WaterTableConcentration=0; D0=0; DepthConstant=0; MaxDepthSoluteAccessible=0; RunoffEffectivenessAtMovingSolute=0; MaxEffectiveRunoff=0
    Solute Urea: Thickness=[150, 150, 300, 300, 300, 300, 300]; InitialValues=[0, 0, 0, 0, 0, 0, 0]; InitialValuesUnits=kg/ha; WaterTableConcentration=0; D0=0; DepthConstant=0; MaxDepthSoluteAccessible=0; RunoffEffectivenessAtMovingSolute=0; MaxEffectiveRunoff=0
    Water: Thickness=[150, 150, 300, 300, 300, 300, 300]; FilledFromTop=true
      InitialValues=[0.213, 0.211543, 0.298306, 0.305657, 0.315925, 0.311239, 0.291274]
    Organic: FOMCNRatio=40; CarbonUnits=WalkleyBlack
      Thickness  Carbon     SoilCNRatio  FBiom  FInert  FOM
      150        1.13656    12           0.04   0.4     347.129
      150        0.379026   12           0.02   0.5     270.344
      300        0.458766   12           0.02   0.7     163.972
      300        0.179675   12           0.02   1       99.4541
      300        0.139805   12           0.01   1       60.322
      300        0.139805   12           0.01   1       36.5871
      300        0.0774843  12           0.01   1       22.1912
    Chemical: PHUnits=Water
      Thickness  PH   EC     ESP       CEC
      150        4.6  0.065  0.681309  5.09659
      150        4.4  0.075  1.12009   3.28571
      300        5.7  0.084  0.86636   7.91395
      300        5.8  0.093  1.44738   9.31422
      300        5.5  0.117  2.27506   8.96747
      300        5.4  0.068  2.95289   7.10985
      300        5.5  0.06   3.02786   7.99733
      PH source: Unknown source or quality of data
    Nutrient
    SoilTemperature Temperature: InteractionsPerDay=8
  Soil 2022002_Kalkee: SoilType=AJAR2007; Site=Boorowa; NearestTown=Boorowa; Region=South West Slopes; State=New South Wales; Country=Australia; ApsoilNumber=244; Latitude=-34.48581; Longitude=148.71664; LocationAccuracy=+/- 20m; Comments=Classification based on Particle size analysis.
    DataSource=Data collected as part of the GRDC project ‘Training growers to manage soil water’ by CSIRO Sustainable Ecosystems in collaboration with farmers and Lachlan CMA
    Physical
      Thickness  ParticleSizeSand  ParticleSizeSilt  ParticleSizeClay  BD    AirDry  LL15   DUL   SAT
      150        66.3821           11.146            22.4719           1.1   0.1     0.2    0.4   0.45
      150        65.8435252        11.6845           22.4719           1.17  0.1     0.2    0.4   0.45
      300        48.2995252        11.2765           40.4239           1.19  0.235   0.24   0.37  0.42
      300        44.2195252        9.64454           46.1359           1.2   0.255   0.26   0.4   0.45
      300        44.3646           12.3555           43.2799           1.28  0.45    0.455  0.46  0.51
      300        45.0482           12.8959           42.0559           1.29  0.46    0.465  0.47  0.508208
      300        51.4431           10.1729           38.3839           1.29  0.47    0.475  0.48  0.508208
      SoilCrop BarleySoil: LL=[0.087, 0.087, 0.173, 0.192, 0.183, 0.215, 0.173]; KL=[0.07, 0.07, 0.07, 0.05, 0.05, 0.03, 0.02]; XF=[1, 1, 1, 1, 1, 1, 1]
      SoilCrop CanolaSoil
        LL=[0.087, 0.0866647, 0.173485, 0.191822, 0.182536, 0.214685, 0.173]
        KL=[0.06, 0.06, 0.06, 0.04, 0.04, 0.02, 0.01]
        XF=[1, 1, 1, 1, 1, 1, 1]
      SoilCrop ChickpeaSoil: LL=[0.087, 0.087, 0.173, 0.192, 0.183, 0.215, 0.173]; KL=[0.06, 0.06, 0.06, 0.06, 0.06, 0.06, 0.06]; XF=[1, 1, 1, 1, 1, 1, 1]
      SoilCrop FababeanSoil: LL=[0.087, 0.087, 0.173, 0.192, 0.183, 0.215, 0.173]; KL=[0.06, 0.06, 0.06, 0.06, 0.06, 0.06, 0.06]; XF=[1, 1, 1, 1, 1, 1, 1]
      SoilCrop FieldpeaSoil: LL=[0.087, 0.087, 0.173, 0.192, 0.183, 0.215, 0.173]; KL=[0.06, 0.06, 0.06, 0.06, 0.06, 0.06, 0.06]; XF=[1, 1, 1, 1, 1, 1, 1]
      SoilCrop MungbeanSoil: LL=[0.087, 0.087, 0.173, 0.249, 0.271667, 0.311, 0.291]; KL=[0.06, 0.06, 0.06, 0.04, 0.04, 0.02, 0.01]; XF=[1, 1, 1, 1, 1, 1, 1]
      SoilCrop WheatSoil: LL=[0.087, 0.087, 0.173, 0.192, 0.183, 0.215, 0.173]; KL=[0.06, 0.06, 0.06, 0.04, 0.04, 0.02, 0.01]; XF=[1, 1, 1, 1, 1, 1, 1]
    WaterBalance SoilWater: SummerDate=1-Nov; SummerU=6; SummerCona=3.5; WinterDate=1-Apr; WinterU=2; WinterCona=2; DiffusConst=88; DiffusSlope=35; Salb=0.13; CN2Bare=73; CNRed=20; CNCov=0.8; PSIDul=-100; Thickness=[150, 150, 300, 300, 300, 300, 300]; SWCON=[0.5, 0.5, 0.3, 0.3, 0.3, 0.3, 0.3]
      InitialValues=[0.34296875, 0.3590625, 0.3159375, 0.2971875, 0.34828125, 0.3865625, 0.4103125, 0.4228125]
    Solute NO3: Thickness=[150, 150, 300, 300, 300, 300, 300]; InitialValues=[11.275, 12.85, 22.3, 16.2, 20.15, 19.375, 20.325, 20.35]; InitialValuesUnits=ppm; WaterTableConcentration=0; D0=0; DepthConstant=0; MaxDepthSoluteAccessible=0; RunoffEffectivenessAtMovingSolute=0; MaxEffectiveRunoff=0
    Solute NH4: Thickness=[150, 150, 300, 300, 300, 300, 300]; InitialValues=[2.475, 1.2, 3.6, 3.6, 3.8, 3.9, 3.9, 3.9]; InitialValuesUnits=ppm; WaterTableConcentration=0; D0=0; DepthConstant=0; MaxDepthSoluteAccessible=0; RunoffEffectivenessAtMovingSolute=0; MaxEffectiveRunoff=0
    Solute Urea: same as 2022001_Gatton.Urea
    Water: Thickness=[150, 150, 300, 300, 300, 300, 300]; FilledFromTop=true
      InitialValues=[0.213, 0.211543, 0.298306, 0.305657, 0.315925, 0.311239, 0.291274]
    Organic: same as 2022001_Gatton.Organic
    Chemical: same as 2022001_Gatton.Chemical
    Nutrient
    SoilTemperature Temperature: InteractionsPerDay=8
  Soil 2022003_WaggaWagga: SoilType=AJAR2007; Site=Boorowa; NearestTown=Boorowa; Region=South West Slopes; State=New South Wales; Country=Australia; ApsoilNumber=244; Latitude=-34.48581; Longitude=148.71664; LocationAccuracy=+/- 20m; Comments=Classification based on Particle size analysis.
    DataSource=Data collected as part of the GRDC project ‘Training growers to manage soil water’ by CSIRO Sustainable Ecosystems in collaboration with farmers and Lachlan CMA
    Physical
      Thickness  ParticleSizeSand  ParticleSizeSilt  ParticleSizeClay  BD       AirDry  LL15  DUL       SAT
      150        66.3821           11.146            22.4719           1.3547   0.08    0.16  0.23      0.28
      150        65.8435252        11.6845           22.4719           1.16581  0.08    0.16  0.23      0.28
      300        48.2995252        11.2765           40.4239           1.12595  0.175   0.18  0.26      0.31
      300        44.2195252        9.64454           46.1359           1.12099  0.195   0.2   0.310553  0.360553
      300        44.3646           12.3555           43.2799           1.11627  0.165   0.17  0.33      0.38
      300        45.0482           12.8959           42.0559           1.13412  0.165   0.17  0.35      0.4
      300        51.4431           10.1729           38.3839           1.18538  0.175   0.18  0.34      0.39
      SoilCrop BarleySoil: LL=[0.087, 0.087, 0.173, 0.192, 0.183, 0.215, 0.173]; KL=[0.07, 0.07, 0.07, 0.05, 0.05, 0.03, 0.02]; XF=[1, 1, 1, 1, 1, 1, 1]
      SoilCrop CanolaSoil
        LL=[0.087, 0.0866647, 0.173485, 0.191822, 0.182536, 0.214685, 0.173]
        KL=[0.06, 0.06, 0.06, 0.04, 0.04, 0.02, 0.01]
        XF=[1, 1, 1, 1, 1, 1, 1]
      SoilCrop ChickpeaSoil: LL=[0.087, 0.087, 0.173, 0.192, 0.183, 0.215, 0.173]; KL=[0.06, 0.06, 0.06, 0.06, 0.06, 0.06, 0.06]; XF=[1, 1, 1, 1, 1, 1, 1]
      SoilCrop FababeanSoil: LL=[0.087, 0.087, 0.173, 0.192, 0.183, 0.215, 0.173]; KL=[0.06, 0.06, 0.06, 0.06, 0.06, 0.06, 0.06]; XF=[1, 1, 1, 1, 1, 1, 1]
      SoilCrop FieldpeaSoil: LL=[0.087, 0.087, 0.173, 0.192, 0.183, 0.215, 0.173]; KL=[0.06, 0.06, 0.06, 0.06, 0.06, 0.06, 0.06]; XF=[1, 1, 1, 1, 1, 1, 1]
      SoilCrop MungbeanSoil: LL=[0.087, 0.087, 0.173, 0.249, 0.271667, 0.311, 0.291]; KL=[0.06, 0.06, 0.06, 0.04, 0.04, 0.02, 0.01]; XF=[1, 1, 1, 1, 1, 1, 1]
      SoilCrop WheatSoil: LL=[0.087, 0.087, 0.173, 0.192, 0.183, 0.215, 0.173]; KL=[0.06, 0.06, 0.06, 0.04, 0.04, 0.02, 0.01]; XF=[1, 1, 1, 1, 1, 1, 1]
    WaterBalance SoilWater: SummerDate=1-Nov; SummerU=6; SummerCona=3.5; WinterDate=1-Apr; WinterU=2; WinterCona=2; DiffusConst=88; DiffusSlope=35; Salb=0.13; CN2Bare=73; CNRed=20; CNCov=0.8; PSIDul=-100; Thickness=[150, 150, 300, 300, 300, 300, 300]; SWCON=[0.5, 0.5, 0.3, 0.3, 0.3, 0.3, 0.3]
      InitialValues=[0.23015625, 0.197188, 0.22171875, 0.26421875, 0.300625, 0.31109375, 0.3034375, 0.30359375, 0.344375, 0.35453125, 0.364375, 0.37046875]
    Solute NO3: Thickness=[150, 150, 300, 300, 300, 300, 300]; InitialValues=[4.75, 4.1, 1.7, 0.6, 0.225]; InitialValuesUnits=ppm; WaterTableConcentration=0; D0=0; DepthConstant=0; MaxDepthSoluteAccessible=0; RunoffEffectivenessAtMovingSolute=0; MaxEffectiveRunoff=0
    Solute NH4: Thickness=[150, 150, 300, 300, 300, 300, 300]; InitialValues=[4.1, 4.1, 2.85, 3.35, 2.75]; InitialValuesUnits=ppm; WaterTableConcentration=0; D0=0; DepthConstant=0; MaxDepthSoluteAccessible=0; RunoffEffectivenessAtMovingSolute=0; MaxEffectiveRunoff=0
    Solute Urea: same as 2022001_Gatton.Urea
    Water: Thickness=[150, 150, 300, 300, 300, 300, 300]; FilledFromTop=true
      InitialValues=[0.213, 0.211543, 0.298306, 0.305657, 0.315925, 0.311239, 0.291274]
    Organic: same as 2022001_Gatton.Organic
    Chemical: same as 2022001_Gatton.Chemical
    Nutrient
    SoilTemperature Temperature: InteractionsPerDay=8
  Soil 2022004_Riverton: SoilType=AJAR2007; Site=Boorowa; NearestTown=Boorowa; Region=South West Slopes; State=New South Wales; Country=Australia; ApsoilNumber=244; Latitude=-34.48581; Longitude=148.71664; LocationAccuracy=+/- 20m; Comments=Classification based on Particle size analysis.
    DataSource=Data collected as part of the GRDC project ‘Training growers to manage soil water’ by CSIRO Sustainable Ecosystems in collaboration with farmers and Lachlan CMA
    Physical
      Thickness  ParticleSizeSand  ParticleSizeSilt  ParticleSizeClay  BD    AirDry  LL15   DUL   SAT
      150        66.3821           11.146            22.4719           1.53  0.075   0.15   0.39  0.417642
      150        65.8435252        11.6845           22.4719           1.53  0.08    0.16   0.39  0.417642
      300        48.2995252        11.2765           40.4239           1.32  0.185   0.19   0.38  0.43
      300        44.2195252        9.64454           46.1359           1.4   0.255   0.26   0.37  0.42
      300        44.3646           12.3555           43.2799           1.4   0.36    0.365  0.37  0.42
      300        45.0482           12.8959           42.0559           1.4   0.36    0.365  0.37  0.42
      300        51.4431           10.1729           38.3839           1.4   0.36    0.365  0.37  0.42
      SoilCrop BarleySoil: LL=[0.087, 0.087, 0.173, 0.192, 0.183, 0.215, 0.173]; KL=[0.07, 0.07, 0.07, 0.05, 0.05, 0.03, 0.02]; XF=[1, 1, 1, 1, 1, 1, 1]
      SoilCrop CanolaSoil
        LL=[0.087, 0.0866647, 0.173485, 0.191822, 0.182536, 0.214685, 0.173]
        KL=[0.06, 0.06, 0.06, 0.04, 0.04, 0.02, 0.01]
        XF=[1, 1, 1, 1, 1, 1, 1]
      SoilCrop ChickpeaSoil: LL=[0.087, 0.087, 0.173, 0.192, 0.183, 0.215, 0.173]; KL=[0.06, 0.06, 0.06, 0.06, 0.06, 0.06, 0.06]; XF=[1, 1, 1, 1, 1, 1, 1]
      SoilCrop FababeanSoil: LL=[0.087, 0.087, 0.173, 0.192, 0.183, 0.215, 0.173]; KL=[0.06, 0.06, 0.06, 0.06, 0.06, 0.06, 0.06]; XF=[1, 1, 1, 1, 1, 1, 1]
      SoilCrop FieldpeaSoil: LL=[0.087, 0.087, 0.173, 0.192, 0.183, 0.215, 0.173]; KL=[0.06, 0.06, 0.06, 0.06, 0.06, 0.06, 0.06]; XF=[1, 1, 1, 1, 1, 1, 1]
      SoilCrop MungbeanSoil: LL=[0.087, 0.087, 0.173, 0.249, 0.271667, 0.311, 0.291]; KL=[0.06, 0.06, 0.06, 0.04, 0.04, 0.02, 0.01]; XF=[1, 1, 1, 1, 1, 1, 1]
      SoilCrop WheatSoil: LL=[0.087, 0.087, 0.173, 0.192, 0.183, 0.215, 0.173]; KL=[0.06, 0.06, 0.06, 0.04, 0.04, 0.02, 0.01]; XF=[1, 1, 1, 1, 1, 1, 1]
    WaterBalance SoilWater: SummerDate=1-Nov; SummerU=6; SummerCona=3.5; WinterDate=1-Apr; WinterU=2; WinterCona=2; DiffusConst=88; DiffusSlope=35; Salb=0.13; CN2Bare=73; CNRed=20; CNCov=0.8; PSIDul=-100; Thickness=[150, 150, 300, 300, 300, 300, 300]; SWCON=[0.5, 0.5, 0.3, 0.3, 0.3, 0.3, 0.3]
      InitialValues=[0.4578125, 0.394444, 0.348906, 0.32515625, 0.255484, 0.265789, -, -]
    Solute NO3: Thickness=[150, 150, 300, 300, 300, 300, 300]; InitialValues=[27.175, 25.625, 73.225, 16.8, 4.2]; InitialValuesUnits=ppm; WaterTableConcentration=0; D0=0; DepthConstant=0; MaxDepthSoluteAccessible=0; RunoffEffectivenessAtMovingSolute=0; MaxEffectiveRunoff=0
    Solute NH4: Thickness=[150, 150, 300, 300, 300, 300, 300]; InitialValues=[8.8, 3.075, 10.875, 7.35, 6.3]; InitialValuesUnits=ppm; WaterTableConcentration=0; D0=0; DepthConstant=0; MaxDepthSoluteAccessible=0; RunoffEffectivenessAtMovingSolute=0; MaxEffectiveRunoff=0
    Solute Urea: same as 2022001_Gatton.Urea
    Water: Thickness=[150, 150, 300, 300, 300, 300, 300]; FilledFromTop=true
      InitialValues=[0.213, 0.211543, 0.298306, 0.305657, 0.315925, 0.311239, 0.291274]
    Organic: same as 2022001_Gatton.Organic
    Chemical: same as 2022001_Gatton.Chemical
    Nutrient
    SoilTemperature Temperature: InteractionsPerDay=8
  Soil 2022005_Kalkee: SoilType=AJAR2007; Site=Boorowa; NearestTown=Boorowa; Region=South West Slopes; State=New South Wales; Country=Australia; ApsoilNumber=244; Latitude=-34.48581; Longitude=148.71664; LocationAccuracy=+/- 20m; Comments=Classification based on Particle size analysis.
    DataSource=Data collected as part of the GRDC project ‘Training growers to manage soil water’ by CSIRO Sustainable Ecosystems in collaboration with farmers and Lachlan CMA
    Physical: same as 2022002_Kalkee.Physical
    WaterBalance SoilWater: SummerDate=1-Nov; SummerU=6; SummerCona=3.5; WinterDate=1-Apr; WinterU=2; WinterCona=2; DiffusConst=88; DiffusSlope=35; Salb=0.13; CN2Bare=73; CNRed=20; CNCov=0.8; PSIDul=-100; Thickness=[150, 150, 300, 300, 300, 300, 300]; SWCON=[0.5, 0.5, 0.3, 0.3, 0.3, 0.3, 0.3]
      InitialValues=[0.32203125, 0.33171875, 0.34390625, 0.30484375, 0.34828125, 0.371875, 0.38625, 0.397414]
    Solute NO3: Thickness=[150, 150, 300, 300, 300, 300, 300]; InitialValues=[12.375, 10.275, 23.2, 10.8, 12.475, 10.625, 10.625, 11.6]; InitialValuesUnits=ppm; WaterTableConcentration=0; D0=0; DepthConstant=0; MaxDepthSoluteAccessible=0; RunoffEffectivenessAtMovingSolute=0; MaxEffectiveRunoff=0
    Solute NH4: Thickness=[150, 150, 300, 300, 300, 300, 300]; InitialValues=[2.75, 1.2, 4.475, 3.6, 3.8, 3.9, 3.9, 3.9]; InitialValuesUnits=ppm; WaterTableConcentration=0; D0=0; DepthConstant=0; MaxDepthSoluteAccessible=0; RunoffEffectivenessAtMovingSolute=0; MaxEffectiveRunoff=0
    Solute Urea: same as 2022001_Gatton.Urea
    Water: Thickness=[150, 150, 300, 300, 300, 300, 300]; FilledFromTop=true
      InitialValues=[0.213, 0.211543, 0.298306, 0.305657, 0.315925, 0.311239, 0.291274]
    Organic: same as 2022001_Gatton.Organic
    Chemical: same as 2022001_Gatton.Chemical
    Nutrient
    SoilTemperature Temperature: InteractionsPerDay=8
  Soil 2022006_Riverton: SoilType=AJAR2007; Site=Boorowa; NearestTown=Boorowa; Region=South West Slopes; State=New South Wales; Country=Australia; ApsoilNumber=244; Latitude=-34.48581; Longitude=148.71664; LocationAccuracy=+/- 20m; Comments=Classification based on Particle size analysis.
    DataSource=Data collected as part of the GRDC project ‘Training growers to manage soil water’ by CSIRO Sustainable Ecosystems in collaboration with farmers and Lachlan CMA
    Physical: same as 2022004_Riverton.Physical
    WaterBalance SoilWater: SummerDate=1-Nov; SummerU=6; SummerCona=3.5; WinterDate=1-Apr; WinterU=2; WinterCona=2; DiffusConst=88; DiffusSlope=35; Salb=0.13; CN2Bare=73; CNRed=20; CNCov=0.8; PSIDul=-100; Thickness=[150, 150, 300, 300, 300, 300, 300]; SWCON=[0.5, 0.5, 0.3, 0.3, 0.3, 0.3, 0.3]
      InitialValues=[0.3371875, 0.31546875, 0.3103125, 0.28328125, 0.196949, 0.184, -, -]
    Solute NO3: Thickness=[150, 150, 300, 300, 300, 300, 300]; InitialValues=[41.325, 24.875, 39.6, 15.75, 4.2, 4.2]; InitialValuesUnits=ppm; WaterTableConcentration=0; D0=0; DepthConstant=0; MaxDepthSoluteAccessible=0; RunoffEffectivenessAtMovingSolute=0; MaxEffectiveRunoff=0
    Solute NH4: Thickness=[150, 150, 300, 300, 300, 300, 300]; InitialValues=[8.8, 3.475, 10.9, 9.45, 5.25, 6.3]; InitialValuesUnits=ppm; WaterTableConcentration=0; D0=0; DepthConstant=0; MaxDepthSoluteAccessible=0; RunoffEffectivenessAtMovingSolute=0; MaxEffectiveRunoff=0
    Solute Urea: same as 2022001_Gatton.Urea
    Water: Thickness=[150, 150, 300, 300, 300, 300, 300]; FilledFromTop=true
      InitialValues=[0.213, 0.211543, 0.298306, 0.305657, 0.315925, 0.311239, 0.291274]
    Organic: same as 2022001_Gatton.Organic
    Chemical: same as 2022001_Gatton.Chemical
    Nutrient
    SoilTemperature Temperature: InteractionsPerDay=8
  Soil 2022007_WaggaWagga: SoilType=AJAR2007; Site=Boorowa; NearestTown=Boorowa; Region=South West Slopes; State=New South Wales; Country=Australia; ApsoilNumber=244; Latitude=-34.48581; Longitude=148.71664; LocationAccuracy=+/- 20m; Comments=Classification based on Particle size analysis.
    DataSource=Data collected as part of the GRDC project ‘Training growers to manage soil water’ by CSIRO Sustainable Ecosystems in collaboration with farmers and Lachlan CMA
    Physical
      Thickness  ParticleSizeSand  ParticleSizeSilt  ParticleSizeClay  BD       AirDry  LL15   DUL       SAT
      150        66.3821           11.146            22.4719           1.3547   0.08    0.16   0.23      0.28
      150        65.8435252        11.6845           22.4719           1.16581  0.08    0.16   0.23      0.28
      300        48.2995252        11.2765           40.4239           1.12595  0.175   0.18   0.26      0.31
      300        44.2195252        9.64454           46.1359           1.12099  0.225   0.23   0.310553  0.360553
      300        44.3646           12.3555           43.2799           1.11627  0.235   0.24   0.33      0.38
      300        45.0482           12.8959           42.0559           1.13412  0.24    0.245  0.35      0.4
      300        51.4431           10.1729           38.3839           1.18538  0.245   0.25   0.34      0.39
      SoilCrop BarleySoil: LL=[0.087, 0.087, 0.173, 0.192, 0.183, 0.215, 0.173]; KL=[0.07, 0.07, 0.07, 0.05, 0.05, 0.03, 0.02]; XF=[1, 1, 1, 1, 1, 1, 1]
      SoilCrop CanolaSoil
        LL=[0.087, 0.0866647, 0.173485, 0.191822, 0.182536, 0.214685, 0.173]
        KL=[0.06, 0.06, 0.06, 0.04, 0.04, 0.02, 0.01]
        XF=[1, 1, 1, 1, 1, 1, 1]
      SoilCrop ChickpeaSoil: LL=[0.087, 0.087, 0.173, 0.192, 0.183, 0.215, 0.173]; KL=[0.06, 0.06, 0.06, 0.06, 0.06, 0.06, 0.06]; XF=[1, 1, 1, 1, 1, 1, 1]
      SoilCrop FababeanSoil: LL=[0.087, 0.087, 0.173, 0.192, 0.183, 0.215, 0.173]; KL=[0.06, 0.06, 0.06, 0.06, 0.06, 0.06, 0.06]; XF=[1, 1, 1, 1, 1, 1, 1]
      SoilCrop FieldpeaSoil: LL=[0.087, 0.087, 0.173, 0.192, 0.183, 0.215, 0.173]; KL=[0.06, 0.06, 0.06, 0.06, 0.06, 0.06, 0.06]; XF=[1, 1, 1, 1, 1, 1, 1]
      SoilCrop MungbeanSoil: LL=[0.087, 0.087, 0.173, 0.249, 0.271667, 0.311, 0.291]; KL=[0.06, 0.06, 0.06, 0.04, 0.04, 0.02, 0.01]; XF=[1, 1, 1, 1, 1, 1, 1]
      SoilCrop WheatSoil: LL=[0.087, 0.087, 0.173, 0.192, 0.183, 0.215, 0.173]; KL=[0.06, 0.06, 0.06, 0.04, 0.04, 0.02, 0.01]; XF=[1, 1, 1, 1, 1, 1, 1]
    WaterBalance SoilWater: SummerDate=1-Nov; SummerU=6; SummerCona=3.5; WinterDate=1-Apr; WinterU=2; WinterCona=2; DiffusConst=88; DiffusSlope=35; Salb=0.13; CN2Bare=73; CNRed=20; CNCov=0.8; PSIDul=-100; Thickness=[150, 150, 300, 300, 300, 300, 300]; SWCON=[0.5, 0.5, 0.3, 0.3, 0.3, 0.3, 0.3]
      InitialValues=[0.23359375, 0.19546875, 0.2125, 0.2475, 0.286875, 0.30328125, 0.30375, 0.29921875, 0.32375, 0.31984375, 0.33734375, 0.35375]
    Solute NO3: Thickness=[150, 150, 300, 300, 300, 300, 300]; InitialValues=[12.85, 5.25, 1.1, 1.15, 0.1]; InitialValuesUnits=ppm; WaterTableConcentration=0; D0=0; DepthConstant=0; MaxDepthSoluteAccessible=0; RunoffEffectivenessAtMovingSolute=0; MaxEffectiveRunoff=0
    Solute NH4: Thickness=[150, 150, 300, 300, 300, 300, 300]; InitialValues=[5.4, 3.5, 3.4, 3.4, 2.75]; InitialValuesUnits=ppm; WaterTableConcentration=0; D0=0; DepthConstant=0; MaxDepthSoluteAccessible=0; RunoffEffectivenessAtMovingSolute=0; MaxEffectiveRunoff=0
    Solute Urea: same as 2022001_Gatton.Urea
    Water: Thickness=[150, 150, 300, 300, 300, 300, 300]; FilledFromTop=true
      InitialValues=[0.213, 0.211543, 0.298306, 0.305657, 0.315925, 0.311239, 0.291274]
    Organic: same as 2022001_Gatton.Organic
    Chemical: same as 2022001_Gatton.Chemical
    Nutrient
    SoilTemperature Temperature: InteractionsPerDay=8
  Soil 2022008_Deepdale: SoilType=AJAR2007; Site=Boorowa; NearestTown=Boorowa; Region=South West Slopes; State=New South Wales; Country=Australia; ApsoilNumber=244; Latitude=-34.48581; Longitude=148.71664; LocationAccuracy=+/- 20m; Comments=Classification based on Particle size analysis.
    DataSource=Data collected as part of the GRDC project ‘Training growers to manage soil water’ by CSIRO Sustainable Ecosystems in collaboration with farmers and Lachlan CMA
    Physical
      Thickness  ParticleSizeSand  ParticleSizeSilt  ParticleSizeClay  BD    AirDry  LL15  DUL   SAT
      150        66.3821           11.146            22.4719           1.38  0.05    0.1   0.23  0.28
      150        65.8435252        11.6845           22.4719           1.37  0.05    0.1   0.23  0.28
      300        48.2995252        11.2765           40.4239           1.55  0.095   0.1   0.24  0.29
      300        44.2195252        9.64454           46.1359           1.52  0.095   0.1   0.25  0.3
      300        44.3646           12.3555           43.2799           1.52  0.115   0.12  0.23  0.28
      300        45.0482           12.8959           42.0559           1.52  0.115   0.12  0.22  0.27
      300        51.4431           10.1729           38.3839           1.6   0.115   0.12  0.21  0.26
      SoilCrop BarleySoil: LL=[0.087, 0.087, 0.173, 0.192, 0.183, 0.215, 0.173]; KL=[0.07, 0.07, 0.07, 0.05, 0.05, 0.03, 0.02]; XF=[1, 1, 1, 1, 1, 1, 1]
      SoilCrop CanolaSoil
        LL=[0.087, 0.0866647, 0.173485, 0.191822, 0.182536, 0.214685, 0.173]
        KL=[0.06, 0.06, 0.06, 0.04, 0.04, 0.02, 0.01]
        XF=[1, 1, 1, 1, 1, 1, 1]
      SoilCrop ChickpeaSoil: LL=[0.087, 0.087, 0.173, 0.192, 0.183, 0.215, 0.173]; KL=[0.06, 0.06, 0.06, 0.06, 0.06, 0.06, 0.06]; XF=[1, 1, 1, 1, 1, 1, 1]
      SoilCrop FababeanSoil: LL=[0.087, 0.087, 0.173, 0.192, 0.183, 0.215, 0.173]; KL=[0.06, 0.06, 0.06, 0.06, 0.06, 0.06, 0.06]; XF=[1, 1, 1, 1, 1, 1, 1]
      SoilCrop FieldpeaSoil: LL=[0.087, 0.087, 0.173, 0.192, 0.183, 0.215, 0.173]; KL=[0.06, 0.06, 0.06, 0.06, 0.06, 0.06, 0.06]; XF=[1, 1, 1, 1, 1, 1, 1]
      SoilCrop MungbeanSoil: LL=[0.087, 0.087, 0.173, 0.245, 0.225, 0.215, 0.205]; KL=[0.06, 0.06, 0.06, 0.04, 0.04, 0.02, 0.01]; XF=[1, 1, 1, 1, 1, 1, 1]
      SoilCrop WheatSoil: LL=[0.087, 0.087, 0.173, 0.192, 0.183, 0.215, 0.173]; KL=[0.06, 0.06, 0.06, 0.04, 0.04, 0.02, 0.01]; XF=[1, 1, 1, 1, 1, 1, 1]
    WaterBalance SoilWater: SummerDate=1-Nov; SummerU=6; SummerCona=3.5; WinterDate=1-Apr; WinterU=2; WinterCona=2; DiffusConst=88; DiffusSlope=35; Salb=0.13; CN2Bare=73; CNRed=20; CNCov=0.8; PSIDul=-100; Thickness=[150, 150, 300, 300, 300, 300, 300]; SWCON=[0.5, 0.5, 0.3, 0.3, 0.3, 0.3, 0.3]
      InitialValues=[0.170625, 0.171875, 0.208125, 0.225, 0.194375, 0.170769, 0.196, 0.172]
    Solute NO3: Thickness=[150, 150, 300, 300, 300, 300, 300]; InitialValuesUnits=ppm; WaterTableConcentration=0; D0=0; DepthConstant=0; MaxDepthSoluteAccessible=0; RunoffEffectivenessAtMovingSolute=0; MaxEffectiveRunoff=0
      InitialValues=[20.00625, 7.5375, 20.65625, 13.95625, 14.2687, 52.01, 21.6]
    Solute NH4: Thickness=[150, 150, 300, 300, 300, 300, 300]; InitialValues=[4.4125, 2.225, 7.5875, 9.13125, 8.825, 9.57, 11.4]; InitialValuesUnits=ppm; WaterTableConcentration=0; D0=0; DepthConstant=0; MaxDepthSoluteAccessible=0; RunoffEffectivenessAtMovingSolute=0; MaxEffectiveRunoff=0
    Solute Urea: same as 2022001_Gatton.Urea
    Water: Thickness=[150, 150, 300, 300, 300, 300, 300]; FilledFromTop=true
      InitialValues=[0.213, 0.211543, 0.298306, 0.305657, 0.315925, 0.311239, 0.291274]
    Organic: same as 2022001_Gatton.Organic
    Chemical: same as 2022001_Gatton.Chemical
    Nutrient
    SoilTemperature Temperature: InteractionsPerDay=8
  Soil 2022009_Emerald: SoilType=AJAR2007; Site=Boorowa; NearestTown=Boorowa; Region=South West Slopes; State=New South Wales; Country=Australia; ApsoilNumber=244; Latitude=-34.48581; Longitude=148.71664; LocationAccuracy=+/- 20m; Comments=Classification based on Particle size analysis.
    DataSource=Data collected as part of the GRDC project ‘Training growers to manage soil water’ by CSIRO Sustainable Ecosystems in collaboration with farmers and Lachlan CMA
    Physical
      Thickness  ParticleSizeSand  ParticleSizeSilt  ParticleSizeClay  BD     AirDry  LL15   DUL    SAT
      150        66.3821           11.146            22.4719           1.249  0.0575  0.115  0.348  0.398
      150        65.8435252        11.6845           22.4719           1.412  0.0865  0.173  0.402  0.452
      300        48.2995252        11.2765           40.4239           1.414  0.205   0.21   0.385  0.435
      300        44.2195252        9.64454           46.1359           1.393  0.215   0.22   0.342  0.392
      300        44.3646           12.3555           43.2799           1.365  0.215   0.22   0.333  0.383
      300        45.0482           12.8959           42.0559           1.367  0.215   0.22   0.351  0.401
      300        51.4431           10.1729           38.3839           1.437  0.215   0.22   0.362  0.412
      SoilCrop BarleySoil: LL=[0.087, 0.087, 0.173, 0.192, 0.183, 0.215, 0.173]; KL=[0.07, 0.07, 0.07, 0.05, 0.05, 0.03, 0.02]; XF=[1, 1, 1, 1, 1, 1, 1]
      SoilCrop CanolaSoil
        LL=[0.087, 0.0866647, 0.173485, 0.191822, 0.182536, 0.214685, 0.173]
        KL=[0.06, 0.06, 0.06, 0.04, 0.04, 0.02, 0.01]
        XF=[1, 1, 1, 1, 1, 1, 1]
      SoilCrop ChickpeaSoil: LL=[0.087, 0.087, 0.173, 0.192, 0.183, 0.215, 0.173]; KL=[0.06, 0.06, 0.06, 0.06, 0.06, 0.06, 0.06]; XF=[1, 1, 1, 1, 1, 1, 1]
      SoilCrop FababeanSoil: LL=[0.087, 0.087, 0.173, 0.192, 0.183, 0.215, 0.173]; KL=[0.06, 0.06, 0.06, 0.06, 0.06, 0.06, 0.06]; XF=[1, 1, 1, 1, 1, 1, 1]
      SoilCrop FieldpeaSoil: LL=[0.087, 0.087, 0.173, 0.192, 0.183, 0.215, 0.173]; KL=[0.06, 0.06, 0.06, 0.06, 0.06, 0.06, 0.06]; XF=[1, 1, 1, 1, 1, 1, 1]
      SoilCrop MungbeanSoil: LL=[0.087, 0.087, 0.173, 0.249, 0.271667, 0.311, 0.291]; KL=[0.06, 0.06, 0.06, 0.04, 0.04, 0.02, 0.01]; XF=[1, 1, 1, 1, 1, 1, 1]
      SoilCrop WheatSoil: LL=[0.087, 0.087, 0.173, 0.192, 0.183, 0.215, 0.173]; KL=[0.06, 0.06, 0.06, 0.04, 0.04, 0.02, 0.01]; XF=[1, 1, 1, 1, 1, 1, 1]
    WaterBalance SoilWater: SummerDate=1-Nov; SummerU=6; SummerCona=3.5; WinterDate=1-Apr; WinterU=2; WinterCona=2; DiffusConst=88; DiffusSlope=35; Salb=0.13; CN2Bare=73; CNRed=20; CNCov=0.8; PSIDul=-100; Thickness=[150, 150, 300, 300, 300, 300, 300]; SWCON=[0.5, 0.5, 0.3, 0.3, 0.3, 0.3, 0.3]
      InitialValues=[0.34875, 0.428125, 0.4084375, 0.4215625, 0.43, 0.438125, 0.471875, 0.480313]
    Solute NO3: Thickness=[150, 150, 300, 300, 300, 300, 300]; InitialValues=[8.425, 8.8, 43.45, 49.1, 45.025, 32.8, 20.475, 15.05]; InitialValuesUnits=ppm; WaterTableConcentration=0; D0=0; DepthConstant=0; MaxDepthSoluteAccessible=0; RunoffEffectivenessAtMovingSolute=0; MaxEffectiveRunoff=0
    Solute NH4: Thickness=[150, 150, 300, 300, 300, 300, 300]; InitialValues=[5.6, 7.8, 19.1, 17.75, 18.45, 14.35, 18.3, 19.4]; InitialValuesUnits=ppm; WaterTableConcentration=0; D0=0; DepthConstant=0; MaxDepthSoluteAccessible=0; RunoffEffectivenessAtMovingSolute=0; MaxEffectiveRunoff=0
    Solute Urea: same as 2022001_Gatton.Urea
    Water: Thickness=[150, 150, 300, 300, 300, 300, 300]; FilledFromTop=true
      InitialValues=[0.213, 0.211543, 0.298306, 0.305657, 0.315925, 0.311239, 0.291274]
    Organic: same as 2022001_Gatton.Organic
    Chemical: same as 2022001_Gatton.Chemical
    Nutrient
    SoilTemperature Temperature: InteractionsPerDay=8
  Soil 2022010_Greenethorpe: SoilType=AJAR2007; Site=Boorowa; NearestTown=Boorowa; Region=South West Slopes; State=New South Wales; Country=Australia; ApsoilNumber=244; Latitude=-34.48581; Longitude=148.71664; LocationAccuracy=+/- 20m; Comments=Classification based on Particle size analysis.
    DataSource=Data collected as part of the GRDC project ‘Training growers to manage soil water’ by CSIRO Sustainable Ecosystems in collaboration with farmers and Lachlan CMA
    Physical
      Thickness  ParticleSizeSand  ParticleSizeSilt  ParticleSizeClay  BD    AirDry  LL15   DUL   SAT
      150        66.3821           11.146            22.4719           1.38  0.05    0.1    0.23  0.28
      150        65.8435252        11.6845           22.4719           1.53  0.05    0.1    0.25  0.3
      300        48.2995252        11.2765           40.4239           1.55  0.125   0.13   0.3   0.35
      300        44.2195252        9.64454           46.1359           1.47  0.185   0.19   0.34  0.39
      300        44.3646           12.3555           43.2799           1.48  0.205   0.21   0.34  0.39
      300        45.0482           12.8959           42.0559           1.55  0.235   0.24   0.34  0.39
      300        51.4431           10.1729           38.3839           1.57  0.33    0.335  0.34  0.39
      SoilCrop BarleySoil: LL=[0.087, 0.087, 0.173, 0.192, 0.183, 0.215, 0.173]; KL=[0.07, 0.07, 0.07, 0.05, 0.05, 0.03, 0.02]; XF=[1, 1, 1, 1, 1, 1, 1]
      SoilCrop CanolaSoil
        LL=[0.087, 0.0866647, 0.173485, 0.191822, 0.182536, 0.214685, 0.173]
        KL=[0.06, 0.06, 0.06, 0.04, 0.04, 0.02, 0.01]
        XF=[1, 1, 1, 1, 1, 1, 1]
      SoilCrop ChickpeaSoil: LL=[0.087, 0.087, 0.173, 0.192, 0.183, 0.215, 0.173]; KL=[0.06, 0.06, 0.06, 0.06, 0.06, 0.06, 0.06]; XF=[1, 1, 1, 1, 1, 1, 1]
      SoilCrop FababeanSoil: LL=[0.087, 0.087, 0.173, 0.192, 0.183, 0.215, 0.173]; KL=[0.06, 0.06, 0.06, 0.06, 0.06, 0.06, 0.06]; XF=[1, 1, 1, 1, 1, 1, 1]
      SoilCrop FieldpeaSoil: LL=[0.087, 0.087, 0.173, 0.192, 0.183, 0.215, 0.173]; KL=[0.06, 0.06, 0.06, 0.06, 0.06, 0.06, 0.06]; XF=[1, 1, 1, 1, 1, 1, 1]
      SoilCrop MungbeanSoil: LL=[0.087, 0.087, 0.173, 0.249, 0.271667, 0.311, 0.291]; KL=[0.06, 0.06, 0.06, 0.04, 0.04, 0.02, 0.01]; XF=[1, 1, 1, 1, 1, 1, 1]
      SoilCrop WheatSoil: LL=[0.087, 0.087, 0.173, 0.192, 0.183, 0.215, 0.173]; KL=[0.06, 0.06, 0.06, 0.04, 0.04, 0.02, 0.01]; XF=[1, 1, 1, 1, 1, 1, 1]
    WaterBalance SoilWater: SummerDate=1-Nov; SummerU=6; SummerCona=3.5; WinterDate=1-Apr; WinterU=2; WinterCona=2; DiffusConst=88; DiffusSlope=35; Salb=0.13; CN2Bare=73; CNRed=20; CNCov=0.8; PSIDul=-100; Thickness=[150, 150, 300, 300, 300, 300, 300]; SWCON=[0.5, 0.5, 0.3, 0.3, 0.3, 0.3, 0.3]
      InitialValues=[0.2225, 0.24825, 0.267, 0.319, 0.32725, 0.3295, 0.32075, 0.31075]
    Solute NO3: Thickness=[150, 150, 300, 300, 300, 300, 300]; InitialValuesUnits=ppm; WaterTableConcentration=0; D0=0; DepthConstant=0; MaxDepthSoluteAccessible=0; RunoffEffectivenessAtMovingSolute=0; MaxEffectiveRunoff=0
      InitialValues=[5.21579, 4.64101, 1.99089, 1.24392, 0.253268, 0.246016, 0.22956]
    Solute NH4: Thickness=[150, 150, 300, 300, 300, 300, 300]; InitialValuesUnits=ppm; WaterTableConcentration=0; D0=0; DepthConstant=0; MaxDepthSoluteAccessible=0; RunoffEffectivenessAtMovingSolute=0; MaxEffectiveRunoff=0
      InitialValues=[1.14095, 0.564011, 0.272192, 0.272107, 0.277012, 0.26908, 0.251081]
    Solute Urea: same as 2022001_Gatton.Urea
    Water: Thickness=[150, 150, 300, 300, 300, 300, 300]; FilledFromTop=true
      InitialValues=[0.213, 0.211543, 0.298306, 0.305657, 0.315925, 0.311239, 0.291274]
    Organic: same as 2022001_Gatton.Organic
    Chemical: same as 2022001_Gatton.Chemical
    Nutrient
    SoilTemperature Temperature: InteractionsPerDay=8
  Soil 2022011_Ouyen: SoilType=AJAR2007; Site=Boorowa; NearestTown=Boorowa; Region=South West Slopes; State=New South Wales; Country=Australia; ApsoilNumber=244; Latitude=-34.48581; Longitude=148.71664; LocationAccuracy=+/- 20m; Comments=Classification based on Particle size analysis.
    DataSource=Data collected as part of the GRDC project ‘Training growers to manage soil water’ by CSIRO Sustainable Ecosystems in collaboration with farmers and Lachlan CMA
    Physical
      Thickness  ParticleSizeSand  ParticleSizeSilt  ParticleSizeClay  BD    AirDry  LL15  DUL   SAT
      150        66.3821           11.146            22.4719           1.37  0.05    0.1   0.23  0.28
      150        65.8435252        11.6845           22.4719           1.3   0.05    0.1   0.23  0.28
      300        48.2995252        11.2765           40.4239           1.13  0.105   0.11  0.23  0.28
      300        44.2195252        9.64454           46.1359           1.24  0.165   0.17  0.23  0.28
      300        44.3646           12.3555           43.2799           1.39  0.185   0.19  0.26  0.31
      300        45.0482           12.8959           42.0559           1.39  0.215   0.22  0.29  0.34
      300        51.4431           10.1729           38.3839           1.39  0.235   0.24  0.33  0.38
      SoilCrop BarleySoil: LL=[0.087, 0.087, 0.173, 0.192, 0.183, 0.215, 0.173]; KL=[0.07, 0.07, 0.07, 0.05, 0.05, 0.03, 0.02]; XF=[1, 1, 1, 1, 1, 1, 1]
      SoilCrop CanolaSoil
        LL=[0.087, 0.0866647, 0.173485, 0.191822, 0.182536, 0.214685, 0.173]
        KL=[0.06, 0.06, 0.06, 0.04, 0.04, 0.02, 0.01]
        XF=[1, 1, 1, 1, 1, 1, 1]
      SoilCrop ChickpeaSoil: LL=[0.087, 0.087, 0.173, 0.192, 0.183, 0.215, 0.173]; KL=[0.06, 0.06, 0.06, 0.06, 0.06, 0.06, 0.06]; XF=[1, 1, 1, 1, 1, 1, 1]
      SoilCrop FababeanSoil: LL=[0.087, 0.087, 0.173, 0.192, 0.183, 0.215, 0.173]; KL=[0.06, 0.06, 0.06, 0.06, 0.06, 0.06, 0.06]; XF=[1, 1, 1, 1, 1, 1, 1]
      SoilCrop FieldpeaSoil: LL=[0.087, 0.087, 0.173, 0.192, 0.183, 0.215, 0.173]; KL=[0.06, 0.06, 0.06, 0.06, 0.06, 0.06, 0.06]; XF=[1, 1, 1, 1, 1, 1, 1]
      SoilCrop MungbeanSoil: LL=[0.087, 0.087, 0.173, 0.225, 0.255, 0.285, 0.291]; KL=[0.06, 0.06, 0.06, 0.04, 0.04, 0.02, 0.01]; XF=[1, 1, 1, 1, 1, 1, 1]
      SoilCrop WheatSoil: LL=[0.087, 0.087, 0.173, 0.192, 0.183, 0.215, 0.173]; KL=[0.06, 0.06, 0.06, 0.04, 0.04, 0.02, 0.01]; XF=[1, 1, 1, 1, 1, 1, 1]
    WaterBalance SoilWater: SummerDate=1-Nov; SummerU=6; SummerCona=3.5; WinterDate=1-Apr; WinterU=2; WinterCona=2; DiffusConst=88; DiffusSlope=35; Salb=0.13; CN2Bare=73; CNRed=20; CNCov=0.8; PSIDul=-100; Thickness=[150, 150, 300, 300, 300, 300, 300]; SWCON=[0.5, 0.5, 0.3, 0.3, 0.3, 0.3, 0.3]
      InitialValues=[0.115625, 0.190625, 0.208542, 0.25375, 0.261667, 0.221667, 0.201875, 0.19766]
    Solute NO3: Thickness=[150, 150, 300, 300, 300, 300, 300]; InitialValues=[19.875, 14.625, 41.55, 24.175, 18.8, 17.75, 19.85, 19.85]; InitialValuesUnits=ppm; WaterTableConcentration=0; D0=0; DepthConstant=0; MaxDepthSoluteAccessible=0; RunoffEffectivenessAtMovingSolute=0; MaxEffectiveRunoff=0
    Solute NH4: Thickness=[150, 150, 300, 300, 300, 300, 300]; InitialValues=[2.75, 1.625, 3.4, 4.625, 4.2, 4.2, 5.225, 11.45]; InitialValuesUnits=ppm; WaterTableConcentration=0; D0=0; DepthConstant=0; MaxDepthSoluteAccessible=0; RunoffEffectivenessAtMovingSolute=0; MaxEffectiveRunoff=0
    Solute Urea: same as 2022001_Gatton.Urea
    Water: Thickness=[150, 150, 300, 300, 300, 300, 300]; FilledFromTop=true
      InitialValues=[0.213, 0.211543, 0.298306, 0.305657, 0.315925, 0.311239, 0.291274]
    Organic: same as 2022001_Gatton.Organic
    Chemical: same as 2022001_Gatton.Chemical
    Nutrient
    SoilTemperature Temperature: InteractionsPerDay=8
  Soil 2022012_RankinsSprings: SoilType=AJAR2007; Site=Boorowa; NearestTown=Boorowa; Region=South West Slopes; State=New South Wales; Country=Australia; ApsoilNumber=244; Latitude=-34.48581; Longitude=148.71664; LocationAccuracy=+/- 20m; Comments=Classification based on Particle size analysis.
    DataSource=Data collected as part of the GRDC project ‘Training growers to manage soil water’ by CSIRO Sustainable Ecosystems in collaboration with farmers and Lachlan CMA
    Physical
      Thickness  ParticleSizeSand  ParticleSizeSilt  ParticleSizeClay  BD    AirDry  LL15  DUL   SAT
      150        66.3821           11.146            22.4719           1.6   0.05    0.1   0.2   0.25
      150        65.8435252        11.6845           22.4719           1.6   0.05    0.1   0.2   0.25
      300        48.2995252        11.2765           40.4239           1.52  0.095   0.1   0.22  0.27
      300        44.2195252        9.64454           46.1359           1.52  0.115   0.12  0.25  0.3
      300        44.3646           12.3555           43.2799           1.49  0.125   0.13  0.27  0.32
      300        45.0482           12.8959           42.0559           1.44  0.135   0.14  0.28  0.33
      300        51.4431           10.1729           38.3839           1.43  0.145   0.15  0.28  0.33
      SoilCrop BarleySoil: LL=[0.087, 0.087, 0.173, 0.192, 0.183, 0.215, 0.173]; KL=[0.07, 0.07, 0.07, 0.05, 0.05, 0.03, 0.02]; XF=[1, 1, 1, 1, 1, 1, 1]
      SoilCrop CanolaSoil
        LL=[0.087, 0.0866647, 0.173485, 0.191822, 0.182536, 0.214685, 0.173]
        KL=[0.06, 0.06, 0.06, 0.04, 0.04, 0.02, 0.01]
        XF=[1, 1, 1, 1, 1, 1, 1]
      SoilCrop ChickpeaSoil: LL=[0.087, 0.087, 0.173, 0.192, 0.183, 0.215, 0.173]; KL=[0.06, 0.06, 0.06, 0.06, 0.06, 0.06, 0.06]; XF=[1, 1, 1, 1, 1, 1, 1]
      SoilCrop FababeanSoil: LL=[0.087, 0.087, 0.173, 0.192, 0.183, 0.215, 0.173]; KL=[0.06, 0.06, 0.06, 0.06, 0.06, 0.06, 0.06]; XF=[1, 1, 1, 1, 1, 1, 1]
      SoilCrop FieldpeaSoil: LL=[0.087, 0.087, 0.173, 0.192, 0.183, 0.215, 0.173]; KL=[0.06, 0.06, 0.06, 0.06, 0.06, 0.06, 0.06]; XF=[1, 1, 1, 1, 1, 1, 1]
      SoilCrop MungbeanSoil: LL=[0.087, 0.087, 0.173, 0.245, 0.265, 0.275, 0.275]; KL=[0.06, 0.06, 0.06, 0.04, 0.04, 0.02, 0.01]; XF=[1, 1, 1, 1, 1, 1, 1]
      SoilCrop WheatSoil: LL=[0.087, 0.087, 0.173, 0.192, 0.183, 0.215, 0.173]; KL=[0.06, 0.06, 0.06, 0.04, 0.04, 0.02, 0.01]; XF=[1, 1, 1, 1, 1, 1, 1]
    WaterBalance SoilWater: SummerDate=1-Nov; SummerU=6; SummerCona=3.5; WinterDate=1-Apr; WinterU=2; WinterCona=2; DiffusConst=88; DiffusSlope=35; Salb=0.13; CN2Bare=73; CNRed=20; CNCov=0.8; PSIDul=-100; Thickness=[150, 150, 300, 300, 300, 300, 300]; SWCON=[0.5, 0.5, 0.3, 0.3, 0.3, 0.3, 0.3]
      InitialValues=[0.142708, 0.155, 0.165417, 0.198333, 0.236458, 0.232708, 0.220417, 0.222083, 0.22625, 0.232708, 0.237292, 0.235333]
    Solute NO3: Thickness=[150, 150, 300, 300, 300, 300, 300]; InitialValues=[6.4, 6.4, 3, 3, 3]; InitialValuesUnits=ppm; WaterTableConcentration=0; D0=0; DepthConstant=0; MaxDepthSoluteAccessible=0; RunoffEffectivenessAtMovingSolute=0; MaxEffectiveRunoff=0
    Solute NH4: Thickness=[150, 150, 300, 300, 300, 300, 300]; InitialValues=[3.2, 3.2, 3, 3, 3]; InitialValuesUnits=ppm; WaterTableConcentration=0; D0=0; DepthConstant=0; MaxDepthSoluteAccessible=0; RunoffEffectivenessAtMovingSolute=0; MaxEffectiveRunoff=0
    Solute Urea: same as 2022001_Gatton.Urea
    Water: Thickness=[150, 150, 300, 300, 300, 300, 300]; FilledFromTop=true
      InitialValues=[0.213, 0.211543, 0.298306, 0.305657, 0.315925, 0.311239, 0.291274]
    Organic: same as 2022001_Gatton.Organic
    Chemical: same as 2022001_Gatton.Chemical
    Nutrient
    SoilTemperature Temperature: InteractionsPerDay=8
  Soil 2022013_Warra: SoilType=AJAR2007; Site=Boorowa; NearestTown=Boorowa; Region=South West Slopes; State=New South Wales; Country=Australia; ApsoilNumber=244; Latitude=-34.48581; Longitude=148.71664; LocationAccuracy=+/- 20m; Comments=Classification based on Particle size analysis.
    DataSource=Data collected as part of the GRDC project ‘Training growers to manage soil water’ by CSIRO Sustainable Ecosystems in collaboration with farmers and Lachlan CMA
    Physical
      Thickness  ParticleSizeSand  ParticleSizeSilt  ParticleSizeClay  BD       AirDry     LL15       DUL       SAT
      150        66.3821           11.146            22.4719           1.46077  0.0435     0.087      0.213     0.263
      150        65.8435252        11.6845           22.4719           1.47751  0.0433323  0.0866647  0.211543  0.261543
      300        48.2995252        11.2765           40.4239           1.53078  0.168485   0.173485   0.298306  0.348306
      300        44.2195252        9.64454           46.1359           1.53126  0.168485   0.173485   0.305657  0.355657
      300        44.3646           12.3555           43.2799           1.50415  0.168485   0.173485   0.315925  0.365925
      300        45.0482           12.8959           42.0559           1.54848  0.168485   0.173485   0.311239  0.361239
      300        51.4431           10.1729           38.3839           1.65949  0.168485   0.173485   0.291274  0.341274
      SoilCrop BarleySoil: LL=[0.087, 0.087, 0.173, 0.192, 0.183, 0.215, 0.173]; KL=[0.07, 0.07, 0.07, 0.05, 0.05, 0.03, 0.02]; XF=[1, 1, 1, 1, 1, 1, 1]
      SoilCrop CanolaSoil
        LL=[0.087, 0.0866647, 0.173485, 0.191822, 0.182536, 0.214685, 0.173]
        KL=[0.06, 0.06, 0.06, 0.04, 0.04, 0.02, 0.01]
        XF=[1, 1, 1, 1, 1, 1, 1]
      SoilCrop ChickpeaSoil: LL=[0.087, 0.087, 0.173, 0.192, 0.183, 0.215, 0.173]; KL=[0.06, 0.06, 0.06, 0.06, 0.06, 0.06, 0.06]; XF=[1, 1, 1, 1, 1, 1, 1]
      SoilCrop FababeanSoil: LL=[0.087, 0.087, 0.173, 0.192, 0.183, 0.215, 0.173]; KL=[0.06, 0.06, 0.06, 0.06, 0.06, 0.06, 0.06]; XF=[1, 1, 1, 1, 1, 1, 1]
      SoilCrop FieldpeaSoil: LL=[0.087, 0.087, 0.173, 0.192, 0.183, 0.215, 0.173]; KL=[0.06, 0.06, 0.06, 0.06, 0.06, 0.06, 0.06]; XF=[1, 1, 1, 1, 1, 1, 1]
      SoilCrop MungbeanSoil: LL=[0.087, 0.087, 0.173, 0.249, 0.271667, 0.306239, 0.286274]; KL=[0.06, 0.06, 0.06, 0.04, 0.04, 0.02, 0.01]; XF=[1, 1, 1, 1, 1, 1, 1]
      SoilCrop WheatSoil: LL=[0.087, 0.087, 0.173, 0.192, 0.183, 0.215, 0.173]; KL=[0.06, 0.06, 0.06, 0.04, 0.04, 0.02, 0.01]; XF=[1, 1, 1, 1, 1, 1, 1]
    WaterBalance SoilWater: SummerDate=1-Nov; SummerU=6; SummerCona=3.5; WinterDate=1-Apr; WinterU=2; WinterCona=2; DiffusConst=88; DiffusSlope=35; Salb=0.13; CN2Bare=73; CNRed=20; CNCov=0.8; PSIDul=-100; Thickness=[150, 150, 300, 300, 300, 300, 300]; SWCON=[0.5, 0.5, 0.3, 0.3, 0.3, 0.3, 0.3]; InitialValues=[0, 0, 0, 0, 0, 0, 0, 0]
    Solute NO3: Thickness=[150, 150, 300, 300, 300, 300, 300]; InitialValues=[0, 0, 0, 0, 0, 0, 0, 0]; InitialValuesUnits=ppm; WaterTableConcentration=0; D0=0; DepthConstant=0; MaxDepthSoluteAccessible=0; RunoffEffectivenessAtMovingSolute=0; MaxEffectiveRunoff=0
    Solute NH4: same as 2022013_Warra.NO3
    Solute Urea: same as 2022001_Gatton.Urea
    Water: Thickness=[150, 150, 300, 300, 300, 300, 300]; FilledFromTop=true
      InitialValues=[0.213, 0.211543, 0.298306, 0.305657, 0.315925, 0.311239, 0.291274]
    Organic: same as 2022001_Gatton.Organic
    Chemical: same as 2022001_Gatton.Chemical
    Nutrient
    SoilTemperature Temperature: InteractionsPerDay=8
  Soil 2022014_Warnertown: SoilType=AJAR2007; Site=Boorowa; NearestTown=Boorowa; Region=South West Slopes; State=New South Wales; Country=Australia; ApsoilNumber=244; Latitude=-34.48581; Longitude=148.71664; LocationAccuracy=+/- 20m; Comments=Classification based on Particle size analysis.
    DataSource=Data collected as part of the GRDC project ‘Training growers to manage soil water’ by CSIRO Sustainable Ecosystems in collaboration with farmers and Lachlan CMA
    Physical
      Thickness  ParticleSizeSand  ParticleSizeSilt  ParticleSizeClay  BD    AirDry  LL15  DUL   SAT
      150        66.3821           11.146            22.4719           1.41  0.04    0.08  0.18  0.23
      150        65.8435252        11.6845           22.4719           1.24  0.04    0.08  0.18  0.23
      300        48.2995252        11.2765           40.4239           1.23  0.085   0.09  0.19  0.24
      300        44.2195252        9.64454           46.1359           1.27  0.085   0.09  0.19  0.24
      300        44.3646           12.3555           43.2799           1.27  0.085   0.09  0.18  0.23
      300        45.0482           12.8959           42.0559           1.27  0.115   0.12  0.2   0.25
      300        51.4431           10.1729           38.3839           1.28  0.135   0.14  0.3   0.35
      SoilCrop BarleySoil: LL=[0.087, 0.087, 0.173, 0.185, 0.175, 0.195, 0.173]; KL=[0.07, 0.07, 0.07, 0.05, 0.05, 0.03, 0.02]; XF=[1, 1, 1, 1, 1, 1, 1]
      SoilCrop CanolaSoil: LL=[0.087, 0.0866647, 0.173485, 0.185, 0.175, 0.195, 0.173]; KL=[0.06, 0.06, 0.06, 0.04, 0.04, 0.02, 0.01]; XF=[1, 1, 1, 1, 1, 1, 1]
      SoilCrop ChickpeaSoil: LL=[0.087, 0.087, 0.173, 0.185, 0.175, 0.195, 0.173]; KL=[0.06, 0.06, 0.06, 0.06, 0.06, 0.06, 0.06]; XF=[1, 1, 1, 1, 1, 1, 1]
      SoilCrop FababeanSoil: LL=[0.087, 0.087, 0.173, 0.185, 0.175, 0.195, 0.173]; KL=[0.06, 0.06, 0.06, 0.06, 0.06, 0.06, 0.06]; XF=[1, 1, 1, 1, 1, 1, 1]
      SoilCrop FieldpeaSoil: LL=[0.087, 0.087, 0.173, 0.185, 0.175, 0.195, 0.173]; KL=[0.06, 0.06, 0.06, 0.06, 0.06, 0.06, 0.06]; XF=[1, 1, 1, 1, 1, 1, 1]
      SoilCrop MungbeanSoil: LL=[0.087, 0.087, 0.173, 0.185, 0.175, 0.195, 0.291]; KL=[0.06, 0.06, 0.06, 0.04, 0.04, 0.02, 0.01]; XF=[1, 1, 1, 1, 1, 1, 1]
      SoilCrop WheatSoil: LL=[0.087, 0.087, 0.173, 0.185, 0.175, 0.195, 0.173]; KL=[0.06, 0.06, 0.06, 0.04, 0.04, 0.02, 0.01]; XF=[1, 1, 1, 1, 1, 1, 1]
    WaterBalance SoilWater: SummerDate=1-Nov; SummerU=6; SummerCona=3.5; WinterDate=1-Apr; WinterU=2; WinterCona=2; DiffusConst=88; DiffusSlope=35; Salb=0.13; CN2Bare=73; CNRed=20; CNCov=0.8; PSIDul=-100; Thickness=[150, 150, 300, 300, 300, 300, 300]; SWCON=[0.5, 0.5, 0.3, 0.3, 0.3, 0.3, 0.3]
      InitialValues=[0.11625, 0.163333, 0.187083, 0.1925, 0.162917, 0.162292, -, -]
    Solute NO3: Thickness=[150, 150, 300, 300, 300, 300, 300]; InitialValues=[16.9, 8.675, 23.025, 20.05, 13.3, 11.4]; InitialValuesUnits=ppm; WaterTableConcentration=0; D0=0; DepthConstant=0; MaxDepthSoluteAccessible=0; RunoffEffectivenessAtMovingSolute=0; MaxEffectiveRunoff=0
    Solute NH4: Thickness=[150, 150, 300, 300, 300, 300, 300]; InitialValues=[2.45, 2.5, 8.325, 4.75, 3.8, 3.8]; InitialValuesUnits=ppm; WaterTableConcentration=0; D0=0; DepthConstant=0; MaxDepthSoluteAccessible=0; RunoffEffectivenessAtMovingSolute=0; MaxEffectiveRunoff=0
    Solute Urea: same as 2022001_Gatton.Urea
    Water: Thickness=[150, 150, 300, 300, 300, 300, 300]; FilledFromTop=true
      InitialValues=[0.213, 0.211543, 0.298306, 0.305657, 0.315925, 0.311239, 0.291274]
    Organic: same as 2022001_Gatton.Organic
    Chemical: same as 2022001_Gatton.Chemical
    Nutrient
    SoilTemperature Temperature: InteractionsPerDay=8
  Soil 2022015_Methul: SoilType=AJAR2007; Site=Boorowa; NearestTown=Boorowa; Region=South West Slopes; State=New South Wales; Country=Australia; ApsoilNumber=244; Latitude=-34.48581; Longitude=148.71664; LocationAccuracy=+/- 20m; Comments=Classification based on Particle size analysis.
    DataSource=Data collected as part of the GRDC project ‘Training growers to manage soil water’ by CSIRO Sustainable Ecosystems in collaboration with farmers and Lachlan CMA
    Physical
      Thickness  ParticleSizeSand  ParticleSizeSilt  ParticleSizeClay  BD     AirDry  LL15  DUL   SAT
      150        66.3821           11.146            22.4719           1.598  0.05    0.1   0.25  0.3
      150        65.8435252        11.6845           22.4719           1.509  0.05    0.1   0.25  0.3
      300        48.2995252        11.2765           40.4239           1.477  0.125   0.13  0.26  0.31
      300        44.2195252        9.64454           46.1359           1.477  0.125   0.13  0.3   0.35
      300        44.3646           12.3555           43.2799           1.477  0.125   0.13  0.32  0.37
      300        45.0482           12.8959           42.0559           1.27   0.135   0.14  0.3   0.35
      300        51.4431           10.1729           38.3839           1.513  0.135   0.14  0.3   0.35
      SoilCrop BarleySoil: LL=[0.087, 0.087, 0.173, 0.192, 0.183, 0.215, 0.173]; KL=[0.07, 0.07, 0.07, 0.05, 0.05, 0.03, 0.02]; XF=[1, 1, 1, 1, 1, 1, 1]
      SoilCrop CanolaSoil
        LL=[0.087, 0.0866647, 0.173485, 0.191822, 0.182536, 0.214685, 0.173]
        KL=[0.06, 0.06, 0.06, 0.04, 0.04, 0.02, 0.01]
        XF=[1, 1, 1, 1, 1, 1, 1]
      SoilCrop ChickpeaSoil: LL=[0.087, 0.087, 0.173, 0.192, 0.183, 0.215, 0.173]; KL=[0.06, 0.06, 0.06, 0.06, 0.06, 0.06, 0.06]; XF=[1, 1, 1, 1, 1, 1, 1]
      SoilCrop FababeanSoil: LL=[0.087, 0.087, 0.173, 0.192, 0.183, 0.215, 0.173]; KL=[0.06, 0.06, 0.06, 0.06, 0.06, 0.06, 0.06]; XF=[1, 1, 1, 1, 1, 1, 1]
      SoilCrop FieldpeaSoil: LL=[0.087, 0.087, 0.173, 0.192, 0.183, 0.215, 0.173]; KL=[0.06, 0.06, 0.06, 0.06, 0.06, 0.06, 0.06]; XF=[1, 1, 1, 1, 1, 1, 1]
      SoilCrop MungbeanSoil: LL=[0.087, 0.087, 0.173, 0.249, 0.271667, 0.295, 0.291]; KL=[0.06, 0.06, 0.06, 0.04, 0.04, 0.02, 0.01]; XF=[1, 1, 1, 1, 1, 1, 1]
      SoilCrop WheatSoil: LL=[0.087, 0.087, 0.173, 0.192, 0.183, 0.215, 0.173]; KL=[0.06, 0.06, 0.06, 0.04, 0.04, 0.02, 0.01]; XF=[1, 1, 1, 1, 1, 1, 1]
    WaterBalance SoilWater: SummerDate=1-Nov; SummerU=6; SummerCona=3.5; WinterDate=1-Apr; WinterU=2; WinterCona=2; DiffusConst=88; DiffusSlope=35; Salb=0.13; CN2Bare=73; CNRed=20; CNCov=0.8; PSIDul=-100; Thickness=[150, 150, 300, 300, 300, 300, 300]; SWCON=[0.5, 0.5, 0.3, 0.3, 0.3, 0.3, 0.3]
      InitialValues=[0.226042, 0.216875, 0.231875, 0.254792, 0.308542, 0.297917, 0.344167, 0.31375, 0.29, 0.269375, 0.259167, 0.257826]
    Solute NO3: Thickness=[150, 150, 300, 300, 300, 300, 300]; InitialValues=[6.4, 3, 1.5, 1.5, 1.5]; InitialValuesUnits=ppm; WaterTableConcentration=0; D0=0; DepthConstant=0; MaxDepthSoluteAccessible=0; RunoffEffectivenessAtMovingSolute=0; MaxEffectiveRunoff=0
    Solute NH4: Thickness=[150, 150, 300, 300, 300, 300, 300]; InitialValues=[4.8, 4.5, 3, 4.4, 4.4]; InitialValuesUnits=ppm; WaterTableConcentration=0; D0=0; DepthConstant=0; MaxDepthSoluteAccessible=0; RunoffEffectivenessAtMovingSolute=0; MaxEffectiveRunoff=0
    Solute Urea: same as 2022001_Gatton.Urea
    Water: Thickness=[150, 150, 300, 300, 300, 300, 300]; FilledFromTop=true
      InitialValues=[0.213, 0.211543, 0.298306, 0.305657, 0.315925, 0.311239, 0.291274]
    Organic: same as 2022001_Gatton.Organic
    Chemical: same as 2022001_Gatton.Chemical
    Nutrient
    SoilTemperature Temperature: InteractionsPerDay=8
  Soil 2022016_Ouyen: SoilType=AJAR2007; Site=Boorowa; NearestTown=Boorowa; Region=South West Slopes; State=New South Wales; Country=Australia; ApsoilNumber=244; Latitude=-34.48581; Longitude=148.71664; LocationAccuracy=+/- 20m; Comments=Classification based on Particle size analysis.
    DataSource=Data collected as part of the GRDC project ‘Training growers to manage soil water’ by CSIRO Sustainable Ecosystems in collaboration with farmers and Lachlan CMA
    Physical: same as 2022011_Ouyen.Physical
    WaterBalance SoilWater: SummerDate=1-Nov; SummerU=6; SummerCona=3.5; WinterDate=1-Apr; WinterU=2; WinterCona=2; DiffusConst=88; DiffusSlope=35; Salb=0.13; CN2Bare=73; CNRed=20; CNCov=0.8; PSIDul=-100; Thickness=[150, 150, 300, 300, 300, 300, 300]; SWCON=[0.5, 0.5, 0.3, 0.3, 0.3, 0.3, 0.3]
      InitialValues=[0.137708, 0.218125, 0.226875, 0.231875, 0.240208, 0.217708, 0.202826, 0.205349]
    Solute NO3: Thickness=[150, 150, 300, 300, 300, 300, 300]; InitialValuesUnits=ppm; WaterTableConcentration=0; D0=0; DepthConstant=0; MaxDepthSoluteAccessible=0; RunoffEffectivenessAtMovingSolute=0; MaxEffectiveRunoff=0
      InitialValues=[14.375, 14.625, 48.325, 20.45, 15.65, 15.65, 20.875, 21.925]
    Solute NH4: Thickness=[150, 150, 300, 300, 300, 300, 300]; InitialValues=[1.4, 1.3, 3.4, 3.7, 4.2, 7.3, 7.3, 10.425]; InitialValuesUnits=ppm; WaterTableConcentration=0; D0=0; DepthConstant=0; MaxDepthSoluteAccessible=0; RunoffEffectivenessAtMovingSolute=0; MaxEffectiveRunoff=0
    Solute Urea: same as 2022001_Gatton.Urea
    Water: Thickness=[150, 150, 300, 300, 300, 300, 300]; FilledFromTop=true
      InitialValues=[0.213, 0.211543, 0.298306, 0.305657, 0.315925, 0.311239, 0.291274]
    Organic: same as 2022001_Gatton.Organic
    Chemical: same as 2022001_Gatton.Chemical
    Nutrient
    SoilTemperature Temperature: InteractionsPerDay=8
  Soil 2022017_RankinsSprings: SoilType=AJAR2007; Site=Boorowa; NearestTown=Boorowa; Region=South West Slopes; State=New South Wales; Country=Australia; ApsoilNumber=244; Latitude=-34.48581; Longitude=148.71664; LocationAccuracy=+/- 20m; Comments=Classification based on Particle size analysis.
    DataSource=Data collected as part of the GRDC project ‘Training growers to manage soil water’ by CSIRO Sustainable Ecosystems in collaboration with farmers and Lachlan CMA
    Physical: same as 2022012_RankinsSprings.Physical
    WaterBalance SoilWater: SummerDate=1-Nov; SummerU=6; SummerCona=3.5; WinterDate=1-Apr; WinterU=2; WinterCona=2; DiffusConst=88; DiffusSlope=35; Salb=0.13; CN2Bare=73; CNRed=20; CNCov=0.8; PSIDul=-100; Thickness=[150, 150, 300, 300, 300, 300, 300]; SWCON=[0.5, 0.5, 0.3, 0.3, 0.3, 0.3, 0.3]
      InitialValues=[0.132979, 0.15125, 0.157021, 0.181875, 0.21625, 0.220426, 0.219167, 0.224375, 0.235, 0.237292, 0.239583, 0.233864]
    Solute NO3: Thickness=[150, 150, 300, 300, 300, 300, 300]; InitialValues=[6.4, 4.8, 1.5, 3, 3]; InitialValuesUnits=ppm; WaterTableConcentration=0; D0=0; DepthConstant=0; MaxDepthSoluteAccessible=0; RunoffEffectivenessAtMovingSolute=0; MaxEffectiveRunoff=0
    Solute NH4: Thickness=[150, 150, 300, 300, 300, 300, 300]; InitialValues=[4.8, 3.2, 3, 3, 3]; InitialValuesUnits=ppm; WaterTableConcentration=0; D0=0; DepthConstant=0; MaxDepthSoluteAccessible=0; RunoffEffectivenessAtMovingSolute=0; MaxEffectiveRunoff=0
    Solute Urea: same as 2022001_Gatton.Urea
    Water: Thickness=[150, 150, 300, 300, 300, 300, 300]; FilledFromTop=true
      InitialValues=[0.213, 0.211543, 0.298306, 0.305657, 0.315925, 0.311239, 0.291274]
    Organic: same as 2022001_Gatton.Organic
    Chemical: same as 2022001_Gatton.Chemical
    Nutrient
    SoilTemperature Temperature: InteractionsPerDay=8
  Soil 2022018_Warnertown: SoilType=AJAR2007; Site=Boorowa; NearestTown=Boorowa; Region=South West Slopes; State=New South Wales; Country=Australia; ApsoilNumber=244; Latitude=-34.48581; Longitude=148.71664; LocationAccuracy=+/- 20m; Comments=Classification based on Particle size analysis.
    DataSource=Data collected as part of the GRDC project ‘Training growers to manage soil water’ by CSIRO Sustainable Ecosystems in collaboration with farmers and Lachlan CMA
    Physical
      Thickness  ParticleSizeSand  ParticleSizeSilt  ParticleSizeClay  BD    AirDry  LL15  DUL   SAT
      150        66.3821           11.146            22.4719           1.41  0.04    0.08  0.18  0.23
      150        65.8435252        11.6845           22.4719           1.24  0.04    0.08  0.18  0.23
      300        48.2995252        11.2765           40.4239           1.23  0.085   0.09  0.19  0.24
      300        44.2195252        9.64454           46.1359           1.27  0.085   0.09  0.19  0.24
      300        44.3646           12.3555           43.2799           1.27  0.085   0.09  0.18  0.23
      300        45.0482           12.8959           42.0559           1.27  0.115   0.12  0.2   0.25
      300        51.4431           10.1729           38.3839           1.28  0.115   0.12  0.3   0.35
      SoilCrop BarleySoil: LL=[0.087, 0.087, 0.173, 0.185, 0.175, 0.195, 0.173]; KL=[0.07, 0.07, 0.07, 0.05, 0.05, 0.03, 0.02]; XF=[1, 1, 1, 1, 1, 1, 1]
      SoilCrop CanolaSoil: LL=[0.087, 0.0866647, 0.173485, 0.185, 0.175, 0.195, 0.173]; KL=[0.06, 0.06, 0.06, 0.04, 0.04, 0.02, 0.01]; XF=[1, 1, 1, 1, 1, 1, 1]
      SoilCrop ChickpeaSoil: LL=[0.087, 0.087, 0.173, 0.185, 0.175, 0.195, 0.173]; KL=[0.06, 0.06, 0.06, 0.06, 0.06, 0.06, 0.06]; XF=[1, 1, 1, 1, 1, 1, 1]
      SoilCrop FababeanSoil: LL=[0.087, 0.087, 0.173, 0.185, 0.175, 0.195, 0.173]; KL=[0.06, 0.06, 0.06, 0.06, 0.06, 0.06, 0.06]; XF=[1, 1, 1, 1, 1, 1, 1]
      SoilCrop FieldpeaSoil: LL=[0.087, 0.087, 0.173, 0.185, 0.175, 0.195, 0.173]; KL=[0.06, 0.06, 0.06, 0.06, 0.06, 0.06, 0.06]; XF=[1, 1, 1, 1, 1, 1, 1]
      SoilCrop MungbeanSoil: LL=[0.087, 0.087, 0.173, 0.185, 0.175, 0.195, 0.291]; KL=[0.06, 0.06, 0.06, 0.04, 0.04, 0.02, 0.01]; XF=[1, 1, 1, 1, 1, 1, 1]
      SoilCrop WheatSoil: LL=[0.087, 0.087, 0.173, 0.185, 0.175, 0.195, 0.173]; KL=[0.06, 0.06, 0.06, 0.04, 0.04, 0.02, 0.01]; XF=[1, 1, 1, 1, 1, 1, 1]
    WaterBalance SoilWater: SummerDate=1-Nov; SummerU=6; SummerCona=3.5; WinterDate=1-Apr; WinterU=2; WinterCona=2; DiffusConst=88; DiffusSlope=35; Salb=0.13; CN2Bare=73; CNRed=20; CNCov=0.8; PSIDul=-100; Thickness=[150, 150, 300, 300, 300, 300, 300]; SWCON=[0.5, 0.5, 0.3, 0.3, 0.3, 0.3, 0.3]
      InitialValues=[0.109792, 0.155, 0.179792, 0.188958, 0.146667, 0.144583, -, -]
    Solute NO3: Thickness=[150, 150, 300, 300, 300, 300, 300]; InitialValues=[19.75, 9.325, 23.95, 25.75, 16.175, 13.3]; InitialValuesUnits=ppm; WaterTableConcentration=0; D0=0; DepthConstant=0; MaxDepthSoluteAccessible=0; RunoffEffectivenessAtMovingSolute=0; MaxEffectiveRunoff=0
    Solute NH4: Thickness=[150, 150, 300, 300, 300, 300, 300]; InitialValues=[2.1, 1.525, 8.325, 4.75, 3.8, 3.8]; InitialValuesUnits=ppm; WaterTableConcentration=0; D0=0; DepthConstant=0; MaxDepthSoluteAccessible=0; RunoffEffectivenessAtMovingSolute=0; MaxEffectiveRunoff=0
    Solute Urea: same as 2022001_Gatton.Urea
    Water: Thickness=[150, 150, 300, 300, 300, 300, 300]; FilledFromTop=true
      InitialValues=[0.213, 0.211543, 0.298306, 0.305657, 0.315925, 0.311239, 0.291274]
    Organic: same as 2022001_Gatton.Organic
    Chemical: same as 2022001_Gatton.Chemical
    Nutrient
    SoilTemperature Temperature: InteractionsPerDay=8
  Soil 2023020_WaggaWagga: SoilType=AJAR2007; Site=Boorowa; NearestTown=Boorowa; Region=South West Slopes; State=New South Wales; Country=Australia; ApsoilNumber=244; Latitude=-34.48581; Longitude=148.71664; LocationAccuracy=+/- 20m; Comments=Classification based on Particle size analysis.
    DataSource=Data collected as part of the GRDC project ‘Training growers to manage soil water’ by CSIRO Sustainable Ecosystems in collaboration with farmers and Lachlan CMA
    Physical
      Thickness  ParticleSizeSand  ParticleSizeSilt  ParticleSizeClay  BD    AirDry  LL15  DUL   SAT
      150        66.3821           11.146            22.4719           1.37  0.05    0.1   0.27  0.32
      150        65.8435252        11.6845           22.4719           1.47  0.05    0.1   0.28  0.33
      300        48.2995252        11.2765           40.4239           1.43  0.145   0.15  0.33  0.38
      300        44.2195252        9.64454           46.1359           1.49  0.175   0.18  0.4   0.432736
      300        44.3646           12.3555           43.2799           1.4   0.205   0.21  0.31  0.36
      300        45.0482           12.8959           42.0559           1.4   0.205   0.21  0.31  0.36
      300        51.4431           10.1729           38.3839           1.4   0.205   0.21  0.31  0.36
      SoilCrop BarleySoil: LL=[0.087, 0.087, 0.173, 0.192, 0.183, 0.215, 0.173]; KL=[0.07, 0.07, 0.07, 0.05, 0.05, 0.03, 0.02]; XF=[1, 1, 1, 1, 1, 1, 1]
      SoilCrop CanolaSoil
        LL=[0.087, 0.0866647, 0.173485, 0.191822, 0.182536, 0.214685, 0.173]
        KL=[0.06, 0.06, 0.06, 0.04, 0.04, 0.02, 0.01]
        XF=[1, 1, 1, 1, 1, 1, 1]
      SoilCrop ChickpeaSoil: LL=[0.087, 0.087, 0.173, 0.192, 0.183, 0.215, 0.173]; KL=[0.06, 0.06, 0.06, 0.06, 0.06, 0.06, 0.06]; XF=[1, 1, 1, 1, 1, 1, 1]
      SoilCrop FababeanSoil: LL=[0.087, 0.087, 0.173, 0.192, 0.183, 0.215, 0.173]; KL=[0.06, 0.06, 0.06, 0.06, 0.06, 0.06, 0.06]; XF=[1, 1, 1, 1, 1, 1, 1]
      SoilCrop FieldpeaSoil: LL=[0.087, 0.087, 0.173, 0.192, 0.183, 0.215, 0.173]; KL=[0.06, 0.06, 0.06, 0.06, 0.06, 0.06, 0.06]; XF=[1, 1, 1, 1, 1, 1, 1]
      SoilCrop MungbeanSoil: LL=[0.087, 0.087, 0.173, 0.249, 0.271667, 0.305, 0.291]; KL=[0.06, 0.06, 0.06, 0.04, 0.04, 0.02, 0.01]; XF=[1, 1, 1, 1, 1, 1, 1]
      SoilCrop WheatSoil: LL=[0.087, 0.087, 0.173, 0.192, 0.183, 0.215, 0.173]; KL=[0.06, 0.06, 0.06, 0.04, 0.04, 0.02, 0.01]; XF=[1, 1, 1, 1, 1, 1, 1]
    WaterBalance SoilWater: SummerDate=1-Nov; SummerU=6; SummerCona=3.5; WinterDate=1-Apr; WinterU=2; WinterCona=2; DiffusConst=88; DiffusSlope=35; Salb=0.13; CN2Bare=73; CNRed=20; CNCov=0.8; PSIDul=-100; Thickness=[150, 150, 300, 300, 300, 300, 300]; SWCON=[0.5, 0.5, 0.3, 0.3, 0.3, 0.3, 0.3]; InitialValues=[0.192791, 0.234884, 0.302093, 0.355581, 0.286667, -, -, -]
    Solute NO3: Thickness=[150, 150, 300, 300, 300, 300, 300]; InitialValues=[25.35, 12.15, 4.65, 0.75, 0.466667, -, -, -]; InitialValuesUnits=ppm; WaterTableConcentration=0; D0=0; DepthConstant=0; MaxDepthSoluteAccessible=0; RunoffEffectivenessAtMovingSolute=0; MaxEffectiveRunoff=0
    Solute NH4: Thickness=[150, 150, 300, 300, 300, 300, 300]; InitialValues=[10.65, 8.475, 4.65, 4.875, 3.26667, -, -, -]; InitialValuesUnits=ppm; WaterTableConcentration=0; D0=0; DepthConstant=0; MaxDepthSoluteAccessible=0; RunoffEffectivenessAtMovingSolute=0; MaxEffectiveRunoff=0
    Solute Urea: same as 2022001_Gatton.Urea
    Water: Thickness=[150, 150, 300, 300, 300, 300, 300]; FilledFromTop=true
      InitialValues=[0.213, 0.211543, 0.298306, 0.305657, 0.315925, 0.311239, 0.291274]
    Organic: same as 2022001_Gatton.Organic
    Chemical: same as 2022001_Gatton.Chemical
    Nutrient
    SoilTemperature Temperature: InteractionsPerDay=8
  Soil 2023021_WaggaWagga: SoilType=AJAR2007; Site=Boorowa; NearestTown=Boorowa; Region=South West Slopes; State=New South Wales; Country=Australia; ApsoilNumber=244; Latitude=-34.48581; Longitude=148.71664; LocationAccuracy=+/- 20m; Comments=Classification based on Particle size analysis.
    DataSource=Data collected as part of the GRDC project ‘Training growers to manage soil water’ by CSIRO Sustainable Ecosystems in collaboration with farmers and Lachlan CMA
    Physical
      Thickness  ParticleSizeSand  ParticleSizeSilt  ParticleSizeClay  BD    AirDry  LL15  DUL   SAT
      150        66.3821           11.146            22.4719           1.37  0.05    0.1   0.27  0.32
      150        65.8435252        11.6845           22.4719           1.47  0.05    0.1   0.28  0.33
      300        48.2995252        11.2765           40.4239           1.43  0.115   0.12  0.36  0.41
      300        44.2195252        9.64454           46.1359           1.49  0.155   0.16  0.43  0.435
      300        44.3646           12.3555           43.2799           1.4   0.185   0.19  0.31  0.36
      300        45.0482           12.8959           42.0559           1.4   0.195   0.2   0.31  0.36
      300        51.4431           10.1729           38.3839           1.4   0.225   0.23  0.31  0.36
      SoilCrop BarleySoil: LL=[0.087, 0.087, 0.173, 0.192, 0.183, 0.215, 0.173]; KL=[0.07, 0.07, 0.07, 0.05, 0.05, 0.03, 0.02]; XF=[1, 1, 1, 1, 1, 1, 1]
      SoilCrop CanolaSoil
        LL=[0.087, 0.0866647, 0.173485, 0.191822, 0.182536, 0.214685, 0.173]
        KL=[0.06, 0.06, 0.06, 0.04, 0.04, 0.02, 0.01]
        XF=[1, 1, 1, 1, 1, 1, 1]
      SoilCrop ChickpeaSoil: LL=[0.087, 0.087, 0.173, 0.192, 0.183, 0.215, 0.173]; KL=[0.06, 0.06, 0.06, 0.06, 0.06, 0.06, 0.06]; XF=[1, 1, 1, 1, 1, 1, 1]
      SoilCrop FababeanSoil: LL=[0.087, 0.087, 0.173, 0.192, 0.183, 0.215, 0.173]; KL=[0.06, 0.06, 0.06, 0.06, 0.06, 0.06, 0.06]; XF=[1, 1, 1, 1, 1, 1, 1]
      SoilCrop FieldpeaSoil: LL=[0.087, 0.087, 0.173, 0.192, 0.183, 0.215, 0.173]; KL=[0.06, 0.06, 0.06, 0.06, 0.06, 0.06, 0.06]; XF=[1, 1, 1, 1, 1, 1, 1]
      SoilCrop MungbeanSoil: LL=[0.087, 0.087, 0.173, 0.249, 0.271667, 0.305, 0.291]; KL=[0.06, 0.06, 0.06, 0.04, 0.04, 0.02, 0.01]; XF=[1, 1, 1, 1, 1, 1, 1]
      SoilCrop WheatSoil: LL=[0.087, 0.087, 0.173, 0.192, 0.183, 0.215, 0.173]; KL=[0.06, 0.06, 0.06, 0.04, 0.04, 0.02, 0.01]; XF=[1, 1, 1, 1, 1, 1, 1]
    WaterBalance SoilWater: SummerDate=1-Nov; SummerU=6; SummerCona=3.5; WinterDate=1-Apr; WinterU=2; WinterCona=2; DiffusConst=88; DiffusSlope=35; Salb=0.13; CN2Bare=73; CNRed=20; CNCov=0.8; PSIDul=-100; Thickness=[150, 150, 300, 300, 300, 300, 300]; SWCON=[0.5, 0.5, 0.3, 0.3, 0.3, 0.3, 0.3]
      InitialValues=[0.24171875, 0.257656, 0.30578125, 0.38875, 0.267931, -, -, -]
    Solute NO3: Thickness=[150, 150, 300, 300, 300, 300, 300]; InitialValues=[25.35, 12.85, 5.35, 0.375, 0.7, -, -, -]; InitialValuesUnits=ppm; WaterTableConcentration=0; D0=0; DepthConstant=0; MaxDepthSoluteAccessible=0; RunoffEffectivenessAtMovingSolute=0; MaxEffectiveRunoff=0
    Solute NH4: Thickness=[150, 150, 300, 300, 300, 300, 300]; InitialValues=[9.25, 7.725, 4.65, 4.5, 3.5, -, -, -]; InitialValuesUnits=ppm; WaterTableConcentration=0; D0=0; DepthConstant=0; MaxDepthSoluteAccessible=0; RunoffEffectivenessAtMovingSolute=0; MaxEffectiveRunoff=0
    Solute Urea: same as 2022001_Gatton.Urea
    Water: Thickness=[150, 150, 300, 300, 300, 300, 300]; FilledFromTop=true
      InitialValues=[0.213, 0.211543, 0.298306, 0.305657, 0.315925, 0.311239, 0.291274]
    Organic: same as 2022001_Gatton.Organic
    Chemical: same as 2022001_Gatton.Chemical
    Nutrient
    SoilTemperature Temperature: InteractionsPerDay=8
  Soil 2023022_Gatton: SoilType=AJAR2007; Site=Boorowa; NearestTown=Boorowa; Region=South West Slopes; State=New South Wales; Country=Australia; ApsoilNumber=244; Latitude=-34.48581; Longitude=148.71664; LocationAccuracy=+/- 20m; Comments=Classification based on Particle size analysis.
    DataSource=Data collected as part of the GRDC project ‘Training growers to manage soil water’ by CSIRO Sustainable Ecosystems in collaboration with farmers and Lachlan CMA
    Physical: same as 2022001_Gatton.Physical
    WaterBalance SoilWater: SummerDate=1-Nov; SummerU=6; SummerCona=3.5; WinterDate=1-Apr; WinterU=2; WinterCona=2; DiffusConst=88; DiffusSlope=35; Salb=0.13; CN2Bare=73; CNRed=20; CNCov=0.8; PSIDul=-100; Thickness=[150, 150, 300, 300, 300, 300, 300]; SWCON=[0.5, 0.5, 0.3, 0.3, 0.3, 0.3, 0.3]
      InitialValues=[0.34453125, 0.39421875, 0.427578, 0.414922, 0.2953125, 0.282422, 0.31609375, -]
    Solute NO3: Thickness=[150, 150, 300, 300, 300, 300, 300]; InitialValues=[11.425, 6.85, 5.8, 8.2, 8.175, 12.975, 17.7, -]; InitialValuesUnits=ppm; WaterTableConcentration=0; D0=0; DepthConstant=0; MaxDepthSoluteAccessible=0; RunoffEffectivenessAtMovingSolute=0; MaxEffectiveRunoff=0
    Solute NH4: Thickness=[150, 150, 300, 300, 300, 300, 300]; InitialValues=[21.925, 19.025, 36.775, 43.175, 36.725, 42.875, 44.85, -]; InitialValuesUnits=ppm; WaterTableConcentration=0; D0=0; DepthConstant=0; MaxDepthSoluteAccessible=0; RunoffEffectivenessAtMovingSolute=0; MaxEffectiveRunoff=0
    Solute Urea: same as 2022001_Gatton.Urea
    Water: Thickness=[150, 150, 300, 300, 300, 300, 300]; FilledFromTop=true
      InitialValues=[0.213, 0.211543, 0.298306, 0.305657, 0.315925, 0.311239, 0.291274]
    Organic: same as 2022001_Gatton.Organic
    Chemical: same as 2022001_Gatton.Chemical
    Nutrient
    SoilTemperature Temperature: InteractionsPerDay=8
  Soil 2023023_Pinery: SoilType=AJAR2007; Site=Boorowa; NearestTown=Boorowa; Region=South West Slopes; State=New South Wales; Country=Australia; ApsoilNumber=244; Latitude=-34.48581; Longitude=148.71664; LocationAccuracy=+/- 20m; Comments=Classification based on Particle size analysis.
    DataSource=Data collected as part of the GRDC project ‘Training growers to manage soil water’ by CSIRO Sustainable Ecosystems in collaboration with farmers and Lachlan CMA
    Physical
      Thickness  ParticleSizeSand  ParticleSizeSilt  ParticleSizeClay  BD       AirDry    LL15      DUL       SAT
      150        66.3821           11.146            22.4719           1.53     0.05      0.1       0.25      0.3
      150        65.8435252        11.6845           22.4719           1.58     0.05      0.1       0.25      0.3
      300        48.2995252        11.2765           40.4239           1.52     0.105     0.11      0.27      0.32
      300        44.2195252        9.64454           46.1359           1.55     0.115     0.12      0.26      0.31
      300        44.3646           12.3555           43.2799           1.55     0.24      0.245     0.25      0.3
      300        45.0482           12.8959           42.0559           1.55     0.105     0.11      0.27      0.32
      300        51.4431           10.1729           38.3839           1.65949  0.168485  0.173485  0.291274  0.341274
      SoilCrop BarleySoil: LL=[0.087, 0.087, 0.173, 0.192, 0.183, 0.215, 0.173]; KL=[0.07, 0.07, 0.07, 0.05, 0.05, 0.03, 0.02]; XF=[1, 1, 1, 1, 1, 1, 1]
      SoilCrop CanolaSoil
        LL=[0.087, 0.0866647, 0.173485, 0.191822, 0.182536, 0.214685, 0.173]
        KL=[0.06, 0.06, 0.06, 0.04, 0.04, 0.02, 0.01]
        XF=[1, 1, 1, 1, 1, 1, 1]
      SoilCrop ChickpeaSoil: LL=[0.087, 0.087, 0.173, 0.192, 0.183, 0.215, 0.173]; KL=[0.06, 0.06, 0.06, 0.06, 0.06, 0.06, 0.06]; XF=[1, 1, 1, 1, 1, 1, 1]
      SoilCrop FababeanSoil: LL=[0.087, 0.087, 0.173, 0.192, 0.183, 0.215, 0.173]; KL=[0.06, 0.06, 0.06, 0.06, 0.06, 0.06, 0.06]; XF=[1, 1, 1, 1, 1, 1, 1]
      SoilCrop FieldpeaSoil: LL=[0.087, 0.087, 0.173, 0.192, 0.183, 0.215, 0.173]; KL=[0.06, 0.06, 0.06, 0.06, 0.06, 0.06, 0.06]; XF=[1, 1, 1, 1, 1, 1, 1]
      SoilCrop MungbeanSoil: LL=[0.087, 0.087, 0.173, 0.249, 0.245, 0.265, 0.286274]; KL=[0.06, 0.06, 0.06, 0.04, 0.04, 0.02, 0.01]; XF=[1, 1, 1, 1, 1, 1, 1]
      SoilCrop WheatSoil: LL=[0.087, 0.087, 0.173, 0.192, 0.183, 0.215, 0.173]; KL=[0.06, 0.06, 0.06, 0.04, 0.04, 0.02, 0.01]; XF=[1, 1, 1, 1, 1, 1, 1]
    WaterBalance SoilWater: SummerDate=1-Nov; SummerU=6; SummerCona=3.5; WinterDate=1-Apr; WinterU=2; WinterCona=2; DiffusConst=88; DiffusSlope=35; Salb=0.13; CN2Bare=73; CNRed=20; CNCov=0.8; PSIDul=-100; Thickness=[150, 150, 300, 300, 300, 300, 300]; SWCON=[0.5, 0.5, 0.3, 0.3, 0.3, 0.3, 0.3]
      InitialValues=[0.1865625, 0.199688, 0.211406, 0.19546875, 0.17671875, -, -, -]
    Solute NO3: Thickness=[150, 150, 300, 300, 300, 300, 300]; InitialValues=[20.3, 11.425, 12.525, 11.65, 15.125, -, -, -]; InitialValuesUnits=ppm; WaterTableConcentration=0; D0=0; DepthConstant=0; MaxDepthSoluteAccessible=0; RunoffEffectivenessAtMovingSolute=0; MaxEffectiveRunoff=0
    Solute NH4: Thickness=[150, 150, 300, 300, 300, 300, 300]; InitialValues=[3.475, 7.525, 10.25, 8.15, 7, -, -, -]; InitialValuesUnits=ppm; WaterTableConcentration=0; D0=0; DepthConstant=0; MaxDepthSoluteAccessible=0; RunoffEffectivenessAtMovingSolute=0; MaxEffectiveRunoff=0
    Solute Urea: same as 2022001_Gatton.Urea
    Water: Thickness=[150, 150, 300, 300, 300, 300, 300]; FilledFromTop=true
      InitialValues=[0.213, 0.211543, 0.298306, 0.305657, 0.315925, 0.311239, 0.291274]
    Organic: same as 2022001_Gatton.Organic
    Chemical: same as 2022001_Gatton.Chemical
    Nutrient
    SoilTemperature Temperature: InteractionsPerDay=8
  Soil 2023024_Pinery: SoilType=AJAR2007; Site=Boorowa; NearestTown=Boorowa; Region=South West Slopes; State=New South Wales; Country=Australia; ApsoilNumber=244; Latitude=-34.48581; Longitude=148.71664; LocationAccuracy=+/- 20m; Comments=Classification based on Particle size analysis.
    DataSource=Data collected as part of the GRDC project ‘Training growers to manage soil water’ by CSIRO Sustainable Ecosystems in collaboration with farmers and Lachlan CMA
    Physical
      Thickness  ParticleSizeSand  ParticleSizeSilt  ParticleSizeClay  BD       AirDry    LL15      DUL       SAT
      150        66.3821           11.146            22.4719           1.53     0.05      0.1       0.25      0.3
      150        65.8435252        11.6845           22.4719           1.58     0.05      0.1       0.25      0.3
      300        48.2995252        11.2765           40.4239           1.52     0.105     0.11      0.27      0.32
      300        44.2195252        9.64454           46.1359           1.55     0.145     0.15      0.26      0.31
      300        44.3646           12.3555           43.2799           1.55     0.24      0.245     0.25      0.3
      300        45.0482           12.8959           42.0559           1.55     0.105     0.11      0.27      0.32
      300        51.4431           10.1729           38.3839           1.65949  0.168485  0.173485  0.291274  0.341274
      SoilCrop BarleySoil: LL=[0.087, 0.087, 0.173, 0.192, 0.183, 0.215, 0.173]; KL=[0.07, 0.07, 0.07, 0.05, 0.05, 0.03, 0.02]; XF=[1, 1, 1, 1, 1, 1, 1]
      SoilCrop CanolaSoil
        LL=[0.087, 0.0866647, 0.173485, 0.191822, 0.182536, 0.214685, 0.173]
        KL=[0.06, 0.06, 0.06, 0.04, 0.04, 0.02, 0.01]
        XF=[1, 1, 1, 1, 1, 1, 1]
      SoilCrop ChickpeaSoil: LL=[0.087, 0.087, 0.173, 0.192, 0.183, 0.215, 0.173]; KL=[0.06, 0.06, 0.06, 0.06, 0.06, 0.06, 0.06]; XF=[1, 1, 1, 1, 1, 1, 1]
      SoilCrop FababeanSoil: LL=[0.087, 0.087, 0.173, 0.192, 0.183, 0.215, 0.173]; KL=[0.06, 0.06, 0.06, 0.06, 0.06, 0.06, 0.06]; XF=[1, 1, 1, 1, 1, 1, 1]
      SoilCrop FieldpeaSoil: LL=[0.087, 0.087, 0.173, 0.192, 0.183, 0.215, 0.173]; KL=[0.06, 0.06, 0.06, 0.06, 0.06, 0.06, 0.06]; XF=[1, 1, 1, 1, 1, 1, 1]
      SoilCrop MungbeanSoil: LL=[0.087, 0.087, 0.173, 0.249, 0.245, 0.265, 0.286274]; KL=[0.06, 0.06, 0.06, 0.04, 0.04, 0.02, 0.01]; XF=[1, 1, 1, 1, 1, 1, 1]
      SoilCrop WheatSoil: LL=[0.087, 0.087, 0.173, 0.192, 0.183, 0.215, 0.173]; KL=[0.06, 0.06, 0.06, 0.04, 0.04, 0.02, 0.01]; XF=[1, 1, 1, 1, 1, 1, 1]
    WaterBalance SoilWater: SummerDate=1-Nov; SummerU=6; SummerCona=3.5; WinterDate=1-Apr; WinterU=2; WinterCona=2; DiffusConst=88; DiffusSlope=35; Salb=0.13; CN2Bare=73; CNRed=20; CNCov=0.8; PSIDul=-100; Thickness=[150, 150, 300, 300, 300, 300, 300]; SWCON=[0.5, 0.5, 0.3, 0.3, 0.3, 0.3, 0.3]
      InitialValues=[0.1915625, 0.21421875, 0.22515625, 0.2125, 0.20140625, -, -, -]
    Solute NO3: Thickness=[150, 150, 300, 300, 300, 300, 300]; InitialValues=[23.725, 7.875, 13.65, 20.975, 25.6, -, -, -]; InitialValuesUnits=ppm; WaterTableConcentration=0; D0=0; DepthConstant=0; MaxDepthSoluteAccessible=0; RunoffEffectivenessAtMovingSolute=0; MaxEffectiveRunoff=0
    Solute NH4: Thickness=[150, 150, 300, 300, 300, 300, 300]; InitialValues=[3.85, 2.4, 7.975, 8.15, 4.7, -, -, -]; InitialValuesUnits=ppm; WaterTableConcentration=0; D0=0; DepthConstant=0; MaxDepthSoluteAccessible=0; RunoffEffectivenessAtMovingSolute=0; MaxEffectiveRunoff=0
    Solute Urea: same as 2022001_Gatton.Urea
    Water: Thickness=[150, 150, 300, 300, 300, 300, 300]; FilledFromTop=true
      InitialValues=[0.213, 0.211543, 0.298306, 0.305657, 0.315925, 0.311239, 0.291274]
    Organic: same as 2022001_Gatton.Organic
    Chemical: same as 2022001_Gatton.Chemical
    Nutrient
    SoilTemperature Temperature: InteractionsPerDay=8
  Soil 2023025_Dooen: SoilType=AJAR2007; Site=Boorowa; NearestTown=Boorowa; Region=South West Slopes; State=New South Wales; Country=Australia; ApsoilNumber=244; Latitude=-34.48581; Longitude=148.71664; LocationAccuracy=+/- 20m; Comments=Classification based on Particle size analysis.
    DataSource=Data collected as part of the GRDC project ‘Training growers to manage soil water’ by CSIRO Sustainable Ecosystems in collaboration with farmers and Lachlan CMA
    Physical
      Thickness  ParticleSizeSand  ParticleSizeSilt  ParticleSizeClay  BD    AirDry  LL15   DUL   SAT
      150        66.3821           11.146            22.4719           1.1   0.1     0.2    0.45  0.5
      150        65.8435252        11.6845           22.4719           1.17  0.1     0.2    0.45  0.5
      300        48.2995252        11.2765           40.4239           1.19  0.235   0.24   0.47  0.52
      300        44.2195252        9.64454           46.1359           1.2   0.255   0.26   0.48  0.53
      300        44.3646           12.3555           43.2799           1.28  0.365   0.37   0.48  0.511981
      300        45.0482           12.8959           42.0559           1.29  0.47    0.475  0.48  0.508208
      300        51.4431           10.1729           38.3839           1.29  0.47    0.475  0.48  0.508208
      SoilCrop BarleySoil: LL=[0.087, 0.087, 0.173, 0.192, 0.183, 0.215, 0.173]; KL=[0.07, 0.07, 0.07, 0.05, 0.05, 0.03, 0.02]; XF=[1, 1, 1, 1, 1, 1, 1]
      SoilCrop CanolaSoil
        LL=[0.087, 0.0866647, 0.173485, 0.191822, 0.182536, 0.214685, 0.173]
        KL=[0.06, 0.06, 0.06, 0.04, 0.04, 0.02, 0.01]
        XF=[1, 1, 1, 1, 1, 1, 1]
      SoilCrop ChickpeaSoil: LL=[0.087, 0.087, 0.173, 0.192, 0.183, 0.215, 0.173]; KL=[0.06, 0.06, 0.06, 0.06, 0.06, 0.06, 0.06]; XF=[1, 1, 1, 1, 1, 1, 1]
      SoilCrop FababeanSoil: LL=[0.087, 0.087, 0.173, 0.192, 0.183, 0.215, 0.173]; KL=[0.06, 0.06, 0.06, 0.06, 0.06, 0.06, 0.06]; XF=[1, 1, 1, 1, 1, 1, 1]
      SoilCrop FieldpeaSoil: LL=[0.087, 0.087, 0.173, 0.192, 0.183, 0.215, 0.173]; KL=[0.06, 0.06, 0.06, 0.06, 0.06, 0.06, 0.06]; XF=[1, 1, 1, 1, 1, 1, 1]
      SoilCrop MungbeanSoil: LL=[0.087, 0.087, 0.173, 0.249, 0.271667, 0.311, 0.291]; KL=[0.06, 0.06, 0.06, 0.04, 0.04, 0.02, 0.01]; XF=[1, 1, 1, 1, 1, 1, 1]
      SoilCrop WheatSoil: LL=[0.087, 0.087, 0.173, 0.192, 0.183, 0.215, 0.173]; KL=[0.06, 0.06, 0.06, 0.04, 0.04, 0.02, 0.01]; XF=[1, 1, 1, 1, 1, 1, 1]
    WaterBalance SoilWater: SummerDate=1-Nov; SummerU=6; SummerCona=3.5; WinterDate=1-Apr; WinterU=2; WinterCona=2; DiffusConst=88; DiffusSlope=35; Salb=0.13; CN2Bare=73; CNRed=20; CNCov=0.8; PSIDul=-100; Thickness=[150, 150, 300, 300, 300, 300, 300]; SWCON=[0.5, 0.5, 0.3, 0.3, 0.3, 0.3, 0.3]
      InitialValues=[0.3903125, 0.37859375, 0.40078125, 0.42109375, 0.450159, 0.466429, 0.474082, 0.475952]
    Solute NO3: Thickness=[150, 150, 300, 300, 300, 300, 300]; InitialValues=[4.4, 2.025, 3.675, 2.8, 2.1, 2.15, 3.975, 2.15]; InitialValuesUnits=ppm; WaterTableConcentration=0; D0=0; DepthConstant=0; MaxDepthSoluteAccessible=0; RunoffEffectivenessAtMovingSolute=0; MaxEffectiveRunoff=0
    Solute NH4: Thickness=[150, 150, 300, 300, 300, 300, 300]; InitialValues=[1.1, 1.2, 3.6, 3.6, 3.8, 3.9, 3.9, 3.9]; InitialValuesUnits=ppm; WaterTableConcentration=0; D0=0; DepthConstant=0; MaxDepthSoluteAccessible=0; RunoffEffectivenessAtMovingSolute=0; MaxEffectiveRunoff=0
    Solute Urea: same as 2022001_Gatton.Urea
    Water: Thickness=[150, 150, 300, 300, 300, 300, 300]; FilledFromTop=true
      InitialValues=[0.213, 0.211543, 0.298306, 0.305657, 0.315925, 0.311239, 0.291274]
    Organic: same as 2022001_Gatton.Organic
    Chemical: same as 2022001_Gatton.Chemical
    Nutrient
    SoilTemperature Temperature: InteractionsPerDay=8
  Soil 2023026_Dooen: SoilType=AJAR2007; Site=Boorowa; NearestTown=Boorowa; Region=South West Slopes; State=New South Wales; Country=Australia; ApsoilNumber=244; Latitude=-34.48581; Longitude=148.71664; LocationAccuracy=+/- 20m; Comments=Classification based on Particle size analysis.
    DataSource=Data collected as part of the GRDC project ‘Training growers to manage soil water’ by CSIRO Sustainable Ecosystems in collaboration with farmers and Lachlan CMA
    Physical
      Thickness  ParticleSizeSand  ParticleSizeSilt  ParticleSizeClay  BD    AirDry  LL15   DUL   SAT
      150        66.3821           11.146            22.4719           1.1   0.1     0.2    0.45  0.5
      150        65.8435252        11.6845           22.4719           1.17  0.1     0.2    0.45  0.5
      300        48.2995252        11.2765           40.4239           1.19  0.235   0.24   0.47  0.52
      300        44.2195252        9.64454           46.1359           1.2   0.255   0.26   0.48  0.53
      300        44.3646           12.3555           43.2799           1.28  0.47    0.475  0.48  0.511981
      300        45.0482           12.8959           42.0559           1.29  0.47    0.475  0.48  0.508208
      300        51.4431           10.1729           38.3839           1.29  0.47    0.475  0.48  0.508208
      SoilCrop BarleySoil: LL=[0.087, 0.087, 0.173, 0.192, 0.183, 0.215, 0.173]; KL=[0.07, 0.07, 0.07, 0.05, 0.05, 0.03, 0.02]; XF=[1, 1, 1, 1, 1, 1, 1]
      SoilCrop CanolaSoil
        LL=[0.087, 0.0866647, 0.173485, 0.191822, 0.182536, 0.214685, 0.173]
        KL=[0.06, 0.06, 0.06, 0.04, 0.04, 0.02, 0.01]
        XF=[1, 1, 1, 1, 1, 1, 1]
      SoilCrop ChickpeaSoil: LL=[0.087, 0.087, 0.173, 0.192, 0.183, 0.215, 0.173]; KL=[0.06, 0.06, 0.06, 0.06, 0.06, 0.06, 0.06]; XF=[1, 1, 1, 1, 1, 1, 1]
      SoilCrop FababeanSoil: LL=[0.087, 0.087, 0.173, 0.192, 0.183, 0.215, 0.173]; KL=[0.06, 0.06, 0.06, 0.06, 0.06, 0.06, 0.06]; XF=[1, 1, 1, 1, 1, 1, 1]
      SoilCrop FieldpeaSoil: LL=[0.087, 0.087, 0.173, 0.192, 0.183, 0.215, 0.173]; KL=[0.06, 0.06, 0.06, 0.06, 0.06, 0.06, 0.06]; XF=[1, 1, 1, 1, 1, 1, 1]
      SoilCrop MungbeanSoil: LL=[0.087, 0.087, 0.173, 0.249, 0.271667, 0.311, 0.291]; KL=[0.06, 0.06, 0.06, 0.04, 0.04, 0.02, 0.01]; XF=[1, 1, 1, 1, 1, 1, 1]
      SoilCrop WheatSoil: LL=[0.087, 0.087, 0.173, 0.192, 0.183, 0.215, 0.173]; KL=[0.06, 0.06, 0.06, 0.04, 0.04, 0.02, 0.01]; XF=[1, 1, 1, 1, 1, 1, 1]
    WaterBalance SoilWater: SummerDate=1-Nov; SummerU=6; SummerCona=3.5; WinterDate=1-Apr; WinterU=2; WinterCona=2; DiffusConst=88; DiffusSlope=35; Salb=0.13; CN2Bare=73; CNRed=20; CNCov=0.8; PSIDul=-100; Thickness=[150, 150, 300, 300, 300, 300, 300]; SWCON=[0.5, 0.5, 0.3, 0.3, 0.3, 0.3, 0.3]
      InitialValues=[0.374127, 0.373492, 0.384921, 0.408254, 0.436508, 0.446984, 0.458148, 0.462955]
    Solute NO3: Thickness=[150, 150, 300, 300, 300, 300, 300]; InitialValues=[3.3, 2.025, 3.6, 1.2, 1.25, 1.275, 3.025, 3.975]; InitialValuesUnits=ppm; WaterTableConcentration=0; D0=0; DepthConstant=0; MaxDepthSoluteAccessible=0; RunoffEffectivenessAtMovingSolute=0; MaxEffectiveRunoff=0
    Solute NH4: Thickness=[150, 150, 300, 300, 300, 300, 300]; InitialValues=[1.65, 1.2, 3.6, 3.6, 3.8, 3.9, 3.9, 3.9]; InitialValuesUnits=ppm; WaterTableConcentration=0; D0=0; DepthConstant=0; MaxDepthSoluteAccessible=0; RunoffEffectivenessAtMovingSolute=0; MaxEffectiveRunoff=0
    Solute Urea: same as 2022001_Gatton.Urea
    Water: Thickness=[150, 150, 300, 300, 300, 300, 300]; FilledFromTop=true
      InitialValues=[0.213, 0.211543, 0.298306, 0.305657, 0.315925, 0.311239, 0.291274]
    Organic: same as 2022001_Gatton.Organic
    Chemical: same as 2022001_Gatton.Chemical
    Nutrient
    SoilTemperature Temperature: InteractionsPerDay=8
  Soil 2023027_Northam: SoilType=AJAR2007; Site=Boorowa; NearestTown=Boorowa; Region=South West Slopes; State=New South Wales; Country=Australia; ApsoilNumber=244; Latitude=-34.48581; Longitude=148.71664; LocationAccuracy=+/- 20m; Comments=Classification based on Particle size analysis.
    DataSource=Data collected as part of the GRDC project ‘Training growers to manage soil water’ by CSIRO Sustainable Ecosystems in collaboration with farmers and Lachlan CMA
    Physical
      Thickness  ParticleSizeSand  ParticleSizeSilt  ParticleSizeClay  BD          AirDry      LL15        DUL         SAT
      150        66.3821           11.146            22.4719           1.83963     0.01582638  0.03165276  0.22        0.27
      150        65.8435252        11.6845           22.4719           1.86696     0.02063575  0.0412715   0.22        0.27
      300        48.2995252        11.2765           40.4239           1.42301     0.08298648  0.08798648  0.20896717  0.25896717
      300        44.2195252        9.64454           46.1359           1.45051     0.161233    0.166233    0.281516    0.331516
      300        44.3646           12.3555           43.2799           1.42909     0.21290021  0.21790021  0.21996772  0.26996772
      300        45.0482           12.8959           42.0559           1.45051     0.271516    0.276516    0.281516    0.331516
      300        51.4431           10.1729           38.3839           1.40779344  0.292904    0.297904    0.302904    0.352904
      SoilCrop BarleySoil: LL=[0.087, 0.087, 0.173, 0.192, 0.183, 0.215, 0.173]; KL=[0.07, 0.07, 0.07, 0.05, 0.05, 0.03, 0.02]; XF=[1, 1, 1, 1, 1, 1, 1]
      SoilCrop CanolaSoil
        LL=[0.087, 0.0866647, 0.173485, 0.191822, 0.182536, 0.214685, 0.173]
        KL=[0.06, 0.06, 0.06, 0.04, 0.04, 0.02, 0.01]
        XF=[1, 1, 1, 1, 1, 1, 1]
      SoilCrop ChickpeaSoil: LL=[0.087, 0.087, 0.173, 0.192, 0.183, 0.215, 0.173]; KL=[0.06, 0.06, 0.06, 0.06, 0.06, 0.06, 0.06]; XF=[1, 1, 1, 1, 1, 1, 1]
      SoilCrop FababeanSoil: LL=[0.087, 0.087, 0.173, 0.192, 0.183, 0.215, 0.173]; KL=[0.06, 0.06, 0.06, 0.06, 0.06, 0.06, 0.06]; XF=[1, 1, 1, 1, 1, 1, 1]
      SoilCrop FieldpeaSoil: LL=[0.087, 0.087, 0.173, 0.192, 0.183, 0.215, 0.173]; KL=[0.06, 0.06, 0.06, 0.06, 0.06, 0.06, 0.06]; XF=[1, 1, 1, 1, 1, 1, 1]
      SoilCrop MungbeanSoil: LL=[0.087, 0.087, 0.173, 0.249, 0.21496772, 0.276516, 0.291]; KL=[0.06, 0.06, 0.06, 0.04, 0.04, 0.02, 0.01]; XF=[1, 1, 1, 1, 1, 1, 1]
      SoilCrop WheatSoil: LL=[0.087, 0.087, 0.173, 0.192, 0.183, 0.215, 0.173]; KL=[0.06, 0.06, 0.06, 0.04, 0.04, 0.02, 0.01]; XF=[1, 1, 1, 1, 1, 1, 1]
    WaterBalance SoilWater: SummerDate=1-Nov; SummerU=6; SummerCona=3.5; WinterDate=1-Apr; WinterU=2; WinterCona=2; DiffusConst=88; DiffusSlope=35; Salb=0.13; CN2Bare=73; CNRed=20; CNCov=0.8; PSIDul=-100; Thickness=[150, 150, 300, 300, 300, 300, 300]; SWCON=[0.5, 0.5, 0.3, 0.3, 0.3, 0.3, 0.3]; InitialValues=[0.14625, 0.169583, 0.171458, 0.188125, 0.15766, -, -, -]
    Solute NO3: Thickness=[150, 150, 300, 300, 300, 300, 300]; InitialValues=[12.2667, 17.4, 31.3, 20.3333, 81.4333, -, -, -]; InitialValuesUnits=ppm; WaterTableConcentration=0; D0=0; DepthConstant=0; MaxDepthSoluteAccessible=0; RunoffEffectivenessAtMovingSolute=0; MaxEffectiveRunoff=0
    Solute NH4: Thickness=[150, 150, 300, 300, 300, 300, 300]; InitialValues=[2.43333, 3.7, 8.5, 5.83333, 5.73333, -, -, -]; InitialValuesUnits=ppm; WaterTableConcentration=0; D0=0; DepthConstant=0; MaxDepthSoluteAccessible=0; RunoffEffectivenessAtMovingSolute=0; MaxEffectiveRunoff=0
    Solute Urea: same as 2022001_Gatton.Urea
    Water: Thickness=[150, 150, 300, 300, 300, 300, 300]; FilledFromTop=true
      InitialValues=[0.213, 0.211543, 0.298306, 0.305657, 0.315925, 0.311239, 0.291274]
    Organic: same as 2022001_Gatton.Organic
    Chemical: same as 2022001_Gatton.Chemical
    Nutrient
    SoilTemperature Temperature: InteractionsPerDay=8
  Soil 2023028_RankinsSprings: SoilType=AJAR2007; Site=Boorowa; NearestTown=Boorowa; Region=South West Slopes; State=New South Wales; Country=Australia; ApsoilNumber=244; Latitude=-34.48581; Longitude=148.71664; LocationAccuracy=+/- 20m; Comments=Classification based on Particle size analysis.
    DataSource=Data collected as part of the GRDC project ‘Training growers to manage soil water’ by CSIRO Sustainable Ecosystems in collaboration with farmers and Lachlan CMA
    Physical
      Thickness  ParticleSizeSand  ParticleSizeSilt  ParticleSizeClay  BD    AirDry  LL15  DUL   SAT
      150        66.3821           11.146            22.4719           1.6   0.05    0.1   0.2   0.25
      150        65.8435252        11.6845           22.4719           1.6   0.05    0.1   0.2   0.25
      300        48.2995252        11.2765           40.4239           1.52  0.105   0.11  0.25  0.3
      300        44.2195252        9.64454           46.1359           1.43  0.145   0.15  0.28  0.33
      300        44.3646           12.3555           43.2799           1.52  0.175   0.18  0.28  0.33
      300        45.0482           12.8959           42.0559           1.53  0.175   0.18  0.28  0.33
      300        51.4431           10.1729           38.3839           1.53  0.175   0.18  0.28  0.33
      SoilCrop BarleySoil: LL=[0.087, 0.087, 0.173, 0.192, 0.183, 0.215, 0.173]; KL=[0.07, 0.07, 0.07, 0.05, 0.05, 0.03, 0.02]; XF=[1, 1, 1, 1, 1, 1, 1]
      SoilCrop CanolaSoil
        LL=[0.087, 0.0866647, 0.173485, 0.191822, 0.182536, 0.214685, 0.173]
        KL=[0.06, 0.06, 0.06, 0.04, 0.04, 0.02, 0.01]
        XF=[1, 1, 1, 1, 1, 1, 1]
      SoilCrop ChickpeaSoil: LL=[0.087, 0.087, 0.173, 0.192, 0.183, 0.215, 0.173]; KL=[0.06, 0.06, 0.06, 0.06, 0.06, 0.06, 0.06]; XF=[1, 1, 1, 1, 1, 1, 1]
      SoilCrop FababeanSoil: LL=[0.087, 0.087, 0.173, 0.192, 0.183, 0.215, 0.173]; KL=[0.06, 0.06, 0.06, 0.06, 0.06, 0.06, 0.06]; XF=[1, 1, 1, 1, 1, 1, 1]
      SoilCrop FieldpeaSoil: LL=[0.087, 0.087, 0.173, 0.192, 0.183, 0.215, 0.173]; KL=[0.06, 0.06, 0.06, 0.06, 0.06, 0.06, 0.06]; XF=[1, 1, 1, 1, 1, 1, 1]
      SoilCrop MungbeanSoil: LL=[0.087, 0.087, 0.173, 0.249, 0.271667, 0.275, 0.275]; KL=[0.06, 0.06, 0.06, 0.04, 0.04, 0.02, 0.01]; XF=[1, 1, 1, 1, 1, 1, 1]
      SoilCrop WheatSoil: LL=[0.087, 0.087, 0.173, 0.192, 0.183, 0.215, 0.173]; KL=[0.06, 0.06, 0.06, 0.04, 0.04, 0.02, 0.01]; XF=[1, 1, 1, 1, 1, 1, 1]
    WaterBalance SoilWater: SummerDate=1-Nov; SummerU=6; SummerCona=3.5; WinterDate=1-Apr; WinterU=2; WinterCona=2; DiffusConst=88; DiffusSlope=35; Salb=0.13; CN2Bare=73; CNRed=20; CNCov=0.8; PSIDul=-100; Thickness=[150, 150, 300, 300, 300, 300, 300]; SWCON=[0.5, 0.5, 0.3, 0.3, 0.3, 0.3, 0.3]; InitialValues=[0.174792, 0.172708, 0.179167, 0.239583, 0.232857, -, -, -]
    Solute NO3: Thickness=[150, 150, 300, 300, 300, 300, 300]; InitialValues=[13.2, 6.8, 11.4, 3.225, -, -, -, -]; InitialValuesUnits=ppm; WaterTableConcentration=0; D0=0; DepthConstant=0; MaxDepthSoluteAccessible=0; RunoffEffectivenessAtMovingSolute=0; MaxEffectiveRunoff=0
    Solute NH4: Thickness=[150, 150, 300, 300, 300, 300, 300]; InitialValues=[7.6, 3.2, 4.6, 6.45, -, -, -, -]; InitialValuesUnits=ppm; WaterTableConcentration=0; D0=0; DepthConstant=0; MaxDepthSoluteAccessible=0; RunoffEffectivenessAtMovingSolute=0; MaxEffectiveRunoff=0
    Solute Urea: same as 2022001_Gatton.Urea
    Water: Thickness=[150, 150, 300, 300, 300, 300, 300]; FilledFromTop=true
      InitialValues=[0.213, 0.211543, 0.298306, 0.305657, 0.315925, 0.311239, 0.291274]
    Organic: same as 2022001_Gatton.Organic
    Chemical: same as 2022001_Gatton.Chemical
    Nutrient
    SoilTemperature Temperature: InteractionsPerDay=8
  Soil 2023029_RankinsSprings: SoilType=AJAR2007; Site=Boorowa; NearestTown=Boorowa; Region=South West Slopes; State=New South Wales; Country=Australia; ApsoilNumber=244; Latitude=-34.48581; Longitude=148.71664; LocationAccuracy=+/- 20m; Comments=Classification based on Particle size analysis.
    DataSource=Data collected as part of the GRDC project ‘Training growers to manage soil water’ by CSIRO Sustainable Ecosystems in collaboration with farmers and Lachlan CMA
    Physical: same as 2023028_RankinsSprings.Physical
    WaterBalance SoilWater: SummerDate=1-Nov; SummerU=6; SummerCona=3.5; WinterDate=1-Apr; WinterU=2; WinterCona=2; DiffusConst=88; DiffusSlope=35; Salb=0.13; CN2Bare=73; CNRed=20; CNCov=0.8; PSIDul=-100; Thickness=[150, 150, 300, 300, 300, 300, 300]; SWCON=[0.5, 0.5, 0.3, 0.3, 0.3, 0.3, 0.3]; InitialValues=[0.1475, 0.154792, 0.16, 0.236087, -, -, -, -]
    Solute NO3: Thickness=[150, 150, 300, 300, 300, 300, 300]; InitialValues=[4.8, 5.6, 10.275, 2.15, -, -, -, -]; InitialValuesUnits=ppm; WaterTableConcentration=0; D0=0; DepthConstant=0; MaxDepthSoluteAccessible=0; RunoffEffectivenessAtMovingSolute=0; MaxEffectiveRunoff=0
    Solute NH4: Thickness=[150, 150, 300, 300, 300, 300, 300]; InitialValues=[5.6, 3.2, 5.725, 4.3, -, -, -, -]; InitialValuesUnits=ppm; WaterTableConcentration=0; D0=0; DepthConstant=0; MaxDepthSoluteAccessible=0; RunoffEffectivenessAtMovingSolute=0; MaxEffectiveRunoff=0
    Solute Urea: same as 2022001_Gatton.Urea
    Water: Thickness=[150, 150, 300, 300, 300, 300, 300]; FilledFromTop=true
      InitialValues=[0.213, 0.211543, 0.298306, 0.305657, 0.315925, 0.311239, 0.291274]
    Organic: same as 2022001_Gatton.Organic
    Chemical: same as 2022001_Gatton.Chemical
    Nutrient
    SoilTemperature Temperature: InteractionsPerDay=8
  Soil 2023030_Emerald: SoilType=AJAR2007; Site=Boorowa; NearestTown=Boorowa; Region=South West Slopes; State=New South Wales; Country=Australia; ApsoilNumber=244; Latitude=-34.48581; Longitude=148.71664; LocationAccuracy=+/- 20m; Comments=Classification based on Particle size analysis.
    DataSource=Data collected as part of the GRDC project ‘Training growers to manage soil water’ by CSIRO Sustainable Ecosystems in collaboration with farmers and Lachlan CMA
    Physical
      Thickness  ParticleSizeSand  ParticleSizeSilt  ParticleSizeClay  BD     AirDry  LL15   DUL    SAT
      150        66.3821           11.146            22.4719           1.29   0.0595  0.119  0.348  0.398
      150        65.8435252        11.6845           22.4719           1.412  0.094   0.188  0.402  0.452
      300        48.2995252        11.2765           40.4239           1.414  0.218   0.223  0.385  0.435
      300        44.2195252        9.64454           46.1359           1.393  0.246   0.251  0.342  0.392
      300        44.3646           12.3555           43.2799           1.365  0.272   0.277  0.333  0.383
      300        45.0482           12.8959           42.0559           1.367  0.315   0.32   0.351  0.401
      300        51.4431           10.1729           38.3839           1.437  0.34    0.345  0.365  0.415
      SoilCrop BarleySoil: LL=[0.087, 0.087, 0.173, 0.192, 0.183, 0.215, 0.173]; KL=[0.07, 0.07, 0.07, 0.05, 0.05, 0.03, 0.02]; XF=[1, 1, 1, 1, 1, 1, 1]
      SoilCrop CanolaSoil
        LL=[0.087, 0.0866647, 0.173485, 0.191822, 0.182536, 0.214685, 0.173]
        KL=[0.06, 0.06, 0.06, 0.04, 0.04, 0.02, 0.01]
        XF=[1, 1, 1, 1, 1, 1, 1]
      SoilCrop ChickpeaSoil: LL=[0.087, 0.087, 0.173, 0.192, 0.183, 0.215, 0.173]; KL=[0.06, 0.06, 0.06, 0.06, 0.06, 0.06, 0.06]; XF=[1, 1, 1, 1, 1, 1, 1]
      SoilCrop FababeanSoil: LL=[0.087, 0.087, 0.173, 0.192, 0.183, 0.215, 0.173]; KL=[0.06, 0.06, 0.06, 0.06, 0.06, 0.06, 0.06]; XF=[1, 1, 1, 1, 1, 1, 1]
      SoilCrop FieldpeaSoil: LL=[0.087, 0.087, 0.173, 0.192, 0.183, 0.215, 0.173]; KL=[0.06, 0.06, 0.06, 0.06, 0.06, 0.06, 0.06]; XF=[1, 1, 1, 1, 1, 1, 1]
      SoilCrop MungbeanSoil: LL=[0.087, 0.087, 0.173, 0.249, 0.271667, 0.311, 0.291]; KL=[0.06, 0.06, 0.06, 0.04, 0.04, 0.02, 0.01]; XF=[1, 1, 1, 1, 1, 1, 1]
      SoilCrop WheatSoil: LL=[0.087, 0.087, 0.173, 0.192, 0.183, 0.215, 0.173]; KL=[0.06, 0.06, 0.06, 0.04, 0.04, 0.02, 0.01]; XF=[1, 1, 1, 1, 1, 1, 1]
    WaterBalance SoilWater: SummerDate=1-Nov; SummerU=6; SummerCona=3.5; WinterDate=1-Apr; WinterU=2; WinterCona=2; DiffusConst=88; DiffusSlope=35; Salb=0.13; CN2Bare=73; CNRed=20; CNCov=0.8; PSIDul=-100; Thickness=[150, 150, 300, 300, 300, 300, 300]; SWCON=[0.5, 0.5, 0.3, 0.3, 0.3, 0.3, 0.3]
    Solute NO3: Thickness=[150, 150, 300, 300, 300, 300, 300]; InitialValuesUnits=ppm; WaterTableConcentration=0; D0=0; DepthConstant=0; MaxDepthSoluteAccessible=0; RunoffEffectivenessAtMovingSolute=0; MaxEffectiveRunoff=0
    Solute NH4: same as 2023030_Emerald.NO3
    Solute Urea: same as 2022001_Gatton.Urea
    Water: Thickness=[150, 150, 300, 300, 300, 300, 300]; FilledFromTop=true
      InitialValues=[0.213, 0.211543, 0.298306, 0.305657, 0.315925, 0.311239, 0.291274]
    Organic: same as 2022001_Gatton.Organic
    Chemical: same as 2022001_Gatton.Chemical
    Nutrient
    SoilTemperature Temperature: InteractionsPerDay=8
  Soil 2023031_Warra: SoilType=AJAR2007; Site=Boorowa; NearestTown=Boorowa; Region=South West Slopes; State=New South Wales; Country=Australia; ApsoilNumber=244; Latitude=-34.48581; Longitude=148.71664; LocationAccuracy=+/- 20m; Comments=Classification based on Particle size analysis.
    DataSource=Data collected as part of the GRDC project ‘Training growers to manage soil water’ by CSIRO Sustainable Ecosystems in collaboration with farmers and Lachlan CMA
    Physical: same as 2022013_Warra.Physical
    WaterBalance SoilWater: same as 2023030_Emerald.SoilWater
    Solute NO3: same as 2023030_Emerald.NO3
    Solute NH4: same as 2023030_Emerald.NO3
    Solute Urea: same as 2022001_Gatton.Urea
    Water: Thickness=[150, 150, 300, 300, 300, 300, 300]; FilledFromTop=true
      InitialValues=[0.213, 0.211543, 0.298306, 0.305657, 0.315925, 0.311239, 0.291274]
    Organic: same as 2022001_Gatton.Organic
    Chemical: same as 2022001_Gatton.Chemical
    Nutrient
    SoilTemperature Temperature: InteractionsPerDay=8
  Soil 2023032_Warnertown: SoilType=AJAR2007; Site=Boorowa; NearestTown=Boorowa; Region=South West Slopes; State=New South Wales; Country=Australia; ApsoilNumber=244; Latitude=-34.48581; Longitude=148.71664; LocationAccuracy=+/- 20m; Comments=Classification based on Particle size analysis.
    DataSource=Data collected as part of the GRDC project ‘Training growers to manage soil water’ by CSIRO Sustainable Ecosystems in collaboration with farmers and Lachlan CMA
    Physical: same as 2022018_Warnertown.Physical
    WaterBalance SoilWater: SummerDate=1-Nov; SummerU=6; SummerCona=3.5; WinterDate=1-Apr; WinterU=2; WinterCona=2; DiffusConst=88; DiffusSlope=35; Salb=0.13; CN2Bare=73; CNRed=20; CNCov=0.8; PSIDul=-100; Thickness=[150, 150, 300, 300, 300, 300, 300]; SWCON=[0.5, 0.5, 0.3, 0.3, 0.3, 0.3, 0.3]
      InitialValues=[0.134583, 0.149375, 0.162128, 0.152917, 0.138723, 0.151277, -, -]
    Solute NO3: Thickness=[150, 150, 300, 300, 300, 300, 300]; InitialValues=[25.725, 18.6, 18.5, 12.35, 10.45, 9.5, -, -]; InitialValuesUnits=ppm; WaterTableConcentration=0; D0=0; DepthConstant=0; MaxDepthSoluteAccessible=0; RunoffEffectivenessAtMovingSolute=0; MaxEffectiveRunoff=0
    Solute NH4: Thickness=[150, 150, 300, 300, 300, 300, 300]; InitialValues=[3.85, 2.175, 8.325, 5.7, 5.7, 4.75, -, -]; InitialValuesUnits=ppm; WaterTableConcentration=0; D0=0; DepthConstant=0; MaxDepthSoluteAccessible=0; RunoffEffectivenessAtMovingSolute=0; MaxEffectiveRunoff=0
    Solute Urea: same as 2022001_Gatton.Urea
    Water: Thickness=[150, 150, 300, 300, 300, 300, 300]; FilledFromTop=true
      InitialValues=[0.213, 0.211543, 0.298306, 0.305657, 0.315925, 0.311239, 0.291274]
    Organic: same as 2022001_Gatton.Organic
    Chemical: same as 2022001_Gatton.Chemical
    Nutrient
    SoilTemperature Temperature: InteractionsPerDay=8
  Soil 2023033_Warnertown: SoilType=AJAR2007; Site=Boorowa; NearestTown=Boorowa; Region=South West Slopes; State=New South Wales; Country=Australia; ApsoilNumber=244; Latitude=-34.48581; Longitude=148.71664; LocationAccuracy=+/- 20m; Comments=Classification based on Particle size analysis.
    DataSource=Data collected as part of the GRDC project ‘Training growers to manage soil water’ by CSIRO Sustainable Ecosystems in collaboration with farmers and Lachlan CMA
    Physical: same as 2022018_Warnertown.Physical
    WaterBalance SoilWater: SummerDate=1-Nov; SummerU=6; SummerCona=3.5; WinterDate=1-Apr; WinterU=2; WinterCona=2; DiffusConst=88; DiffusSlope=35; Salb=0.13; CN2Bare=73; CNRed=20; CNCov=0.8; PSIDul=-100; Thickness=[150, 150, 300, 300, 300, 300, 300]; SWCON=[0.5, 0.5, 0.3, 0.3, 0.3, 0.3, 0.3]
      InitialValues=[0.147447, 0.16, 0.169375, 0.168125, 0.156875, 0.172917, -, -]
    Solute NO3: Thickness=[150, 150, 300, 300, 300, 300, 300]; InitialValues=[33.475, 23.225, 22.15, 15.25, 13.325, 14.275, -, -]; InitialValuesUnits=ppm; WaterTableConcentration=0; D0=0; DepthConstant=0; MaxDepthSoluteAccessible=0; RunoffEffectivenessAtMovingSolute=0; MaxEffectiveRunoff=0
    Solute NH4: Thickness=[150, 150, 300, 300, 300, 300, 300]; InitialValues=[3.85, 3.1, 7.4, 5.7, 4.75, 4.75, -, -]; InitialValuesUnits=ppm; WaterTableConcentration=0; D0=0; DepthConstant=0; MaxDepthSoluteAccessible=0; RunoffEffectivenessAtMovingSolute=0; MaxEffectiveRunoff=0
    Solute Urea: same as 2022001_Gatton.Urea
    Water: Thickness=[150, 150, 300, 300, 300, 300, 300]; FilledFromTop=true
      InitialValues=[0.213, 0.211543, 0.298306, 0.305657, 0.315925, 0.311239, 0.291274]
    Organic: same as 2022001_Gatton.Organic
    Chemical: same as 2022001_Gatton.Chemical
    Nutrient
    SoilTemperature Temperature: InteractionsPerDay=8
  Soil 2023034_Ouyen: SoilType=AJAR2007; Site=Boorowa; NearestTown=Boorowa; Region=South West Slopes; State=New South Wales; Country=Australia; ApsoilNumber=244; Latitude=-34.48581; Longitude=148.71664; LocationAccuracy=+/- 20m; Comments=Classification based on Particle size analysis.
    DataSource=Data collected as part of the GRDC project ‘Training growers to manage soil water’ by CSIRO Sustainable Ecosystems in collaboration with farmers and Lachlan CMA
    Physical: same as 2022011_Ouyen.Physical
    WaterBalance SoilWater: SummerDate=1-Nov; SummerU=6; SummerCona=3.5; WinterDate=1-Apr; WinterU=2; WinterCona=2; DiffusConst=88; DiffusSlope=35; Salb=0.13; CN2Bare=73; CNRed=20; CNCov=0.8; PSIDul=-100; Thickness=[150, 150, 300, 300, 300, 300, 300]; SWCON=[0.5, 0.5, 0.3, 0.3, 0.3, 0.3, 0.3]
      InitialValues=[0.1221875, 0.1990625, 0.1765625, 0.2153125, 0.2825, 0.3259375, 0.3553125, 0.28875]
    Solute NO3: Thickness=[150, 150, 300, 300, 300, 300, 300]; InitialValues=[3.775, 2.6, 0.3, 1.225, 9.375, 19.825, 32.325, 32.35]; InitialValuesUnits=ppm; WaterTableConcentration=0; D0=0; DepthConstant=0; MaxDepthSoluteAccessible=0; RunoffEffectivenessAtMovingSolute=0; MaxEffectiveRunoff=0
    Solute NH4: Thickness=[150, 150, 300, 300, 300, 300, 300]; InitialValues=[1.4, 0.7, 1.075, 1.225, 1.35, 2.3, 7.275, 6.325]; InitialValuesUnits=ppm; WaterTableConcentration=0; D0=0; DepthConstant=0; MaxDepthSoluteAccessible=0; RunoffEffectivenessAtMovingSolute=0; MaxEffectiveRunoff=0
    Solute Urea: same as 2022001_Gatton.Urea
    Water: Thickness=[150, 150, 300, 300, 300, 300, 300]; FilledFromTop=true
      InitialValues=[0.213, 0.211543, 0.298306, 0.305657, 0.315925, 0.311239, 0.291274]
    Organic: same as 2022001_Gatton.Organic
    Chemical: same as 2022001_Gatton.Chemical
    Nutrient
    SoilTemperature Temperature: InteractionsPerDay=8
  Soil 2023035_Ouyen: SoilType=AJAR2007; Site=Boorowa; NearestTown=Boorowa; Region=South West Slopes; State=New South Wales; Country=Australia; ApsoilNumber=244; Latitude=-34.48581; Longitude=148.71664; LocationAccuracy=+/- 20m; Comments=Classification based on Particle size analysis.
    DataSource=Data collected as part of the GRDC project ‘Training growers to manage soil water’ by CSIRO Sustainable Ecosystems in collaboration with farmers and Lachlan CMA
    Physical: same as 2022011_Ouyen.Physical
    WaterBalance SoilWater: SummerDate=1-Nov; SummerU=6; SummerCona=3.5; WinterDate=1-Apr; WinterU=2; WinterCona=2; DiffusConst=88; DiffusSlope=35; Salb=0.13; CN2Bare=73; CNRed=20; CNCov=0.8; PSIDul=-100; Thickness=[150, 150, 300, 300, 300, 300, 300]; SWCON=[0.5, 0.5, 0.3, 0.3, 0.3, 0.3, 0.3]
      InitialValues=[0.1165625, 0.1746875, 0.1984375, 0.1946875, 0.2278125, 0.246563, 0.287419, 0.323226]
    Solute NO3: Thickness=[150, 150, 300, 300, 300, 300, 300]; InitialValues=[2.375, 1.95, 1.85, 0.4, 9.35, 15.65, 22.95, 32.325]; InitialValuesUnits=ppm; WaterTableConcentration=0; D0=0; DepthConstant=0; MaxDepthSoluteAccessible=0; RunoffEffectivenessAtMovingSolute=0; MaxEffectiveRunoff=0
    Solute NH4: Thickness=[150, 150, 300, 300, 300, 300, 300]; InitialValues=[0.1, 0.1, 0.3, 0.4, 0.4, 0.4, 2.3, 5.3]; InitialValuesUnits=ppm; WaterTableConcentration=0; D0=0; DepthConstant=0; MaxDepthSoluteAccessible=0; RunoffEffectivenessAtMovingSolute=0; MaxEffectiveRunoff=0
    Solute Urea: same as 2022001_Gatton.Urea
    Water: Thickness=[150, 150, 300, 300, 300, 300, 300]; FilledFromTop=true
      InitialValues=[0.213, 0.211543, 0.298306, 0.305657, 0.315925, 0.311239, 0.291274]
    Organic: same as 2022001_Gatton.Organic
    Chemical: same as 2022001_Gatton.Chemical
    Nutrient
    SoilTemperature Temperature: InteractionsPerDay=8
  Soil 2023036_Gatton: SoilType=AJAR2007; Site=Boorowa; NearestTown=Boorowa; Region=South West Slopes; State=New South Wales; Country=Australia; ApsoilNumber=244; Latitude=-34.48581; Longitude=148.71664; LocationAccuracy=+/- 20m; Comments=Classification based on Particle size analysis.
    DataSource=Data collected as part of the GRDC project ‘Training growers to manage soil water’ by CSIRO Sustainable Ecosystems in collaboration with farmers and Lachlan CMA
    Physical
      Thickness  ParticleSizeSand  ParticleSizeSilt  ParticleSizeClay  BD    AirDry  LL15  DUL   SAT
      150        66.3821           11.146            22.4719           1.16  0.1     0.2   0.47  0.52
      150        65.8435252        11.6845           22.4719           1.17  0.105   0.21  0.47  0.52
      300        48.2995252        11.2765           40.4239           1.19  0.225   0.23  0.47  0.52
      300        44.2195252        9.64454           46.1359           1.29  0.245   0.25  0.47  0.508208
      300        44.3646           12.3555           43.2799           1.37  0.215   0.22  0.46  0.478019
      300        45.0482           12.8959           42.0559           1.36  0.255   0.26  0.41  0.46
      300        51.4431           10.1729           38.3839           1.33  0.305   0.31  0.4   0.45
      SoilCrop BarleySoil: LL=[0.087, 0.087, 0.173, 0.192, 0.183, 0.215, 0.173]; KL=[0.07, 0.07, 0.07, 0.05, 0.05, 0.03, 0.02]; XF=[1, 1, 1, 1, 1, 1, 1]
      SoilCrop CanolaSoil
        LL=[0.087, 0.0866647, 0.173485, 0.191822, 0.182536, 0.214685, 0.173]
        KL=[0.06, 0.06, 0.06, 0.04, 0.04, 0.02, 0.01]
        XF=[1, 1, 1, 1, 1, 1, 1]
      SoilCrop ChickpeaSoil: LL=[0.087, 0.087, 0.173, 0.192, 0.183, 0.215, 0.173]; KL=[0.06, 0.06, 0.06, 0.06, 0.06, 0.06, 0.06]; XF=[1, 1, 1, 1, 1, 1, 1]
      SoilCrop FababeanSoil: LL=[0.087, 0.087, 0.173, 0.192, 0.183, 0.215, 0.173]; KL=[0.06, 0.06, 0.06, 0.06, 0.06, 0.06, 0.06]; XF=[1, 1, 1, 1, 1, 1, 1]
      SoilCrop FieldpeaSoil: LL=[0.087, 0.087, 0.173, 0.192, 0.183, 0.215, 0.173]; KL=[0.06, 0.06, 0.06, 0.06, 0.06, 0.06, 0.06]; XF=[1, 1, 1, 1, 1, 1, 1]
      SoilCrop MungbeanSoil: LL=[0.087, 0.087, 0.173, 0.249, 0.271667, 0.311, 0.291]; KL=[0.06, 0.06, 0.06, 0.04, 0.04, 0.02, 0.01]; XF=[1, 1, 1, 1, 1, 1, 1]
      SoilCrop WheatSoil: LL=[0.087, 0.087, 0.173, 0.192, 0.183, 0.215, 0.173]; KL=[0.06, 0.06, 0.06, 0.04, 0.04, 0.02, 0.01]; XF=[1, 1, 1, 1, 1, 1, 1]
    WaterBalance SoilWater: same as 2023030_Emerald.SoilWater
    Solute NO3: same as 2022010_Greenethorpe.NO3
    Solute NH4: same as 2022010_Greenethorpe.NH4
    Solute Urea: same as 2022001_Gatton.Urea
    Water: Thickness=[150, 150, 300, 300, 300, 300, 300]; FilledFromTop=true
      InitialValues=[0.213, 0.211543, 0.298306, 0.305657, 0.315925, 0.311239, 0.291274]
    Organic: same as 2022001_Gatton.Organic
    Chemical: same as 2022001_Gatton.Chemical
    Nutrient
    SoilTemperature Temperature: InteractionsPerDay=8
  Soil 2024037_Gatton: SoilType=AJAR2007; Site=Boorowa; NearestTown=Boorowa; Region=South West Slopes; State=New South Wales; Country=Australia; ApsoilNumber=244; Latitude=-34.48581; Longitude=148.71664; LocationAccuracy=+/- 20m; Comments=Classification based on Particle size analysis.
    DataSource=Data collected as part of the GRDC project ‘Training growers to manage soil water’ by CSIRO Sustainable Ecosystems in collaboration with farmers and Lachlan CMA
    Physical: same as 2022001_Gatton.Physical
    WaterBalance SoilWater: SummerDate=1-Nov; SummerU=6; SummerCona=3.5; WinterDate=1-Apr; WinterU=2; WinterCona=2; DiffusConst=88; DiffusSlope=35; Salb=0.13; CN2Bare=73; CNRed=20; CNCov=0.8; PSIDul=-100; Thickness=[150, 150, 300, 300, 300, 300, 300]; SWCON=[0.5, 0.5, 0.3, 0.3, 0.3, 0.3, 0.3]
      InitialValues=[0.273281, 0.325, 0.388984, 0.4015625, 0.36921875, 0.3728125, 0.38390625, 0.377174]
    Solute NO3: Thickness=[150, 150, 300, 300, 300, 300, 300]; InitialValues=[10.5, 11.9, 38.7, 20.6, 8.2, 8, 8.3, -]; InitialValuesUnits=ppm; WaterTableConcentration=0; D0=0; DepthConstant=0; MaxDepthSoluteAccessible=0; RunoffEffectivenessAtMovingSolute=0; MaxEffectiveRunoff=0
    Solute NH4: Thickness=[150, 150, 300, 300, 300, 300, 300]; InitialValues=[5.9, 6, 23.2, 24.7, 20.4, 16, 12.5, -]; InitialValuesUnits=ppm; WaterTableConcentration=0; D0=0; DepthConstant=0; MaxDepthSoluteAccessible=0; RunoffEffectivenessAtMovingSolute=0; MaxEffectiveRunoff=0
    Solute Urea: same as 2022001_Gatton.Urea
    Water: Thickness=[150, 150, 300, 300, 300, 300, 300]; FilledFromTop=true
      InitialValues=[0.213, 0.211543, 0.298306, 0.305657, 0.315925, 0.311239, 0.291274]
    Organic: same as 2022001_Gatton.Organic
    Chemical: same as 2022001_Gatton.Chemical
    Nutrient
    SoilTemperature Temperature: InteractionsPerDay=8
  Soil 2024039_Kalkee: SoilType=AJAR2007; Site=Boorowa; NearestTown=Boorowa; Region=South West Slopes; State=New South Wales; Country=Australia; ApsoilNumber=244; Latitude=-34.48581; Longitude=148.71664; LocationAccuracy=+/- 20m; Comments=Classification based on Particle size analysis.
    DataSource=Data collected as part of the GRDC project ‘Training growers to manage soil water’ by CSIRO Sustainable Ecosystems in collaboration with farmers and Lachlan CMA
    Physical: same as 2022002_Kalkee.Physical
    WaterBalance SoilWater: SummerDate=1-Nov; SummerU=6; SummerCona=3.5; WinterDate=1-Apr; WinterU=2; WinterCona=2; DiffusConst=88; DiffusSlope=35; Salb=0.13; CN2Bare=73; CNRed=20; CNCov=0.8; PSIDul=-100; Thickness=[150, 150, 300, 300, 300, 300, 300]; SWCON=[0.5, 0.5, 0.3, 0.3, 0.3, 0.3, 0.3]
      InitialValues=[0.291935, 0.30871, 0.307742, 0.313387, 0.376452, 0.410806, 0.427377, 0.425417]
    Solute NO3: Thickness=[150, 150, 300, 300, 300, 300, 300]; InitialValues=[15.675, 5.575, 8, 7.2, 9.6, 8.675, 7.7, 6.75]; InitialValuesUnits=ppm; WaterTableConcentration=0; D0=0; DepthConstant=0; MaxDepthSoluteAccessible=0; RunoffEffectivenessAtMovingSolute=0; MaxEffectiveRunoff=0
    Solute NH4: Thickness=[150, 150, 300, 300, 300, 300, 300]; InitialValues=[2.2, 1.2, 3.6, 2.8, 3.075, 3.025, 3.9, 3.975]; InitialValuesUnits=ppm; WaterTableConcentration=0; D0=0; DepthConstant=0; MaxDepthSoluteAccessible=0; RunoffEffectivenessAtMovingSolute=0; MaxEffectiveRunoff=0
    Solute Urea: same as 2022001_Gatton.Urea
    Water: Thickness=[150, 150, 300, 300, 300, 300, 300]; FilledFromTop=true
      InitialValues=[0.213, 0.211543, 0.298306, 0.305657, 0.315925, 0.311239, 0.291274]
    Organic: same as 2022001_Gatton.Organic
    Chemical: same as 2022001_Gatton.Chemical
    Nutrient
    SoilTemperature Temperature: InteractionsPerDay=8
  Soil 2024040_Bolgart: SoilType=AJAR2007; Site=Boorowa; NearestTown=Boorowa; Region=South West Slopes; State=New South Wales; Country=Australia; ApsoilNumber=244; Latitude=-34.48581; Longitude=148.71664; LocationAccuracy=+/- 20m; Comments=Classification based on Particle size analysis.
    DataSource=Data collected as part of the GRDC project ‘Training growers to manage soil water’ by CSIRO Sustainable Ecosystems in collaboration with farmers and Lachlan CMA
    Physical
      Thickness  ParticleSizeSand  ParticleSizeSilt  ParticleSizeClay  BD    AirDry  LL15   DUL   SAT
      150        66.3821           11.146            22.4719           1.46  0.03    0.06   0.18  0.23
      150        65.8435252        11.6845           22.4719           1.64  0.03    0.06   0.21  0.26
      300        48.2995252        11.2765           40.4239           1.6   0.065   0.07   0.18  0.23
      300        44.2195252        9.64454           46.1359           1.5   0.155   0.16   0.21  0.26
      300        44.3646           12.3555           43.2799           1.5   0.195   0.2    0.23  0.28
      300        45.0482           12.8959           42.0559           1.5   0.21    0.215  0.22  0.27
      300        51.4431           10.1729           38.3839           1.5   0.22    0.225  0.23  0.28
      SoilCrop BarleySoil: LL=[0.087, 0.087, 0.173, 0.192, 0.183, 0.215, 0.173]; KL=[0.07, 0.07, 0.07, 0.05, 0.05, 0.03, 0.02]; XF=[1, 1, 1, 1, 1, 1, 1]
      SoilCrop CanolaSoil
        LL=[0.087, 0.0866647, 0.173485, 0.191822, 0.182536, 0.214685, 0.173]
        KL=[0.06, 0.06, 0.06, 0.04, 0.04, 0.02, 0.01]
        XF=[1, 1, 1, 1, 1, 1, 1]
      SoilCrop ChickpeaSoil: LL=[0.087, 0.087, 0.173, 0.192, 0.183, 0.215, 0.173]; KL=[0.06, 0.06, 0.06, 0.06, 0.06, 0.06, 0.06]; XF=[1, 1, 1, 1, 1, 1, 1]
      SoilCrop FababeanSoil: LL=[0.087, 0.087, 0.173, 0.192, 0.183, 0.215, 0.173]; KL=[0.06, 0.06, 0.06, 0.06, 0.06, 0.06, 0.06]; XF=[1, 1, 1, 1, 1, 1, 1]
      SoilCrop FieldpeaSoil: LL=[0.087, 0.087, 0.173, 0.192, 0.183, 0.215, 0.173]; KL=[0.06, 0.06, 0.06, 0.06, 0.06, 0.06, 0.06]; XF=[1, 1, 1, 1, 1, 1, 1]
      SoilCrop MungbeanSoil: LL=[0.087, 0.087, 0.173, 0.205, 0.225, 0.215, 0.225]; KL=[0.06, 0.06, 0.06, 0.04, 0.04, 0.02, 0.01]; XF=[1, 1, 1, 1, 1, 1, 1]
      SoilCrop WheatSoil: LL=[0.087, 0.087, 0.173, 0.192, 0.183, 0.215, 0.173]; KL=[0.06, 0.06, 0.06, 0.04, 0.04, 0.02, 0.01]; XF=[1, 1, 1, 1, 1, 1, 1]
    WaterBalance SoilWater: SummerDate=1-Nov; SummerU=6; SummerCona=3.5; WinterDate=1-Apr; WinterU=2; WinterCona=2; DiffusConst=88; DiffusSlope=35; Salb=0.13; CN2Bare=73; CNRed=20; CNCov=0.8; PSIDul=-100; Thickness=[150, 150, 300, 300, 300, 300, 300]; SWCON=[0.5, 0.5, 0.3, 0.3, 0.3, 0.3, 0.3]; InitialValues=[0.166935, 0.165079, 0.138413, 0.123548, 0.127037, -, -, -]
    Solute NO3: Thickness=[150, 150, 300, 300, 300, 300, 300]; InitialValues=[17.525, 16, 52.8, 1.125, 0, -, -, -]; InitialValuesUnits=ppm; WaterTableConcentration=0; D0=0; DepthConstant=0; MaxDepthSoluteAccessible=0; RunoffEffectivenessAtMovingSolute=0; MaxEffectiveRunoff=0
    Solute NH4: Thickness=[150, 150, 300, 300, 300, 300, 300]; InitialValues=[2.9, 2.025, 4.8, 4.5, 4.5, -, -, -]; InitialValuesUnits=ppm; WaterTableConcentration=0; D0=0; DepthConstant=0; MaxDepthSoluteAccessible=0; RunoffEffectivenessAtMovingSolute=0; MaxEffectiveRunoff=0
    Solute Urea: same as 2022001_Gatton.Urea
    Water: Thickness=[150, 150, 300, 300, 300, 300, 300]; FilledFromTop=true
      InitialValues=[0.213, 0.211543, 0.298306, 0.305657, 0.315925, 0.311239, 0.291274]
    Organic: same as 2022001_Gatton.Organic
    Chemical: same as 2022001_Gatton.Chemical
    Nutrient
    SoilTemperature Temperature: InteractionsPerDay=8
  Soil 2024041_Greenethorpe: SoilType=AJAR2007; Site=Boorowa; NearestTown=Boorowa; Region=South West Slopes; State=New South Wales; Country=Australia; ApsoilNumber=244; Latitude=-34.48581; Longitude=148.71664; LocationAccuracy=+/- 20m; Comments=Classification based on Particle size analysis.
    DataSource=Data collected as part of the GRDC project ‘Training growers to manage soil water’ by CSIRO Sustainable Ecosystems in collaboration with farmers and Lachlan CMA
    Physical
      Thickness  ParticleSizeSand  ParticleSizeSilt  ParticleSizeClay  BD     AirDry  LL15   DUL    SAT
      150        66.3821           11.146            22.4719           1.38   0.05    0.1    0.23   0.28
      150        65.8435252        11.6845           22.4719           1.53   0.05    0.1    0.25   0.3
      300        48.2995252        11.2765           40.4239           1.545  0.115   0.12   0.287  0.337
      300        44.2195252        9.64454           46.1359           1.51   0.155   0.16   0.31   0.36
      300        44.3646           12.3555           43.2799           1.471  0.188   0.193  0.32   0.37
      300        45.0482           12.8959           42.0559           1.478  0.201   0.206  0.32   0.37
      300        51.4431           10.1729           38.3839           1.526  0.225   0.23   0.32   0.37
      SoilCrop BarleySoil: LL=[0.087, 0.087, 0.173, 0.192, 0.183, 0.215, 0.173]; KL=[0.07, 0.07, 0.07, 0.05, 0.05, 0.03, 0.02]; XF=[1, 1, 1, 1, 1, 1, 1]
      SoilCrop CanolaSoil
        LL=[0.087, 0.0866647, 0.173485, 0.191822, 0.182536, 0.214685, 0.173]
        KL=[0.06, 0.06, 0.06, 0.04, 0.04, 0.02, 0.01]
        XF=[1, 1, 1, 1, 1, 1, 1]
      SoilCrop ChickpeaSoil: LL=[0.087, 0.087, 0.173, 0.192, 0.183, 0.215, 0.173]; KL=[0.06, 0.06, 0.06, 0.06, 0.06, 0.06, 0.06]; XF=[1, 1, 1, 1, 1, 1, 1]
      SoilCrop FababeanSoil: LL=[0.087, 0.087, 0.173, 0.192, 0.183, 0.215, 0.173]; KL=[0.06, 0.06, 0.06, 0.06, 0.06, 0.06, 0.06]; XF=[1, 1, 1, 1, 1, 1, 1]
      SoilCrop FieldpeaSoil: LL=[0.087, 0.087, 0.173, 0.192, 0.183, 0.215, 0.173]; KL=[0.06, 0.06, 0.06, 0.06, 0.06, 0.06, 0.06]; XF=[1, 1, 1, 1, 1, 1, 1]
      SoilCrop MungbeanSoil: LL=[0.087, 0.087, 0.173, 0.249, 0.271667, 0.311, 0.291]; KL=[0.06, 0.06, 0.06, 0.04, 0.04, 0.02, 0.01]; XF=[1, 1, 1, 1, 1, 1, 1]
      SoilCrop WheatSoil: LL=[0.087, 0.087, 0.173, 0.192, 0.183, 0.215, 0.173]; KL=[0.06, 0.06, 0.06, 0.04, 0.04, 0.02, 0.01]; XF=[1, 1, 1, 1, 1, 1, 1]
    WaterBalance SoilWater: SummerDate=1-Nov; SummerU=6; SummerCona=3.5; WinterDate=1-Apr; WinterU=2; WinterCona=2; DiffusConst=88; DiffusSlope=35; Salb=0.13; CN2Bare=73; CNRed=20; CNCov=0.8; PSIDul=-100; Thickness=[150, 150, 300, 300, 300, 300, 300]; SWCON=[0.5, 0.5, 0.3, 0.3, 0.3, 0.3, 0.3]
      InitialValues=[0.20078125, 0.2325, 0.245, 0.2853125, 0.31265625, 0.32234375, 0.33546875, 0.343125]
    Solute NO3: same as 2023030_Emerald.NO3
    Solute NH4: same as 2023030_Emerald.NO3
    Solute Urea: same as 2022001_Gatton.Urea
    Water: Thickness=[150, 150, 300, 300, 300, 300, 300]; FilledFromTop=true
      InitialValues=[0.213, 0.211543, 0.298306, 0.305657, 0.315925, 0.311239, 0.291274]
    Organic: same as 2022001_Gatton.Organic
    Chemical: same as 2022001_Gatton.Chemical
    Nutrient
    SoilTemperature Temperature: InteractionsPerDay=8
  Soil 2024042_Warnertown: SoilType=AJAR2007; Site=Boorowa; NearestTown=Boorowa; Region=South West Slopes; State=New South Wales; Country=Australia; ApsoilNumber=244; Latitude=-34.48581; Longitude=148.71664; LocationAccuracy=+/- 20m; Comments=Classification based on Particle size analysis.
    DataSource=Data collected as part of the GRDC project ‘Training growers to manage soil water’ by CSIRO Sustainable Ecosystems in collaboration with farmers and Lachlan CMA
    Physical: same as 2022018_Warnertown.Physical
    WaterBalance SoilWater: SummerDate=1-Nov; SummerU=6; SummerCona=3.5; WinterDate=1-Apr; WinterU=2; WinterCona=2; DiffusConst=88; DiffusSlope=35; Salb=0.13; CN2Bare=73; CNRed=20; CNCov=0.8; PSIDul=-100; Thickness=[150, 150, 300, 300, 300, 300, 300]; SWCON=[0.5, 0.5, 0.3, 0.3, 0.3, 0.3, 0.3]
      InitialValues=[0.078125, 0.0810417, 0.100417, 0.107708, 0.105745, -, -, -]
    Solute NO3: Thickness=[150, 150, 300, 300, 300, 300, 300]; InitialValues=[5.975, 2.5, 5.55, 7.6, 20.025, -, -, -]; InitialValuesUnits=ppm; WaterTableConcentration=0; D0=0; DepthConstant=0; MaxDepthSoluteAccessible=0; RunoffEffectivenessAtMovingSolute=0; MaxEffectiveRunoff=0
    Solute NH4: Thickness=[150, 150, 300, 300, 300, 300, 300]; InitialValues=[2.8, 1.3, 2.05, 1.25, 0.4, -, -, -]; InitialValuesUnits=ppm; WaterTableConcentration=0; D0=0; DepthConstant=0; MaxDepthSoluteAccessible=0; RunoffEffectivenessAtMovingSolute=0; MaxEffectiveRunoff=0
    Solute Urea: same as 2022001_Gatton.Urea
    Water: Thickness=[150, 150, 300, 300, 300, 300, 300]; FilledFromTop=true
      InitialValues=[0.213, 0.211543, 0.298306, 0.305657, 0.315925, 0.311239, 0.291274]
    Organic: same as 2022001_Gatton.Organic
    Chemical: same as 2022001_Gatton.Chemical
    Nutrient
    SoilTemperature Temperature: InteractionsPerDay=8
  Soil 2024043_Warnertown: SoilType=AJAR2007; Site=Boorowa; NearestTown=Boorowa; Region=South West Slopes; State=New South Wales; Country=Australia; ApsoilNumber=244; Latitude=-34.48581; Longitude=148.71664; LocationAccuracy=+/- 20m; Comments=Classification based on Particle size analysis.
    DataSource=Data collected as part of the GRDC project ‘Training growers to manage soil water’ by CSIRO Sustainable Ecosystems in collaboration with farmers and Lachlan CMA
    Physical: same as 2022018_Warnertown.Physical
    WaterBalance SoilWater: SummerDate=1-Nov; SummerU=6; SummerCona=3.5; WinterDate=1-Apr; WinterU=2; WinterCona=2; DiffusConst=88; DiffusSlope=35; Salb=0.13; CN2Bare=73; CNRed=20; CNCov=0.8; PSIDul=-100; Thickness=[150, 150, 300, 300, 300, 300, 300]; SWCON=[0.5, 0.5, 0.3, 0.3, 0.3, 0.3, 0.3]
      InitialValues=[0.0783333, 0.0858333, 0.107708, 0.111042, 0.117708, -, -, -]
    Solute NO3: Thickness=[150, 150, 300, 300, 300, 300, 300]; InitialValues=[10.6, 5.3, 10.175, 11.425, 17.15, -, -, -]; InitialValuesUnits=ppm; WaterTableConcentration=0; D0=0; DepthConstant=0; MaxDepthSoluteAccessible=0; RunoffEffectivenessAtMovingSolute=0; MaxEffectiveRunoff=0
    Solute NH4: Thickness=[150, 150, 300, 300, 300, 300, 300]; InitialValues=[3.15, 1.25, 1.225, 0.4, 0.4, -, -, -]; InitialValuesUnits=ppm; WaterTableConcentration=0; D0=0; DepthConstant=0; MaxDepthSoluteAccessible=0; RunoffEffectivenessAtMovingSolute=0; MaxEffectiveRunoff=0
    Solute Urea: same as 2022001_Gatton.Urea
    Water: Thickness=[150, 150, 300, 300, 300, 300, 300]; FilledFromTop=true
      InitialValues=[0.213, 0.211543, 0.298306, 0.305657, 0.315925, 0.311239, 0.291274]
    Organic: same as 2022001_Gatton.Organic
    Chemical: same as 2022001_Gatton.Chemical
    Nutrient
    SoilTemperature Temperature: InteractionsPerDay=8
  Soil 2024044_Douglas: SoilType=AJAR2007; Site=Boorowa; NearestTown=Boorowa; Region=South West Slopes; State=New South Wales; Country=Australia; ApsoilNumber=244; Latitude=-34.48581; Longitude=148.71664; LocationAccuracy=+/- 20m; Comments=Classification based on Particle size analysis.
    DataSource=Data collected as part of the GRDC project ‘Training growers to manage soil water’ by CSIRO Sustainable Ecosystems in collaboration with farmers and Lachlan CMA
    Physical
      Thickness  ParticleSizeSand  ParticleSizeSilt  ParticleSizeClay  BD     AirDry  LL15  DUL   SAT
      150        66.3821           11.146            22.4719           1.631  0.05    0.1   0.21  0.26
      150        65.8435252        11.6845           22.4719           1.669  0.05    0.1   0.21  0.26
      300        48.2995252        11.2765           40.4239           1.473  0.155   0.16  0.31  0.36
      300        44.2195252        9.64454           46.1359           1.392  0.155   0.16  0.31  0.36
      300        44.3646           12.3555           43.2799           1.54   0.165   0.17  0.3   0.35
      300        45.0482           12.8959           42.0559           1.38   0.155   0.16  0.27  0.32
      300        51.4431           10.1729           38.3839           1.38   0.145   0.15  0.25  0.3
      SoilCrop BarleySoil: LL=[0.087, 0.087, 0.173, 0.192, 0.183, 0.215, 0.173]; KL=[0.07, 0.07, 0.07, 0.05, 0.05, 0.03, 0.02]; XF=[1, 1, 1, 1, 1, 1, 1]
      SoilCrop CanolaSoil
        LL=[0.087, 0.0866647, 0.173485, 0.191822, 0.182536, 0.214685, 0.173]
        KL=[0.06, 0.06, 0.06, 0.04, 0.04, 0.02, 0.01]
        XF=[1, 1, 1, 1, 1, 1, 1]
      SoilCrop ChickpeaSoil: LL=[0.087, 0.087, 0.173, 0.192, 0.183, 0.215, 0.173]; KL=[0.06, 0.06, 0.06, 0.06, 0.06, 0.06, 0.06]; XF=[1, 1, 1, 1, 1, 1, 1]
      SoilCrop FababeanSoil: LL=[0.087, 0.087, 0.173, 0.192, 0.183, 0.215, 0.173]; KL=[0.06, 0.06, 0.06, 0.06, 0.06, 0.06, 0.06]; XF=[1, 1, 1, 1, 1, 1, 1]
      SoilCrop FieldpeaSoil: LL=[0.087, 0.087, 0.173, 0.192, 0.183, 0.215, 0.173]; KL=[0.06, 0.06, 0.06, 0.06, 0.06, 0.06, 0.06]; XF=[1, 1, 1, 1, 1, 1, 1]
      SoilCrop MungbeanSoil: LL=[0.087, 0.087, 0.173, 0.249, 0.271667, 0.265, 0.245]; KL=[0.06, 0.06, 0.06, 0.04, 0.04, 0.02, 0.01]; XF=[1, 1, 1, 1, 1, 1, 1]
      SoilCrop WheatSoil: LL=[0.087, 0.087, 0.173, 0.192, 0.183, 0.215, 0.173]; KL=[0.06, 0.06, 0.06, 0.04, 0.04, 0.02, 0.01]; XF=[1, 1, 1, 1, 1, 1, 1]
    WaterBalance SoilWater: SummerDate=1-Nov; SummerU=6; SummerCona=3.5; WinterDate=1-Apr; WinterU=2; WinterCona=2; DiffusConst=88; DiffusSlope=35; Salb=0.13; CN2Bare=73; CNRed=20; CNCov=0.8; PSIDul=-100; Thickness=[150, 150, 300, 300, 300, 300, 300]; SWCON=[0.5, 0.5, 0.3, 0.3, 0.3, 0.3, 0.3]
      InitialValues=[0.1878125, 0.1540625, 0.3, 0.26625, 0.2553125, 0.244667, 0.203571, 0.198947]
    Solute NO3: Thickness=[150, 150, 300, 300, 300, 300, 300]; InitialValues=[28.55, 8.75, 17.7, 11.475, 10.4, 9.3, 10.35, 10.35]; InitialValuesUnits=ppm; WaterTableConcentration=0; D0=0; DepthConstant=0; MaxDepthSoluteAccessible=0; RunoffEffectivenessAtMovingSolute=0; MaxEffectiveRunoff=0
    Solute NH4: Thickness=[150, 150, 300, 300, 300, 300, 300]; InitialValues=[5.325, 3.4, 0.4, 0.4, 1.525, 0.4, 0.4, 1.325]; InitialValuesUnits=ppm; WaterTableConcentration=0; D0=0; DepthConstant=0; MaxDepthSoluteAccessible=0; RunoffEffectivenessAtMovingSolute=0; MaxEffectiveRunoff=0
    Solute Urea: same as 2022001_Gatton.Urea
    Water: Thickness=[150, 150, 300, 300, 300, 300, 300]; FilledFromTop=true
      InitialValues=[0.213, 0.211543, 0.298306, 0.305657, 0.315925, 0.311239, 0.291274]
    Organic: same as 2022001_Gatton.Organic
    Chemical: same as 2022001_Gatton.Chemical
    Nutrient
    SoilTemperature Temperature: InteractionsPerDay=8
  Soil 2024045_Walpeup: SoilType=AJAR2007; Site=Boorowa; NearestTown=Boorowa; Region=South West Slopes; State=New South Wales; Country=Australia; ApsoilNumber=244; Latitude=-34.48581; Longitude=148.71664; LocationAccuracy=+/- 20m; Comments=Classification based on Particle size analysis.
    DataSource=Data collected as part of the GRDC project ‘Training growers to manage soil water’ by CSIRO Sustainable Ecosystems in collaboration with farmers and Lachlan CMA
    Physical
      Thickness  ParticleSizeSand  ParticleSizeSilt  ParticleSizeClay  BD     AirDry  LL15  DUL   SAT
      150        66.3821           11.146            22.4719           1.592  0.025   0.05  0.1   0.15
      150        65.8435252        11.6845           22.4719           1.441  0.08    0.16  0.33  0.38
      300        48.2995252        11.2765           40.4239           1.429  0.195   0.2   0.34  0.39
      300        44.2195252        9.64454           46.1359           1.522  0.195   0.2   0.35  0.4
      300        44.3646           12.3555           43.2799           1.54   0.195   0.2   0.34  0.39
      300        45.0482           12.8959           42.0559           1.54   0.195   0.2   0.34  0.39
      300        51.4431           10.1729           38.3839           1.54   0.195   0.2   0.34  0.39
      SoilCrop BarleySoil: LL=[0.087, 0.087, 0.173, 0.192, 0.183, 0.215, 0.173]; KL=[0.07, 0.07, 0.07, 0.05, 0.05, 0.03, 0.02]; XF=[1, 1, 1, 1, 1, 1, 1]
      SoilCrop CanolaSoil
        LL=[0.087, 0.0866647, 0.173485, 0.191822, 0.182536, 0.214685, 0.173]
        KL=[0.06, 0.06, 0.06, 0.04, 0.04, 0.02, 0.01]
        XF=[1, 1, 1, 1, 1, 1, 1]
      SoilCrop ChickpeaSoil: LL=[0.087, 0.087, 0.173, 0.192, 0.183, 0.215, 0.173]; KL=[0.06, 0.06, 0.06, 0.06, 0.06, 0.06, 0.06]; XF=[1, 1, 1, 1, 1, 1, 1]
      SoilCrop FababeanSoil: LL=[0.087, 0.087, 0.173, 0.192, 0.183, 0.215, 0.173]; KL=[0.06, 0.06, 0.06, 0.06, 0.06, 0.06, 0.06]; XF=[1, 1, 1, 1, 1, 1, 1]
      SoilCrop FieldpeaSoil: LL=[0.087, 0.087, 0.173, 0.192, 0.183, 0.215, 0.173]; KL=[0.06, 0.06, 0.06, 0.06, 0.06, 0.06, 0.06]; XF=[1, 1, 1, 1, 1, 1, 1]
      SoilCrop MungbeanSoil: LL=[0.087, 0.087, 0.173, 0.249, 0.271667, 0.311, 0.291]; KL=[0.06, 0.06, 0.06, 0.04, 0.04, 0.02, 0.01]; XF=[1, 1, 1, 1, 1, 1, 1]
      SoilCrop WheatSoil: LL=[0.087, 0.087, 0.173, 0.192, 0.183, 0.215, 0.173]; KL=[0.06, 0.06, 0.06, 0.04, 0.04, 0.02, 0.01]; XF=[1, 1, 1, 1, 1, 1, 1]
    WaterBalance SoilWater: SummerDate=1-Nov; SummerU=6; SummerCona=3.5; WinterDate=1-Apr; WinterU=2; WinterCona=2; DiffusConst=88; DiffusSlope=35; Salb=0.13; CN2Bare=73; CNRed=20; CNCov=0.8; PSIDul=-100; Thickness=[150, 150, 300, 300, 300, 300, 300]; SWCON=[0.5, 0.5, 0.3, 0.3, 0.3, 0.3, 0.3]
      InitialValues=[0.0809375, 0.1828125, 0.223125, 0.206129, 0.217419, 0.192333, 0.169643, 0.1744]
    Solute NO3: Thickness=[150, 150, 300, 300, 300, 300, 300]; InitialValues=[11.525, 20.525, 11.8, 13.7, 15.025, 0, 0, 0]; InitialValuesUnits=ppm; WaterTableConcentration=0; D0=0; DepthConstant=0; MaxDepthSoluteAccessible=0; RunoffEffectivenessAtMovingSolute=0; MaxEffectiveRunoff=0
    Solute NH4: Thickness=[150, 150, 300, 300, 300, 300, 300]; InitialValues=[1.25, 1.375, 0.4, 1.525, 1.525, 0, 0, 0]; InitialValuesUnits=ppm; WaterTableConcentration=0; D0=0; DepthConstant=0; MaxDepthSoluteAccessible=0; RunoffEffectivenessAtMovingSolute=0; MaxEffectiveRunoff=0
    Solute Urea: same as 2022001_Gatton.Urea
    Water: Thickness=[150, 150, 300, 300, 300, 300, 300]; FilledFromTop=true
      InitialValues=[0.213, 0.211543, 0.298306, 0.305657, 0.315925, 0.311239, 0.291274]
    Organic: same as 2022001_Gatton.Organic
    Chemical: same as 2022001_Gatton.Chemical
    Nutrient
    SoilTemperature Temperature: InteractionsPerDay=8
  Soil 2024038_Kalkee: SoilType=AJAR2007; Site=Boorowa; NearestTown=Boorowa; Region=South West Slopes; State=New South Wales; Country=Australia; ApsoilNumber=244; Latitude=-34.48581; Longitude=148.71664; LocationAccuracy=+/- 20m; Comments=Classification based on Particle size analysis.
    DataSource=Data collected as part of the GRDC project ‘Training growers to manage soil water’ by CSIRO Sustainable Ecosystems in collaboration with farmers and Lachlan CMA
    Physical: same as 2022002_Kalkee.Physical
    WaterBalance SoilWater: SummerDate=1-Nov; SummerU=6; SummerCona=3.5; WinterDate=1-Apr; WinterU=2; WinterCona=2; DiffusConst=88; DiffusSlope=35; Salb=0.13; CN2Bare=73; CNRed=20; CNCov=0.8; PSIDul=-100; Thickness=[150, 150, 300, 300, 300, 300, 300]; SWCON=[0.5, 0.5, 0.3, 0.3, 0.3, 0.3, 0.3]
      InitialValues=[0.301, 0.318833, 0.314068, 0.322333, 0.385, 0.405667, 0.412414, 0.4275]
    Solute NO3: Thickness=[150, 150, 300, 300, 300, 300, 300]; InitialValues=[13.75, 8.225, 7.1, 10.8, 11.525, 8.675, 7.7, 7.7]; InitialValuesUnits=ppm; WaterTableConcentration=0; D0=0; DepthConstant=0; MaxDepthSoluteAccessible=0; RunoffEffectivenessAtMovingSolute=0; MaxEffectiveRunoff=0
    Solute NH4: Thickness=[150, 150, 300, 300, 300, 300, 300]; InitialValues=[1.65, 1.2, 2.8, 2.8, 2.1, 2.15, 5.8, 4.85]; InitialValuesUnits=ppm; WaterTableConcentration=0; D0=0; DepthConstant=0; MaxDepthSoluteAccessible=0; RunoffEffectivenessAtMovingSolute=0; MaxEffectiveRunoff=0
    Solute Urea: same as 2022001_Gatton.Urea
    Water: Thickness=[150, 150, 300, 300, 300, 300, 300]; FilledFromTop=true
      InitialValues=[0.213, 0.211543, 0.298306, 0.305657, 0.315925, 0.311239, 0.291274]
    Organic: same as 2022001_Gatton.Organic
    Chemical: same as 2022001_Gatton.Chemical
    Nutrient
    SoilTemperature Temperature: InteractionsPerDay=8
  Soil 2019002_Greenethorpe: SoilType=AJAR2007; Site=Boorowa; NearestTown=Boorowa; Region=South West Slopes; State=New South Wales; Country=Australia; ApsoilNumber=244; Latitude=-34.48581; Longitude=148.71664; LocationAccuracy=+/- 20m; Comments=Classification based on Particle size analysis.
    DataSource=Data collected as part of the GRDC project ‘Training growers to manage soil water’ by CSIRO Sustainable Ecosystems in collaboration with farmers and Lachlan CMA
    Physical
      Thickness  ParticleSizeSand  ParticleSizeSilt  ParticleSizeClay  BD    AirDry  LL15  DUL   SAT
      150        66.3821           11.146            22.4719           1.38  0.05    0.1   0.23  0.28
      150        65.8435252        11.6845           22.4719           1.53  0.05    0.1   0.25  0.3
      300        48.2995252        11.2765           40.4239           1.54  0.115   0.12  0.28  0.33
      300        44.2195252        9.64454           46.1359           1.51  0.155   0.16  0.31  0.36
      300        44.3646           12.3555           43.2799           1.47  0.185   0.19  0.32  0.37
      300        45.0482           12.8959           42.0559           1.47  0.195   0.2   0.32  0.37
      300        51.4431           10.1729           38.3839           1.51  0.215   0.22  0.32  0.37
      SoilCrop BarleySoil: LL=[0.087, 0.087, 0.173, 0.192, 0.183, 0.215, 0.173]; KL=[0.07, 0.07, 0.07, 0.05, 0.05, 0.03, 0.02]; XF=[1, 1, 1, 1, 1, 1, 1]
      SoilCrop CanolaSoil
        LL=[0.087, 0.0866647, 0.173485, 0.191822, 0.182536, 0.214685, 0.173]
        KL=[0.06, 0.06, 0.06, 0.04, 0.04, 0.02, 0.01]
        XF=[1, 1, 1, 1, 1, 1, 1]
      SoilCrop ChickpeaSoil: LL=[0.087, 0.087, 0.173, 0.192, 0.183, 0.215, 0.173]; KL=[0.06, 0.06, 0.06, 0.06, 0.06, 0.06, 0.06]; XF=[1, 1, 1, 1, 1, 1, 1]
      SoilCrop FababeanSoil: LL=[0.087, 0.087, 0.173, 0.192, 0.183, 0.215, 0.173]; KL=[0.06, 0.06, 0.06, 0.06, 0.06, 0.06, 0.06]; XF=[1, 1, 1, 1, 1, 1, 1]
      SoilCrop FieldpeaSoil: LL=[0.087, 0.087, 0.173, 0.192, 0.183, 0.215, 0.173]; KL=[0.06, 0.06, 0.06, 0.06, 0.06, 0.06, 0.06]; XF=[1, 1, 1, 1, 1, 1, 1]
      SoilCrop MungbeanSoil: LL=[0.087, 0.087, 0.173, 0.249, 0.271667, 0.311, 0.291]; KL=[0.06, 0.06, 0.06, 0.04, 0.04, 0.02, 0.01]; XF=[1, 1, 1, 1, 1, 1, 1]
      SoilCrop WheatSoil: LL=[0.087, 0.087, 0.173, 0.192, 0.183, 0.215, 0.173]; KL=[0.06, 0.06, 0.06, 0.04, 0.04, 0.02, 0.01]; XF=[1, 1, 1, 1, 1, 1, 1]
    WaterBalance SoilWater: SummerDate=1-Nov; SummerU=6; SummerCona=3.5; WinterDate=1-Apr; WinterU=2; WinterCona=2; DiffusConst=88; DiffusSlope=35; Salb=0.13; CN2Bare=73; CNRed=20; CNCov=0.8; PSIDul=-100; Thickness=[150, 150, 300, 300, 300, 300, 300]; SWCON=[0.5, 0.5, 0.3, 0.3, 0.3, 0.3, 0.3]
      InitialValues=[0.174444, 0.222037, 0.256481, 0.298519, 0.285, 0.265556, 0.258519, 0.262222, 0.255741, 0.242222]
    Solute NO3: same as 2022010_Greenethorpe.NO3
    Solute NH4: same as 2022010_Greenethorpe.NH4
    Solute Urea: same as 2022001_Gatton.Urea
    Water: Thickness=[150, 150, 300, 300, 300, 300, 300]; FilledFromTop=true
      InitialValues=[0.213, 0.211543, 0.298306, 0.305657, 0.315925, 0.311239, 0.291274]
    Organic: same as 2022001_Gatton.Organic
    Chemical: same as 2022001_Gatton.Chemical
    Nutrient
    SoilTemperature Temperature: InteractionsPerDay=8
  Soil 2022019_Gatton: SoilType=AJAR2007; Site=Boorowa; NearestTown=Boorowa; Region=South West Slopes; State=New South Wales; Country=Australia; ApsoilNumber=244; Latitude=-34.48581; Longitude=148.71664; LocationAccuracy=+/- 20m; Comments=Classification based on Particle size analysis.
    DataSource=Data collected as part of the GRDC project ‘Training growers to manage soil water’ by CSIRO Sustainable Ecosystems in collaboration with farmers and Lachlan CMA
    Physical: same as 2022001_Gatton.Physical
    WaterBalance SoilWater: SummerDate=1-Nov; SummerU=6; SummerCona=3.5; WinterDate=1-Apr; WinterU=2; WinterCona=2; DiffusConst=88; DiffusSlope=35; Salb=0.13; CN2Bare=73; CNRed=20; CNCov=0.8; PSIDul=-100; Thickness=[150, 150, 300, 300, 300, 300, 300]; SWCON=[0.5, 0.5, 0.3, 0.3, 0.3, 0.3, 0.3]
    Solute NO3: same as 2022010_Greenethorpe.NO3
    Solute NH4: same as 2022010_Greenethorpe.NH4
    Solute Urea: same as 2022001_Gatton.Urea
    Water: Thickness=[150, 150, 300, 300, 300, 300, 300]; FilledFromTop=true
      InitialValues=[0.213, 0.211543, 0.298306, 0.305657, 0.315925, 0.311239, 0.291274]
    Organic: same as 2022001_Gatton.Organic
    Chemical: same as 2022001_Gatton.Chemical
    Nutrient
    SoilTemperature Temperature: InteractionsPerDay=8
