Simulations: Version=216
  DataStore
    ExcelInput Observed: FileNames=[Observed.xlsx]
      SheetNames=[observedPhenology, observedHarvest, observedSoil_Total, observedSoil_Layered, observedDevel]
    PredictedObserved HarvestObsPred: PredictedTableName=HarvestReport; ObservedTableName=observedHarvest; FieldNameUsedForMatch=SimulationName; AllColumns=true
    PredictedObserved PhenoObsPred: PredictedTableName=HarvestReport; ObservedTableName=observedPhenology; FieldNameUsedForMatch=SimulationName; AllColumns=true
    PredictedObserved DevelObsPred: PredictedTableName=DevelReport; ObservedTableName=observedDevel; FieldNameUsedForMatch=SimulationName; FieldName2UsedForMatch=SampleDate; AllColumns=false
  Folder Replacements
    Plant Lentil: PlantType=Lentil
      Memo TitlePage
        The model consists of:

        * a phenology model to simulate development between growth phases
        * a structure model to simulate plant morphology
        * a collection of organs to simulate the various plant parts
        * an arbitrator to allocate resources (N, biomass) to the various plant organs
      BiomassArbitrator
        PlantNutrientsDelta Carbon
        PlantNutrientsDelta Nitrogen
      RootUptakesArbitrator
      Phenology
        Memo Introduction
          In the new model we simplified phenology by taking out stages that are not measurable (e.g. end of juvenile stage) and by adding new stages that are measurable (e.g. start pod).
          The new phenology follows the V/R staging system
        Constant JuvenileBase: FixedValue=400
        Constant VernSensitivity: FixedValue=0
        Constant InductiveBase: FixedValue=0
        Constant InductivePpSensitivity: FixedValue=0
        Constant TtFlowerDevelopment: FixedValue=200
        Constant FlowerAbortionPpSensitivity: FixedValue=0
        Constant MinFloralNodes: FixedValue=8; Units=Nodes
        Constant MaxFloralNodes: FixedValue=15; Units=Nodes
        MultiplyFunction ThermalTime
          Memo Note
            WangEagleTempScale gives a value from 0 (at min and max temps) to 1 (at optTemp) and a beta function shape response in between.  This is multiplied by the optimum temperature to give thermal time in familuar unitis of oC per day.  This has the benefit of Tt targets being in familuar units, the shape of Tt response following a well justified pattern and three discrete parameters for thermal time that can be used for optimisation (as opposed to a Tt function in a linint function which is a more fiddly to optimise)
          SubDailyInterpolation WangEagleTempScale: agregationMethod=0
            WangEngelTempFunction Response: MinTemp=1.6; OptTemp=25; MaxTemp=36; RefTemp=0; Beta=1; MaximumTemperatureWeighting=0.5
            HourlySinPpAdjusted InterpolationMethod
            XYPairs LinearResponse: X=[0, 30, 40, -]; Y=[0, 30, 0, -]
          VariableReference OptTemp: VariableName=[ThermalTime].WangEagleTempScale.Response.OptTemp
        AccumulateFunction AccumulatedVernalisation: StartStageName=Germination; EndStageName=FloralInitiation; FractionRemovedOnCut=0; FractionRemovedOnHarvest=0; FractionRemovedOnGraze=0; FractionRemovedOnPrune=0
          SubDailyInterpolation DailyVernalisation: agregationMethod=0
            WangEngelTempFunction Response: MinTemp=0; OptTemp=4.7; MaxTemp=14; RefTemp=0; Beta=1; MaximumTemperatureWeighting=0.5
            HourlySinPpAdjusted InterpolationMethod
        LinearInterpolationFunction VernalisationSaturation
          XYPairs: X=[0, 10, 30, 60]; Y=[0, 0.5, 0.8, 1]
          Memo
            These parameters are overridden by cultivar parameter descriptions to capture the difference between individual cultivars in terms of their phenological development.  Responses shown here are only indicative.  See cultivar descriptions for more information.
          VariableReference XValue: VariableName=[Phenology].AccumulatedVernalisation
        PhotoperiodFunction Photoperiod: Twilight=-6; DayLength=0
        MovingAverageFunction PpResponse: NumberOfDays=100; StageToStartMovingAverage=Emergence
          LinearInterpolationFunction PpResponseDaily
            XYPairs: X=[8, 16, -, -]; Y=[1, 0, -, -]
            VariableReference XValue: VariableName=[Lentil].Phenology.Photoperiod
        GerminatingPhase Germinating: Start=Sowing; End=Germination; IsEmerged=false
          Constant MinSoilTemperature: FixedValue=0
        EmergingPhase Emerging: Start=Germination; End=Emergence; IsEmerged=false; TTForTimeStep=0
          AddFunction Target
            Constant ShootLag: FixedValue=50; Units=oCd
            MultiplyFunction DepthxRate
              VariableReference SowingDepth: VariableName=[Plant].SowingData.Depth
              Constant ShootRate: FixedValue=1.3; Units=oCd/mm
        GenericPhase Juvenile: Start=Emergence; End=FloralInitiation; IsEmerged=true
          VariableReference Progression: VariableName=[Phenology].ThermalTime
          AddFunction CalculateTarget
            VariableReference JuvenileBase: VariableName=[Phenology].JuvenileBase
            MultiplyFunction NonVernalisationExtension
              MultiplyFunction PotentialVernalisationResponse
                Constant SpeciesMaxVernResponse: FixedValue=1000
                VariableReference GenotypeRelativeVernSensitivity: VariableName=[Phenology].VernSensitivity
              SubtractFunction NonVernalisation
                Constant: FixedValue=1
                VariableReference RelativeVernalisationSaturation: VariableName=[Phenology].VernalisationSaturation
          HoldFunction Target: WhenToHold=TerminalNode
            VariableReference ValueToHold: VariableName=[Phenology].Juvenile.CalculateTarget
        GenericPhase Inductive: Start=FloralInitiation; End=FirstBudsVisiable; IsEmerged=true
          VariableReference Progression: VariableName=[Phenology].ThermalTime
          AddFunction CalculateTarget
            VariableReference InductiveBase: VariableName=[Phenology].InductiveBase
            MultiplyFunction ShortPpExtension
              MultiplyFunction PotentialPpResponse
                Constant SpeciesMaxShortDayResponse: FixedValue=1000
                VariableReference GenotypeRelativePpSensitivity: VariableName=[Phenology].InductivePpSensitivity
              VariableReference PpResponse: VariableName=[Lentil].Phenology.PpResponse
          HoldFunction Target: WhenToHold=TerminalNode
            VariableReference ValueToHold: VariableName=[Phenology].Inductive.CalculateTarget
        AccumulateFunction AbortedFlowerBuds: StartStageName=FloralInitiation; EndStageName=FirstFlowersSet; FractionRemovedOnCut=0; FractionRemovedOnHarvest=0; FractionRemovedOnGraze=0; FractionRemovedOnPrune=0
          MultiplyFunction BudsPerDay
            MinimumFunction BudsPerPhyllochron
              AddFunction BudsDelayed
                MultiplyFunction ShortDayAbortionRate
                  VariableReference PpResponseShape: VariableName=[Lentil].Phenology.PpResponse
                  VariableReference GenotypeRelativePpSensitivity: VariableName=[Phenology].FlowerAbortionPpSensitivity
                MultiplyFunction NoStressAbortionRate
                  Constant: FixedValue=0
                  LinearInterpolationFunction NoStress
                    XYPairs: X=[0, 0.25, 0.75, 1]; Y=[0, 0, 1, 1]
                    VariableReference XValue: VariableName=[Leaf].Canopy.FW
              Constant AllBudsAborted: FixedValue=0
            ProtectedDivideFunction DailyPhyllochrons: NumeratorErrVal=0; DenominatorErrVal=0
              VariableReference Tt: VariableName=[Lentil].Phenology.ThermalTime
              VariableReference Phyllochron: VariableName=[Lentil].Leaf.Phyllochron
        GenericPhase FirstFlowersDeveloping: Start=FirstBudsVisiable; End=FirstFlowersSet; IsEmerged=true
          VariableReference Progression: VariableName=[Phenology].ThermalTime
          AddFunction Target
            VariableReference FirstSuccessfulBud: VariableName=[Phenology].TtFlowerDevelopment
            MultiplyFunction DelayFromAbortedBuds (disabled)
              VariableReference Phyllochron: VariableName=[Lentil].Leaf.Phyllochron
              VariableReference AbortedBuds: VariableName=[Lentil].Phenology.AbortedFlowerBuds
            MultiplyFunction ShortDayExtension
              MultiplyFunction TargetAtShortPp
                Constant SpeciesMaxShortDayDuration: FixedValue=1000
                VariableReference GenotypeRelativePpSensitivity: VariableName=[Phenology].FlowerAbortionPpSensitivity
              VariableReference Shape: VariableName=[Lentil].Phenology.PpResponse
        GenericPhase FirstPodsDeveloping: Start=FirstFlowersSet; End=FirstPodsVisiable; IsEmerged=true
          Constant Target: FixedValue=60
          VariableReference Progression: VariableName=[Phenology].ThermalTime
        GenericPhase FirstGrainsDeveloping: Start=FirstPodsVisiable; End=FirstGrainsVisiable; IsEmerged=true
          Constant Target: FixedValue=60
          VariableReference Progression: VariableName=[Phenology].ThermalTime
        GenericPhase FirstGrainsFilling: Start=FirstGrainsVisiable; End=TerminalNode; IsEmerged=true
          VariableReference Progression: VariableName=[Phenology].ThermalTime
          AddFunction CalculateTarget
            SubtractFunction MinIndeterminant
              MultiplyFunction MinTt
                VariableReference MinFloralNodes: VariableName=[Lentil].Phenology.MinFloralNodes
                VariableReference Phyllochron: VariableName=[Lentil].Leaf.Phyllochron
              AddFunction TtFirstFlowerToFirstGrain
                VariableReference FirstPodsDeveloping: VariableName=[Lentil].Phenology.FirstPodsDeveloping.Target
                VariableReference FirstGrainsDeveloping: VariableName=[Lentil].Phenology.FirstGrainsDeveloping.Target
            MultiplyFunction ShortDayExtension
              MultiplyFunction MaxExtension
                VariableReference Phyllochron: VariableName=[Lentil].Leaf.Phyllochron
                SubtractFunction MaxAdditionalLeaves
                  VariableReference MaxFloralNodes: VariableName=[Lentil].Phenology.MaxFloralNodes
                  VariableReference MinFloralNodes: VariableName=[Lentil].Phenology.MinFloralNodes
              VariableReference Shape: VariableName=[Lentil].Phenology.PpResponse
            MultiplyFunction StressTruncation
              Constant MakeNegative: FixedValue=-1
              VariableReference Phyllochron: VariableName=[Leaf].Phyllochron
              Constant LeavesAbandoned: FixedValue=0
          HoldFunction Target: WhenToHold=TerminalNode
            VariableReference ValueToHold: VariableName=[Lentil].Phenology.FirstGrainsFilling.CalculateTarget
        GenericPhase FinalPodsDeveloping: Start=TerminalNode; End=LastPodsDeveloped; IsEmerged=true
          VariableReference Progression: VariableName=[Phenology].ThermalTime
          Constant Target: FixedValue=60
        GenericPhase FinalGrainsFilling: Start=LastPodsDeveloped; End=LastGrainsFilled; IsEmerged=true
          VariableReference Progression: VariableName=[Phenology].ThermalTime
          Constant Target: FixedValue=60
        GenericPhase Ripening: Start=LastGrainsFilled; End=HarvestRipe; IsEmerged=true
          Constant Target: FixedValue=145
          VariableReference Progression: VariableName=[Phenology].ThermalTime
        EndPhase ReadyForHarvesting: Start=HarvestRipe; End=Unused; IsEmerged=true
          VariableReference ThermalTime: VariableName=[Phenology].ThermalTime
        OnEventFunction EmergenceDAS: SetEvent=Emergence; ReSetEvent=never
          Memo
            A function is used to provide maturity date as days after sowing(DAS).
          Constant PreEventValue: FixedValue=0
          VariableReference PostEventValue: VariableName=[Plant].DaysAfterSowing
        OnEventFunction StartBuddingDAS: SetEvent=FirstBudsVisiable; ReSetEvent=never
          Memo
            A function is used to provide flowering date as days after sowing(DAS).
          Constant PreEventValue: FixedValue=0
          VariableReference PostEventValue: VariableName=[Plant].DaysAfterSowing
        OnEventFunction StartFloweringDAS: SetEvent=FirstFlowersSet; ReSetEvent=never
          Memo
            A function is used to provide flowering date as days after sowing(DAS).
          Constant PreEventValue: FixedValue=0
          VariableReference PostEventValue: VariableName=[Plant].DaysAfterSowing
        OnEventFunction StartPoddingDAS: SetEvent=FirstPodsVisiable; ReSetEvent=never
          Memo
            A function is used to provide flowering date as days after sowing(DAS).
          Constant PreEventValue: FixedValue=0
          VariableReference PostEventValue: VariableName=[Plant].DaysAfterSowing
        OnEventFunction MaturityDAS: SetEvent=HarvestRipe; ReSetEvent=never
          Memo
            A function is used to provide maturity date as days after sowing(DAS).
          Constant PreEventValue: FixedValue=0
          VariableReference PostEventValue: VariableName=[Plant].DaysAfterSowing
        AccumulateFunction DaysAfterEmergence: StartStageName=Emergence; EndStageName=HarvestRipe; FractionRemovedOnCut=0; FractionRemovedOnHarvest=0; FractionRemovedOnGraze=0; FractionRemovedOnPrune=0
          Constant OneDay: FixedValue=1
        OnEventFunction EmergenceTt: SetEvent=Emergence; ReSetEvent=never
          Memo
            A function is used to provide flowering date as days after sowing(DAS).
          Constant PreEventValue: FixedValue=0
          VariableReference PostEventValue: VariableName=[Phenology].AccumulatedTt
        OnEventFunction StartBuddingTt: SetEvent=FirstBudsVisiable; ReSetEvent=never
          Memo
            A function is used to provide flowering date as days after sowing(DAS).
          Constant PreEventValue: FixedValue=0
          VariableReference PostEventValue: VariableName=[Phenology].AccumulatedTt
        OnEventFunction StartFloweringTt: SetEvent=FirstFlowersSet; ReSetEvent=never
          Memo
            A function is used to provide flowering date as days after sowing(DAS).
          Constant PreEventValue: FixedValue=0
          VariableReference PostEventValue: VariableName=[Phenology].AccumulatedTt
        OnEventFunction StartPoddingTt: SetEvent=FirstPodsVisiable; ReSetEvent=never
          Memo
            A function is used to provide flowering date as days after sowing(DAS).
          Constant PreEventValue: FixedValue=0
          VariableReference PostEventValue: VariableName=[Phenology].AccumulatedTt
        OnEventFunction MaturityTt: SetEvent=HarvestRipe; ReSetEvent=never
          Memo
            A function is used to provide flowering date as days after sowing(DAS).
          Constant PreEventValue: FixedValue=0
          VariableReference PostEventValue: VariableName=[Phenology].AccumulatedTt
        AccumulateFunction EarlyWaterStress: StartStageName=Emergence; EndStageName=FirstFlowersSet; FractionRemovedOnCut=0; FractionRemovedOnHarvest=0; FractionRemovedOnGraze=0; FractionRemovedOnPrune=0
          SubtractFunction Stress
            Constant: FixedValue=1
            VariableReference XValue: VariableName=[Leaf].Canopy.Fw
        AccumulateFunction FloweringWaterStress: StartStageName=FloralInitiation; EndStageName=FirstFlowersSet; FractionRemovedOnCut=0; FractionRemovedOnHarvest=0; FractionRemovedOnGraze=0; FractionRemovedOnPrune=0
          SubtractFunction Stress
            Constant: FixedValue=1
            VariableReference XValue: VariableName=[Leaf].Canopy.Fw
        AccumulateFunction GrainFillingWaterStress: StartStageName=FirstGrainsVisiable; EndStageName=LastGrainsFilled; FractionRemovedOnCut=0; FractionRemovedOnHarvest=0; FractionRemovedOnGraze=0; FractionRemovedOnPrune=0
          SubtractFunction Stress
            Constant: FixedValue=1
            VariableReference XValue: VariableName=[Leaf].Canopy.Fw
      Organ Grain: Cconc=0.4; IsAboveGround=true
        BiomassRemoval BiomassRemovalDefaults: HarvestFractionLiveToRemove=0.95; HarvestFractionDeadToRemove=0; HarvestFractionLiveToResidue=0.05; HarvestFractionDeadToResidue=1
        OrganNutrientDelta Carbon: MaxCDelta=0
          OrganNutrientSupplies Supplies: Fixation=0; Uptake=0
            NutrientPoolsState ReAllocation
            NutrientPoolsState ReTranslocation
          NutrientDemandFunctions Demand
            PhaseLookupValue Structural: Start=FirstGrainsVisiable; End=LastGrainsFilled
              DeficitDemandFunction Structural
            PhaseLookupValue Metabolic: Start=FirstGrainsVisiable; End=LastGrainsFilled
              DeficitDemandFunction Metabolic
            PhaseLookupValue Storage: Start=FirstGrainsVisiable; End=LastGrainsFilled
              DeficitDemandFunction Storage
            Constant QStructuralPriority: FixedValue=1
            Constant QMetabolicPriority: FixedValue=1
            Constant QStoragePriority: FixedValue=0
          NutrientSupplyFunctions Supply
            Constant Fixation: FixedValue=0
            Constant Uptake: FixedValue=0
            NutrientPoolFunctions ReAllocation
              Constant Structural: FixedValue=0
              MobilisationSupplyFunction Metabolic
                Constant Multiplier: FixedValue=0
              MobilisationSupplyFunction Storage
                Constant Multiplier: FixedValue=0
            NutrientPoolFunctions ReTranslocation: same as Replacements.Lentil.Grain.Carbon.Supply.ReAllocation
          NutrientProportionFunctions Proportion
            CalculateCarbonFractionFromNConc Structural
            CalculateCarbonFractionFromNConc Metabolic
            CalculateCarbonFractionFromNConc Storage
        Constant detachmentRate: FixedValue=0; Units=/d
        DivideFunction HarvestIndex
          VariableReference GrainWt: VariableName=[Grain].Wt
          VariableReference AboveGroundWt: VariableName=[AboveGround].Wt
        Constant InitialWt: FixedValue=0
        OrganNutrientDelta Nitrogen: MaxCDelta=0
          OrganNutrientSupplies Supplies: Fixation=0; Uptake=0
            NutrientPoolsState ReAllocation
            NutrientPoolsState ReTranslocation
          NutrientDemandFunctions Demand: same as Replacements.Lentil.Grain.Carbon.Demand
          NutrientSupplyFunctions SupplyFunctions: same as Replacements.Lentil.Grain.Carbon.Supply
          NutrientConcentrationFunctions Concentration
            AddFunction Maximum
              VariableReference MinNConc: VariableName=[Grain].Nitrogen.Concentration.Minimum
              LinearInterpolationFunction NonStructural
                XYPairs: X=[5, 6, 8]; Y=[0.015, 0.015, 0.015]
                VariableReference XValue: VariableName=[Phenology].Stage
            AddFunction Critical
              VariableReference MinNConc: VariableName=[Grain].Nitrogen.Concentration.Minimum
              MultiplyFunction MetabolicN
                SubtractFunction NonStructural
                  VariableReference MaxNConc: VariableName=[Grain].Nitrogen.Concentration.Maximum
                  VariableReference MinNConc: VariableName=[Grain].Nitrogen.Concentration.Minimum
                Constant PropnMetabolicInNonStructural: FixedValue=0
            Constant Minimum: FixedValue=0.01; Units=g/g
        Constant NumberFunction: FixedValue=0
          Memo
            Grain number is not estimated by this model.
        MultiplyFunction PotentialHarvestIndex
          VariableReference PodHarvestIndex: VariableName=[Fruit].PotentialHarvestIndex
          Constant GrainFraction: FixedValue=0.72; Units=0-1
        Respiration
          Constant MaintenanceRespirationFunction: FixedValue=0; Units=0-1
          NutrientFunctions AssimilationCostFunctions
            Constant C: FixedValue=0; Units=0-1
            Constant N: FixedValue=0; Units=0-1
            Constant P: FixedValue=0; Units=0-1
            Constant K: FixedValue=0; Units=0-1
          NutrientFunctions MobilisationCostFunctions: same as Replacements.Lentil.Grain.Respiration.AssimilationCostFunctions
        Constant senescenceRate: FixedValue=0; Units=/d
        MultiplyFunction TotalCarbonDemand
          PhaseLookupValue TotalDMDemand: Start=FirstGrainsVisiable; End=LastGrainsFilled
            AllometricDemandFunction AllometricDemand: Const=0.55; Power=1
              VariableReference YValue: VariableName=[Grain].Live.Wt
              VariableReference XValue: VariableName=[Lentil].Total.Wt
          VariableReference Cconc: VariableName=[Grain].Cconc
        MultiplyFunction TotalDMDemand
          PhaseLookup PartitionFraction
            PhaseLookupValue NonReproductive: Start=Emergence; End=FirstGrainsVisiable
              Constant None: FixedValue=0; Units=/d
            PhaseLookupValue Reproductive: Start=FirstGrainsVisiable; End=LastGrainsFilled
              MultiplyFunction HIGrainDemand
                VariableReference AboveGroundWt: VariableName=[AboveGround].Wt
                DivideFunction HarvestIndexIncrease
                  MaximumFunction OutstandingHarvestIndexIncrease
                    ExpressionFunction Increase: Expression=[Grain].PotentialHarvestIndex - [Grain].HarvestIndex
                    Constant Zero: FixedValue=0
                  AggregateOverMultiplePhases TTRemaining: StartStageName=FirstGrainsVisiable; EndStageName=LastGrainsFilled; Method=0
                VariableReference ThermalTime: VariableName=[Phenology].ThermalTime
          VariableReference PotentialPhotosynthesis: VariableName=[Leaf].Photosynthesis
        Constant WaterContent: FixedValue=0.13
        Constant Size: FixedValue=0; Units=/d
      Organ Leaf: Cconc=0.4; IsAboveGround=true
        Constant AreaOfLargest: FixedValue=0.0009
        Constant BasePhyllochron: FixedValue=40
          Memo
            This value is based upon that used in [#robertson_simulation_2002].
        BiomassRemoval BiomassRemovalDefaults: HarvestFractionLiveToRemove=0; HarvestFractionDeadToRemove=0; HarvestFractionLiveToResidue=1; HarvestFractionDeadToResidue=1
        EnergyBalance Canopy: Albedo=0.2; Gsmax350=0.005; R50=100; KDead=0; LAIDead=0
          Constant DeadExtinctionCoefficient: FixedValue=0.578136
          MultiplyFunction DeadAreaIndex
            VariableReference SLA: VariableName=[Leaf].StructuralSpecificArea
            ProtectedDivideFunction LeafDeadWt: NumeratorErrVal=0; DenominatorErrVal=0
              VariableReference LeafDeadStructuralC: VariableName=[Leaf].Dead.Carbon.Structural
              VariableReference CarbonConc: VariableName=[Leaf].Cconc
          VariableReference Deepness: VariableName=[Leaf].Canopy.Height
          MinimumFunction FRGRer
            VariableReference RUE_FT: VariableName=[Leaf].Photosynthesis.FT
            MinimumFunction Others
              VariableReference RUE_FN: VariableName=[Leaf].Photosynthesis.FN
              VariableReference RUE_FVPD: VariableName=[Leaf].Photosynthesis.FVPD
          LeafArea GreenAreaIndex
            MultiplyFunction Initial
              Constant AreaPerPlant: FixedValue=0.0001; Units=m2/plant
              VariableReference Population: VariableName=[Plant].Population
            AccumulateAtEvent AreaGrown: StartStageName=Emergence; EndStageName=TerminalNode; AccumulateEventName=[Clock].DoActualPlantGrowth
              MultiplyFunction DeltaArea
                ProtectedDivideFunction DeltaWt: NumeratorErrVal=0; DenominatorErrVal=0
                  VariableReference DeltaCarbon: VariableName=[Leaf].Allocated.Carbon.Structural
                  VariableReference CarbonConc: VariableName=[Leaf].Cconc
                VariableReference SLA: VariableName=[Leaf].StructuralSpecificArea
            AccumulateAtEvent AreaSenesced: StartStageName=FloralInitiation; EndStageName=HarvestRipe; AccumulateEventName=[Clock].DoActualPlantGrowth
              MultiplyFunction DeltaArea
                ProtectedDivideFunction DeltaWt: NumeratorErrVal=0; DenominatorErrVal=0
                  VariableReference DeltaCarbon: VariableName=[Leaf].Senesced.Carbon.Structural
                  VariableReference CarbonConc: VariableName=[Leaf].Cconc
                VariableReference SLA: VariableName=[Leaf].Canopy.SpecificArea
            AccumulateAtEvent AreaRemoved: StartStageName=Emergence; EndStageName=HarvestRipe; AccumulateEventName=[Clock].DoReportCalculations
              MultiplyFunction DeltaArea
                ProtectedDivideFunction DeltaWt: NumeratorErrVal=0; DenominatorErrVal=0
                  VariableReference DeltaCarbon: VariableName=[Leaf].LiveRemoved.Carbon.Structural
                  VariableReference CarbonConc: VariableName=[Leaf].Cconc
                VariableReference SLA: VariableName=[Leaf].StructuralSpecificArea
            MinimumFunction ExpansionStress
              LinearInterpolationFunction WaterStressEffect
                XYPairs: X=[0, 0.5, 1, 1.3]; Y=[0, 0, 1, 1]
                VariableReference XValue: VariableName=[Leaf].Canopy.FW
              LinearInterpolationFunction NitrogenEffect
                Memo
                  Inadequate Nitrogen supply is assumed to affect tillering prior to any effect on photosynthesis or leaf size.
                XYPairs: X=[0, 1, 3]; Y=[1, 1, 1]
                VariableReference XValue: VariableName=[BiomassArbitrator].FN
            MultiplyFunction MaxLeafArea
              VariableReference AreaOfLargest: VariableName=[Leaf].AreaOfLargest
              LinearInterpolationFunction RelativeArea
                XYPairs: X=[3, 3.1, 4.5, 5, 6]; Y=[0.1, 0.2, 0.4, 1, 1]
                VariableReference XValue: VariableName=[Phenology].Stage
              Memo
                The maximum size of the current appearing leaf
            MaximumFunction SenescenceStresses
              LinearInterpolationFunction NitrogenEffect
                Memo
                  Inadequate Nitrogen supply is assumed to affect tillering prior to any effect on photosynthesis or leaf size.
                XYPairs: X=[0, 0.2, 0.6, 1]; Y=[3, 3, 0, 0]
                VariableReference XValue: VariableName=[Arbitrator].FN
              LinearInterpolationFunction WaterEffect
                XYPairs: X=[0, 0.1, 0.5, 0.9, 1.3]; Y=[5, 5, 2.5, 0, 0]
                VariableReference XValue: VariableName=[Leaf].Canopy.FW
              LinearInterpolationFunction ShadingEffect
                XYPairs: X=[0, 0.3925, 0.96023, 0.9999, 1]; Y=[0, 0, 0.5, 1, 1]
                VariableReference XValue: VariableName=[Leaf].Canopy.CoverTotal
          MultiplyFunction GreenExtinctionCoefficient
            Constant PotentialExtinctionCoeff: FixedValue=0.5
              Memo
                The extinction coefficient value of 0.74 ([#Chakwizira_etal_2016a]) was used.
            LinearInterpolationFunction WaterStress
              XYPairs: X=[0, 0.641792, 1]; Y=[1, 1, 1]
              VariableReference XValue: VariableName=[Lentil].Leaf.Canopy.Fw
          DivideFunction SpecificArea
            VariableReference LAI: VariableName=[Leaf].Canopy.LAI
            VariableReference LeafWt: VariableName=[Leaf].Live.Wt
          StomatalConductanceCO2Modifier
            VariableReference PhotosynthesisCO2Modifier: VariableName=[Leaf].Photosynthesis.FCO2
          LinearInterpolationFunction Tallness
            XYPairs: X=[0, 24]; Y=[20, 500]
            Memo
              The maximum height of 500 mm was estimated from the 2014 sowing date trial ([#Khaembah_etal_2017]).
            VariableReference XValue: VariableName=[Leaf].NodeNumber
          Constant Wideness: FixedValue=0
        OrganNutrientDelta Carbon: MaxCDelta=0
          OrganNutrientSupplies Supplies: Fixation=0; Uptake=0
            NutrientPoolsState ReAllocation
            NutrientPoolsState ReTranslocation
          NutrientDemandFunctions Demand
            PhaseLookupValue Structural: Start=Emergence; End=TerminalNode
              DeficitDemandFunction Structural
            PhaseLookupValue Metabolic: Start=Emergence; End=TerminalNode
              DeficitDemandFunction Metabolic
            PhaseLookupValue Storage: Start=Emergence; End=TerminalNode
              DeficitDemandFunction Storage
            Constant QStructuralPriority: FixedValue=1
            Constant QMetabolicPriority: FixedValue=1
            Constant QStoragePriority: FixedValue=0
          NutrientSupplyFunctions Supply
            MultiplyFunction Fixation
              VariableReference Fixation: VariableName=[Leaf].Photosynthesis
              VariableReference Cconc: VariableName=[Leaf].Cconc
            Constant Uptake: FixedValue=0
            NutrientPoolFunctions ReAllocation
              Constant Structural: FixedValue=0
              MobilisationSupplyFunction Metabolic
                Constant Multiplier: FixedValue=1
              MobilisationSupplyFunction Storage
                Constant Multiplier: FixedValue=1
            NutrientPoolFunctions ReTranslocation
              Constant Structural: FixedValue=0
              MobilisationSupplyFunction Metabolic
                Constant Multiplier: FixedValue=0
              MobilisationSupplyFunction Storage
                Constant Multiplier: FixedValue=0.03
          NutrientProportionFunctions Partition
            Constant Structural: FixedValue=0.5; Units=0-1
            Constant Metabolic: FixedValue=0.4; Units=0-1
            Constant Storage: FixedValue=0.1
        Constant detachmentRate: FixedValue=0; Units=/d
        MultiplyFunction InitialWt
          Constant MassPerPlant: FixedValue=0.001
          VariableReference Population: VariableName=[Lentil].SowingData.Population
        OrganNutrientDelta Nitrogen: MaxCDelta=0
          OrganNutrientSupplies Supplies: Fixation=0; Uptake=0
            NutrientPoolsState ReAllocation
            NutrientPoolsState ReTranslocation
          NutrientDemandFunctions Demand: same as Replacements.Lentil.Leaf.Carbon.Demand
          NutrientSupplyFunctions Supply
            Constant Fixation: FixedValue=0
            Constant Uptake: FixedValue=0
            NutrientPoolFunctions ReAllocation: same as Replacements.Lentil.Leaf.Carbon.Supply.ReAllocation
            NutrientPoolFunctions ReTranslocation
              Constant Structural: FixedValue=0
              MobilisationSupplyFunction Metabolic
                Constant Multiplier: FixedValue=0
              MobilisationSupplyFunction Storage
                Constant Multiplier: FixedValue=0.05
          NutrientConcentrationFunctions Concentration
            MultiplyFunction Maximum
              AddFunction MaximumConcAt350ppm
                VariableReference MinNConc: VariableName=[Leaf].Nitrogen.Concentration.Minimum
                LinearInterpolationFunction NonStructural
                  XYPairs: X=[3, 5, 6, 8]; Y=[0.025, 0.025, 0.015, 0.015]
                  VariableReference XValue: VariableName=[Phenology].Stage
              LinearInterpolationFunction CO2Factor
                XYPairs: X=[350, 700]; Y=[1, 0.93]
                VariableReference XValue: VariableName=[IWeather].CO2
            AddFunction Critical
              VariableReference MinNConc: VariableName=[Leaf].Nitrogen.Concentration.Minimum
              MultiplyFunction MetabolicN
                Constant Propn: FixedValue=1
                SubtractFunction NonStructural
                  VariableReference MaxNConc: VariableName=[Leaf].Nitrogen.Concentration.Maximum
                  VariableReference MinNConc: VariableName=[Leaf].Nitrogen.Concentration.Minimum
            Constant Minimum: FixedValue=0.03; Units=g/g
        AccumulateFunction NodeNumber: StartStageName=Emergence; EndStageName=TerminalNode; FractionRemovedOnCut=1; FractionRemovedOnHarvest=1; FractionRemovedOnGraze=1; FractionRemovedOnPrune=0
          MultiplyFunction DeltaNode
            DivideFunction Unstressed
              VariableReference ThermalTime: VariableName=[Phenology].ThermalTime
              VariableReference Phyllochron: VariableName=[Leaf].Phyllochron
            LinearInterpolationFunction WaterFactor
              XYPairs: X=[0, 0.5, 1]; Y=[0.4, 0.7, 1]
              VariableReference XValue: VariableName=[Leaf].Canopy.Fw
        RUEModel Photosynthesis
          Constant RUE: FixedValue=1.5
            Memo
              This approach is based upon the value used in [#robertson_simulation_2002] increased to account for partitioning to roots.
          WeightedTemperatureFunction FT: MaximumTemperatureWeighting=0.75
            Memo
              This approach is based upon that used in Bell, WRight and Hammer (1992) Crop Sci
            XYPairs: X=[2, 20, 30, 40]; Y=[0, 1, 1, 0]
          LinearInterpolationFunction FVPD
            XYPairs: X=[0, 10, 50]; Y=[1, 1, 1]
            VariableReference XValue: VariableName=[Leaf].Photosynthesis.VPD
          LinearInterpolationFunction FN
            XYPairs: X=[0, 1, 1.5]; Y=[0, 1, 1]
            VariableReference XValue: VariableName=[Leaf].FNmetabolic
          LinearInterpolationFunction FW
            XYPairs: X=[0, 0.8, 1]; Y=[0, 1, 1]
            VariableReference XValue: VariableName=[Leaf].Canopy.Fw
          RUECO2Function FCO2: PhotosyntheticPathway=C3
          VariableReference RadnInt: VariableName=[Leaf].Canopy.RadiationIntercepted
        PhaseLookup Phyllochron
          PhaseLookupValue EarlyVegetative: Start=Emergence; End=FloralInitiation
            VariableReference BasePhyllochron: VariableName=[Leaf].BasePhyllochron
          PhaseLookupValue LateVegetative: Start=FloralInitiation; End=FirstBudsVisiable
            AddFunction Phyllochron
              VariableReference BasePhyllochron: VariableName=[Leaf].BasePhyllochron
              MultiplyFunction ShortDayRetardation
                VariableReference BasePhyllochron: VariableName=[Leaf].BasePhyllochron
                VariableReference PpFactor: VariableName=[Phenology].PpResponse.PpResponseDaily
                VariableReference PpSensitivity: VariableName=[Phenology].InductivePpSensitivity
          PhaseLookupValue EarlyReproductive: Start=FirstBudsVisiable; End=HarvestRipe
            AddFunction Phyllochron
              VariableReference BasePhyllochron: VariableName=[Leaf].BasePhyllochron
              MultiplyFunction ShortDayRetardation
                VariableReference BasePhyllochron: VariableName=[Leaf].BasePhyllochron
                VariableReference PpFactor: VariableName=[Phenology].PpResponse.PpResponseDaily
                VariableReference PpSensitivity: VariableName=[Phenology].InductivePpSensitivity
                Constant AdditionalRetardation: FixedValue=2
          PhaseLookupValue LateReproductive (disabled): Start=TerminalNode; End=HarvestRipe
            Constant: FixedValue=0
        Respiration: same as Replacements.Lentil.Grain.Respiration
        PhaseLookup senescenceRate
          PhaseLookupValue Vegetative: Start=Emergence; End=FirstBudsVisiable
            LinearInterpolationFunction Rate
              XYPairs: X=[0, 0.75, 0.95, 1]; Y=[0, 0, 0.03, 0.03]
              VariableReference XValue: VariableName=[Leaf].Canopy.CoverTotal
          PhaseLookupValue Reproductive: Start=FirstBudsVisiable; End=HarvestRipe
            Memo
              Leaf senescence rate is calculated to ensure that all leaves are senesced by crop maturity.
            MultiplyFunction
              DivideFunction Rate
                VariableReference TT: VariableName=[Phenology].ThermalTime
                AggregateOverMultiplePhases TtRemaining: StartStageName=FirstBudsVisiable; EndStageName=HarvestRipe; Method=0
              LinearInterpolationFunction WaterFactor
                XYPairs: X=[0, 0.5, 1]; Y=[3, 1, 1]
                VariableReference XValue: VariableName=[Leaf].Canopy.Fw
        LinearInterpolationFunction SpecificAreaTotal
          XYPairs: X=[3, 4, 5, 9]; Y=[0.055, 0.03, 0.02, 0.01]
          VariableReference XValue: VariableName=[Phenology].Stage
        ProtectedDivideFunction StructuralSpecificArea: NumeratorErrVal=0; DenominatorErrVal=0
          VariableReference SLATotal: VariableName=[Leaf].SpecificAreaTotal
          VariableReference StructuralFraction: VariableName=[Leaf].Carbon.Partition.Structural
          Memo
            mm/g structuralWt
        MultiplyFunction TotalCarbonDemand
          DivideFunction TotalDMDemand
            PhaseLookup DeltaLAIPotential
              PhaseLookupValue Vegetative: Start=Emergence; End=TerminalNode
                MultiplyFunction Delta
                  VariableReference AreaLargestLeaf: VariableName=[Leaf].AreaOfLargest
                  PhaseLookup RelativeArea
                    PhaseLookupValue BeforePodding: Start=Emergence; End=FirstPodsVisiable
                      LinearInterpolationFunction RelativeArea
                        Memo
                          This approach is based upon that used in [#robertson_simulation_2002].
                        XYPairs: X=[1, 10]; Y=[0.1, 1]
                        VariableReference XValue: VariableName=[Leaf].NodeNumber
                    PhaseLookupValue DuringPodding: Start=FirstPodsVisiable; End=TerminalNode
                      LinearInterpolationFunction RelativeArea
                        Memo
                          This approach is based upon that used in [#robertson_simulation_2002].
                        XYPairs: X=[5, 9]; Y=[1, 0.01]
                        VariableReference XValue: VariableName=[Phenology].Stage
                    PhaseLookupValue FinalPhase: Start=TerminalNode; End=HarvestRipe
                      Constant: FixedValue=0
                  VariableReference PlantNumber: VariableName=[Lentil].SowingData.Population
                  AddFunction BranchNumber
                    Constant One: FixedValue=1
                    AccumulateFunction CumulativeBranching: StartStageName=Emergence; EndStageName=TerminalNode; FractionRemovedOnCut=1; FractionRemovedOnHarvest=1; FractionRemovedOnGraze=1; FractionRemovedOnPrune=0
                      MultiplyFunction DeltaBranch
                        VariableReference DeltaNode: VariableName=[Leaf].NodeNumber.DeltaNode
                        LinearInterpolationFunction BranchingRate
                          Memo
                            From Hammer Paper
                          XYPairs: X=[0, 1, 2, 8, 9, 10]; Y=[0, 1, 0, 0, 1, 2]
                          VariableReference XValue: VariableName=[Leaf].NodeNumber
                        LinearInterpolationFunction TemperatureFactor
                          XYPairs: X=[20, 28, 32, 40]; Y=[1, 1, 1, 1]
                          VariableReference XValue: VariableName=[IWeather].MeanT
                        LinearInterpolationFunction WaterFactor
                          XYPairs: X=[0, 0.5, 1]; Y=[0, 0.5, 1]
                          VariableReference XValue: VariableName=[Leaf].Canopy.Fw
                        LinearInterpolationFunction CoverFactor
                          XYPairs: X=[0, 0.33, 0.5, 1]; Y=[1, 1, 1, 1]
                          VariableReference XValue: VariableName=[Leaf].Canopy.CoverTotal
                        LinearInterpolationFunction PPFactor
                          XYPairs: X=[12, 13]; Y=[1, 1]
                          VariableReference XValue: VariableName=[Phenology].Photoperiod
                  DivideFunction LAR
                    VariableReference TT: VariableName=[Phenology].ThermalTime
                    VariableReference Phyllochron: VariableName=[Leaf].Phyllochron
                  LinearInterpolationFunction LeafSizeWaterStressFactor
                    XYPairs: X=[0, 0.5, 1]; Y=[1, 1, 1]
                    VariableReference XValue: VariableName=[Leaf].Canopy.Fw
              PhaseLookupValue Reproductive: Start=TerminalNode; End=HarvestRipe
                Constant: FixedValue=0
            VariableReference SLA: VariableName=[Leaf].SpecificAreaTotal
            Memo
              Growth in leaf area is used to calculate the leaf dry matter demand. The same was assumed in the original crop models in APSIM. Further model development can be taken once new experimental data for metabolic, structural and storage forms are provided.
            Memo Memo1
              DeltaLAI describes the LAI variation over the cycle and is calculated using the Area of Largest Leaf, relative leaf area, plant number, branch number and leaf appearance rate (thermal time/phyllochron).
          VariableReference Cconc: VariableName=[Leaf].Cconc
      Organ Root: Cconc=0.4; IsAboveGround=true
        Constant InitialWt: FixedValue=0.5; Units=g/m2
        Respiration: same as Replacements.Lentil.Grain.Respiration
        Constant senescenceRate: FixedValue=0; Units=/d
        Constant detachmentRate: FixedValue=0; Units=/d
        OrganNutrientDelta Carbon: MaxCDelta=0
          OrganNutrientSupplies Supplies: Fixation=0; Uptake=0
            NutrientPoolsState ReAllocation
            NutrientPoolsState ReTranslocation
          NutrientDemandFunctions DemandFunctions
            DeficitDemandFunction Structural
            DeficitDemandFunction Metabolic
            DeficitDemandFunction Storage
            Constant QStructuralPriority: FixedValue=1
            Constant QMetabolicPriority: FixedValue=1
            Constant QStoragePriority: FixedValue=0
          NutrientSupplyFunctions SupplyFunctions
            Constant Fixation: FixedValue=0
            Constant Uptake: FixedValue=0
            NutrientPoolFunctions ReAllocation: same as Replacements.Lentil.Leaf.Carbon.Supply.ReAllocation
            NutrientPoolFunctions ReTranslocation: same as Replacements.Lentil.Leaf.Carbon.Supply.ReTranslocation
          NutrientProportionFunctions PoolFractions: same as Replacements.Lentil.Grain.Carbon.Proportion
        OrganNutrientDelta Nitrogen: MaxCDelta=0
          OrganNutrientSupplies Supplies: Fixation=0; Uptake=0
            NutrientPoolsState ReAllocation
            NutrientPoolsState ReTranslocation
          NutrientDemandFunctions DemandFunctions
            DeficitDemandFunction Structural
            DeficitDemandFunction Storage
            DeficitDemandFunction Metabolic
            Constant QStructuralPriority: FixedValue=1
            Constant QMetabolicPriority: FixedValue=1
            Constant QStoragePriority: FixedValue=0
          NutrientSupplyFunctions SupplyFunctions
            Constant Fixation: FixedValue=0
            Constant Uptake: FixedValue=0
            NutrientPoolFunctions ReAllocation: same as Replacements.Lentil.Leaf.Carbon.Supply.ReAllocation
            NutrientPoolFunctions ReTranslocation: same as Replacements.Lentil.Grain.Carbon.Supply.ReAllocation
          NutrientConcentrationFunctions Concentrations
            Constant Maximum: FixedValue=0.01
            Constant Critical: FixedValue=0.01
            Constant Minimum: FixedValue=0.01
        RootNetwork Network
          RootShapeCylinder RootShape
          Constant SoilWaterEffect: FixedValue=1
          Constant MaximumRootDepth: FixedValue=100000
          Constant KNO3: FixedValue=0.02; Units=g/plant
          Constant KNH4: FixedValue=0; Units=g/plant
          Constant SpecificRootLength: FixedValue=60; Units=m/g
          Constant RootDepthStressFactor: FixedValue=1
          LinearInterpolationFunction KLModifier
            XYPairs: X=[0, 3]; Y=[1, 1]
            VariableReference XValue: VariableName=[Leaf].Canopy.LAI
          PhaseLookup rootFrontVelocity
            Memo
              This approach is based upon that used in [#robertson_simulation_2002].
            PhaseLookupValue PreEmergence: Start=Germination; End=Emergence
              Constant Function: FixedValue=3
            PhaseLookupValue early: Start=Emergence; End=FirstGrainsVisiable
              Constant Function: FixedValue=15
            PhaseLookupValue late: Start=FirstGrainsVisiable; End=TerminalNode
              Constant Function: FixedValue=17
          LinearInterpolationFunction NUptakeSWFactor
            XYPairs: X=[0, 1]; Y=[0, 1]
            VariableReference XValue: VariableName=[Root].Network.RWC
          LinearInterpolationFunction MaxDailyNUptake
            XYPairs: X=[0, 5]; Y=[1, 3]
            VariableReference XValue: VariableName=[Leaf].Canopy.LAI
        AllometricDemandFunction TotalDMDemand: Const=1; Power=1
          VariableReference XValue: VariableName=[Leaf].Live.Wt
          VariableReference YValue: VariableName=[Root].Live.Wt
        BiomassRemoval BiomassRemovalDefaults: HarvestFractionLiveToRemove=0; HarvestFractionDeadToRemove=0; HarvestFractionLiveToResidue=1; HarvestFractionDeadToResidue=1
        MultiplyFunction TotalCarbonDemand
          VariableReference TotalDMDemand: VariableName=[Root].TotalDMDemand
          VariableReference Cconc: VariableName=[Root].Cconc
      Organ Nodule: Cconc=0.4; IsAboveGround=true
        Constant InitialWt: FixedValue=1; Units=g/m2
        Respiration: same as Replacements.Lentil.Grain.Respiration
        VariableReference SenescenceRate: VariableName=[Leaf].senescenceRate
        Constant DetachmentRate: FixedValue=0; Units=/d
        OrganNutrientDelta Carbon: MaxCDelta=0
          OrganNutrientSupplies Supplies: Fixation=0; Uptake=0
            NutrientPoolsState ReAllocation
            NutrientPoolsState ReTranslocation
          NutrientDemandFunctions DemandFunctions
            DeficitDemandFunction Structural
            DeficitDemandFunction Metabolic
            DeficitDemandFunction Storage
            Constant QStructuralPriority: FixedValue=0
            Constant QMetabolicPriority: FixedValue=0
            Constant QStoragePriority: FixedValue=0
          NutrientSupplyFunctions SupplyFunctions
            Constant Fixation: FixedValue=0
            Constant Uptake: FixedValue=0
            NutrientPoolFunctions ReAllocation: same as Replacements.Lentil.Leaf.Carbon.Supply.ReAllocation
            NutrientPoolFunctions ReTranslocation: same as Replacements.Lentil.Leaf.Carbon.Supply.ReAllocation
          NutrientProportionFunctions PoolFractions: same as Replacements.Lentil.Grain.Carbon.Proportion
        OrganNutrientDelta Nitrogen: MaxCDelta=0
          OrganNutrientSupplies Supplies: Fixation=0; Uptake=0
            NutrientPoolsState ReAllocation
            NutrientPoolsState ReTranslocation
          NutrientDemandFunctions DemandFunctions: same as Replacements.Lentil.Nodule.Carbon.DemandFunctions
          NutrientSupplyFunctions SupplyFunctions
            HoldFunction Fixation: WhenToHold=FirstGrainsVisiable
              MinimumFunction DailyPotentialFixationRate
                MultiplyFunction PotentialFixationRate
                  VariableReference LiveBiomass: VariableName=[AboveGroundLive].Wt
                  PhaseLookup SpecificFixationRate
                    PhaseLookupValue VegetativeGrowth: Start=Emergence; End=FirstFlowersSet
                      Constant Rate: FixedValue=0.006
                    PhaseLookupValue ReproductiveGrowth: Start=FirstFlowersSet; End=LastGrainsFilled
                      Constant Rate: FixedValue=0.002
                Constant MaximumFixationRate: FixedValue=0.6
            Constant Uptake: FixedValue=0
            NutrientPoolFunctions ReAllocation: same as Replacements.Lentil.Leaf.Carbon.Supply.ReAllocation
            NutrientPoolFunctions ReTranslocation: same as Replacements.Lentil.Leaf.Nitrogen.Supply.ReTranslocation
          NutrientConcentrationFunctions Concentrations: same as Replacements.Lentil.Root.Nitrogen.Concentrations
        Constant TotalDMDemand: FixedValue=0; Units=g/m2
        BiomassRemoval BiomassRemovalDefaults: HarvestFractionLiveToRemove=0; HarvestFractionDeadToRemove=0; HarvestFractionLiveToResidue=1; HarvestFractionDeadToResidue=1
        MultiplyFunction TotalCarbonDemand
          VariableReference TotalDMDemand: VariableName=[Nodule].TotalDMDemand
          VariableReference Cconc: VariableName=[Stem].Cconc
      Organ Pod: Cconc=0.4; IsAboveGround=true
        Constant InitialWt: FixedValue=0; Units=g/m2
        Respiration: same as Replacements.Lentil.Grain.Respiration
        VariableReference SenescenceRate: VariableName=[Leaf].senescenceRate
        Constant DetachmentRate: FixedValue=0; Units=/d
        OrganNutrientDelta Carbon: MaxCDelta=0
          OrganNutrientSupplies Supplies: Fixation=0; Uptake=0
            NutrientPoolsState ReAllocation
            NutrientPoolsState ReTranslocation
          NutrientDemandFunctions DemandFunctions: same as Replacements.Lentil.Root.Carbon.DemandFunctions
          NutrientSupplyFunctions SupplyFunctions: same as Replacements.Lentil.Leaf.Nitrogen.Supply
          NutrientProportionFunctions PoolFractions: same as Replacements.Lentil.Grain.Carbon.Proportion
        OrganNutrientDelta Nitrogen: MaxCDelta=0
          OrganNutrientSupplies Supplies: Fixation=0; Uptake=0
            NutrientPoolsState ReAllocation
            NutrientPoolsState ReTranslocation
          NutrientDemandFunctions DemandFunctions: same as Replacements.Lentil.Root.Carbon.DemandFunctions
          NutrientSupplyFunctions SupplyFunctions: same as Replacements.Lentil.Leaf.Nitrogen.Supply
          NutrientConcentrationFunctions Concentration
            AddFunction Maximum
              VariableReference MinNConc: VariableName=[Pod].Nitrogen.Concentration.Minimum
              LinearInterpolationFunction NonStructural
                XYPairs: X=[3, 5, 6, 8]; Y=[0.025, 0.025, 0.015, 0]
                VariableReference XValue: VariableName=[Phenology].Stage
            AddFunction Critical
              VariableReference MinNConc: VariableName=[Pod].Nitrogen.Concentration.Minimum
              MultiplyFunction MetabolicN
                SubtractFunction NonStructural
                  VariableReference MaxNConc: VariableName=[Pod].Nitrogen.Concentration.Maximum
                  VariableReference MinNConc: VariableName=[Pod].Nitrogen.Concentration.Minimum
                Constant PropnMetabolicInNonStructural: FixedValue=0
            Constant Minimum: FixedValue=0.01; Units=g/g
        BiomassRemoval BiomassRemovalDefaults: HarvestFractionLiveToRemove=0; HarvestFractionDeadToRemove=0; HarvestFractionLiveToResidue=1; HarvestFractionDeadToResidue=1
        MultiplyFunction TotalCarbonDemand
          PhaseLookupValue TotalDMDemand: Start=FirstFlowersSet; End=LastPodsDeveloped
            AllometricDemandFunction AllometricDemand: Const=0.1; Power=1
              VariableReference XValue: VariableName=[AboveGround].Wt
              VariableReference YValue: VariableName=[Pod].Wt
          VariableReference Cconc: VariableName=[Pod].Cconc
      Organ Stem: Cconc=0.4; IsAboveGround=true
        Constant InitialWt: FixedValue=1; Units=g/m2
        Respiration: same as Replacements.Lentil.Grain.Respiration
        VariableReference SenescenceRate: VariableName=[Leaf].senescenceRate
        Constant DetachmentRate: FixedValue=0; Units=/d
        OrganNutrientDelta Carbon: same as Replacements.Lentil.Pod.Carbon
        OrganNutrientDelta Nitrogen: MaxCDelta=0
          OrganNutrientSupplies Supplies: Fixation=0; Uptake=0
            NutrientPoolsState ReAllocation
            NutrientPoolsState ReTranslocation
          NutrientDemandFunctions DemandFunctions: same as Replacements.Lentil.Root.Carbon.DemandFunctions
          NutrientSupplyFunctions SupplyFunctions: same as Replacements.Lentil.Leaf.Nitrogen.Supply
          NutrientConcentrationFunctions Concentration
            AddFunction Maximum
              VariableReference MinNConc: VariableName=[Stem].Nitrogen.Concentration.Minimum
              LinearInterpolationFunction NonStructural
                XYPairs: X=[3, 5, 6, 8]; Y=[0.025, 0.025, 0.015, 0]
                VariableReference XValue: VariableName=[Phenology].Stage
            AddFunction Critical
              VariableReference MinNConc: VariableName=[Stem].Nitrogen.Concentration.Minimum
              MultiplyFunction MetabolicN
                SubtractFunction NonStructural
                  VariableReference MaxNConc: VariableName=[Stem].Nitrogen.Concentration.Maximum
                  VariableReference MinNConc: VariableName=[Stem].Nitrogen.Concentration.Minimum
                Constant PropnMetabolicInNonStructural: FixedValue=0
            Constant Minimum: FixedValue=0.01; Units=g/g
        BiomassRemoval BiomassRemovalDefaults: HarvestFractionLiveToRemove=0; HarvestFractionDeadToRemove=0; HarvestFractionLiveToResidue=1; HarvestFractionDeadToResidue=1
        MultiplyFunction TotalCarbonDemand
          AllometricDemandFunction TotalDMDemand: Const=1; Power=1
            VariableReference XValue: VariableName=[Leaf].Live.Wt
            VariableReference YValue: VariableName=[Stem].Live.Wt
          VariableReference Cconc: VariableName=[Stem].Cconc
      CompositeStates Fruit: Propertys=[[Pod].Live, [Pod].Dead, [Grain].Live, [Grain].Dead]
        DivideFunction HarvestIndex
          VariableReference FruitWt: VariableName=[Fruit].Wt
          VariableReference AboveGroundWt: VariableName=[AboveGround].Wt
        Constant PotentialHarvestIndex: FixedValue=0.5
          Memo
            This approach is based upon that used in [#robertson_simulation_2002].
      CompositeStates AboveGround
        Propertys=[[Leaf].Live, [Leaf].Dead, [Grain].Live, [Grain].Dead, [Stem].Live, [Stem].Dead, [Pod].Live, [Pod].Dead]
      CompositeStates BelowGround: Propertys=[[Root].Live, [Root].Dead, [Nodule].Live, [Nodule].Dead]
      CompositeStates AboveGroundLive: Propertys=[[Leaf].Live, [Grain].Live, [Stem].Live, [Pod].Live]
      CompositeStates AboveGroundDead: Propertys=[[Leaf].Dead, [Grain].Dead, [Stem].Dead, [Pod].Dead]
      CompositeStates Total
        Propertys=[[Leaf].Live, [Leaf].Dead, [Grain].Live, [Grain].Dead, [Stem].Live, [Stem].Dead, [Pod].Live, [Pod].Dead, [Root].Live, [Root].Dead, [Nodule].Live, [Nodule].Dead]
      CompositeStates TotalLive
        Propertys=[[Leaf].Live, [Grain].Live, [Stem].Live, [Pod].Live, [Root].Live, [Nodule].Live]
      CompositeStates TotalDead
        Propertys=[[Leaf].Dead, [Grain].Dead, [Stem].Dead, [Pod].Dead, [Root].Dead, [Nodule].Dead]
      Folder Cultivars
        Cultivar Ace
          Command:
            [Phenology].JuvenileBase.FixedValue = 91
            [Phenology].VernSensitivity.FixedValue = 0.85
            [Phenology].InductivePpSensitivity.FixedValue = 0.37
            [Phenology].FlowerAbortionPpSensitivity.FixedValue = 0
        Cultivar Aldinga
          Command:
            [Phenology].JuvenileBase.FixedValue = 90
            [Phenology].VernSensitivity.FixedValue = 0.97
            [Phenology].InductivePpSensitivity.FixedValue = 0.48
        Cultivar Blitz
          Command:
            [Phenology].JuvenileBase.FixedValue = 70
            [Phenology].VernSensitivity.FixedValue = 0.35
            [Phenology].InductivePpSensitivity.FixedValue = 0.56
            [Phenology].FlowerAbortionPpSensitivity.FixedValue = 0
        Cultivar Bolt
          Command:
            [Phenology].JuvenileBase.FixedValue = 30
            [Phenology].VernSensitivity.FixedValue = 0.22
            [Phenology].InductivePpSensitivity.FixedValue = 0.62
            [Phenology].FlowerAbortionPpSensitivity.FixedValue = 0.02
        Cultivar Boomer
          Command:
            [Phenology].JuvenileBase.FixedValue = 131
            [Phenology].VernSensitivity.FixedValue = .76
            [Phenology].InductivePpSensitivity.FixedValue = 0.43
        Cultivar CIPAL0901
          Command:
            [Phenology].JuvenileBase.FixedValue = 180
            [Phenology].VernSensitivity.FixedValue = 0.73
            [Phenology].InductivePpSensitivity.FixedValue = 0.21
        Cultivar CIPAL1504
          Command:
            [Phenology].JuvenileBase.FixedValue = 86
            [Phenology].VernSensitivity.FixedValue = 1.13
            [Phenology].InductivePpSensitivity.FixedValue = 0.34
        Cultivar CIPAL1701
          Command:
            [Phenology].JuvenileBase.FixedValue = 112
            [Phenology].VernSensitivity.FixedValue = 1.12
            [Phenology].InductivePpSensitivity.FixedValue = 0.15
        Cultivar Commando
          Command:
            [Phenology].JuvenileBase.FixedValue = 160
            [Phenology].VernSensitivity.FixedValue = 0.75
            [Phenology].InductivePpSensitivity.FixedValue = 0.82
        Cultivar Digger
          Command:
            [Phenology].JuvenileBase.FixedValue = 150
            [Phenology].VernSensitivity.FixedValue = 0.85
            [Phenology].InductivePpSensitivity.FixedValue = 1.1
            [Leaf].AreaOfLargest.FixedValue = 0.0005
        Cultivar Flash
          Command:
            [Phenology].JuvenileBase.FixedValue = 146
            [Phenology].VernSensitivity.FixedValue = 0.91
            [Phenology].InductivePpSensitivity.FixedValue = 0.4
        Cultivar Greenfield
          Command:
            [Phenology].JuvenileBase.FixedValue = 305
            [Phenology].VernSensitivity.FixedValue = 0
            [Phenology].InductivePpSensitivity.FixedValue = 0.67
            [Phenology].FlowerAbortionPpSensitivity.FixedValue = 0
        Cultivar Giant
          Command:
            [Phenology].JuvenileBase.FixedValue = 127
            [Phenology].VernSensitivity.FixedValue = 0.81
            [Phenology].InductivePpSensitivity.FixedValue = 0.28
        Cultivar HallmarkXT
          Command:
            [Phenology].JuvenileBase.FixedValue = 200
            [Phenology].VernSensitivity.FixedValue = 0.0
            [Phenology].InductivePpSensitivity.FixedValue = 0.93
            [Phenology].FlowerAbortionPpSensitivity.FixedValue = 0
        Cultivar Hurricane
          Command:
            [Phenology].JuvenileBase.FixedValue = 293
            [Phenology].VernSensitivity.FixedValue = 0.45
            [Phenology].InductivePpSensitivity.FixedValue = 0.30
        Cultivar Indianhead
          Command:
            [Phenology].JuvenileBase.FixedValue = 49
            [Phenology].VernSensitivity.FixedValue = 0.92
            [Phenology].InductivePpSensitivity.FixedValue = 0.86
        Cultivar Jumbo
          Command:
            [Phenology].JuvenileBase.FixedValue = 81
            [Phenology].VernSensitivity.FixedValue = 0.96
            [Phenology].InductivePpSensitivity.FixedValue = 0.37
        Cultivar Jumbo2
          Command:
            [Phenology].JuvenileBase.FixedValue = 75
            [Phenology].VernSensitivity.FixedValue = 0.89
            [Phenology].InductivePpSensitivity.FixedValue = 0.36
            [Phenology].FlowerAbortionPpSensitivity.FixedValue = 0
        Cultivar Matilda
          Command:
            [Phenology].JuvenileBase.FixedValue = 78
            [Phenology].VernSensitivity.FixedValue = 0.87
            [Phenology].InductivePpSensitivity.FixedValue = 0.37
        Cultivar Nipper
          Command:
            [Phenology].JuvenileBase.FixedValue = 40
            [Phenology].VernSensitivity.FixedValue = 0.85
            [Phenology].InductivePpSensitivity.FixedValue = 0.65
        Cultivar Northfield
          Command:
            [Phenology].JuvenileBase.FixedValue = 0
            [Phenology].VernSensitivity.FixedValue = 1.38
            [Phenology].InductivePpSensitivity.FixedValue = 0.59
        Cultivar Nugget
          Command:
            [Phenology].JuvenileBase.FixedValue = 207
            [Phenology].VernSensitivity.FixedValue = 0.74
            [Phenology].InductivePpSensitivity.FixedValue = 0.21
            [Phenology].FlowerAbortionPpSensitivity.FixedValue = 0.09
        Cultivar Terrier
          Command:
            [Phenology].JuvenileBase.FixedValue = 75
            [Phenology].VernSensitivity.FixedValue = 0.89
            [Phenology].InductivePpSensitivity.FixedValue = 0.36
            [Phenology].FlowerAbortionPpSensitivity.FixedValue = 0
        Cultivar Precoz
          Command:
            [Phenology].JuvenileBase.FixedValue = 67
            [Phenology].VernSensitivity.FixedValue = 0.5
            [Phenology].InductivePpSensitivity.FixedValue = 0.25
            [Phenology].FlowerAbortionPpSensitivity.FixedValue = 0
        Cultivar Laird
          Command:
            [Phenology].JuvenileBase.FixedValue = 360
            [Phenology].VernSensitivity.FixedValue = 0.44
            [Phenology].InductivePpSensitivity.FixedValue = 0.22
            [Phenology].FlowerAbortionPpSensitivity.FixedValue = 0.44
        Cultivar Syrian
          Command:
            [Phenology].JuvenileBase.FixedValue = 0
            [Phenology].VernSensitivity.FixedValue = .37
            [Phenology].InductivePpSensitivity.FixedValue = 1.45
            [Phenology].FlowerAbortionPpSensitivity.FixedValue = .56
        Cultivar Ethiopian
          Command:
            [Phenology].JuvenileBase.FixedValue = 240
            [Phenology].VernSensitivity.FixedValue = 0.65
            [Phenology].InductivePpSensitivity.FixedValue = 0
            [Phenology].FlowerAbortionPpSensitivity.FixedValue = 0.33
      Folder NAPA Cv
        Cultivar NuggetBase
          Command:
            [Phenology].JuvenileBase.FixedValue = 207
            [Phenology].VernSensitivity.FixedValue = 0.74
            [Phenology].InductivePpSensitivity.FixedValue = 0.21
            [Phenology].FlowerAbortionPpSensitivity.FixedValue = 0.09
        Cultivar PBA_Jumbo2
          Command:
            [Phenology].JuvenileBase.FixedValue = 75
            [Phenology].VernSensitivity.FixedValue = 0.89
            [Phenology].InductivePpSensitivity.FixedValue = 0.36
            [Phenology].FlowerAbortionPpSensitivity.FixedValue = 0
        Cultivar PBA_Bolt
          Command:
            [Phenology].JuvenileBase.FixedValue = 30
            [Phenology].VernSensitivity.FixedValue = 0.22
            [Phenology].InductivePpSensitivity.FixedValue = 0.62
            [Phenology].FlowerAbortionPpSensitivity.FixedValue = 0.02
        Cultivar PBA_KelpieXT
        Cultivar PBA_HallmarkXT
          Command:
            [Phenology].JuvenileBase.FixedValue = 200
            [Phenology].VernSensitivity.FixedValue = 0.0
            [Phenology].InductivePpSensitivity.FixedValue = 0.93
            [Phenology].FlowerAbortionPpSensitivity.FixedValue = 0
        Cultivar PBA_Greenfield
          Command:
            [Phenology].JuvenileBase.FixedValue = 305
            [Phenology].VernSensitivity.FixedValue = 0
            [Phenology].InductivePpSensitivity.FixedValue = 0.67
            [Phenology].FlowerAbortionPpSensitivity.FixedValue = 0
        Cultivar PBA_Ace
          Command:
            [Phenology].JuvenileBase.FixedValue = 91
            [Phenology].VernSensitivity.FixedValue = 0.85
            [Phenology].InductivePpSensitivity.FixedValue = 0.37
            [Phenology].FlowerAbortionPpSensitivity.FixedValue = 0
        Cultivar PBA_Blitz
          Command:
            [Phenology].JuvenileBase.FixedValue = 70
            [Phenology].VernSensitivity.FixedValue = 0.35
            [Phenology].InductivePpSensitivity.FixedValue = 0.56
            [Phenology].FlowerAbortionPpSensitivity.FixedValue = 0
        Cultivar GIA_Leader
        Cultivar GIA_Lightning
      Constant MortalityRate: FixedValue=0
      Constant SeedMortalityRate: FixedValue=0
    Plant Chickpea: PlantType=Chickpea
      Memo TitlePage
        Direct copy of Lentil

        The model consists of:

        * a phenology model to simulate development between growth phases
        * a structure model to simulate plant morphology
        * a collection of organs to simulate the various plant parts
        * an arbitrator to allocate resources (N, biomass) to the various plant organs
      BiomassArbitrator
        PlantNutrientsDelta Carbon
        PlantNutrientsDelta Nitrogen
      RootUptakesArbitrator
      Phenology
        Memo Introduction
          In the new model we simplified phenology by taking out stages that are not measurable (e.g. end of juvenile stage) and by adding new stages that are measurable (e.g. start pod).
          The new phenology follows the V/R staging system
        Constant JuvenileBase: FixedValue=400
        Constant VernSensitivity: FixedValue=0
        Constant InductiveBase: FixedValue=0
        Constant InductivePpSensitivity: FixedValue=0
        Constant TtFlowerDevelopment: FixedValue=200
        Constant FlowerAbortionPpSensitivity: FixedValue=0
        Constant MinFloralNodes: FixedValue=8; Units=Nodes
        Constant MaxFloralNodes: FixedValue=15; Units=Nodes
        MultiplyFunction ThermalTime: same as Replacements.Lentil.Phenology.ThermalTime
        AccumulateFunction AccumulatedVernalisation: same as Replacements.Lentil.Phenology.AccumulatedVernalisation
        LinearInterpolationFunction VernalisationSaturation
          XYPairs: X=[0, 40, -, -]; Y=[0, 1, -, -]
          Memo
            These parameters are overridden by cultivar parameter descriptions to capture the difference between individual cultivars in terms of their phenological development.  Responses shown here are only indicative.  See cultivar descriptions for more information.
          VariableReference XValue: VariableName=[Phenology].AccumulatedVernalisation
        PhotoperiodFunction Photoperiod: Twilight=-6; DayLength=0
        MovingAverageFunction PpResponse: NumberOfDays=100; StageToStartMovingAverage=Emergence
          LinearInterpolationFunction PpResponseDaily
            XYPairs: X=[15, 18, -, -]; Y=[1, 0, -, -]
            VariableReference XValue: VariableName=[Phenology].Photoperiod
        GerminatingPhase Germinating: Start=Sowing; End=Germination; IsEmerged=false
          Constant MinSoilTemperature: FixedValue=0
        EmergingPhase Emerging: same as Replacements.Lentil.Phenology.Emerging
        GenericPhase Juvenile: same as Replacements.Lentil.Phenology.Juvenile
        GenericPhase Inductive: Start=FloralInitiation; End=FirstBudsVisiable; IsEmerged=true
          VariableReference Progression: VariableName=[Phenology].ThermalTime
          AddFunction CalculateTarget
            VariableReference InductiveBase: VariableName=[Phenology].InductiveBase
            MultiplyFunction ShortPpExtension
              MultiplyFunction PotentialPpResponse
                Constant SpeciesMaxShortDayResponse: FixedValue=1000
                VariableReference GenotypeRelativePpSensitivity: VariableName=[Phenology].InductivePpSensitivity
              VariableReference PpResponse: VariableName=[Phenology].PpResponse
          HoldFunction Target: WhenToHold=TerminalNode
            VariableReference ValueToHold: VariableName=[Phenology].Inductive.CalculateTarget
        AccumulateFunction AbortedFlowerBuds: StartStageName=FloralInitiation; EndStageName=FirstFlowersSet; FractionRemovedOnCut=0; FractionRemovedOnHarvest=0; FractionRemovedOnGraze=0; FractionRemovedOnPrune=0
          MultiplyFunction BudsPerDay
            MinimumFunction BudsPerPhyllochron
              AddFunction BudsDelayed
                MultiplyFunction ShortDayAbortionRate
                  VariableReference PpResponseShape: VariableName=[Phenology].PpResponse
                  VariableReference GenotypeRelativePpSensitivity: VariableName=[Phenology].FlowerAbortionPpSensitivity
                MultiplyFunction NoStressAbortionRate: same as Replacements.Lentil.Phenology.AbortedFlowerBuds.BudsPerDay.BudsPerPhyllochron.BudsDelayed.NoStressAbortionRate
              Constant AllBudsAborted: FixedValue=0
            ProtectedDivideFunction DailyPhyllochrons: NumeratorErrVal=0; DenominatorErrVal=0
              VariableReference Tt: VariableName=[Phenology].ThermalTime
              VariableReference Phyllochron: VariableName=[Leaf].Phyllochron
        GenericPhase FirstFlowersDeveloping: Start=FirstBudsVisiable; End=FirstFlowersSet; IsEmerged=true
          VariableReference Progression: VariableName=[Phenology].ThermalTime
          AddFunction Target
            VariableReference FirstSuccessfulBud: VariableName=[Phenology].TtFlowerDevelopment
            MultiplyFunction DelayFromAbortedBuds (disabled)
              VariableReference Phyllochron: VariableName=[Leaf].Phyllochron
              VariableReference AbortedBuds: VariableName=[Phenology].AbortedFlowerBuds
            MultiplyFunction ShortDayExtension
              MultiplyFunction TargetAtShortPp
                Constant SpeciesMaxShortDayDuration: FixedValue=1000
                VariableReference GenotypeRelativePpSensitivity: VariableName=[Phenology].FlowerAbortionPpSensitivity
              VariableReference Shape: VariableName=[Phenology].PpResponse
        GenericPhase FirstPodsDeveloping: same as Replacements.Lentil.Phenology.FirstPodsDeveloping
        GenericPhase FirstGrainsDeveloping: same as Replacements.Lentil.Phenology.FirstGrainsDeveloping
        GenericPhase FirstGrainsFilling: Start=FirstGrainsVisiable; End=TerminalNode; IsEmerged=true
          VariableReference Progression: VariableName=[Phenology].ThermalTime
          AddFunction CalculateTarget
            SubtractFunction MinIndeterminant
              MultiplyFunction MinTt
                VariableReference MinFloralNodes: VariableName=[Phenology].MinFloralNodes
                VariableReference Phyllochron: VariableName=[Leaf].Phyllochron
              AddFunction TtFirstFlowerToFirstGrain
                VariableReference FirstPodsDeveloping: VariableName=[Phenology].FirstPodsDeveloping.Target
                VariableReference FirstGrainsDeveloping: VariableName=[Phenology].FirstGrainsDeveloping.Target
            MultiplyFunction ShortDayExtension
              MultiplyFunction MaxExtension
                VariableReference Phyllochron: VariableName=[Leaf].Phyllochron
                SubtractFunction MaxAdditionalLeaves
                  VariableReference MaxFloralNodes: VariableName=[Phenology].MaxFloralNodes
                  VariableReference MinFloralNodes: VariableName=[Phenology].MinFloralNodes
              VariableReference Shape: VariableName=[Phenology].PpResponse
            MultiplyFunction StressTruncation: same as Replacements.Lentil.Phenology.FirstGrainsFilling.CalculateTarget.StressTruncation
          HoldFunction Target: WhenToHold=TerminalNode
            VariableReference ValueToHold: VariableName=[Phenology].FirstGrainsFilling.CalculateTarget
        GenericPhase FinalPodsDeveloping: same as Replacements.Lentil.Phenology.FinalPodsDeveloping
        GenericPhase FinalGrainsFilling: same as Replacements.Lentil.Phenology.FinalGrainsFilling
        GenericPhase Ripening: same as Replacements.Lentil.Phenology.Ripening
        EndPhase ReadyForHarvesting: Start=HarvestRipe; End=Unused; IsEmerged=true
          VariableReference ThermalTime: VariableName=[Phenology].ThermalTime
        OnEventFunction EmergenceDAS: same as Replacements.Lentil.Phenology.EmergenceDAS
        OnEventFunction StartBuddingDAS: same as Replacements.Lentil.Phenology.StartBuddingDAS
        OnEventFunction StartFloweringDAS: same as Replacements.Lentil.Phenology.StartFloweringDAS
        OnEventFunction StartPoddingDAS: same as Replacements.Lentil.Phenology.StartPoddingDAS
        OnEventFunction MaturityDAS: same as Replacements.Lentil.Phenology.MaturityDAS
        AccumulateFunction DaysAfterEmergence: same as Replacements.Lentil.Phenology.DaysAfterEmergence
        OnEventFunction EmergenceTt: same as Replacements.Lentil.Phenology.EmergenceTt
        OnEventFunction StartBuddingTt: same as Replacements.Lentil.Phenology.StartBuddingTt
        OnEventFunction StartFloweringTt: same as Replacements.Lentil.Phenology.StartFloweringTt
        OnEventFunction StartPoddingTt: same as Replacements.Lentil.Phenology.StartPoddingTt
        OnEventFunction MaturityTt: same as Replacements.Lentil.Phenology.MaturityTt
        AccumulateFunction EarlyWaterStress: same as Replacements.Lentil.Phenology.EarlyWaterStress
        AccumulateFunction FloweringWaterStress: same as Replacements.Lentil.Phenology.FloweringWaterStress
        AccumulateFunction GrainFillingWaterStress: same as Replacements.Lentil.Phenology.GrainFillingWaterStress
      Organ Grain: Cconc=0.4; IsAboveGround=true
        BiomassRemoval BiomassRemovalDefaults: HarvestFractionLiveToRemove=0.95; HarvestFractionDeadToRemove=0; HarvestFractionLiveToResidue=0.05; HarvestFractionDeadToResidue=1
        OrganNutrientDelta Carbon: same as Replacements.Lentil.Grain.Carbon
        Constant detachmentRate: FixedValue=0; Units=/d
        DivideFunction HarvestIndex
          VariableReference GrainWt: VariableName=[Grain].Wt
          VariableReference AboveGroundWt: VariableName=[AboveGround].Wt
        Constant InitialWt: FixedValue=0
        OrganNutrientDelta Nitrogen: same as Replacements.Lentil.Grain.Nitrogen
        Constant NumberFunction: FixedValue=0
          Memo
            Grain number is not estimated by this model.
        MultiplyFunction PotentialHarvestIndex
          VariableReference PodHarvestIndex: VariableName=[Fruit].PotentialHarvestIndex
          Constant GrainFraction: FixedValue=0.72; Units=0-1
        Respiration: same as Replacements.Lentil.Grain.Respiration
        Constant senescenceRate: FixedValue=0; Units=/d
        MultiplyFunction TotalCarbonDemand
          PhaseLookupValue TotalDMDemand: Start=FirstGrainsVisiable; End=LastGrainsFilled
            AllometricDemandFunction AllometricDemand: Const=0.55; Power=1
              VariableReference YValue: VariableName=[Grain].Live.Wt
              VariableReference XValue: VariableName=[Total].Wt
          VariableReference Cconc: VariableName=[Grain].Cconc
        MultiplyFunction TotalDMDemand: same as Replacements.Lentil.Grain.TotalDMDemand
        Constant WaterContent: FixedValue=0.13
        Constant Size: FixedValue=0; Units=/d
      Organ Leaf: Cconc=0.4; IsAboveGround=true
        Constant AreaOfLargest: FixedValue=0.0009
        Constant BasePhyllochron: FixedValue=40
          Memo
            This value is based upon that used in [#robertson_simulation_2002].
        BiomassRemoval BiomassRemovalDefaults: HarvestFractionLiveToRemove=0; HarvestFractionDeadToRemove=0; HarvestFractionLiveToResidue=1; HarvestFractionDeadToResidue=1
        EnergyBalance Canopy: Albedo=0.2; Gsmax350=0.005; R50=100; KDead=0; LAIDead=0
          Constant DeadExtinctionCoefficient: FixedValue=0.578136
          MultiplyFunction DeadAreaIndex: same as Replacements.Lentil.Leaf.Canopy.DeadAreaIndex
          VariableReference Deepness: VariableName=[Leaf].Canopy.Height
          MinimumFunction FRGRer: same as Replacements.Lentil.Leaf.Canopy.FRGRer
          LeafArea GreenAreaIndex: same as Replacements.Lentil.Leaf.Canopy.GreenAreaIndex
          MultiplyFunction GreenExtinctionCoefficient
            Constant PotentialExtinctionCoeff: FixedValue=0.5
              Memo
                The extinction coefficient value of 0.74 ([#Chakwizira_etal_2016a]) was used.
            LinearInterpolationFunction WaterStress
              XYPairs: X=[0, 0.641792, 1]; Y=[1, 1, 1]
              VariableReference XValue: VariableName=[Leaf].Canopy.Fw
          DivideFunction SpecificArea
            VariableReference LAI: VariableName=[Leaf].Canopy.LAI
            VariableReference LeafWt: VariableName=[Leaf].Live.Wt
          StomatalConductanceCO2Modifier
            VariableReference PhotosynthesisCO2Modifier: VariableName=[Leaf].Photosynthesis.FCO2
          LinearInterpolationFunction Tallness: same as Replacements.Lentil.Leaf.Canopy.Tallness
          Constant Wideness: FixedValue=0
        OrganNutrientDelta Carbon: same as Replacements.Lentil.Leaf.Carbon
        Constant detachmentRate: FixedValue=0; Units=/d
        MultiplyFunction InitialWt
          Constant MassPerPlant: FixedValue=0.001
          VariableReference Population: VariableName=[Chickpea].SowingData.Population
        OrganNutrientDelta Nitrogen: same as Replacements.Lentil.Leaf.Nitrogen
        AccumulateFunction NodeNumber: same as Replacements.Lentil.Leaf.NodeNumber
        RUEModel Photosynthesis: same as Replacements.Lentil.Leaf.Photosynthesis
        PhaseLookup Phyllochron: same as Replacements.Lentil.Leaf.Phyllochron
        Respiration: same as Replacements.Lentil.Grain.Respiration
        PhaseLookup senescenceRate: same as Replacements.Lentil.Leaf.senescenceRate
        LinearInterpolationFunction SpecificAreaTotal: same as Replacements.Lentil.Leaf.SpecificAreaTotal
        ProtectedDivideFunction StructuralSpecificArea: same as Replacements.Lentil.Leaf.StructuralSpecificArea
        MultiplyFunction TotalCarbonDemand
          DivideFunction TotalDMDemand
            PhaseLookup DeltaLAIPotential
              PhaseLookupValue Vegetative: Start=Emergence; End=TerminalNode
                MultiplyFunction Delta
                  VariableReference AreaLargestLeaf: VariableName=[Leaf].AreaOfLargest
                  PhaseLookup RelativeArea: same as Replacements.Lentil.Leaf.TotalCarbonDemand.TotalDMDemand.DeltaLAIPotential.Vegetative.Delta.RelativeArea
                  VariableReference PlantNumber: VariableName=[Chickpea].SowingData.Population
                  AddFunction BranchNumber: same as Replacements.Lentil.Leaf.TotalCarbonDemand.TotalDMDemand.DeltaLAIPotential.Vegetative.Delta.BranchNumber
                  DivideFunction LAR
                    VariableReference TT: VariableName=[Phenology].ThermalTime
                    VariableReference Phyllochron: VariableName=[Leaf].Phyllochron
                  LinearInterpolationFunction LeafSizeWaterStressFactor: same as Replacements.Lentil.Leaf.TotalCarbonDemand.TotalDMDemand.DeltaLAIPotential.Vegetative.Delta.LeafSizeWaterStressFactor
              PhaseLookupValue Reproductive: Start=TerminalNode; End=HarvestRipe
                Constant: FixedValue=0
            VariableReference SLA: VariableName=[Leaf].SpecificAreaTotal
            Memo
              Growth in leaf area is used to calculate the leaf dry matter demand. The same was assumed in the original crop models in APSIM. Further model development can be taken once new experimental data for metabolic, structural and storage forms are provided.
            Memo Memo1
              DeltaLAI describes the LAI variation over the cycle and is calculated using the Area of Largest Leaf, relative leaf area, plant number, branch number and leaf appearance rate (thermal time/phyllochron).
          VariableReference Cconc: VariableName=[Leaf].Cconc
      Organ Root: same as Replacements.Lentil.Root
      Organ Nodule: same as Replacements.Lentil.Nodule
      Organ Pod: same as Replacements.Lentil.Pod
      Organ Stem: same as Replacements.Lentil.Stem
      CompositeStates Fruit: same as Replacements.Lentil.Fruit
      CompositeStates AboveGround
        Propertys=[[Leaf].Live, [Leaf].Dead, [Grain].Live, [Grain].Dead, [Stem].Live, [Stem].Dead, [Pod].Live, [Pod].Dead]
      CompositeStates BelowGround: Propertys=[[Root].Live, [Root].Dead, [Nodule].Live, [Nodule].Dead]
      CompositeStates AboveGroundLive: Propertys=[[Leaf].Live, [Grain].Live, [Stem].Live, [Pod].Live]
      CompositeStates AboveGroundDead: Propertys=[[Leaf].Dead, [Grain].Dead, [Stem].Dead, [Pod].Dead]
      CompositeStates Total
        Propertys=[[Leaf].Live, [Leaf].Dead, [Grain].Live, [Grain].Dead, [Stem].Live, [Stem].Dead, [Pod].Live, [Pod].Dead, [Root].Live, [Root].Dead, [Nodule].Live, [Nodule].Dead]
      CompositeStates TotalLive
        Propertys=[[Leaf].Live, [Grain].Live, [Stem].Live, [Pod].Live, [Root].Live, [Nodule].Live]
      CompositeStates TotalDead
        Propertys=[[Leaf].Dead, [Grain].Dead, [Stem].Dead, [Pod].Dead, [Root].Dead, [Nodule].Dead]
      Constant MortalityRate: FixedValue=0
      Constant SeedMortalityRate: FixedValue=0
      Folder NAPA Cv
        Cultivar CBA_Captain
          Command:
            [Phenology].Emerging.Target.ShootLag.FixedValue = 100
            [Phenology].Emerging.Target.DepthxRate.ShootRate.FixedValue = 0.7
            [Phenology].JuvenileBase.FixedValue = 261
            [Phenology].VernSensitivity.FixedValue = 0.03608
            [Phenology].InductiveBase.FixedValue = 102
            [Phenology].InductivePpSensitivity.FixedValue = 0.1558
        Cultivar PBA_HatTrick
          Command:
            [Phenology].Emerging.Target.ShootLag.FixedValue = 100
            [Phenology].Emerging.Target.DepthxRate.ShootRate.FixedValue = 0.7
            [Phenology].JuvenileBase.FixedValue = 273
            [Phenology].VernSensitivity.FixedValue = 0.1834
            [Phenology].InductiveBase.FixedValue = 105
            [Phenology].InductivePpSensitivity.FixedValue = 0.0536
        Cultivar PBA_Drummond
          Command:
            [Phenology].Emerging.Target.ShootLag.FixedValue = 100
            [Phenology].Emerging.Target.DepthxRate.ShootRate.FixedValue = 0.7
            [Phenology].JuvenileBase.FixedValue = 288
            [Phenology].VernSensitivity.FixedValue = 0.00418
            [Phenology].InductiveBase.FixedValue = 55
            [Phenology].InductivePpSensitivity.FixedValue = 0.2125
        Cultivar PBA_Striker
          Command:
            [Phenology].Emerging.Target.ShootLag.FixedValue = 100
            [Phenology].Emerging.Target.DepthxRate.ShootRate.FixedValue = 0.7
            [Phenology].JuvenileBase.FixedValue = 261
            [Phenology].VernSensitivity.FixedValue = 0.02429
            [Phenology].InductiveBase.FixedValue = 66
            [Phenology].InductivePpSensitivity.FixedValue = 0.145616
        Cultivar Genesis_090
        Cultivar PBA_Seamer
        Cultivar PBA_Slasher
        Cultivar PBA_Magnus
        Cultivar PBA_Boundary
        Cultivar PBA_Monarch
        Cultivar D11006_13F3HRMT4PR0004
        Cultivar D12014_14F3TMWR2AB001
    Plant Fababean: PlantType=Fababean
      Memo TitlePage
        Direct copy of Lentil

        The model consists of:

        * a phenology model to simulate development between growth phases
        * a structure model to simulate plant morphology
        * a collection of organs to simulate the various plant parts
        * an arbitrator to allocate resources (N, biomass) to the various plant organs
      BiomassArbitrator
        PlantNutrientsDelta Carbon
        PlantNutrientsDelta Nitrogen
      RootUptakesArbitrator
      Phenology
        Memo Introduction
          In the new model we simplified phenology by taking out stages that are not measurable (e.g. end of juvenile stage) and by adding new stages that are measurable (e.g. start pod).
          The new phenology follows the V/R staging system
        Constant JuvenileBase: FixedValue=400
        Constant VernSensitivity: FixedValue=0
        Constant InductiveBase: FixedValue=0
        Constant InductivePpSensitivity: FixedValue=0
        Constant TtFlowerDevelopment: FixedValue=200
        Constant FlowerAbortionPpSensitivity: FixedValue=0
        Constant MinFloralNodes: FixedValue=8; Units=Nodes
        Constant MaxFloralNodes: FixedValue=15; Units=Nodes
        MultiplyFunction ThermalTime: same as Replacements.Lentil.Phenology.ThermalTime
        AccumulateFunction AccumulatedVernalisation: same as Replacements.Lentil.Phenology.AccumulatedVernalisation
        LinearInterpolationFunction VernalisationSaturation: same as Replacements.Lentil.Phenology.VernalisationSaturation
        PhotoperiodFunction Photoperiod: Twilight=-6; DayLength=0
        MovingAverageFunction PpResponse: NumberOfDays=100; StageToStartMovingAverage=Emergence
          LinearInterpolationFunction PpResponseDaily
            XYPairs: X=[8, 16, -, -]; Y=[1, 0, -, -]
            VariableReference XValue: VariableName=[Phenology].Photoperiod
        GerminatingPhase Germinating: Start=Sowing; End=Germination; IsEmerged=false
          Constant MinSoilTemperature: FixedValue=0
        EmergingPhase Emerging: same as Replacements.Lentil.Phenology.Emerging
        GenericPhase Juvenile: same as Replacements.Lentil.Phenology.Juvenile
        GenericPhase Inductive: same as Replacements.Chickpea.Phenology.Inductive
        AccumulateFunction AbortedFlowerBuds: same as Replacements.Chickpea.Phenology.AbortedFlowerBuds
        GenericPhase FirstFlowersDeveloping: same as Replacements.Chickpea.Phenology.FirstFlowersDeveloping
        GenericPhase FirstPodsDeveloping: same as Replacements.Lentil.Phenology.FirstPodsDeveloping
        GenericPhase FirstGrainsDeveloping: same as Replacements.Lentil.Phenology.FirstGrainsDeveloping
        GenericPhase FirstGrainsFilling: same as Replacements.Chickpea.Phenology.FirstGrainsFilling
        GenericPhase FinalPodsDeveloping: same as Replacements.Lentil.Phenology.FinalPodsDeveloping
        GenericPhase FinalGrainsFilling: same as Replacements.Lentil.Phenology.FinalGrainsFilling
        GenericPhase Ripening: same as Replacements.Lentil.Phenology.Ripening
        EndPhase ReadyForHarvesting: Start=HarvestRipe; End=Unused; IsEmerged=true
          VariableReference ThermalTime: VariableName=[Phenology].ThermalTime
        OnEventFunction EmergenceDAS: same as Replacements.Lentil.Phenology.EmergenceDAS
        OnEventFunction StartBuddingDAS: same as Replacements.Lentil.Phenology.StartBuddingDAS
        OnEventFunction StartFloweringDAS: same as Replacements.Lentil.Phenology.StartFloweringDAS
        OnEventFunction StartPoddingDAS: same as Replacements.Lentil.Phenology.StartPoddingDAS
        OnEventFunction MaturityDAS: same as Replacements.Lentil.Phenology.MaturityDAS
        AccumulateFunction DaysAfterEmergence: same as Replacements.Lentil.Phenology.DaysAfterEmergence
        OnEventFunction EmergenceTt: same as Replacements.Lentil.Phenology.EmergenceTt
        OnEventFunction StartBuddingTt: same as Replacements.Lentil.Phenology.StartBuddingTt
        OnEventFunction StartFloweringTt: same as Replacements.Lentil.Phenology.StartFloweringTt
        OnEventFunction StartPoddingTt: same as Replacements.Lentil.Phenology.StartPoddingTt
        OnEventFunction MaturityTt: same as Replacements.Lentil.Phenology.MaturityTt
        AccumulateFunction EarlyWaterStress: same as Replacements.Lentil.Phenology.EarlyWaterStress
        AccumulateFunction FloweringWaterStress: same as Replacements.Lentil.Phenology.FloweringWaterStress
        AccumulateFunction GrainFillingWaterStress: same as Replacements.Lentil.Phenology.GrainFillingWaterStress
      Organ Grain: same as Replacements.Chickpea.Grain
      Organ Leaf: Cconc=0.4; IsAboveGround=true
        Constant AreaOfLargest: FixedValue=0.0009
        Constant BasePhyllochron: FixedValue=40
          Memo
            This value is based upon that used in [#robertson_simulation_2002].
        BiomassRemoval BiomassRemovalDefaults: HarvestFractionLiveToRemove=0; HarvestFractionDeadToRemove=0; HarvestFractionLiveToResidue=1; HarvestFractionDeadToResidue=1
        EnergyBalance Canopy: same as Replacements.Chickpea.Leaf.Canopy
        OrganNutrientDelta Carbon: same as Replacements.Lentil.Leaf.Carbon
        Constant detachmentRate: FixedValue=0; Units=/d
        MultiplyFunction InitialWt
          Constant MassPerPlant: FixedValue=0.001
          VariableReference Population: VariableName=[Fababean].SowingData.Population
        OrganNutrientDelta Nitrogen: same as Replacements.Lentil.Leaf.Nitrogen
        AccumulateFunction NodeNumber: same as Replacements.Lentil.Leaf.NodeNumber
        RUEModel Photosynthesis: same as Replacements.Lentil.Leaf.Photosynthesis
        PhaseLookup Phyllochron: same as Replacements.Lentil.Leaf.Phyllochron
        Respiration: same as Replacements.Lentil.Grain.Respiration
        PhaseLookup senescenceRate: same as Replacements.Lentil.Leaf.senescenceRate
        LinearInterpolationFunction SpecificAreaTotal: same as Replacements.Lentil.Leaf.SpecificAreaTotal
        ProtectedDivideFunction StructuralSpecificArea: same as Replacements.Lentil.Leaf.StructuralSpecificArea
        MultiplyFunction TotalCarbonDemand
          DivideFunction TotalDMDemand
            PhaseLookup DeltaLAIPotential
              PhaseLookupValue Vegetative: Start=Emergence; End=TerminalNode
                MultiplyFunction Delta
                  VariableReference AreaLargestLeaf: VariableName=[Leaf].AreaOfLargest
                  PhaseLookup RelativeArea: same as Replacements.Lentil.Leaf.TotalCarbonDemand.TotalDMDemand.DeltaLAIPotential.Vegetative.Delta.RelativeArea
                  VariableReference PlantNumber: VariableName=[Fababean].SowingData.Population
                  AddFunction BranchNumber: same as Replacements.Lentil.Leaf.TotalCarbonDemand.TotalDMDemand.DeltaLAIPotential.Vegetative.Delta.BranchNumber
                  DivideFunction LAR
                    VariableReference TT: VariableName=[Phenology].ThermalTime
                    VariableReference Phyllochron: VariableName=[Leaf].Phyllochron
                  LinearInterpolationFunction LeafSizeWaterStressFactor: same as Replacements.Lentil.Leaf.TotalCarbonDemand.TotalDMDemand.DeltaLAIPotential.Vegetative.Delta.LeafSizeWaterStressFactor
              PhaseLookupValue Reproductive: Start=TerminalNode; End=HarvestRipe
                Constant: FixedValue=0
            VariableReference SLA: VariableName=[Leaf].SpecificAreaTotal
            Memo
              Growth in leaf area is used to calculate the leaf dry matter demand. The same was assumed in the original crop models in APSIM. Further model development can be taken once new experimental data for metabolic, structural and storage forms are provided.
            Memo Memo1
              DeltaLAI describes the LAI variation over the cycle and is calculated using the Area of Largest Leaf, relative leaf area, plant number, branch number and leaf appearance rate (thermal time/phyllochron).
          VariableReference Cconc: VariableName=[Leaf].Cconc
      Organ Root: same as Replacements.Lentil.Root
      Organ Nodule: same as Replacements.Lentil.Nodule
      Organ Pod: same as Replacements.Lentil.Pod
      Organ Stem: same as Replacements.Lentil.Stem
      CompositeStates Fruit: same as Replacements.Lentil.Fruit
      CompositeStates AboveGround
        Propertys=[[Leaf].Live, [Leaf].Dead, [Grain].Live, [Grain].Dead, [Stem].Live, [Stem].Dead, [Pod].Live, [Pod].Dead]
      CompositeStates BelowGround: Propertys=[[Root].Live, [Root].Dead, [Nodule].Live, [Nodule].Dead]
      CompositeStates AboveGroundLive: Propertys=[[Leaf].Live, [Grain].Live, [Stem].Live, [Pod].Live]
      CompositeStates AboveGroundDead: Propertys=[[Leaf].Dead, [Grain].Dead, [Stem].Dead, [Pod].Dead]
      CompositeStates Total
        Propertys=[[Leaf].Live, [Leaf].Dead, [Grain].Live, [Grain].Dead, [Stem].Live, [Stem].Dead, [Pod].Live, [Pod].Dead, [Root].Live, [Root].Dead, [Nodule].Live, [Nodule].Dead]
      CompositeStates TotalLive
        Propertys=[[Leaf].Live, [Grain].Live, [Stem].Live, [Pod].Live, [Root].Live, [Nodule].Live]
      CompositeStates TotalDead
        Propertys=[[Leaf].Dead, [Grain].Dead, [Stem].Dead, [Pod].Dead, [Root].Dead, [Nodule].Dead]
      Constant MortalityRate: FixedValue=0
      Constant SeedMortalityRate: FixedValue=0
      Folder NAPA Cv
        Cultivar PBA_Samira
        Cultivar PBA_Marne
        Cultivar PBA_Amberley
        Cultivar PBA_Nasma
        Cultivar PBA_Nanu
        Cultivar PBA_Ayla
    Plant Lupin: PlantType=Lupin
      Memo TitlePage
        Direct copy of Lentil

        The model consists of:

        * a phenology model to simulate development between growth phases
        * a structure model to simulate plant morphology
        * a collection of organs to simulate the various plant parts
        * an arbitrator to allocate resources (N, biomass) to the various plant organs
      BiomassArbitrator
        PlantNutrientsDelta Carbon
        PlantNutrientsDelta Nitrogen
      RootUptakesArbitrator
      Phenology: same as Replacements.Fababean.Phenology
      Organ Grain: same as Replacements.Chickpea.Grain
      Organ Leaf: Cconc=0.4; IsAboveGround=true
        Constant AreaOfLargest: FixedValue=0.0009
        Constant BasePhyllochron: FixedValue=40
          Memo
            This value is based upon that used in [#robertson_simulation_2002].
        BiomassRemoval BiomassRemovalDefaults: HarvestFractionLiveToRemove=0; HarvestFractionDeadToRemove=0; HarvestFractionLiveToResidue=1; HarvestFractionDeadToResidue=1
        EnergyBalance Canopy: same as Replacements.Chickpea.Leaf.Canopy
        OrganNutrientDelta Carbon: same as Replacements.Lentil.Leaf.Carbon
        Constant detachmentRate: FixedValue=0; Units=/d
        MultiplyFunction InitialWt
          Constant MassPerPlant: FixedValue=0.001
          VariableReference Population: VariableName=[Lupin].SowingData.Population
        OrganNutrientDelta Nitrogen: same as Replacements.Lentil.Leaf.Nitrogen
        AccumulateFunction NodeNumber: same as Replacements.Lentil.Leaf.NodeNumber
        RUEModel Photosynthesis: same as Replacements.Lentil.Leaf.Photosynthesis
        PhaseLookup Phyllochron: same as Replacements.Lentil.Leaf.Phyllochron
        Respiration: same as Replacements.Lentil.Grain.Respiration
        PhaseLookup senescenceRate: same as Replacements.Lentil.Leaf.senescenceRate
        LinearInterpolationFunction SpecificAreaTotal: same as Replacements.Lentil.Leaf.SpecificAreaTotal
        ProtectedDivideFunction StructuralSpecificArea: same as Replacements.Lentil.Leaf.StructuralSpecificArea
        MultiplyFunction TotalCarbonDemand
          DivideFunction TotalDMDemand
            PhaseLookup DeltaLAIPotential
              PhaseLookupValue Vegetative: Start=Emergence; End=TerminalNode
                MultiplyFunction Delta
                  VariableReference AreaLargestLeaf: VariableName=[Leaf].AreaOfLargest
                  PhaseLookup RelativeArea: same as Replacements.Lentil.Leaf.TotalCarbonDemand.TotalDMDemand.DeltaLAIPotential.Vegetative.Delta.RelativeArea
                  VariableReference PlantNumber: VariableName=[Lupin].SowingData.Population
                  AddFunction BranchNumber: same as Replacements.Lentil.Leaf.TotalCarbonDemand.TotalDMDemand.DeltaLAIPotential.Vegetative.Delta.BranchNumber
                  DivideFunction LAR
                    VariableReference TT: VariableName=[Phenology].ThermalTime
                    VariableReference Phyllochron: VariableName=[Leaf].Phyllochron
                  LinearInterpolationFunction LeafSizeWaterStressFactor: same as Replacements.Lentil.Leaf.TotalCarbonDemand.TotalDMDemand.DeltaLAIPotential.Vegetative.Delta.LeafSizeWaterStressFactor
              PhaseLookupValue Reproductive: Start=TerminalNode; End=HarvestRipe
                Constant: FixedValue=0
            VariableReference SLA: VariableName=[Leaf].SpecificAreaTotal
            Memo
              Growth in leaf area is used to calculate the leaf dry matter demand. The same was assumed in the original crop models in APSIM. Further model development can be taken once new experimental data for metabolic, structural and storage forms are provided.
            Memo Memo1
              DeltaLAI describes the LAI variation over the cycle and is calculated using the Area of Largest Leaf, relative leaf area, plant number, branch number and leaf appearance rate (thermal time/phyllochron).
          VariableReference Cconc: VariableName=[Leaf].Cconc
      Organ Root: same as Replacements.Lentil.Root
      Organ Nodule: same as Replacements.Lentil.Nodule
      Organ Pod: same as Replacements.Lentil.Pod
      Organ Stem: same as Replacements.Lentil.Stem
      CompositeStates Fruit: same as Replacements.Lentil.Fruit
      CompositeStates AboveGround
        Propertys=[[Leaf].Live, [Leaf].Dead, [Grain].Live, [Grain].Dead, [Stem].Live, [Stem].Dead, [Pod].Live, [Pod].Dead]
      CompositeStates BelowGround: Propertys=[[Root].Live, [Root].Dead, [Nodule].Live, [Nodule].Dead]
      CompositeStates AboveGroundLive: Propertys=[[Leaf].Live, [Grain].Live, [Stem].Live, [Pod].Live]
      CompositeStates AboveGroundDead: Propertys=[[Leaf].Dead, [Grain].Dead, [Stem].Dead, [Pod].Dead]
      CompositeStates Total
        Propertys=[[Leaf].Live, [Leaf].Dead, [Grain].Live, [Grain].Dead, [Stem].Live, [Stem].Dead, [Pod].Live, [Pod].Dead, [Root].Live, [Root].Dead, [Nodule].Live, [Nodule].Dead]
      CompositeStates TotalLive
        Propertys=[[Leaf].Live, [Grain].Live, [Stem].Live, [Pod].Live, [Root].Live, [Nodule].Live]
      CompositeStates TotalDead
        Propertys=[[Leaf].Dead, [Grain].Dead, [Stem].Dead, [Pod].Dead, [Root].Dead, [Nodule].Dead]
      Constant MortalityRate: FixedValue=0
      Constant SeedMortalityRate: FixedValue=0
      Folder NAPA Cv
        Cultivar Wonga
        Cultivar PBA_Jurien
        Cultivar PBA_Bateman
        Cultivar Mandelup
        Cultivar PBA_Gunyidi
        Cultivar Jindalee
  Experiment 2019_NSW_Greenethorpe_Mixed_Detailed
    Factors
      Permutation
        Factor TOS
          CompositeFactor TOS1
            Specifications:
              [Manager].Script.TOS = TOS1
              [Clock].StartDate = 2019-04-29T00:00:00
          CompositeFactor TOS2
            Specifications:
              [Manager].Script.TOS = TOS2
              [Clock].StartDate = 2019-05-20T00:00:00
          CompositeFactor TOS3
            Specifications:
              [Manager].Script.TOS = TOS3
              [Clock].StartDate = 2019-06-10T00:00:00
        Factor Variety: Specification=[Manager].Script.Variety = PBA_Ace,PBA_Jumbo2,PBA_Blitz
        Factor WaterTrt: Specification=[Manager].Script.WaterTrt = RainFed,Irrigated
    Simulation 2019_NSW_Greenethorpe_Mixed_Detailed
      Weather: FileName=NSW_Greenethorpe.met
      Manager LocalWeather (disabled)
        patchFileName = Qld_Gatton.logger.met
```csharp
using Models.Soils;
using System.Diagnostics;
using System.Collections.Generic;
using System.IO;
using System.Data;
using System.Linq;
using System;
using Models.Interfaces;
using Models.Core;
using Models.PMF;
using APSIM.Shared.Utilities;
namespace Models
{
    [Serializable]
    [System.Xml.Serialization.XmlInclude(typeof(Model))]
    public class Script : Model
    {
        [Link] Clock clock;
        [Link] IWeather weather;
        [Link] Simulation simulation;
        [Link] Summary Summary;
        
        private DataTable data;
        private List<DateTime> dates = new List<DateTime>();

        [Description("Name of file containing weather data to patch:")]
        public string patchFileName { get; set; }
        
        [EventSubscribe("StartOfSimulation")]
        private void OnStartOfSimulation(object sender, EventArgs e)
        {
            // Ensure filename is relative to the directory where the .apsimx file is located.
            string fullFileName = PathUtilities.GetAbsolutePath(patchFileName, simulation.FileName);
        
            // Read in data.
            data = ApsimTextFile.ToTable(fullFileName);
            foreach (DataRow row in data.Rows)
                dates.Add(DataTableUtilities.GetDateFromRow(row));
                
            if (! data.Columns.Contains("rain") ||
	              ! data.Columns.Contains("radn") ||
	              ! data.Columns.Contains("mint") ||
	              ! data.Columns.Contains("maxt")) {
	            Summary.WriteMessage(this, "Columns missing from " +fullFileName, MessageType.Warning); 
	        }
        }

        [EventSubscribe("PreparingNewWeatherData")]
        private void OnPreparingNewWeatherData(object sender, EventArgs e)
        {
                // check to see if we have a row of data for today.
                int rowIndex = dates.IndexOf(clock.Today);
                if (rowIndex != -1)
                {
                    // Yes we do have data for today so patch the data.
                    foreach (DataColumn column in data.Columns)
                    {
                        if (column.ColumnName.Equals("rain", StringComparison.InvariantCultureIgnoreCase)) {
                            double val = 0;
                            if (Double.TryParse(data.Rows[rowIndex][column.ColumnName].ToString(), out val)) { 
                                weather.Rain = val;
                            }
                        } else if (column.ColumnName.Equals("maxt", StringComparison.InvariantCultureIgnoreCase)) {
                            double val = 0;
                            if (Double.TryParse(data.Rows[rowIndex][column.ColumnName].ToString(), out val)) { 
                                weather.MaxT = val;
                            }
                        } else if (column.ColumnName.Equals("mint", StringComparison.InvariantCultureIgnoreCase)) {
                            double val = 0;
                            if (Double.TryParse(data.Rows[rowIndex][column.ColumnName].ToString(), out val)) { 
                               weather.MinT = val;
                            }
                        } else if (column.ColumnName.Equals("radn", StringComparison.InvariantCultureIgnoreCase)) {
                            double val = 0;
                            if (Double.TryParse(data.Rows[rowIndex][column.ColumnName].ToString(), out val)) { 
                               weather.Radn = val; 
                            }
                        }
                        //else if (column.ColumnName.Equals("CO2", StringComparison.InvariantCultureIgnoreCase))
                        //    weather.CO2 = Convert.ToDouble(data.Rows[rowIndex][column.ColumnName]);
                        //else if (column.ColumnName.Equals("VP", StringComparison.InvariantCultureIgnoreCase))
                        //    weather.VP = Convert.ToDouble(data.Rows[rowIndex][column.ColumnName]);
                    }
                }
        }
    }
}
```
      Clock: Start=2022-01-01; End=2022-06-01
      Summary summaryfile
      SoilArbitrator Soil Arbitrator
      Zone Field: Area=1; Slope=0; AspectAngle=0; Altitude=50
        Soil: SoilType=AJAR2007; Latitude=0; Longitude=0
          DataSource=John Kirkegaard  Jeremy Whish   Farming systems trial site Iandra castle
          Memo
            All crops using wheat LL with mungbean not able to extract water below 150cm

            Soil modified and updated by Jeremy Whish on the 7/2/2020

            last updated 17/9/2020 adjustment to lower limit and DUL based on full sampling of all plots layer structure and depth changed to match field ex sampling reduced to 2m
            All crops have the wheat lowerlimit except mungbeans wheat layer 4 then half wheat, then quarter wheat, then 0
            KL Values from apsoil protocol and all soil values from protocol.

            30/9/2020  organic carbon finert and fbiom set to apsim standard values  southrn soil mineralisation turned off
          Physical
            Thickness  BD    AirDry  LL15  DUL   SAT
            100        1.38  0.05    0.1   0.23  0.43
            100        1.53  0.08    0.1   0.25  0.37
            300        1.55  0.13    0.13  0.3   0.37
            300        1.47  0.19    0.19  0.32  0.42
            300        1.48  0.21    0.21  0.32  0.41
            300        1.55  0.24    0.24  0.32  0.39
            300        1.57  0.25    0.25  0.33  0.39
            300        1.57  0.27    0.27  0.34  0.39
            SoilCrop LentilSoil: LL=[0.1, 0.1, 0.13, 0.19, 0.21, 0.24, 0.25, 0.27]; KL=[0.06, 0.06, 0.06, 0.06, 0.04, 0.04, 0.04, 0.04]; XF=[1, 1, 1, 1, 1, 1, 1, 1]
          WaterBalance SoilWater: SummerDate=1-nov; SummerU=6; SummerCona=3.5; WinterDate=1-apr; WinterU=2; WinterCona=2; DiffusConst=40; DiffusSlope=16; Salb=0.13; CN2Bare=73; CNRed=20; CNCov=0.8; PSIDul=-100; Thickness=[100, 100, 300, 300, 300, 300, 300, 300]; SWCON=[0.5, 0.5, 0.5, 0.3, 0.3, 0.3, 0.3, 0.3]
          Solute NO3: Thickness=[100, 100, 300, 300, 300, 300, 300, 300]; InitialValues=[28.9855, 26.1438, 0, 0, 0, 0, 0, 0]; InitialValuesUnits=ppm; WaterTableConcentration=0; D0=0; DepthConstant=0; MaxDepthSoluteAccessible=0; RunoffEffectivenessAtMovingSolute=0; MaxEffectiveRunoff=0
          Solute NH4: Thickness=[100, 100, 300, 300, 300, 300, 300, 300]; InitialValues=[0, 0, 0, 0, 0, 0, 0, 0]; InitialValuesUnits=ppm; WaterTableConcentration=0; D0=0; DepthConstant=0; MaxDepthSoluteAccessible=0; RunoffEffectivenessAtMovingSolute=0; MaxEffectiveRunoff=0
          Solute Urea: Thickness=[100, 100, 300, 300, 300, 300, 300, 300]; InitialValues=[0, 0, 0, 0, 0, 0, 0, 0]; InitialValuesUnits=kg/ha; WaterTableConcentration=0; D0=0; DepthConstant=0; MaxDepthSoluteAccessible=0; RunoffEffectivenessAtMovingSolute=0; MaxEffectiveRunoff=0
          Water: Thickness=[100, 100, 300, 300, 300, 300, 300, 300]; InitialValues=[0.1097, 0.1398, 0.1786, 0.2009, 0.212, 0.24, 0.2517, 0.27]; FilledFromTop=true
          Organic: FOMCNRatio=40; CarbonUnits=Total
            Thickness  Carbon  SoilCNRatio  FBiom  FInert  FOM
            100        1.02    12           0.035  0.4     305.491
            100        0.816   12           0.02   0.5     262.938
            300        0.51    12           0.015  0.7     167.657
            300        0.255   12           0.015  0.95    106.903
            300        0.153   12           0.01   0.95    68.1642
            300        0.102   12           0.01   0.95    43.4634
            300        0.102   12           0.01   0.95    27.7135
            300        0.102   12           0.01   0.95    17.6709
          Chemical: Thickness=[100, 100, 300, 300, 300, 300, 300, 300]; PH=[5.5, 6.2, 6.6, 6.8, 7.3, 7.4, 8.2, 8.4]; PHUnits=Water
          Nutrient
          SoilTemperature Temperature: InteractionsPerDay=8
          Memo Soil Translation Notes
            Soil Characterisation DB layers ( 100, 100, 200, 200, 200, 200, 200, 200, 200, 200 ) are not the same as soil.apsim ( 100, 100, 300, 300, 300, 300, 300, 300 ) layers - remapping

            ISW is from site mean value
        SurfaceOrganicMatter: InitialResidueName=maize; InitialResidueType=maize; InitialResidueMass=500; InitialStandingFraction=0; InitialCPR=0; InitialCNR=65
        MicroClimate: a_interception=0; b_interception=1; c_interception=0; d_interception=0; SoilHeatFluxFraction=0.4; MinimumHeightDiffForNewLayer=0; NightInterceptionFraction=0.5; ReferenceHeight=1
        Irrigation
        Fertiliser
        Plant Lentil: ResourceName=Chickpea
        Operations
        Manager
          csvFile = 2019_NSW_Greenethorpe_Mixed_Detailed.startingConditions.csv
          EYear = 2019
          State = NSW
          Site = Greenethorpe
          TrialType = Detailed
          Crop = Mixed
          TOS = TOS1
          Variety =
          WaterTrt =
          Replicate = 0
          AgronomyTrt = None
          SowingDepth = 30
          RowSpacing = 300
          Population = 25
          SowDate = na
          UseStandardCultivars = False
```csharp
using System;
using System.Data;
using System.Collections.Generic;
using System.Linq;
using System.IO;
using APSIM.Core;
using APSIM.Shared.Utilities;
using Models.Climate;
using Models.Core;
using Models.Functions;
using Models.PMF;
using Models.Soils;
using Models.Utilities;

namespace Models
{
    [Serializable]
    public class Script : Model, IStructureDependency
    {
        [Link] private Simulation simulation;
        [Link] private Clock Clock;
        [Link] private Fertiliser Fertiliser;
        [Link] private Summary Summary;
        [Link] private Soil Soil;
        [Link] private Water Water;
        [Link] private Operations Operations;
        [Link] private Weather Weather;
        private IPlant plant;
        private IFunction buddingDAS;
        private IFunction poddingDAS;
        private IFunction floweringDAS;
        private IFunction maturityDAS;
        [Link(ByName=true)] private Report HarvestReport;
        [Link(ByName=true)] private Report DevelReport;
        [Link(ByName=true)] private Report SoilReport;
        private int layer800mm;
        private Accumulator accumulatedRain;
        
        public IStructure Structure { private get; set; }
        
        private IEnumerable<IModelCommand> commands;
        
        private double [] cropLL;
        private double [] DUL;
        private double [] Thickness;
        private List<DateTime> dates = new List<DateTime>();

        [Description("Index table of experiment")]
        public string csvFile { get; set; }

        [Description("Experimental Year ()")]
        public string EYear { get; set; }
        
        [Description("State ()")]
        public string State { get; set; }
        
        [Description("Site ()")]
        public string Site { get; set; }

        [Description("TrialType ()")]
        public string TrialType { get; set; }
                                                
        [Description("Crop ()")]
        public string Crop { get; set; }
                        
        [Description("Time of Sowing (TOS1,2,3)")]
        public string TOS { get; set; }
        
        [Description("Cultivar to be sown")]
        public string Variety { get; set; }
         
        [Description("Water treatment")]
        public string WaterTrt { get; set; }

        [Description("Replicate")]
        public int Replicate { get; set; }

        [Description("Agronomy treatment")]
        public string AgronomyTrt { get; set; }

         
        [Description("Sowing depth (mm)")]
        public double SowingDepth { get; set; }
        
        [Description("Row spacing (mm)")]
        public string RowSpacing { get; set; }
        
        [Description("Plant population (/m2)")]
        public double Population { get; set; }
        
        [Description("Sowing Date (dd-mmm)")]
        public string SowDate {get; set;}

        [Description("Use Standard Cultivars ()")]
        public bool UseStandardCultivars {get; set;}

        public string ID {get; set;}

        public string ymd {get {
          return "d" + Clock.Today.ToString("yyyy-MM-dd");
        } set;}
        
        [EventSubscribe("StartOfSimulation")]
        private void OnSimulationCommencing(object sender, EventArgs e)
        {
           if (Crop.Contains(",")) {
               Crop = "Mixed"; 
           } 
           ID = (EYear + "_" + State + "_" + Site + "_" + Crop + "_" + TrialType + "_" + TOS + "_" + Variety + "_" + WaterTrt).ToString().ToLower();
           if (AgronomyTrt != "None") 
             ID += "_" + AgronomyTrt.ToLower();

           // mixed experiments determine crop type from variety
           if (Crop == "Mixed") {   
              // print(experiments[experiments$Crop=="Mixed",c("Variety", "MixedCropType")] %>%unique(), n=25)
              var cropVarieties = new Dictionary<string, string>() {
{"PBA_Ace" , "Lentil"},
{"PBA_Jumbo2" , "Lentil"},
{"PBA_Blitz" , "Lentil"},
{"PBA_KelpieXT" , "Lentil"},
{"PBA_HatTrick" , "Chickpea"},
{"PBA_Slasher" , "Chickpea"},
{"Genesis_090" , "Chickpea"},
{"PBA_Monarch" , "Chickpea"},
{"PBA_Drummond" , "Chickpea"},
{"CBA_Captain" , "Chickpea"},
{"PBA_Striker" , "Chickpea"},
{"PBA_Samira" , "Fababean"},
{"PBA_Marne" , "Fababean"},
{"PBA_Amberley" , "Fababean"},
{"PBA_Nasma" , "Fababean"},
{"Jindalee" , "Lupin"},
{"Wonga" , "Lupin"},
{"PBA_Bateman" , "Lupin"},
{"PBA_Jurien" , "Lupin"}
// not for now {"Canola" , "Canola"},
}; 
               if (!cropVarieties.ContainsKey(Variety)) {
                 throw new Exception("Don't know what crop to use for variety \"" + Variety + "\"");
               }
               Crop = cropVarieties[Variety];
           }
           
           if (UseStandardCultivars) {
              Variety = Variety.
                 Replace("PBA_", ""). 
                 Replace("CBA_", ""). 
                 Replace("Genesis_090", "Genesis90"); 
           }

           plant =   Structure.FindChild<IModel>(Crop, recurse: true, relativeTo: (INodeModel)simulation) as IPlant;
           if (plant == null) { throw new Exception("Cant find crop component \"" + Crop +"\""); }
             
           buddingDAS =   Structure.FindChild<IModel>("StartBuddingDAS", recurse: true, relativeTo: (INodeModel)plant) as IFunction;
           poddingDAS =   Structure.FindChild<IModel>("StartPoddingDAS", recurse: true, relativeTo: (INodeModel)plant) as IFunction;
           floweringDAS =   Structure.FindChild<IModel>("StartFloweringDAS", recurse: true, relativeTo: (INodeModel)plant) as IFunction;
           maturityDAS =   Structure.FindChild<IModel>("MaturityDAS", recurse: true, relativeTo: (INodeModel)plant) as IFunction;
           
           // Ensure filename is relative to the directory where the .apsimx file is located.
           string fullFileName = PathUtilities.GetAbsolutePath(csvFile, simulation.FileName);
           
           // Read in data.
           var data = readCSV(fullFileName, ID);

           var cmdCol = data.Columns.IndexOf("command");
           if (cmdCol < 0) {throw new Exception("Missing 'command' column");}

           var dateCol = data.Columns.IndexOf("date");
           if (dateCol < 0) {throw new Exception("Missing 'date' column");}

           if (Operations.OperationsList == null)
                Operations.OperationsList = new List<Operation>();
                
           var myInitCommands = new List<String>();
           foreach (DataRow row in data.Rows) { 
              if (row[dateCol].ToString() == "init") {
                  myInitCommands.Add(row[cmdCol].ToString());
              } else {
                  var op = new Operation{Date = row[dateCol].ToString(), Action = row[cmdCol].ToString(), Enabled = true};
                  Operations.OperationsList.Add(op);
              }
           }
           //if (SowDate.ToLower() == "na") {
           //     Summary.WriteMessage(this, "No Sowing date for '" + myID + "'", MessageType.Information);
           //     Clock.EndDate = Clock.StartDate;
           //} else 
           if (myInitCommands.Count <= 0) {
                Summary.WriteMessage(this, "No initial commands for '" + ID + "'", MessageType.Information);
                Clock.EndDate = Clock.StartDate;
           } else {
                Summary.WriteMessage(this, "Doing initialisation (key = '" + ID + "')\n" +
                                     string.Join("\n", myInitCommands), MessageType.Information);
                commands = CommandLanguage.StringToCommands(myInitCommands.ToArray(), 
                               relativeTo: Parent as INodeModel, relativeToDirectory: null);
                CommandProcessor.Run(commands, relativeTo: Parent as INodeModel, runner: null);
           }
           
           AgronomyTrt = AgronomyTrt.ToLower();
           if (AgronomyTrt != "none")
           {
               if (AgronomyTrt == "density_1")
                  Population = 1 * Population;
               else if (AgronomyTrt == "density_0.66") 
                  Population = 0.66 * Population;
               else if (AgronomyTrt == "natural" ) 
                   /* nothing to do */ ;
               else if (AgronomyTrt == "16_hr" ) 
                   /* nothing to do (yet) */ ;
               else if (AgronomyTrt == "50kgn" || AgronomyTrt == "125kgn" || AgronomyTrt == "175kgn" || AgronomyTrt == "350kgn") { 
                   string amount = string.Join(",", new string(AgronomyTrt
                      .Where(c => char.IsBetween(c, '0', '9'))
                      .ToArray()).Split((char[]?)null, StringSplitOptions.RemoveEmptyEntries)); 
                  //string amount = AgronomyTrt.Trim().TakeWhile(c => ("0123456789").Contains(c)).ToString(); 
                  var op = new Operation{Date = SowDate, Action = "[Fertiliser].Apply(" + amount + ",\"NO3N\")", Enabled = true};
                  Operations.OperationsList.Add(op);
               } else {
                  throw new Exception("Unknown Agronomy treatment \"" + AgronomyTrt + "\"");
               }
           }
           
           var SoilCrop =   Structure.FindChild<SoilCrop>(plant.Name + "Soil", recurse: true, relativeTo: (INodeModel)Soil);
           if (SoilCrop == null) { throw new Exception("No " + plant.Name + "Soil found"); }
           cropLL = SoilCrop.LL;
           
           var Physical =   Structure.FindChild<Physical>(relativeTo: (INodeModel)Soil);    
           DUL = Physical.DUL;
           Thickness = Physical.Thickness; 
           layer800mm = SoilUtilities.LayerIndexOfDepth(Thickness, 800);
        
           hasFinishedNormally = false;
        }
        
        [Units("mm rel WP")]
        public double PAW_800mm {
          get {
            if (cropLL == null) return 0;
            double swTot = 0; double dep = 0;
            double[] sw = Water.Volumetric;
            for (var i = 0; i < layer800mm; i++) {
               dep += Thickness[i];
               double frac = 1;
               if (dep > 800) {
                  var top = dep - Thickness[i]; // depth of previous layer
                  frac = Math.Min(1, Math.Max(0, (800 - top) / Thickness[i])); // fraction of this layer used for 800mm depth 
               }  
               swTot += frac * Math.Max((sw[i] - cropLL[i]) * Thickness[i], 0);
            }
            return(swTot);         
          }
          set { }
        }
        
        [Units("mm rel WP")]
        public double ESWTot {
          get {
            if (cropLL == null) return 0;
            double swTot = 0;
            double[] sw = Water.Volumetric;
            for (var i = 0; i < sw.Length; i++) {
               swTot += Math.Max((sw[i] - cropLL[i]) * Thickness[i], 0);
            }
            return(swTot);         
          }
          set { }
        }  

        private bool hasReportedDevelToday = false;
  
        [EventSubscribe("DoManagement")]
        private void OnDoManagement(object sender, EventArgs e)
        {
            hasReportedDevelToday = false;
            if (SowDate.ToLower() != "na" && DateUtilities.DatesEqual(SowDate, Clock.Today))
            {
                double RowSpacing_dbl; // mm
                if (! Double.TryParse(RowSpacing, out RowSpacing_dbl)) {
                   RowSpacing_dbl = 300;
                } 
                plant.Sow(population: Population, cultivar: Variety, depth: SowingDepth, rowSpacing: RowSpacing_dbl);
                //doReport("Sowing");    
            }
            
            if (plant.IsReadyForHarvesting) {
                hasFinishedNormally = true;
                HarvestReport.DoOutput();
                //doReport("Harvest");    
                plant.Harvest();
                plant.EndCrop();
            }
        }
 
        [EventSubscribe("PreparingNewWeatherData")] private void OnPreparingNewWeatherData(object sender, EventArgs e)
        {
            if (AgronomyTrt == "16_hr")
            {
                Weather.DayLength = 16;
            }
        }
       
        public bool hasFinishedNormally {get; set;} 
        
        [EventSubscribe("EndOfSimulation")]
        private void OnEndOfSimulation(object sender, EventArgs e)
        {
            if (plant.IsAlive)
            {
                HarvestReport.DoOutput();
                plant.Harvest();
                plant.EndCrop();
            }
            
            if (commands != null)
            {
                foreach (SetPropertyCommand command in commands)
                    command.Undo();
                commands = null;
            }
        }
        
        private bool hasBudded = false;
        private bool hasPodded = false;
        private bool hasFlowered = false;
        private bool hasMatured = false;
        
        public string Event {get; set; }
        public void doReport(string _event) 
        {  
           if (!hasReportedDevelToday) {
              Event = _event;
              DevelReport.DoOutput();
              hasReportedDevelToday = true;
           }
        }
        
        private DataTable readCSV(string strFilePath, string id)
        {
            DataTable dt = new DataTable();
            using (StreamReader sr = new StreamReader(strFilePath))
            {
                List<string> headers = SplitStringHonouringQuotes(sr.ReadLine(), ",");;
                for (var i = 0; i < headers.Count; i++) { 
                   headers[i] = headers[i].Replace("\"", "").ToLower(); 
                   dt.Columns.Add(headers[i]);
                }
                var idCol = dt.Columns.IndexOf("id");
                if (idCol < 0) {throw new Exception("Missing 'id' column");}
           
                while (!sr.EndOfStream)
                {
                    List<string>rows = SplitStringHonouringQuotes(sr.ReadLine(), ",");
                    if (rows[idCol].ToLower() == id) {
                       DataRow dr = dt.NewRow();
                       //Summary.WriteMessage(this, "id='" + id + "'" , MessageType.Information);
                       for (int i = 0; i < rows.Count; i++) {
                          dr[i] = rows[i].Replace("\"", "");
                          //Summary.WriteMessage(this, headers[i] + "='" + dr[i] + "'" , MessageType.Information);
                       }
                       dt.Rows.Add(dr);
                    }
                }
            }
            return dt;
        }
        /// <summary>
        /// This method splits values on a comma but also honours double quotes
        /// ensuring something in double quotes is never split.
        ///     eg: if text = value1, "value 2, 2a", value3
        ///     then: words[0] = value1
        ///           words[1] = value2, 2a
        ///           words[2] = value3
        /// All values returned have been trimmed of spaces and double quotes.
        /// </summary>
        public List<string> SplitStringHonouringQuotes(string text, string delimiters)
        {
            List<string> ReturnStrings = new List<string>();
            if (text.Trim() == "")
                return ReturnStrings;

            bool InsideQuotes = false;
            int Start = IndexNotOfAny(text, " ".ToCharArray());
            for (int i = Start; i < text.Length; i++)
            {
                if (text[i] == '"')
                    InsideQuotes = !InsideQuotes; // toggle

                else if (!InsideQuotes)
                {
                    if (delimiters.IndexOf(text[i]) != -1)
                    {
                        // Found a word - store it.
                        if (Start != i)
                            ReturnStrings.Add(text.Substring(Start, i - Start).Trim(" ".ToCharArray()));
                        Start = i+1;

                    }
                }
            }
            if (Start != text.Length)
                ReturnStrings.Add(text.Substring(Start, text.Length - Start).Trim(" ".ToCharArray()));

            // remove leading and trailing quote if necessary.
            for (int i = 0; i < ReturnStrings.Count; i++)
            {
                if (ReturnStrings[i][0] == '"' && ReturnStrings[i][ReturnStrings[i].Length - 1] == '"')
                {
                    ReturnStrings[i] = ReturnStrings[i].Substring(1, ReturnStrings[i].Length - 2).Trim();
                    if (ReturnStrings[i] == "")
                    {
                        ReturnStrings.RemoveAt(i);
                        i--;
                    }
                }
            }
            return ReturnStrings;
        }
        public int IndexNotOfAny(string text, char[] delimiters)
        {
            return IndexNotOfAny(text, delimiters, 0);
        }

        /// <summary>
        /// This method complements the string function IndexOfAny by
        /// providing a NOT version. Returns -1 if non of the specified
        /// characters are found in specified string.
        /// </summary>
        public int IndexNotOfAny(string text, char[] delimiters, int pos)
        {
            string DelimitersString = new string(delimiters);
            for (int i = pos; i < text.Length; i++)
            {
                if (DelimitersString.IndexOf(text[i]) == -1)
                    return i;
            }
            return -1;
        }
  }
}
```
        Report Static: EventNames=[Clock].StartOfSimulation
          VariableNames:
            [Manager].Script.ID as id
            [Manager].Script.Crop as cropSown
            [Soil].Physical.Thickness as Thickness
            [Soil].Physical.AirDry as AirDry
            [Soil].Physical.LL15 as LL15
            [Soil].Physical.DUL as DUL
            [Soil].Physical.SAT as SAT
            [LentilSoil].LL as Lentil_CLL
        Report DevelReport
          VariableNames:
            [Manager].Script.ID as id
            [Manager].Script.ymd as SampleDate
            [Manager].Script.Event as event
            [Lentil].Leaf.NodeNumber as Lentil_Node_No
            [Lentil].Leaf.Canopy.LAI as Lentil_LAI
        Report SoilReport
          VariableNames:
            [Manager].Script.ID as id
            [Manager].Script.ymd as SampleDate
            [Manager].Script.Event as event
            [Manager].Script.PAW_800mm as PAW_800mm
            [Manager].Script.ESWTot as ESWTot
            [Soil].Water.Volumetric as sw
        Report HarvestReport
          VariableNames:
            [Manager].Script.ID as id
            [Manager].Script.ymd as SampleDate
            [Manager].Script.Crop as CropHarvested
            [Manager].Script.hasFinishedNormally as hasFinishedNormally
            [Lentil].SowingDate.Date as Lentil_SowingDate
            [Lentil].Phenology.EmergenceDAS as Lentil_EmergenceDAS
            [Lentil].Phenology.StartBuddingDAS as Lentil_BuddingDAS
            [Lentil].Phenology.StartPoddingDAS as Lentil_PoddingDAS
            [Lentil].Phenology.StartFloweringDAS as Lentil_FloweringDAS
            [Lentil].Phenology.MaturityDAS as Lentil_MaturityDAS
            [Lentil].Grain.Live.Wt as Lentil_GrainWt
            [Lentil].AboveGround.Wt as Lentil_BiomassWt
            [Lentil].Grain.HarvestIndex as Lentil_HarvestIndex
            mean of [Lentil].Leaf.Canopy.Fw from [Lentil].Sowing to [Lentil].Harvesting as Lentil_AvWaterStress
            sum of [Irrigation].IrrigationApplied from [Lentil].Sowing to [Lentil].Harvesting as Lentil_Irrigation
            sum of [Weather].Rain from [Lentil].Sowing to [Lentil].Harvesting as Lentil_Rain
            first of [Manager].Script.PAW_800mm from [Lentil].Sowing to [Clock].Today as Lentil_WaterAtSowing
            last of [Manager].Script.PAW_800mm from [Lentil].Sowing to [Clock].Today as Lentil_WaterAtHarvest
            first of sum([Nutrient].NO3.kgha) from [Lentil].Sowing to [Clock].Today as Lentil_NO3AtSowing
            last of sum([Nutrient].NO3.kgha) from [Lentil].Sowing to [Clock].Today as Lentil_NO3AtHarvest
        Manager Irrigate on fixed dates (disabled)
          IrrigateDates = 2-mar
          Amount = 15
          Depth = 0
          Efficiency = 1
          WillRunoff = False
```csharp
using Models.Soils;
using System;
using Models.Core;
using Models.PMF;
using APSIM.Shared.Utilities;
namespace Models
{
    [Serializable]
    public class Script : Model
    {
        [Link] Clock Clock;
        [Link] Irrigation Irrigation;
        
        [Separator("A component to apply irrigation on one or more dates on every year of the simulation")]

        [Description("Enter the irrigation dates as dd-mmm with comma separation (any year information entered will be ignored)")] public string[] IrrigateDates { get; set; }
        
        [Description("Amount of irrigation to be applied (mm)")] public double Amount { get; set; }
        
        [Description("Depth in the soil to apply the  irrigation (mm)")] public double Depth { get; set; }
        
        [Description("Efficiency of irrigation (0-1)")] public double Efficiency { get; set; }
        
        [Description("Will the irrigation runoff?")] public bool WillRunoff { get; set; }
        
        [EventSubscribe("DoManagement")]
        private void OnDoManagement(object sender, EventArgs e)
        {
            foreach (string ddMMM in IrrigateDates)
            {
                if (DateUtilities.DatesEqual(ddMMM, Clock.Today))
                    Irrigation.Apply(amount: Amount, depth: Depth, efficiency: Efficiency, willRunoff: WillRunoff);
            }
        }
    }
}
```
        Manager Reset on date (disabled)
          ResetDate = 1-Mar
          ResetWater = Yes
          ResetSOM = Yes
```csharp
using Models.Soils.Nutrients;
using APSIM.Shared.Utilities;
using Models.Surface;
using Models.Utilities;
using Models.Soils;
using Models.PMF;
using Models.Core;
using System;
using Models.Interfaces;

namespace Models
{
    [Serializable]
    public class Script : Model
    {
        [Link] private Clock Clock;
        [Link] private Plant Wheat;
        [Link] private ISoilWater SoilWater;
//        [Link] private Nutrient nutrient;
        [Link] private SurfaceOrganicMatter SOM;
        [Link] private Summary Summary;

        [Description("Date to reset on:")]
        public string ResetDate {get;set;}

        [Description("Reset Water? (Yes or No)")]
        public string ResetWater {get;set;}

//        [Description("Reset Soil Nutrients ? (Yes or No)")]
//        public string ResetNutrients {get;set;}

        [Description("Reset Surface Organic Matter? (Yes or No)")]
        public string ResetSOM {get;set;}

        [EventSubscribe("DoManagement")]
        private void OnDoManagement(object sender, EventArgs e)
        {
            if (DateUtilities.WithinDates(ResetDate, Clock.Today, ResetDate))
            {
                if (ResetWater == "Yes")
                {
                    Summary.WriteMessage(this, "Reset Water", MessageType.Diagnostic);
                    SoilWater.Reset();
                }
//                if (ResetNutrients == "Yes")
//                {
//                    Summary.WriteMessage(this, "Reset Nitrogen", MessageType.Diagnostic);
//                    nutrient.Reset();
//                }
                if (ResetSOM == "Yes")
                {
                    Summary.WriteMessage(this, "Reset Surface OM", MessageType.Diagnostic);
                    SOM.Reset();
                }
            }
        }
    }
}
```
  Experiment 2022_NSW_Methul_Lentil_Satellite
    Factors
      Permutation
        Factor TOS
          CompositeFactor TOS1
            Specifications:
              [Manager].Script.TOS = TOS1
              [Clock].StartDate = 2022-05-09T00:00:00
          CompositeFactor TOS2
            Specifications:
              [Manager].Script.TOS = TOS2
              [Clock].StartDate = 2022-06-13T00:00:00
        Factor Variety
          Specification=[Manager].Script.Variety = PBA_HallmarkXT,PBA_KelpieXT,PBA_Greenfield,PBA_Bolt,PBA_Jumbo2,PBA_Ace
        Factor WaterTrt: Specification=[Manager].Script.WaterTrt = RainFed
    Simulation 2022_NSW_Methul_Lentil_Satellite
      Weather: FileName=NSW_Methul.met
      Manager LocalWeather (disabled): same as 2019_NSW_Greenethorpe_Mixed_Detailed.2019_NSW_Greenethorpe_Mixed_Detailed.LocalWeather
      Clock: Start=2022-01-01; End=2022-06-01
      Summary summaryfile
      SoilArbitrator Soil Arbitrator
      Zone Field: Area=1; Slope=0; AspectAngle=0; Altitude=50
        Soil: ASCOrder=Chromosol; ASCSubOrder=Red; SoilType=Loamy duplex; Site=Coolamon; NearestTown=Coolamon; Region=Riverina; State=New South Wales; Country=Australia; ApsoilNumber=175; Latitude=-34.724; Longitude=147.292; LocationAccuracy=+/- 20m
          DataSource=Undertaken by CSIRO Sustainable Ecosystems and NSW Department of Primary Industries in 2007 as part of GRDC Project 'Training growers to manage soil water'
          Comments=Petroferric; Texture from PSA; EC, pH, Cl and OC estimated below 120cm depth; Manganese and Aluminium only analysed when pH below 5.5 (1:5); CLL measured for oats, all others estimated
          Physical
            Thickness  ParticleSizeSand  ParticleSizeSilt  ParticleSizeClay  BD     AirDry  LL15   DUL    SAT
            150        72.9              8                 19.1              1.547  0.023   0.047  0.216  0.386
            150        70.5              9.6               19.9              1.509  0.076   0.095  0.278  0.4
            300        50.1              5.2               44.8              1.477  0.24    0.24   0.363  0.413
            300        26.1              5                 69                1.513  0.24    0.24   0.349  0.399
            300        27.6              8.2               64.3              1.512  0.24    0.24   0.313  0.399
            300        -                 -                 -                 1.506  0.237   0.24   0.348  0.402
            300        -                 -                 -                 1.542  0.237   0.24   0.248  0.388
            SoilCrop LentilSoil: LL=[0.047, 0.095, 0.262, 0.274, 0.24, 0.237, 0.248]; KL=[0.06, 0.06, 0.06, 0.04, 0.04, 0.02, 0.01]; XF=[1, 1, 1, 1, 1, 1, 1]
          WaterBalance SoilWater: SummerDate=1-Nov; SummerU=6; SummerCona=3.5; WinterDate=1-Apr; WinterU=2; WinterCona=2; DiffusConst=88; DiffusSlope=35; Salb=0.13; CN2Bare=68; CNRed=20; CNCov=0.8; PSIDul=-100; Thickness=[150, 150, 300, 300, 300, 300, 300]; SWCON=[0.4, 0.4, 0.4, 0.4, 0.4, 0.4, 0.4]
          Solute NO3: Thickness=[150, 150, 300, 300, 300, 300, 300]; InitialValuesUnits=ppm; WaterTableConcentration=0; D0=0; DepthConstant=0; MaxDepthSoluteAccessible=0; RunoffEffectivenessAtMovingSolute=0; MaxEffectiveRunoff=0
          Solute NH4: same as 2022_NSW_Methul_Lentil_Satellite.2022_NSW_Methul_Lentil_Satellite.Field.Soil.NO3
          Solute Urea: Thickness=[150, 150, 300, 300, 300, 300, 300]; InitialValues=[0, 0, 0, 0, 0, 0, 0]; InitialValuesUnits=kg/ha; WaterTableConcentration=0; D0=0; DepthConstant=0; MaxDepthSoluteAccessible=0; RunoffEffectivenessAtMovingSolute=0; MaxEffectiveRunoff=0
          Water: Thickness=[150, 150, 300, 300, 300, 300, 300]; InitialValues=[0.2216, 0.261, 0.2988, 0.2889, 0.2611, 0.2611, 0.2611]; FilledFromTop=true
          Organic: FOMCNRatio=40; CarbonUnits=WalkleyBlack
            Thickness  Carbon    SoilCNRatio  FBiom  FInert  FOM
            150        1.2       12           0.04   0.4     347.129
            150        0.7       12           0.02   0.5     270.344
            300        0.192308  12           0.02   0.7     163.972
            300        0.176923  12           0.02   1       99.4541
            300        0.1       12           0.01   1       60.322
            300        0.1       12           0.01   1       36.5871
            300        0.1       12           0.01   1       22.1912
          Chemical: PHUnits=Water; ESP=[0, 0, 0, 0, 4.4]; CEC=[7.2, 4.8, 10, 17.5, 21.8]
            Thickness  PH   EC
            150        6.2  0.1
            150        5.7  0.1
            300        6.5  0.1
            300        7    0.1
            300        7.8  0.1
            300        7.8  0.1
            300        7.8  0.1
            EC, CL source: Measured, Estimated based on local knowledge
            CEC source: Measured (layer 1, 2, 3, 4, 5)
            ESP source: C (layer 1, 2, 3, 4, 5)
            PH source: Measured
          Nutrient
          SoilTemperature Temperature: InteractionsPerDay=8
          Memo Soil Translation Notes
            Soil Characterisation DB layers ( 100, 100, 100, 100, 100, 100, 100, 100, 100, 100, 100, 100 ) are not the same as soil.apsim ( 150, 150, 300, 300, 300, 300, 300 ) layers - remapping

            ISW is from site mean value
        SurfaceOrganicMatter: InitialResidueName=maize; InitialResidueType=maize; InitialResidueMass=500; InitialStandingFraction=0; InitialCPR=0; InitialCNR=65
        MicroClimate: a_interception=0; b_interception=1; c_interception=0; d_interception=0; SoilHeatFluxFraction=0.4; MinimumHeightDiffForNewLayer=0; NightInterceptionFraction=0.5; ReferenceHeight=1
        Irrigation
        Fertiliser
        Plant Lentil: ResourceName=Chickpea
        Operations
        Manager
          csvFile = 2022_NSW_Methul_Lentil_Satellite.startingConditions.csv
          EYear = 2022
          State = NSW
          Site = Methul
          TrialType = Satellite
          Crop = Lentil
          TOS = TOS1
          Variety =
          WaterTrt =
          Replicate = 0
          AgronomyTrt = None
          SowingDepth = 30
          RowSpacing = 300
          Population = 25
          SowDate = na
          UseStandardCultivars = False
          script: same as in 2019_NSW_Greenethorpe_Mixed_Detailed.2019_NSW_Greenethorpe_Mixed_Detailed.Field.Manager
        Report Static: same as 2019_NSW_Greenethorpe_Mixed_Detailed.2019_NSW_Greenethorpe_Mixed_Detailed.Field.Static
        Report DevelReport
          VariableNames:
            [Manager].Script.ID as id
            [Manager].Script.ymd as SampleDate
            [Manager].Script.Event as event
            [Lentil].Leaf.NodeNumber as Lentil_Node_No
            [Lentil].Leaf.Canopy.LAI as Lentil_LAI
        Report SoilReport
          VariableNames:
            [Manager].Script.ID as id
            [Manager].Script.ymd as SampleDate
            [Manager].Script.Event as event
            [Manager].Script.PAW_800mm as PAW_800mm
            [Manager].Script.ESWTot as ESWTot
            [Soil].Water.Volumetric as sw
        Report HarvestReport: same as 2019_NSW_Greenethorpe_Mixed_Detailed.2019_NSW_Greenethorpe_Mixed_Detailed.Field.HarvestReport
        Manager Irrigate on fixed dates (disabled): same as 2019_NSW_Greenethorpe_Mixed_Detailed.2019_NSW_Greenethorpe_Mixed_Detailed.Field.Irrigate on fixed dates
        Manager Reset on date (disabled): same as 2019_NSW_Greenethorpe_Mixed_Detailed.2019_NSW_Greenethorpe_Mixed_Detailed.Field.Reset on date
  Experiment 2022_NSW_RankinsSprings_Lentil_Satellite
    Factors
      Permutation
        Factor TOS
          CompositeFactor TOS1
            Specifications:
              [Manager].Script.TOS = TOS1
              [Clock].StartDate = 2022-05-08T00:00:00
          CompositeFactor TOS2
            Specifications:
              [Manager].Script.TOS = TOS2
              [Clock].StartDate = 2022-06-08T00:00:00
        Factor Variety
          Specification=[Manager].Script.Variety = PBA_HallmarkXT,PBA_Jumbo2,PBA_Greenfield,PBA_Ace,PBA_KelpieXT,PBA_Bolt
        Factor WaterTrt: Specification=[Manager].Script.WaterTrt = RainFed
    Simulation 2022_NSW_RankinsSprings_Lentil_Satellite
      Weather: FileName=NSW_RankinsSprings.met
      Manager LocalWeather (disabled): same as 2019_NSW_Greenethorpe_Mixed_Detailed.2019_NSW_Greenethorpe_Mixed_Detailed.LocalWeather
      Clock: Start=2022-01-01; End=2022-06-01
      Summary summaryfile
      SoilArbitrator Soil Arbitrator
      Zone Field: Area=1; Slope=0; AspectAngle=0; Altitude=50
        Soil: SoilType=Sandy duplex; Site=Goolgowi; NearestTown=Griffith; Region=Riverina; State=New South Wales; Country=Australia; ApsoilNumber=697; Latitude=-34.02039; Longitude=145.98584; LocationAccuracy=+/- 20m
          DataSource=Data collected as part of the GRDC project ‘Training growers to manage soil water’ by CSIRO Sustainable Ecosystems in collaboration with farmers and Central West Farming Systems
          Comments=Sandy loam - Classification based on partical size analysis.
          Physical
            Thickness  ParticleSizeSand  ParticleSizeSilt  ParticleSizeClay  BD       AirDry    LL15      DUL       SAT
            150        76.1714128        3.84682           19.9818           1.6823   0.0675    0.135     0.26      0.335171
            150        59.0354128        7.11082           33.8538           1.5244   0.108306  0.135382  0.298919  0.394754
            300        65.1554128        13.6388           21.2058           1.42153  0.148242  0.148242  0.354195  0.433573
            300        63.1154128        15.6788           21.2058           1.52313  0.1899    0.1899    0.31421   0.395235
            300        56.5874128        18.9428           24.4698           1.55518  0.1899    0.1899    0.327029  0.383138
            300        48.167            17.6945           34.1385           1.4614   0.1899    0.1899    0.328152  0.418527
            SoilCrop LentilSoil: LL=[0.135, 0.135, 0.148, 0.19, 0.289, 0.29]; KL=[0.06, 0.06, 0.06, 0.04, 0.04, 0.02]; XF=[1, 1, 1, 1, 1, 1]
          WaterBalance SoilWater: SummerDate=1-Nov; SummerU=6; SummerCona=3.5; WinterDate=1-Apr; WinterU=2; WinterCona=2; DiffusConst=88; DiffusSlope=35; Salb=0.13; CN2Bare=68; CNRed=20; CNCov=0.8; PSIDul=-100; Thickness=[150, 150, 300, 300, 300, 300]; SWCON=[0.5, 0.5, 0.5, 0.5, 0.5, 0.5]
          Solute NO3: Thickness=[150, 150, 300, 300, 300, 300]; InitialValuesUnits=ppm; WaterTableConcentration=0; D0=0; DepthConstant=0; MaxDepthSoluteAccessible=0; RunoffEffectivenessAtMovingSolute=0; MaxEffectiveRunoff=0
          Solute NH4: same as 2022_NSW_RankinsSprings_Lentil_Satellite.2022_NSW_RankinsSprings_Lentil_Satellite.Field.Soil.NO3
          Solute Urea: Thickness=[150, 150, 300, 300, 300, 300]; InitialValues=[0, 0, 0, 0, 0, 0]; InitialValuesUnits=kg/ha; WaterTableConcentration=0; D0=0; DepthConstant=0; MaxDepthSoluteAccessible=0; RunoffEffectivenessAtMovingSolute=0; MaxEffectiveRunoff=0
          Water: Thickness=[150, 150, 300, 300, 300, 300]; InitialValues=[0.1418, 0.1581, 0.2192, 0.2341, 0.2354, 0.2354]; FilledFromTop=true
          Organic: FOMCNRatio=40; CarbonUnits=WalkleyBlack
            Thickness  Carbon     SoilCNRatio  FBiom  FInert  FOM
            150        0.588966   12           0.04   0.4     390.598
            150        0.372991   12           0.02   0.5     289.362
            300        0.0490279  12           0.02   0.7     158.805
            300        0.0490279  12           0.02   1       87.1541
            300        0.0706254  12           0.01   1       47.8312
            300        0.0706254  12           0.01   1       26.2503
          Chemical: PHUnits=Water
            Thickness  PH   EC     ESP       CEC
            150        6    0.074  1.49179   8.40656
            150        7.1  0.15   0.362583  20.4085
            300        8.1  0.152  3.42258   19.5359
            300        8    0.161  3.53776   22.7936
            300        8.1  0.25   9.60934   17.9075
            300        8.3  0.637  20.4567   18.5002
            EC, CL, CEC, ESP, PH source: Unknown source or quality of data
          Nutrient
          SoilTemperature Temperature: InteractionsPerDay=8
          Memo Soil Translation Notes
            Soil Characterisation DB layers ( 100, 100, 100, 100, 100, 100, 100, 100, 100, 100, 100, 100 ) are not the same as soil.apsim ( 150, 150, 300, 300, 300, 300 ) layers - remapping

            ** ISW is NA in 1 plots

            ISW is from site mean value
        SurfaceOrganicMatter: InitialResidueName=maize; InitialResidueType=maize; InitialResidueMass=500; InitialStandingFraction=0; InitialCPR=0; InitialCNR=65
        MicroClimate: a_interception=0; b_interception=1; c_interception=0; d_interception=0; SoilHeatFluxFraction=0.4; MinimumHeightDiffForNewLayer=0; NightInterceptionFraction=0.5; ReferenceHeight=1
        Irrigation
        Fertiliser
        Plant Lentil: ResourceName=Chickpea
        Operations
        Manager
          csvFile = 2022_NSW_RankinsSprings_Lentil_Satellite.startingConditions.csv
          EYear = 2022
          State = NSW
          Site = RankinsSprings
          TrialType = Satellite
          Crop = Lentil
          TOS = TOS1
          Variety =
          WaterTrt =
          Replicate = 0
          AgronomyTrt = None
          SowingDepth = 30
          RowSpacing = 300
          Population = 25
          SowDate = na
          UseStandardCultivars = False
          script: same as in 2019_NSW_Greenethorpe_Mixed_Detailed.2019_NSW_Greenethorpe_Mixed_Detailed.Field.Manager
        Report Static: same as 2019_NSW_Greenethorpe_Mixed_Detailed.2019_NSW_Greenethorpe_Mixed_Detailed.Field.Static
        Report DevelReport
          VariableNames:
            [Manager].Script.ID as id
            [Manager].Script.ymd as SampleDate
            [Manager].Script.Event as event
            [Lentil].Leaf.NodeNumber as Lentil_Node_No
            [Lentil].Leaf.Canopy.LAI as Lentil_LAI
        Report SoilReport
          VariableNames:
            [Manager].Script.ID as id
            [Manager].Script.ymd as SampleDate
            [Manager].Script.Event as event
            [Manager].Script.PAW_800mm as PAW_800mm
            [Manager].Script.ESWTot as ESWTot
            [Soil].Water.Volumetric as sw
        Report HarvestReport: same as 2019_NSW_Greenethorpe_Mixed_Detailed.2019_NSW_Greenethorpe_Mixed_Detailed.Field.HarvestReport
        Manager Irrigate on fixed dates (disabled): same as 2019_NSW_Greenethorpe_Mixed_Detailed.2019_NSW_Greenethorpe_Mixed_Detailed.Field.Irrigate on fixed dates
        Manager Reset on date (disabled): same as 2019_NSW_Greenethorpe_Mixed_Detailed.2019_NSW_Greenethorpe_Mixed_Detailed.Field.Reset on date
  Experiment 2022_NSW_WaggaWagga_Lentil_Detailed
    Factors
      Permutation
        Factor TOS
          CompositeFactor TOS1
            Specifications:
              [Manager].Script.TOS = TOS1
              [Clock].StartDate = 2022-05-10T00:00:00
          CompositeFactor TOS2
            Specifications:
              [Manager].Script.TOS = TOS2
              [Clock].StartDate = 2022-06-14T00:00:00
        Factor Variety
          Specification=[Manager].Script.Variety = PBA_HallmarkXT,PBA_Jumbo2,PBA_Bolt,PBA_KelpieXT
        Factor WaterTrt: Specification=[Manager].Script.WaterTrt = Irrigated,RainFed
    Simulation 2022_NSW_WaggaWagga_Lentil_Detailed
      Weather: FileName=NSW_WaggaWagga.met
      Manager LocalWeather
        patchFileName = NSW_WaggaWagga.logger.met
        script: same as in 2019_NSW_Greenethorpe_Mixed_Detailed.2019_NSW_Greenethorpe_Mixed_Detailed.LocalWeather
      Clock: Start=2022-01-01; End=2022-06-01
      Summary summaryfile
      SoilArbitrator Soil Arbitrator
      Zone Field: Area=1; Slope=0; AspectAngle=0; Altitude=50
        Soil: SoilType=AJAR2007; Latitude=0; Longitude=0; DataSource=Jeremy whish
          Chemical: PHUnits=Water
            Thickness=[100, 100, 300, 300, 300, 300, 300, 300, 300, 300, 300, 300, 300, 300, 300, 100]
            PH=[5.5, 6.2, 6.8, 7.2, 7.45, 8, 8.3, 8.3, 8.3, 8.3, 8.3, 8.3, 8.3, 8.3, 8.3, 8.3]
          Physical
            Thickness  BD       AirDry  LL15  DUL       SAT
            100        1.3547   0.08    0.16  0.27      0.3
            100        1.16581  0.08    0.16  0.27662   0.31
            100        1.12595  0.18    0.18  0.295771  0.39
            100        1.12099  0.2     0.2   0.310553  0.4
            100        1.11627  0.21    0.21  0.36      0.4
            100        1.13412  0.21    0.21  0.37      0.408
            100        1.18538  0.22    0.22  0.37      0.408
            100        1.26054  0.23    0.23  0.347318  0.45
            100        1.42933  0.24    0.24  0.36      0.45
            100        1.40857  0.27    0.27  0.4       0.46
            100        1.40857  0.29    0.29  0.42      0.46
            100        1.40857  0.31    0.31  0.43      0.46
            SoilCrop LentilSoil
              LL=[0.16, 0.16, 0.18, 0.2, 0.21, 0.21, 0.22, 0.23, 0.24, 0.27, 0.29, 0.31]
              KL=[0.06, 0.06, 0.06, 0.06, 0.06, 0.04, 0.04, 0.04, 0.04, 0.04, 0.04, 0.02]
              XF=[1, 1, 1, 1, 1, 1, 1, 1, 1, 1, 1, 1]
          WaterBalance SoilWater: SummerDate=1-nov; SummerU=6; SummerCona=3.5; WinterDate=1-apr; WinterU=2; WinterCona=2; DiffusConst=40; DiffusSlope=16; Salb=0.13; CN2Bare=73; CNRed=20; CNCov=0.8; PSIDul=-100; Thickness=[100, 100, 300, 300, 300, 300, 300, 300]; SWCON=[0.5, 0.5, 0.3, 0.3, 0.3, 0.3, 0.3, 0.3]
          Solute NO3: InitialValuesUnits=ppm; WaterTableConcentration=0; D0=0; DepthConstant=0; MaxDepthSoluteAccessible=0; RunoffEffectivenessAtMovingSolute=0; MaxEffectiveRunoff=0
            Thickness=[100, 100, 300, 300, 300, 300, 300, 300, 300, 300, 300, 300, 300, 300, 300, 100]
            InitialValues=[14.7634, 17.1554, 0, 0, 0, 0, 0, 0, 1, 1, 1, 1, 1, 1, 1, 1]
          Solute NH4: InitialValuesUnits=ppm; WaterTableConcentration=0; D0=0; DepthConstant=0; MaxDepthSoluteAccessible=0; RunoffEffectivenessAtMovingSolute=0; MaxEffectiveRunoff=0
            Thickness=[100, 100, 300, 300, 300, 300, 300, 300, 300, 300, 300, 300, 300, 300, 300, 100]
            InitialValues=[1.13678, 0, 0, 0, 0, 0, 0, 0, 0.2, 0.2, 0.2, 0.2, 0.2, 0.2, 0.2, 0.2]
          Solute Urea: same as 2019_NSW_Greenethorpe_Mixed_Detailed.2019_NSW_Greenethorpe_Mixed_Detailed.Field.Soil.Urea
          Organic: FOMCNRatio=40; CarbonUnits=Total
            Thickness  Carbon  SoilCNRatio  FBiom  FInert  FOM
            100        1.02    12           0.035  0.4     177.297
            100        0.1     12           0.02   0.5     165.075
            300        0.13    12           0.015  0.7     133.235
            300        0.08    12           0.015  0.95    107.536
            300        0.06    12           0.01   0.95    86.7943
            300        0.025   12           0.01   0.95    70.0532
            300        0.025   12           0.01   0.95    56.5412
            300        0.025   12           0.01   0.95    45.6354
            300        0.025   12           0.01   0.95    36.8331
            300        0.025   12           0.01   0.95    29.7287
            300        0.025   12           0.01   0.95    23.9946
            300        0.025   12           0.01   0.95    19.3664
            300        0.025   12           0.01   0.95    15.631
            300        0.025   12           0.01   0.95    12.616
            300        0.025   12           0.01   0.95    10.1826
            100        0.025   12           0.01   0.95    9.48067
          Water: FilledFromTop=true
            Thickness=[100, 100, 100, 100, 100, 100, 100, 100, 100, 100, 100, 100]
            InitialValues=[0.2334, 0.1956, 0.2127, 0.2473, 0.2868, 0.3032, 0.3031, 0.2999, 0.3237, 0.325, 0.3398, 0.3568]
          Memo
            All crops using wheat LL with mungbean not able to extract water below 150cm

            Soil modified and updated by Jeremy Whish on the 17/9/2020

            last updated 17/9/2020 adjustment to lower limit and DUL based on full sampling of all plots layer structure and depth changed to match field ex sampling reduced to 2m
            All crops have the wheat lowerlimit except mungbeans wheat layer 4 then half wheat, then quarter wheat, then 0
            KL Values from apsoil protocol and all soil values from protocol.

            30/9/2020  organic carbon finert and fbiom set to apsim standard values
          Nutrient
          SoilTemperature Temperature: InteractionsPerDay=8
          Memo Soil Translation Notes
            No lentil soilcrop data, trying Chickpea

            fudging soilcrop from  Chickpea

            ISW is from site mean value
        SurfaceOrganicMatter: InitialResidueName=maize; InitialResidueType=maize; InitialResidueMass=500; InitialStandingFraction=0; InitialCPR=0; InitialCNR=65
        MicroClimate: a_interception=0; b_interception=1; c_interception=0; d_interception=0; SoilHeatFluxFraction=0.4; MinimumHeightDiffForNewLayer=0; NightInterceptionFraction=0.5; ReferenceHeight=1
        Irrigation
        Fertiliser
        Plant Lentil: ResourceName=Chickpea
        Operations
        Manager
          csvFile = 2022_NSW_WaggaWagga_Lentil_Detailed.startingConditions.csv
          EYear = 2022
          State = NSW
          Site = WaggaWagga
          TrialType = Detailed
          Crop = Lentil
          TOS = TOS1
          Variety =
          WaterTrt =
          Replicate = 0
          AgronomyTrt = None
          SowingDepth = 30
          RowSpacing = 300
          Population = 25
          SowDate = na
          UseStandardCultivars = False
          script: same as in 2019_NSW_Greenethorpe_Mixed_Detailed.2019_NSW_Greenethorpe_Mixed_Detailed.Field.Manager
        Report Static: same as 2019_NSW_Greenethorpe_Mixed_Detailed.2019_NSW_Greenethorpe_Mixed_Detailed.Field.Static
        Report DevelReport
          VariableNames:
            [Manager].Script.ID as id
            [Manager].Script.ymd as SampleDate
            [Manager].Script.Event as event
            [Lentil].Leaf.NodeNumber as Lentil_Node_No
            [Lentil].Leaf.Canopy.LAI as Lentil_LAI
        Report SoilReport
          VariableNames:
            [Manager].Script.ID as id
            [Manager].Script.ymd as SampleDate
            [Manager].Script.Event as event
            [Manager].Script.PAW_800mm as PAW_800mm
            [Manager].Script.ESWTot as ESWTot
            [Soil].Water.Volumetric as sw
        Report HarvestReport: same as 2019_NSW_Greenethorpe_Mixed_Detailed.2019_NSW_Greenethorpe_Mixed_Detailed.Field.HarvestReport
        Manager Irrigate on fixed dates (disabled): same as 2019_NSW_Greenethorpe_Mixed_Detailed.2019_NSW_Greenethorpe_Mixed_Detailed.Field.Irrigate on fixed dates
        Manager Reset on date (disabled): same as 2019_NSW_Greenethorpe_Mixed_Detailed.2019_NSW_Greenethorpe_Mixed_Detailed.Field.Reset on date
  Experiment 2022_SA_Riverton_Lentil_Detailed
    Factors
      Permutation
        Factor TOS
          CompositeFactor TOS1
            Specifications:
              [Manager].Script.TOS = TOS1
              [Clock].StartDate = 2022-06-17T00:00:00
          CompositeFactor TOS2
            Specifications:
              [Manager].Script.TOS = TOS2
              [Clock].StartDate = 2022-07-13T00:00:00
        Factor Variety
          Specification=[Manager].Script.Variety = PBA_Bolt,PBA_HallmarkXT,PBA_KelpieXT,PBA_Jumbo2
        Factor WaterTrt: Specification=[Manager].Script.WaterTrt = RainFed,Irrigated
    Simulation 2022_SA_Riverton_Lentil_Detailed
      Weather: FileName=SA_Riverton.met
      Manager LocalWeather
        patchFileName = SA_Riverton.logger.met
        script: same as in 2019_NSW_Greenethorpe_Mixed_Detailed.2019_NSW_Greenethorpe_Mixed_Detailed.LocalWeather
      Clock: Start=2022-01-01; End=2022-06-01
      Summary summaryfile
      SoilArbitrator Soil Arbitrator
      Zone Field: Area=1; Slope=0; AspectAngle=0; Altitude=50
        Soil: ASCOrder=Vertosol; ASCSubOrder=Brown; SoilType=Clay; Site=Riverton; NearestTown=Riverton; Region=Mid North; State=South Australia; Country=Australia; ApsoilNumber=CL004; Latitude=-34.166; Longitude=138.79; LocationAccuracy=+/- 20m; Comments=Clay -
          DataSource=Soil water characteristics based on: Soil and Land Information (2002). Soil Data Sheets. [CD ROM]. Soil and Land Information Group, Department of Water, Land and Biodiversity Conservation, South Australia.
          Physical
            Thickness  BD   AirDry  LL15  DUL   SAT
            280        1.3  0.13    0.26  0.41  0.479434
            470        1.4  0.28    0.28  0.38  0.441698
            250        1.6  0.28    0.28  0.31  0.366226
            SoilCrop LentilSoil: LL=[0.26, 0.28, 0.29]; KL=[0.06, 0.04, 0.04]; XF=[1, 1, 1]
          WaterBalance SoilWater: SummerDate=1-Nov; SummerU=6; SummerCona=3.5; WinterDate=1-Apr; WinterU=2; WinterCona=2; DiffusConst=40; DiffusSlope=16; Salb=0.13; CN2Bare=73; CNRed=20; CNCov=0.8; PSIDul=-100; Thickness=[280, 470, 250]; SWCON=[0.3, 0.1, 0.1]
          Solute NO3: Thickness=[280, 470, 250]; InitialValuesUnits=ppm; WaterTableConcentration=0; D0=0; DepthConstant=0; MaxDepthSoluteAccessible=0; RunoffEffectivenessAtMovingSolute=0; MaxEffectiveRunoff=0
          Solute NH4: Thickness=[280, 470, 250]; InitialValuesUnits=ppm; WaterTableConcentration=0; D0=0; DepthConstant=0; MaxDepthSoluteAccessible=0; RunoffEffectivenessAtMovingSolute=0; MaxEffectiveRunoff=0
          Solute Urea: Thickness=[280, 470, 250]; InitialValues=[0, 0, 0]; InitialValuesUnits=kg/ha; WaterTableConcentration=0; D0=0; DepthConstant=0; MaxDepthSoluteAccessible=0; RunoffEffectivenessAtMovingSolute=0; MaxEffectiveRunoff=0
          Water: Thickness=[280, 470, 250]; InitialValues=[0.3119, 0.2884, 0.28]; FilledFromTop=true
          Organic: FOMCNRatio=45; CarbonUnits=WalkleyBlack
            Thickness  Carbon  SoilCNRatio  FBiom  FInert  FOM
            280        1.18    12.5         0.02   0.5     1103.37
            470        0.59    12.5         0.01   0.8     269.381
            250        0.15    12.5         0.01   1       127.247
          Chemical: PHUnits=Water
            Thickness  PH   EC   ESP   CEC
            280        8.6  0.1  1.8   43.2
            470        9.3  0.2  12.1  39.5
            250        10   0.4  38.4  21.58
            EC, CEC, PH source: Measured
            CL source: Estimated based on local knowledge
            ESP source: C
          Nutrient
          SoilTemperature Temperature: InteractionsPerDay=8
          Memo Soil Translation Notes
            Soil Characterisation DB layers ( 100, 100, 300, 300, 300, 300, 300, 300 ) are not the same as soil.apsim ( 280, 470, 250 ) layers - remapping

            ISW is from site mean value
        SurfaceOrganicMatter: InitialResidueName=maize; InitialResidueType=maize; InitialResidueMass=500; InitialStandingFraction=0; InitialCPR=0; InitialCNR=65
        MicroClimate: a_interception=0; b_interception=1; c_interception=0; d_interception=0; SoilHeatFluxFraction=0.4; MinimumHeightDiffForNewLayer=0; NightInterceptionFraction=0.5; ReferenceHeight=1
        Irrigation
        Fertiliser
        Plant Lentil: ResourceName=Chickpea
        Operations
        Manager
          csvFile = 2022_SA_Riverton_Lentil_Detailed.startingConditions.csv
          EYear = 2022
          State = SA
          Site = Riverton
          TrialType = Detailed
          Crop = Lentil
          TOS = TOS1
          Variety =
          WaterTrt =
          Replicate = 0
          AgronomyTrt = None
          SowingDepth = 30
          RowSpacing = 300
          Population = 25
          SowDate = na
          UseStandardCultivars = False
          script: same as in 2019_NSW_Greenethorpe_Mixed_Detailed.2019_NSW_Greenethorpe_Mixed_Detailed.Field.Manager
        Report Static: same as 2019_NSW_Greenethorpe_Mixed_Detailed.2019_NSW_Greenethorpe_Mixed_Detailed.Field.Static
        Report DevelReport
          VariableNames:
            [Manager].Script.ID as id
            [Manager].Script.ymd as SampleDate
            [Manager].Script.Event as event
            [Lentil].Leaf.NodeNumber as Lentil_Node_No
            [Lentil].Leaf.Canopy.LAI as Lentil_LAI
        Report SoilReport
          VariableNames:
            [Manager].Script.ID as id
            [Manager].Script.ymd as SampleDate
            [Manager].Script.Event as event
            [Manager].Script.PAW_800mm as PAW_800mm
            [Manager].Script.ESWTot as ESWTot
            [Soil].Water.Volumetric as sw
        Report HarvestReport: same as 2019_NSW_Greenethorpe_Mixed_Detailed.2019_NSW_Greenethorpe_Mixed_Detailed.Field.HarvestReport
        Manager Irrigate on fixed dates (disabled): same as 2019_NSW_Greenethorpe_Mixed_Detailed.2019_NSW_Greenethorpe_Mixed_Detailed.Field.Irrigate on fixed dates
        Manager Reset on date (disabled): same as 2019_NSW_Greenethorpe_Mixed_Detailed.2019_NSW_Greenethorpe_Mixed_Detailed.Field.Reset on date
  Experiment 2022_SA_Warnertown_Lentil_Satellite
    Factors
      Permutation
        Factor TOS
          CompositeFactor TOS1
            Specifications:
              [Manager].Script.TOS = TOS1
              [Clock].StartDate = 2022-04-10T00:00:00
          CompositeFactor TOS2
            Specifications:
              [Manager].Script.TOS = TOS2
              [Clock].StartDate = 2022-05-10T00:00:00
        Factor Variety
          Specification=[Manager].Script.Variety = PBA_Jumbo2,PBA_KelpieXT,PBA_Bolt,PBA_HallmarkXT
        Factor WaterTrt: Specification=[Manager].Script.WaterTrt = RainFed
        Factor Agronomy: Specification=[Manager].Script.AgronomyTrt = Density_0.66,Density_1
    Simulation 2022_SA_Warnertown_Lentil_Satellite
      Weather: FileName=SA_Warnertown.met
      Manager LocalWeather (disabled): same as 2019_NSW_Greenethorpe_Mixed_Detailed.2019_NSW_Greenethorpe_Mixed_Detailed.LocalWeather
      Clock: Start=2022-01-01; End=2022-06-01
      Summary summaryfile
      SoilArbitrator Soil Arbitrator
      Zone Field: Area=1; Slope=0; AspectAngle=0; Altitude=50
        Soil: ASCOrder=Vertosol; ASCSubOrder=Red; SoilType=Clay loam; Site=Wandearah; NearestTown=Wandearah; Region=Mid North; State=South Australia; Country=Australia; ApsoilNumber=CU022; Latitude=-33.323; Longitude=138.061; LocationAccuracy=+/- 20m; Comments=Clay -
          DataSource=Soil water characteristics based on: Soil and Land Information (2002). Soil Data Sheets. [CD ROM]. Soil and Land Information Group, Department of Water, Land and Biodiversity Conservation, South Australia.
          Physical
            Thickness  BD     AirDry  LL15  DUL   SAT
            100        1.3    0.105   0.21  0.36  0.479434
            200        1.4    0.184   0.23  0.37  0.441698
            300        1.4    0.25    0.25  0.38  0.441698
            350        1.515  0.25    0.25  0.38  0.398302
            650        1.429  0.25    0.25  0.38  0.430755
            SoilCrop LentilSoil: LL=[0.21, 0.23, 0.25, 0.29, 0.35]; KL=[0.06, 0.06, 0.04, 0.04, 0.02]; XF=[1, 1, 1, 1, 0.2]
          WaterBalance SoilWater: SummerDate=1-Nov; SummerU=6; SummerCona=3.5; WinterDate=1-Apr; WinterU=2; WinterCona=2; DiffusConst=40; DiffusSlope=16; Salb=0.13; CN2Bare=73; CNRed=20; CNCov=0.8; PSIDul=-100; Thickness=[100, 200, 300, 350, 650]; SWCON=[0.3, 0.3, 0.1, 0.1, 0.1]
          Solute NO3: Thickness=[100, 200, 300, 350, 650]; InitialValuesUnits=ppm; WaterTableConcentration=0; D0=0; DepthConstant=0; MaxDepthSoluteAccessible=0; RunoffEffectivenessAtMovingSolute=0; MaxEffectiveRunoff=0
          Solute NH4: same as 2022_SA_Warnertown_Lentil_Satellite.2022_SA_Warnertown_Lentil_Satellite.Field.Soil.NO3
          Solute Urea: Thickness=[100, 200, 300, 350, 650]; InitialValues=[0, 0, 0, 0, 0]; InitialValuesUnits=kg/ha; WaterTableConcentration=0; D0=0; DepthConstant=0; MaxDepthSoluteAccessible=0; RunoffEffectivenessAtMovingSolute=0; MaxEffectiveRunoff=0
          Water: Thickness=[100, 200, 300, 350, 650]; InitialValues=[0.1071, 0.184, 0.25, 0.25, 0.25]; FilledFromTop=true
          Organic: FOMCNRatio=45; CarbonUnits=WalkleyBlack
            Thickness  Carbon  SoilCNRatio  FBiom  FInert  FOM
            100        1.4     12.5         0.03   0.4     640.448
            200        0.55    12.5         0.02   0.6     440.173
            300        0.34    12.5         0.01   0.8     250.803
            350        0.19    12.5         0.01   0.9     130.115
            650        0.15    12.5         0.01   1       38.4619
          Chemical: PHUnits=Water
            Thickness  PH   EC   ESP   CEC
            100        7.1  0.3  2.8   22.54
            200        8.6  0.2  6.9   23.7
            300        8.9  0.3  11.7  25.8
            350        8.8  0.7  16.2  23.6
            650        8.7  1.5  28.1  29.4
            EC, CEC, PH source: Measured
            CL source: Estimated based on local knowledge
            ESP source: CEC
          Nutrient
          SoilTemperature Temperature: InteractionsPerDay=8
          Memo Soil Translation Notes
            Soil Characterisation DB layers ( 100, 100, 300, 300, 300, 300, 300, 300 ) are not the same as soil.apsim ( 100, 200, 300, 350, 650 ) layers - remapping

            ISW is from site mean value
        SurfaceOrganicMatter: InitialResidueName=maize; InitialResidueType=maize; InitialResidueMass=500; InitialStandingFraction=0; InitialCPR=0; InitialCNR=65
        MicroClimate: a_interception=0; b_interception=1; c_interception=0; d_interception=0; SoilHeatFluxFraction=0.4; MinimumHeightDiffForNewLayer=0; NightInterceptionFraction=0.5; ReferenceHeight=1
        Irrigation
        Fertiliser
        Plant Lentil: ResourceName=Chickpea
        Operations
        Manager
          csvFile = 2022_SA_Warnertown_Lentil_Satellite.startingConditions.csv
          EYear = 2022
          State = SA
          Site = Warnertown
          TrialType = Satellite
          Crop = Lentil
          TOS = TOS1
          Variety =
          WaterTrt =
          Replicate = 0
          AgronomyTrt = None
          SowingDepth = 30
          RowSpacing = 300
          Population = 25
          SowDate = na
          UseStandardCultivars = False
          script: same as in 2019_NSW_Greenethorpe_Mixed_Detailed.2019_NSW_Greenethorpe_Mixed_Detailed.Field.Manager
        Report Static: same as 2019_NSW_Greenethorpe_Mixed_Detailed.2019_NSW_Greenethorpe_Mixed_Detailed.Field.Static
        Report DevelReport
          VariableNames:
            [Manager].Script.ID as id
            [Manager].Script.ymd as SampleDate
            [Manager].Script.Event as event
            [Lentil].Leaf.NodeNumber as Lentil_Node_No
            [Lentil].Leaf.Canopy.LAI as Lentil_LAI
        Report SoilReport
          VariableNames:
            [Manager].Script.ID as id
            [Manager].Script.ymd as SampleDate
            [Manager].Script.Event as event
            [Manager].Script.PAW_800mm as PAW_800mm
            [Manager].Script.ESWTot as ESWTot
            [Soil].Water.Volumetric as sw
        Report HarvestReport: same as 2019_NSW_Greenethorpe_Mixed_Detailed.2019_NSW_Greenethorpe_Mixed_Detailed.Field.HarvestReport
        Manager Irrigate on fixed dates (disabled): same as 2019_NSW_Greenethorpe_Mixed_Detailed.2019_NSW_Greenethorpe_Mixed_Detailed.Field.Irrigate on fixed dates
        Manager Reset on date (disabled): same as 2019_NSW_Greenethorpe_Mixed_Detailed.2019_NSW_Greenethorpe_Mixed_Detailed.Field.Reset on date
  Experiment 2022_Vic_Kalkee_Lentil_Detailed
    Factors
      Permutation
        Factor TOS
          CompositeFactor TOS1
            Specifications:
              [Manager].Script.TOS = TOS1
              [Clock].StartDate = 2022-05-22T00:00:00
          CompositeFactor TOS2
            Specifications:
              [Manager].Script.TOS = TOS2
              [Clock].StartDate = 2022-06-27T00:00:00
        Factor Variety
          Specification=[Manager].Script.Variety = PBA_Jumbo2,PBA_Bolt,PBA_KelpieXT,PBA_HallmarkXT
        Factor WaterTrt: Specification=[Manager].Script.WaterTrt = RainFed,Irrigated
    Simulation 2022_Vic_Kalkee_Lentil_Detailed
      Weather: FileName=Vic_Kalkee.met
      Manager LocalWeather
        patchFileName = Vic_Kalkee.logger.met
        script: same as in 2019_NSW_Greenethorpe_Mixed_Detailed.2019_NSW_Greenethorpe_Mixed_Detailed.LocalWeather
      Clock: Start=2022-01-01; End=2022-06-01
      Summary summaryfile
      SoilArbitrator Soil Arbitrator
      Zone Field: Area=1; Slope=0; AspectAngle=0; Altitude=50
        Soil: SoilType=Clay; Site=Murtoa; NearestTown=Murtoa; Region=Wimmera; State=Victoria; Country=Australia; ApsoilNumber=752; Latitude=-36.617; Longitude=142.471; LocationAccuracy=Regional Soil Type; Comments=Clay - OC and pH estimated; EC estimated in 100-130cm layer
          DataSource=Based on Soil Characterisation undertaken by Birchip Cropping Group 2003
          Physical
            Thickness  BD     AirDry  LL15  DUL    SAT
            100        1.1    0.14    0.28  0.5    0.555
            300        1.1    0.224   0.28  0.455  0.555
            300        1.15   0.29    0.29  0.48   0.536
            300        1.148  0.29    0.29  0.487  0.537
            300        1.245  0.29    0.29  0.45   0.5
            SoilCrop LentilSoil: LL=[0.28, 0.28, 0.29, 0.29, 0.45]; KL=[0.06, 0.06, 0.06, 0.04, 0.04]; XF=[0.6, 0.5, 0.4, 0.4, 0.4]
          WaterBalance SoilWater: SummerDate=1-Nov; SummerU=6; SummerCona=3.5; WinterDate=1-Apr; WinterU=2; WinterCona=2; DiffusConst=40; DiffusSlope=16; Salb=0.12; CN2Bare=73; CNRed=20; CNCov=0.8; PSIDul=-100; Thickness=[100, 300, 300, 300, 300]; SWCON=[0.3, 0.3, 0.3, 0.3, 0.3]
          Solute NO3: Thickness=[100, 300, 300, 300, 300]; InitialValuesUnits=ppm; WaterTableConcentration=0; D0=0; DepthConstant=0; MaxDepthSoluteAccessible=0; RunoffEffectivenessAtMovingSolute=0; MaxEffectiveRunoff=0
          Solute NH4: same as 2022_Vic_Kalkee_Lentil_Detailed.2022_Vic_Kalkee_Lentil_Detailed.Field.Soil.NO3
          Solute Urea: Thickness=[100, 300, 300, 300, 300]; InitialValues=[0, 0, 0, 0, 0]; InitialValuesUnits=kg/ha; WaterTableConcentration=0; D0=0; DepthConstant=0; MaxDepthSoluteAccessible=0; RunoffEffectivenessAtMovingSolute=0; MaxEffectiveRunoff=0
          Water: Thickness=[100, 300, 300, 300, 300]; InitialValues=[0.3292, 0.3603, 0.336, 0.3415, 0.4176]; FilledFromTop=true
          Organic: FOMCNRatio=40; CarbonUnits=WalkleyBlack
            Thickness  Carbon  SoilCNRatio  FBiom  FInert  FOM
            100        1.05    12           0.04   0.4     515.766
            300        0.45    12           0.02   0.5     258.099
            300        0.3     12           0.02   0.7     129.158
            300        0.3     12           0.02   1       64.6333
            300        0.25    12           0.01   1       32.3438
          Chemical: PHUnits=Water
            Thickness  PH   EC
            100        8.5  0.2
            300        8.8  0.4
            300        8.9  0.8
            300        8.9  0.8
            300        8.9  0.9
            EC source: Measured, Estimated based on local knowledge
            PH source: Estimated based on local knowledge
          Nutrient
          SoilTemperature Temperature: InteractionsPerDay=8
          Memo Soil Translation Notes
            Soil Characterisation DB layers ( 100, 100, 300, 300, 300, 300, 300, 300 ) are not the same as soil.apsim ( 100, 300, 300, 300, 300 ) layers - remapping

            ISW is from site mean value
        SurfaceOrganicMatter: InitialResidueName=maize; InitialResidueType=maize; InitialResidueMass=500; InitialStandingFraction=0; InitialCPR=0; InitialCNR=65
        MicroClimate: a_interception=0; b_interception=1; c_interception=0; d_interception=0; SoilHeatFluxFraction=0.4; MinimumHeightDiffForNewLayer=0; NightInterceptionFraction=0.5; ReferenceHeight=1
        Irrigation
        Fertiliser
        Plant Lentil: ResourceName=Chickpea
        Operations
        Manager
          csvFile = 2022_Vic_Kalkee_Lentil_Detailed.startingConditions.csv
          EYear = 2022
          State = Vic
          Site = Kalkee
          TrialType = Detailed
          Crop = Lentil
          TOS = TOS1
          Variety =
          WaterTrt =
          Replicate = 0
          AgronomyTrt = None
          SowingDepth = 30
          RowSpacing = 300
          Population = 25
          SowDate = na
          UseStandardCultivars = False
          script: same as in 2019_NSW_Greenethorpe_Mixed_Detailed.2019_NSW_Greenethorpe_Mixed_Detailed.Field.Manager
        Report Static: same as 2019_NSW_Greenethorpe_Mixed_Detailed.2019_NSW_Greenethorpe_Mixed_Detailed.Field.Static
        Report DevelReport
          VariableNames:
            [Manager].Script.ID as id
            [Manager].Script.ymd as SampleDate
            [Manager].Script.Event as event
            [Lentil].Leaf.NodeNumber as Lentil_Node_No
            [Lentil].Leaf.Canopy.LAI as Lentil_LAI
        Report SoilReport
          VariableNames:
            [Manager].Script.ID as id
            [Manager].Script.ymd as SampleDate
            [Manager].Script.Event as event
            [Manager].Script.PAW_800mm as PAW_800mm
            [Manager].Script.ESWTot as ESWTot
            [Soil].Water.Volumetric as sw
        Report HarvestReport: same as 2019_NSW_Greenethorpe_Mixed_Detailed.2019_NSW_Greenethorpe_Mixed_Detailed.Field.HarvestReport
        Manager Irrigate on fixed dates (disabled): same as 2019_NSW_Greenethorpe_Mixed_Detailed.2019_NSW_Greenethorpe_Mixed_Detailed.Field.Irrigate on fixed dates
        Manager Reset on date (disabled): same as 2019_NSW_Greenethorpe_Mixed_Detailed.2019_NSW_Greenethorpe_Mixed_Detailed.Field.Reset on date
  Experiment 2022_Vic_Ouyen_Lentil_Satellite
    Factors
      Permutation
        Factor TOS
          CompositeFactor TOS1
            Specifications:
              [Manager].Script.TOS = TOS1
              [Clock].StartDate = 2022-05-01T00:00:00
          CompositeFactor TOS2
            Specifications:
              [Manager].Script.TOS = TOS2
              [Clock].StartDate = 2022-05-31T00:00:00
        Factor Variety
          Specification=[Manager].Script.Variety = GIA_Leader,PBA_Bolt,PBA_HallmarkXT,GIA_Lightning,PBA_KelpieXT,PBA_Jumbo2
        Factor WaterTrt: Specification=[Manager].Script.WaterTrt = RainFed
    Simulation 2022_Vic_Ouyen_Lentil_Satellite
      Weather: FileName=Vic_Ouyen.met
      Manager LocalWeather
        patchFileName = Vic_Ouyen.logger.met
        script: same as in 2019_NSW_Greenethorpe_Mixed_Detailed.2019_NSW_Greenethorpe_Mixed_Detailed.LocalWeather
      Clock: Start=2022-01-01; End=2022-06-01
      Summary summaryfile
      SoilArbitrator Soil Arbitrator
      Zone Field: Area=1; Slope=0; AspectAngle=0; Altitude=50
        Soil: SoilType=Sandy duplex; Site=Ouyen; NearestTown=Ouyen; Region=Mallee; State=Victoria; Country=Australia; ApsoilNumber=1098; Latitude=-34.9949; Longitude=142.173
          DataSource=Birchip Cropping Group and CSIRO as part of GRDC Project ‘Measuring and managing soil water in Australian agriculture’ (2014)
          Comments=Deep sand over sandy loam at depth - WheatLL Observed Rooting Depth was 40cm; CLL wheat field measured, CLL other crops estimated, but note that sensitivity to subsoil constraints may vary.
          Physical
            Thickness  ParticleSizeSand  ParticleSizeSilt  ParticleSizeClay  BD    AirDry  LL15  DUL   SAT
            150        93.11             0.99              5.9               1.37  0.06    0.1   0.23  0.321249
            150        94.06             1                 4.94              1.3   0.08    0.1   0.23  0.288709
            300        93.04             1                 5.96              1.13  0.11    0.11  0.23  0.298373
            300        94.1              0                 5.9               1.24  0.17    0.17  0.23  0.27198429
            300        92.01             1.01              6.99              1.39  0.19    0.19  0.26  0.308927
            300        84.89             3.03              12.07             1.39  0.22    0.22  0.29  0.319409
            SoilCrop LentilSoil: LL=[0.1, 0.1, 0.11, 0.17, 0.19, 0.22]; KL=[0.06, 0.06, 0.06, 0.04, 0.04, 0.02]; XF=[1, 1, 1, 1, 1, 1]
          WaterBalance SoilWater: SummerDate=1-Nov; SummerU=6; SummerCona=3.5; WinterDate=1-Apr; WinterU=2; WinterCona=2; DiffusConst=250; DiffusSlope=22; Salb=0.13; CN2Bare=68; CNRed=20; CNCov=0.8; PSIDul=-100; Thickness=[150, 150, 300, 300, 300, 300]; SWCON=[0.7, 0.7, 0.7, 0.7, 0.7, 0.7]
          Solute NO3: same as 2022_NSW_RankinsSprings_Lentil_Satellite.2022_NSW_RankinsSprings_Lentil_Satellite.Field.Soil.NO3
          Solute NH4: same as 2022_NSW_RankinsSprings_Lentil_Satellite.2022_NSW_RankinsSprings_Lentil_Satellite.Field.Soil.NO3
          Solute Urea: same as 2022_NSW_RankinsSprings_Lentil_Satellite.2022_NSW_RankinsSprings_Lentil_Satellite.Field.Soil.Urea
          Water: Thickness=[150, 150, 300, 300, 300, 300]; InitialValues=[0.174, 0.216, 0.2267, 0.2334, 0.2388, 0.2375]; FilledFromTop=true
          Organic: FOMCNRatio=40; CarbonUnits=Total
            Thickness  Carbon  SoilCNRatio  FBiom  FInert  FOM
            150        0.55    12           0.04   0.4     390.598
            150        0.42    12           0.02   0.5     289.362
            300        0.39    12           0.02   0.7     158.805
            300        0.33    12           0.02   0.95    87.1541
            300        0.18    12           0.01   0.95    47.8312
            300        0.16    12           0.01   0.95    26.2503
          Chemical: PHUnits=Water
            Thickness  PH   EC     CEC
            150        6.9  0.02   3.4
            150        7.2  0.041  3.7
            300        7.1  0.025  3.1
            300        7.6  0.03   3.5
            300        8.5  0.05   6.3
            300        8.9  0.067  9.3
            EC, CEC, PH source: Measured
            CL source: Measured, Estimated based on local knowledge
          Nutrient
          SoilTemperature Temperature: InteractionsPerDay=8
          Memo Soil Translation Notes
            Soil Characterisation DB layers ( 100, 100, 300, 300, 300, 300, 300, 300 ) are not the same as soil.apsim ( 150, 150, 300, 300, 300, 300 ) layers - remapping

            ** ISW is NA in 1 plots

            ISW is from site mean value
        SurfaceOrganicMatter: InitialResidueName=maize; InitialResidueType=maize; InitialResidueMass=500; InitialStandingFraction=0; InitialCPR=0; InitialCNR=65
        MicroClimate: a_interception=0; b_interception=1; c_interception=0; d_interception=0; SoilHeatFluxFraction=0.4; MinimumHeightDiffForNewLayer=0; NightInterceptionFraction=0.5; ReferenceHeight=1
        Irrigation
        Fertiliser
        Plant Lentil: ResourceName=Chickpea
        Operations
        Manager
          csvFile = 2022_Vic_Ouyen_Lentil_Satellite.startingConditions.csv
          EYear = 2022
          State = Vic
          Site = Ouyen
          TrialType = Satellite
          Crop = Lentil
          TOS = TOS1
          Variety =
          WaterTrt =
          Replicate = 0
          AgronomyTrt = None
          SowingDepth = 30
          RowSpacing = 300
          Population = 25
          SowDate = na
          UseStandardCultivars = False
          script: same as in 2019_NSW_Greenethorpe_Mixed_Detailed.2019_NSW_Greenethorpe_Mixed_Detailed.Field.Manager
        Report Static: same as 2019_NSW_Greenethorpe_Mixed_Detailed.2019_NSW_Greenethorpe_Mixed_Detailed.Field.Static
        Report DevelReport
          VariableNames:
            [Manager].Script.ID as id
            [Manager].Script.ymd as SampleDate
            [Manager].Script.Event as event
            [Lentil].Leaf.NodeNumber as Lentil_Node_No
            [Lentil].Leaf.Canopy.LAI as Lentil_LAI
        Report SoilReport
          VariableNames:
            [Manager].Script.ID as id
            [Manager].Script.ymd as SampleDate
            [Manager].Script.Event as event
            [Manager].Script.PAW_800mm as PAW_800mm
            [Manager].Script.ESWTot as ESWTot
            [Soil].Water.Volumetric as sw
        Report HarvestReport: same as 2019_NSW_Greenethorpe_Mixed_Detailed.2019_NSW_Greenethorpe_Mixed_Detailed.Field.HarvestReport
        Manager Irrigate on fixed dates (disabled): same as 2019_NSW_Greenethorpe_Mixed_Detailed.2019_NSW_Greenethorpe_Mixed_Detailed.Field.Irrigate on fixed dates
        Manager Reset on date (disabled): same as 2019_NSW_Greenethorpe_Mixed_Detailed.2019_NSW_Greenethorpe_Mixed_Detailed.Field.Reset on date
  Experiment 2023_Qld_Gatton_Mixed_Light
    Factors
      Permutation
        Factor TOS
          CompositeFactor TOS1
            Specifications:
              [Manager].Script.TOS = TOS1
              [Clock].StartDate = 2023-05-25T00:00:00
          CompositeFactor TOS2
            Specifications:
              [Manager].Script.TOS = TOS2
              [Clock].StartDate = 2023-07-10T00:00:00
        Factor Variety: Specification=[Manager].Script.Variety = PBA_KelpieXT
        Factor WaterTrt: Specification=[Manager].Script.WaterTrt = Irrigated
        Factor Agronomy: Specification=[Manager].Script.AgronomyTrt = 16_hr,Natural
    Simulation 2023_Qld_Gatton_Mixed_Light
      Weather: FileName=Qld_Gatton.met
      Manager LocalWeather
        patchFileName = Qld_Gatton.logger.met
        script: same as in 2019_NSW_Greenethorpe_Mixed_Detailed.2019_NSW_Greenethorpe_Mixed_Detailed.LocalWeather
      Clock: Start=2022-01-01; End=2022-06-01
      Summary summaryfile
      SoilArbitrator Soil Arbitrator
      Zone Field: Area=1; Slope=0; AspectAngle=0; Altitude=50
        Soil: SoilType=Clay; Site=Lawes; NearestTown=Lawes, Q 4350; Region=Southeast Coast; State=Queensland; Country=Australia; NaturalVegetation=Blue Gum, Moreton Bay Ash, Tea Tree; ApsoilNumber=38; Latitude=-27.531; Longitude=152.338; LocationAccuracy=+/- 20m; DataSource=CSIRO Sustainable Ecosystems, Toowoomba; Comments=OC and ph estimated
          Physical
            Thickness  BD    AirDry  LL15  DUL   SAT
            150        1.38  0.1     0.2   0.38  0.45
            150        1.38  0.168   0.21  0.38  0.45
            300        1.28  0.2     0.2   0.44  0.49
            300        1.38  0.19    0.19  0.4   0.45
            300        1.4   0.15    0.15  0.39  0.44
            300        1.46  0.2     0.2   0.37  0.42
            300        1.47  0.2     0.2   0.34  0.42
            SoilCrop LentilSoil: LL=[0.2, 0.21, 0.2, 0.22, 0.22, 0.34, 0.33]; KL=[0.06, 0.06, 0.06, 0.06, 0.06, 0.06, 0.06]; XF=[1, 1, 1, 1, 1, 1, 1]
              LL source: Field measured and checked for sensibility
          WaterBalance SoilWater: SummerDate=1-Nov; SummerU=6; SummerCona=3.5; WinterDate=1-Apr; WinterU=4; WinterCona=2.5; DiffusConst=40; DiffusSlope=16; Salb=0.12; CN2Bare=73; CNRed=20; CNCov=0.8; PSIDul=-100; Thickness=[150, 150, 300, 300, 300, 300, 300]; SWCON=[0.3, 0.3, 0.3, 0.3, 0.3, 0.3, 0.3]
          Solute NO3: Thickness=[150, 150, 300, 300, 300, 300, 300]; InitialValues=[6.006, 3.712, 1.137, 0.528, 0.199, 0, 0]; InitialValuesUnits=ppm; WaterTableConcentration=0; D0=0; DepthConstant=0; MaxDepthSoluteAccessible=0; RunoffEffectivenessAtMovingSolute=0; MaxEffectiveRunoff=0
          Solute NH4: Thickness=[150, 150, 300, 300, 300, 300, 300]; InitialValues=[2.002, 0.371, 0.114, 0.021, 0, 0, 0]; InitialValuesUnits=ppm; WaterTableConcentration=0; D0=0; DepthConstant=0; MaxDepthSoluteAccessible=0; RunoffEffectivenessAtMovingSolute=0; MaxEffectiveRunoff=0
          Solute Urea: same as 2022_NSW_Methul_Lentil_Satellite.2022_NSW_Methul_Lentil_Satellite.Field.Soil.Urea
          Water: Thickness=[150, 150, 300, 300, 300, 300, 300]; InitialValues=[0.38, 0.38, 0.44, 0.4, 0.39, 0.37, 0.34]; FilledFromTop=true
          Organic: FOMCNRatio=40; CarbonUnits=WalkleyBlack
            Thickness  Carbon    SoilCNRatio  FBiom  FInert  FOM
            150        0.923077  12           0.04   0.4     347.129
            150        0.923077  12           0.02   0.6     270.344
            300        0.923077  12           0.02   0.8     163.972
            300        0.846154  12           0.02   1       99.4541
            300        0.538462  12           0.01   1       60.322
            300        0.230769  12           0.01   1       36.5871
            300        0.230769  12           0.01   1       22.1912
          Chemical: Thickness=[150, 150, 300, 300, 300, 300, 300]; PH=[8, 8, 8, 8, 8, 8, 8]; PHUnits=Water
            PH source: Estimated based on local knowledge
          Nutrient
          SoilTemperature Temperature: InteractionsPerDay=8
          Memo Soil Translation Notes
            Soil Characterisation DB layers ( 100, 100, 300, 300, 300, 300, 300, 300 ) are not the same as soil.apsim ( 150, 150, 300, 300, 300, 300, 300 ) layers - remapping

            Missing initial soil water, using DUL
        SurfaceOrganicMatter: InitialResidueName=maize; InitialResidueType=maize; InitialResidueMass=500; InitialStandingFraction=0; InitialCPR=0; InitialCNR=65
        MicroClimate: a_interception=0; b_interception=1; c_interception=0; d_interception=0; SoilHeatFluxFraction=0.4; MinimumHeightDiffForNewLayer=0; NightInterceptionFraction=0.5; ReferenceHeight=1
        Irrigation
        Fertiliser
        Plant Lentil: ResourceName=Chickpea
        Operations
        Manager
          csvFile = 2023_Qld_Gatton_Mixed_Light.startingConditions.csv
          EYear = 2023
          State = Qld
          Site = Gatton
          TrialType = Light
          Crop = Mixed
          TOS = TOS1
          Variety =
          WaterTrt =
          Replicate = 0
          AgronomyTrt = None
          SowingDepth = 30
          RowSpacing = 300
          Population = 25
          SowDate = na
          UseStandardCultivars = False
          script: same as in 2019_NSW_Greenethorpe_Mixed_Detailed.2019_NSW_Greenethorpe_Mixed_Detailed.Field.Manager
        Report Static: same as 2019_NSW_Greenethorpe_Mixed_Detailed.2019_NSW_Greenethorpe_Mixed_Detailed.Field.Static
        Report DevelReport
          VariableNames:
            [Manager].Script.ID as id
            [Manager].Script.ymd as SampleDate
            [Manager].Script.Event as event
            [Lentil].Leaf.NodeNumber as Lentil_Node_No
            [Lentil].Leaf.Canopy.LAI as Lentil_LAI
        Report SoilReport
          VariableNames:
            [Manager].Script.ID as id
            [Manager].Script.ymd as SampleDate
            [Manager].Script.Event as event
            [Manager].Script.PAW_800mm as PAW_800mm
            [Manager].Script.ESWTot as ESWTot
            [Soil].Water.Volumetric as sw
        Report HarvestReport: same as 2019_NSW_Greenethorpe_Mixed_Detailed.2019_NSW_Greenethorpe_Mixed_Detailed.Field.HarvestReport
        Manager Irrigate on fixed dates (disabled): same as 2019_NSW_Greenethorpe_Mixed_Detailed.2019_NSW_Greenethorpe_Mixed_Detailed.Field.Irrigate on fixed dates
        Manager Reset on date (disabled): same as 2019_NSW_Greenethorpe_Mixed_Detailed.2019_NSW_Greenethorpe_Mixed_Detailed.Field.Reset on date
  Experiment 2023_SA_Pinery_Lentil_Detailed
    Factors
      Permutation
        Factor TOS
          CompositeFactor TOS1
            Specifications:
              [Manager].Script.TOS = TOS1
              [Clock].StartDate = 2023-05-09T00:00:00
          CompositeFactor TOS2
            Specifications:
              [Manager].Script.TOS = TOS2
              [Clock].StartDate = 2023-06-27T00:00:00
        Factor Variety
          Specification=[Manager].Script.Variety = PBA_KelpieXT,PBA_Jumbo2,PBA_Bolt,PBA_HallmarkXT
        Factor WaterTrt: Specification=[Manager].Script.WaterTrt = Irrigated,RainFed
    Simulation 2023_SA_Pinery_Lentil_Detailed
      Weather: FileName=SA_Pinery.met
      Manager LocalWeather (disabled): same as 2019_NSW_Greenethorpe_Mixed_Detailed.2019_NSW_Greenethorpe_Mixed_Detailed.LocalWeather
      Clock: Start=2022-01-01; End=2022-06-01
      Summary summaryfile
      SoilArbitrator Soil Arbitrator
      Zone Field: Area=1; Slope=0; AspectAngle=0; Altitude=50
        Soil: ASCOrder=Calcarosol; ASCSubOrder=Hypercalcic; SoilType=Loamy duplex; Site=Pinery; NearestTown=Owen; Region=Mid North; State=South Australia; Country=Australia; ApsoilNumber=273; Latitude=-34.309; Longitude=138.46; LocationAccuracy=+/- 20m
          DataSource=Characterisation 2006 by University of Adelaide, CSIRO Sustainable Ecosystems and Ag Consulting as part of GRDC project 'Training growers to manage soil water'
          Comments=Loam - OC estimated for all depths; Barley CLL measured, estimated for other crops, LL15, AD all estimated;Root depth: Barley 65cm. Moderate clay soil with moderate-high CEC. High ESP and toxic levels of boron mobilised by high pH will impede root growth below about 65cm; pH also reduces trace element availability. Slaking or dispersion possible at depth.
          Physical
            Thickness  ParticleSizeSand  ParticleSizeSilt  ParticleSizeClay  Rocks  BD     AirDry  LL15   DUL    SAT
            150        56                11                32                0      1.356  0.07    0.14   0.269  0.458
            150        51                14                35                0      1.272  0.109   0.136  0.251  0.49
            200        40                19                41                0      1.378  0.146   0.146  0.281  0.45
            300        29                15                56                0      1.454  0.146   0.146  0.349  0.421
            300        39                11                50                0      1.465  0.146   0.146  0.366  0.417
            400        39                10                50                0      1.561  0.146   0.146  0.34   0.39
            SoilCrop LentilSoil: LL=[0.14, 0.136, 0.146, 0.256, 0.299, 0.34]; KL=[0.06, 0.06, 0.06, 0.04, 0.04, 0.02]; XF=[1, 1, 1, 1, 0.5, 0.4]
          WaterBalance SoilWater: SummerDate=1-Nov; SummerU=6; SummerCona=3.5; WinterDate=1-Apr; WinterU=2; WinterCona=2; DiffusConst=60; DiffusSlope=20; Salb=0.14; CN2Bare=73; CNRed=20; CNCov=0.8; PSIDul=-100; Thickness=[150, 150, 200, 300, 300, 400]; SWCON=[0.4, 0.4, 0.4, 0.3, 0.3, 0.3]
          Solute NO3: Thickness=[150, 150, 200, 300, 300, 400]; InitialValuesUnits=ppm; WaterTableConcentration=0; D0=0; DepthConstant=0; MaxDepthSoluteAccessible=0; RunoffEffectivenessAtMovingSolute=0; MaxEffectiveRunoff=0
          Solute NH4: same as 2023_SA_Pinery_Lentil_Detailed.2023_SA_Pinery_Lentil_Detailed.Field.Soil.NO3
          Solute Urea: Thickness=[150, 150, 200, 300, 300, 400]; InitialValues=[0, 0, 0, 0, 0, 0]; InitialValuesUnits=kg/ha; WaterTableConcentration=0; D0=0; DepthConstant=0; MaxDepthSoluteAccessible=0; RunoffEffectivenessAtMovingSolute=0; MaxEffectiveRunoff=0
          Water: Thickness=[150, 150, 200, 300, 300, 400]; InitialValues=[0.2525, 0.2668, 0.2711, 0.2367, 0.2103, 0.2103]; FilledFromTop=true
          Organic: FOMCNRatio=40; CarbonUnits=WalkleyBlack
            Thickness  Carbon  SoilCNRatio  FBiom  FInert  FOM
            150        1       12           0.04   0.4     366.742
            150        0.8     12           0.02   0.5     271.689
            200        0.5     12           0.02   0.7     182.119
            300        0.25    12           0.02   1       99.949
            300        0.15    12           0.01   1       54.8532
            400        0.1     12           0.01   1       24.6471
          Chemical: PHUnits=Water
            Thickness  PH   EC   ESP      CEC
            150        8.4  0.3  2.69231  26
            150        8.7  0.2  2.57353  27.2
            200        9.3  0.2  7.72358  24.6
            300        9.9  0.5  26.5781  30.1
            300        9.9  0.7  38.8199  32.2
            400        9.7  0.9  39.5604  27.3
            EC, CL, CEC, PH source: Measured
            ESP source: C
          Nutrient
          SoilTemperature Temperature: InteractionsPerDay=8
          Memo Soil Translation Notes
            Soil Characterisation DB layers ( 100, 100, 300, 300, 300, 300 ) are not the same as soil.apsim ( 150, 150, 200, 300, 300, 400 ) layers - remapping

            ISW is from site mean value
        SurfaceOrganicMatter: InitialResidueName=maize; InitialResidueType=maize; InitialResidueMass=500; InitialStandingFraction=0; InitialCPR=0; InitialCNR=65
        MicroClimate: a_interception=0; b_interception=1; c_interception=0; d_interception=0; SoilHeatFluxFraction=0.4; MinimumHeightDiffForNewLayer=0; NightInterceptionFraction=0.5; ReferenceHeight=1
        Irrigation
        Fertiliser
        Plant Lentil: ResourceName=Chickpea
        Operations
        Manager
          csvFile = 2023_SA_Pinery_Lentil_Detailed.startingConditions.csv
          EYear = 2023
          State = SA
          Site = Pinery
          TrialType = Detailed
          Crop = Lentil
          TOS = TOS1
          Variety =
          WaterTrt =
          Replicate = 0
          AgronomyTrt = None
          SowingDepth = 30
          RowSpacing = 300
          Population = 25
          SowDate = na
          UseStandardCultivars = False
          script: same as in 2019_NSW_Greenethorpe_Mixed_Detailed.2019_NSW_Greenethorpe_Mixed_Detailed.Field.Manager
        Report Static: same as 2019_NSW_Greenethorpe_Mixed_Detailed.2019_NSW_Greenethorpe_Mixed_Detailed.Field.Static
        Report DevelReport
          VariableNames:
            [Manager].Script.ID as id
            [Manager].Script.ymd as SampleDate
            [Manager].Script.Event as event
            [Lentil].Leaf.NodeNumber as Lentil_Node_No
            [Lentil].Leaf.Canopy.LAI as Lentil_LAI
        Report SoilReport
          VariableNames:
            [Manager].Script.ID as id
            [Manager].Script.ymd as SampleDate
            [Manager].Script.Event as event
            [Manager].Script.PAW_800mm as PAW_800mm
            [Manager].Script.ESWTot as ESWTot
            [Soil].Water.Volumetric as sw
        Report HarvestReport: same as 2019_NSW_Greenethorpe_Mixed_Detailed.2019_NSW_Greenethorpe_Mixed_Detailed.Field.HarvestReport
        Manager Irrigate on fixed dates (disabled): same as 2019_NSW_Greenethorpe_Mixed_Detailed.2019_NSW_Greenethorpe_Mixed_Detailed.Field.Irrigate on fixed dates
        Manager Reset on date (disabled): same as 2019_NSW_Greenethorpe_Mixed_Detailed.2019_NSW_Greenethorpe_Mixed_Detailed.Field.Reset on date
  Experiment 2023_SA_Warnertown_Lentil_Satellite
    Factors
      Permutation
        Factor TOS
          CompositeFactor TOS1
            Specifications:
              [Manager].Script.TOS = TOS1
              [Clock].StartDate = 2023-04-12T00:00:00
          CompositeFactor TOS2
            Specifications:
              [Manager].Script.TOS = TOS2
              [Clock].StartDate = 2023-05-07T00:00:00
        Factor Variety
          Specification=[Manager].Script.Variety = PBA_Bolt,PBA_HallmarkXT,PBA_Jumbo2,PBA_KelpieXT
        Factor WaterTrt: Specification=[Manager].Script.WaterTrt = RainFed
        Factor Agronomy: Specification=[Manager].Script.AgronomyTrt = Density_0.66,Density_1
    Simulation 2023_SA_Warnertown_Lentil_Satellite
      Weather: FileName=SA_Warnertown.met
      Manager LocalWeather (disabled): same as 2019_NSW_Greenethorpe_Mixed_Detailed.2019_NSW_Greenethorpe_Mixed_Detailed.LocalWeather
      Clock: Start=2022-01-01; End=2022-06-01
      Summary summaryfile
      SoilArbitrator Soil Arbitrator
      Zone Field: Area=1; Slope=0; AspectAngle=0; Altitude=50
        Soil: ASCOrder=Vertosol; ASCSubOrder=Red; SoilType=Clay loam; Site=Wandearah; NearestTown=Wandearah; Region=Mid North; State=South Australia; Country=Australia; ApsoilNumber=CU022; Latitude=-33.323; Longitude=138.061; LocationAccuracy=+/- 20m; Comments=Clay -
          DataSource=Soil water characteristics based on: Soil and Land Information (2002). Soil Data Sheets. [CD ROM]. Soil and Land Information Group, Department of Water, Land and Biodiversity Conservation, South Australia.
          Physical: same as 2022_SA_Warnertown_Lentil_Satellite.2022_SA_Warnertown_Lentil_Satellite.Field.Soil.Physical
          WaterBalance SoilWater: same as 2022_SA_Warnertown_Lentil_Satellite.2022_SA_Warnertown_Lentil_Satellite.Field.Soil.SoilWater
          Solute NO3: same as 2022_SA_Warnertown_Lentil_Satellite.2022_SA_Warnertown_Lentil_Satellite.Field.Soil.NO3
          Solute NH4: same as 2022_SA_Warnertown_Lentil_Satellite.2022_SA_Warnertown_Lentil_Satellite.Field.Soil.NO3
          Solute Urea: same as 2022_SA_Warnertown_Lentil_Satellite.2022_SA_Warnertown_Lentil_Satellite.Field.Soil.Urea
          Water: Thickness=[100, 200, 300, 350, 650]; InitialValues=[0.1107, 0.184, 0.25, 0.25, 0.25]; FilledFromTop=true
          Organic: same as 2022_SA_Warnertown_Lentil_Satellite.2022_SA_Warnertown_Lentil_Satellite.Field.Soil.Organic
          Chemical: same as 2022_SA_Warnertown_Lentil_Satellite.2022_SA_Warnertown_Lentil_Satellite.Field.Soil.Chemical
          Nutrient
          SoilTemperature Temperature: InteractionsPerDay=8
          Memo Soil Translation Notes
            Soil Characterisation DB layers ( 100, 100, 300, 300, 300, 300, 300, 300 ) are not the same as soil.apsim ( 100, 200, 300, 350, 650 ) layers - remapping

            ISW is from site mean value
        SurfaceOrganicMatter: InitialResidueName=maize; InitialResidueType=maize; InitialResidueMass=500; InitialStandingFraction=0; InitialCPR=0; InitialCNR=65
        MicroClimate: a_interception=0; b_interception=1; c_interception=0; d_interception=0; SoilHeatFluxFraction=0.4; MinimumHeightDiffForNewLayer=0; NightInterceptionFraction=0.5; ReferenceHeight=1
        Irrigation
        Fertiliser
        Plant Lentil: ResourceName=Chickpea
        Operations
        Manager
          csvFile = 2023_SA_Warnertown_Lentil_Satellite.startingConditions.csv
          EYear = 2023
          State = SA
          Site = Warnertown
          TrialType = Satellite
          Crop = Lentil
          TOS = TOS1
          Variety =
          WaterTrt =
          Replicate = 0
          AgronomyTrt = None
          SowingDepth = 30
          RowSpacing = 300
          Population = 25
          SowDate = na
          UseStandardCultivars = False
          script: same as in 2019_NSW_Greenethorpe_Mixed_Detailed.2019_NSW_Greenethorpe_Mixed_Detailed.Field.Manager
        Report Static: same as 2019_NSW_Greenethorpe_Mixed_Detailed.2019_NSW_Greenethorpe_Mixed_Detailed.Field.Static
        Report DevelReport
          VariableNames:
            [Manager].Script.ID as id
            [Manager].Script.ymd as SampleDate
            [Manager].Script.Event as event
            [Lentil].Leaf.NodeNumber as Lentil_Node_No
            [Lentil].Leaf.Canopy.LAI as Lentil_LAI
        Report SoilReport
          VariableNames:
            [Manager].Script.ID as id
            [Manager].Script.ymd as SampleDate
            [Manager].Script.Event as event
            [Manager].Script.PAW_800mm as PAW_800mm
            [Manager].Script.ESWTot as ESWTot
            [Soil].Water.Volumetric as sw
        Report HarvestReport: same as 2019_NSW_Greenethorpe_Mixed_Detailed.2019_NSW_Greenethorpe_Mixed_Detailed.Field.HarvestReport
        Manager Irrigate on fixed dates (disabled): same as 2019_NSW_Greenethorpe_Mixed_Detailed.2019_NSW_Greenethorpe_Mixed_Detailed.Field.Irrigate on fixed dates
        Manager Reset on date (disabled): same as 2019_NSW_Greenethorpe_Mixed_Detailed.2019_NSW_Greenethorpe_Mixed_Detailed.Field.Reset on date
  Experiment 2023_Vic_Dooen_Lentil_Detailed
    Factors
      Permutation
        Factor TOS
          CompositeFactor TOS1
            Specifications:
              [Manager].Script.TOS = TOS1
              [Clock].StartDate = 2023-05-15T00:00:00
          CompositeFactor TOS2
            Specifications:
              [Manager].Script.TOS = TOS2
              [Clock].StartDate = 2023-07-02T00:00:00
        Factor Variety
          Specification=[Manager].Script.Variety = PBA_Bolt,PBA_Jumbo2,PBA_KelpieXT,PBA_HallmarkXT
        Factor WaterTrt: Specification=[Manager].Script.WaterTrt = Irrigated,RainFed
    Simulation 2023_Vic_Dooen_Lentil_Detailed
      Weather: FileName=Vic_Dooen.met
      Manager LocalWeather
        patchFileName = Vic_Dooen.logger.met
        script: same as in 2019_NSW_Greenethorpe_Mixed_Detailed.2019_NSW_Greenethorpe_Mixed_Detailed.LocalWeather
      Clock: Start=2022-01-01; End=2022-06-01
      Summary summaryfile
      SoilArbitrator Soil Arbitrator
      Zone Field: Area=1; Slope=0; AspectAngle=0; Altitude=50
        Soil: SoilType=Sandy duplex; Site=Kalkee; NearestTown=Kalkee, Vic 3401; Region=Wimmera; State=Victoria; Country=Australia; NaturalVegetation=Buloke; ApsoilNumber=989; Latitude=-36.551123; Longitude=142.209283; LocationAccuracy=Nearest town; Comments=Sandy loam - All CLLs  estimated
          DataSource=YP. Characterisation 2012 by ,Brett  Cocks CSIRO Ecosystem Sciences GRDC project  'Training growers to manage soil water'
          Physical
            Thickness  ParticleSizeSand  ParticleSizeSilt  ParticleSizeClay  BD    AirDry  LL15  DUL   SAT
            100        80                10                10                1.1   0.08    0.2   0.45  0.495784
            100        76                12                12                1.17  0.08    0.2   0.45  0.472648
            300        68                5                 27                1.19  0.24    0.24  0.47  0.477335
            300        52                7                 40                1.2   0.26    0.26  0.48  0.51359
            300        50                8                 42                1.28  0.48    0.48  0.48  0.51
            300        52                7                 40                1.29  0.48    0.48  0.48  0.51
            300        50                5                 45                1.29  0.48    0.48  0.48  0.501993
            300        50                5                 45                1.29  0.4     0.4   0.48  0.5
            SoilCrop LentilSoil: LL=[0.2, 0.2, 0.24, 0.26, 0.48, 0.48, 0.48, 0.4]; KL=[0.06, 0.06, 0.06, 0.04, 0.04, 0.02, 0.01, 0.01]; XF=[1, 1, 1, 1, 1, 1, 1, 1]
          WaterBalance SoilWater: SummerDate=1-Nov; SummerU=6; SummerCona=3.5; WinterDate=1-Apr; WinterU=2; WinterCona=2; DiffusConst=88; DiffusSlope=35; Salb=0.13; CN2Bare=68; CNRed=20; CNCov=0.8; PSIDul=-100; Thickness=[150, 150, 300, 300, 300, 300, 300]; SWCON=[0.5, 0.5, 0.3, 0.3, 0.3, 0.3, 0.03]
          Solute NO3: Thickness=[100, 100, 300, 300, 300, 300, 300]; InitialValuesUnits=ppm; WaterTableConcentration=0; D0=0; DepthConstant=0; MaxDepthSoluteAccessible=0; RunoffEffectivenessAtMovingSolute=0; MaxEffectiveRunoff=0
          Solute NH4: same as 2023_Vic_Dooen_Lentil_Detailed.2023_Vic_Dooen_Lentil_Detailed.Field.Soil.NO3
          Solute Urea: Thickness=[100, 100, 300, 300, 300, 300, 300]; InitialValues=[0, 0, 0, 0, 0, 0, 0]; InitialValuesUnits=kg/ha; WaterTableConcentration=0; D0=0; DepthConstant=0; MaxDepthSoluteAccessible=0; RunoffEffectivenessAtMovingSolute=0; MaxEffectiveRunoff=0
          Water: Thickness=[100, 100, 300, 300, 300, 300, 300, 300]; InitialValues=[0.3445, 0.3577, 0.3626, 0.3955, 0.48, 0.48, 0.48, 0.4643]; FilledFromTop=true
          Organic: FOMCNRatio=40; CarbonUnits=Total
            Thickness  Carbon  SoilCNRatio  FBiom  FInert  FOM
            100        1.1     12           0.04   0.4     338.509
            100        0.8     12           0.02   0.5     283.746
            300        0.4     12           0.02   0.7     167.113
            300        0.01    12           0.02   0.95    98.4213
            300        0.01    12           0.01   0.095   57.9654
            300        0.01    12           0.01   0.095   34.1388
            300        0.01    12           0.01   0.095   20.1061
          Chemical: PHUnits=Water
            Thickness  PH    EC    ESP   CEC
            100        8.38  0.15  1.6   49.9
            100        8.68  0.12  2.4   48.7
            300        9.1   0.18  4.9   47.6
            300        8.14  2.74  7.2   57.2
            300        8.34  2.57  13.7  54.2
            300        8.84  1.69  19.9  52.9
            300        9.21  1.8   23.9  50.1
            EC, CL, CEC, PH source: Measured
            ESP source: C
          Nutrient
          SoilTemperature Temperature: InteractionsPerDay=8
          Memo Soil Translation Notes
            ISW is from site mean value
        SurfaceOrganicMatter: InitialResidueName=maize; InitialResidueType=maize; InitialResidueMass=500; InitialStandingFraction=0; InitialCPR=0; InitialCNR=65
        MicroClimate: a_interception=0; b_interception=1; c_interception=0; d_interception=0; SoilHeatFluxFraction=0.4; MinimumHeightDiffForNewLayer=0; NightInterceptionFraction=0.5; ReferenceHeight=1
        Irrigation
        Fertiliser
        Plant Lentil: ResourceName=Chickpea
        Operations
        Manager
          csvFile = 2023_Vic_Dooen_Lentil_Detailed.startingConditions.csv
          EYear = 2023
          State = Vic
          Site = Dooen
          TrialType = Detailed
          Crop = Lentil
          TOS = TOS1
          Variety =
          WaterTrt =
          Replicate = 0
          AgronomyTrt = None
          SowingDepth = 30
          RowSpacing = 300
          Population = 25
          SowDate = na
          UseStandardCultivars = False
          script: same as in 2019_NSW_Greenethorpe_Mixed_Detailed.2019_NSW_Greenethorpe_Mixed_Detailed.Field.Manager
        Report Static: same as 2019_NSW_Greenethorpe_Mixed_Detailed.2019_NSW_Greenethorpe_Mixed_Detailed.Field.Static
        Report DevelReport
          VariableNames:
            [Manager].Script.ID as id
            [Manager].Script.ymd as SampleDate
            [Manager].Script.Event as event
            [Lentil].Leaf.NodeNumber as Lentil_Node_No
            [Lentil].Leaf.Canopy.LAI as Lentil_LAI
        Report SoilReport
          VariableNames:
            [Manager].Script.ID as id
            [Manager].Script.ymd as SampleDate
            [Manager].Script.Event as event
            [Manager].Script.PAW_800mm as PAW_800mm
            [Manager].Script.ESWTot as ESWTot
            [Soil].Water.Volumetric as sw
        Report HarvestReport: same as 2019_NSW_Greenethorpe_Mixed_Detailed.2019_NSW_Greenethorpe_Mixed_Detailed.Field.HarvestReport
        Manager Irrigate on fixed dates (disabled): same as 2019_NSW_Greenethorpe_Mixed_Detailed.2019_NSW_Greenethorpe_Mixed_Detailed.Field.Irrigate on fixed dates
        Manager Reset on date (disabled): same as 2019_NSW_Greenethorpe_Mixed_Detailed.2019_NSW_Greenethorpe_Mixed_Detailed.Field.Reset on date
  Experiment 2024_NSW_Greenethorpe_Mixed_NFix
    Factors
      Permutation
        Factor TOS
          CompositeFactor TOS1
            Specifications:
              [Manager].Script.TOS = TOS1
              [Clock].StartDate = 2024-05-07T00:00:00
        Factor Variety: Specification=[Manager].Script.Variety = PBA_KelpieXT,PBA_Jumbo2
        Factor WaterTrt: Specification=[Manager].Script.WaterTrt = RainFed
        Factor Agronomy: Specification=[Manager].Script.AgronomyTrt = 350kgN,175kgN,50kgN,125kgN
    Simulation 2024_NSW_Greenethorpe_Mixed_NFix
      Weather: FileName=NSW_Greenethorpe.met
      Manager LocalWeather (disabled): same as 2019_NSW_Greenethorpe_Mixed_Detailed.2019_NSW_Greenethorpe_Mixed_Detailed.LocalWeather
      Clock: Start=2022-01-01; End=2022-06-01
      Summary summaryfile
      SoilArbitrator Soil Arbitrator
      Zone Field: Area=1; Slope=0; AspectAngle=0; Altitude=50
        Soil: SoilType=AJAR2007; Latitude=0; Longitude=0
          DataSource=John Kirkegaard  Jeremy Whish   Farming systems trial site Iandra castle
          Memo: same as 2019_NSW_Greenethorpe_Mixed_Detailed.2019_NSW_Greenethorpe_Mixed_Detailed.Field.Soil.memo
          Physical: same as 2019_NSW_Greenethorpe_Mixed_Detailed.2019_NSW_Greenethorpe_Mixed_Detailed.Field.Soil.Physical
          WaterBalance SoilWater: same as 2019_NSW_Greenethorpe_Mixed_Detailed.2019_NSW_Greenethorpe_Mixed_Detailed.Field.Soil.SoilWater
          Solute NO3: same as 2019_NSW_Greenethorpe_Mixed_Detailed.2019_NSW_Greenethorpe_Mixed_Detailed.Field.Soil.NO3
          Solute NH4: same as 2019_NSW_Greenethorpe_Mixed_Detailed.2019_NSW_Greenethorpe_Mixed_Detailed.Field.Soil.NH4
          Solute Urea: same as 2019_NSW_Greenethorpe_Mixed_Detailed.2019_NSW_Greenethorpe_Mixed_Detailed.Field.Soil.Urea
          Water: Thickness=[100, 100, 300, 300, 300, 300, 300, 300]; InitialValues=[0.1347, 0.157, 0.1656, 0.1906, 0.2228, 0.2503, 0.27, 0.28]; FilledFromTop=true
          Organic: same as 2019_NSW_Greenethorpe_Mixed_Detailed.2019_NSW_Greenethorpe_Mixed_Detailed.Field.Soil.Organic
          Chemical: Thickness=[100, 100, 300, 300, 300, 300, 300, 300]; PH=[5.5, 6.2, 6.6, 6.8, 7.3, 7.4, 8.2, 8.4]; PHUnits=Water
          Nutrient
          SoilTemperature Temperature: InteractionsPerDay=8
          Memo Soil Translation Notes
            Soil Characterisation DB layers ( 100, 100, 200, 200, 200, 200, 300, 300 ) are not the same as soil.apsim ( 100, 100, 300, 300, 300, 300, 300, 300 ) layers - remapping

            ISW is from site mean value
        SurfaceOrganicMatter: InitialResidueName=maize; InitialResidueType=maize; InitialResidueMass=500; InitialStandingFraction=0; InitialCPR=0; InitialCNR=65
        MicroClimate: a_interception=0; b_interception=1; c_interception=0; d_interception=0; SoilHeatFluxFraction=0.4; MinimumHeightDiffForNewLayer=0; NightInterceptionFraction=0.5; ReferenceHeight=1
        Irrigation
        Fertiliser
        Plant Lentil: ResourceName=Chickpea
        Operations
        Manager
          csvFile = 2024_NSW_Greenethorpe_Mixed_NFix.startingConditions.csv
          EYear = 2024
          State = NSW
          Site = Greenethorpe
          TrialType = NFix
          Crop = Mixed
          TOS = TOS1
          Variety =
          WaterTrt =
          Replicate = 0
          AgronomyTrt = None
          SowingDepth = 30
          RowSpacing = 300
          Population = 25
          SowDate = na
          UseStandardCultivars = False
          script: same as in 2019_NSW_Greenethorpe_Mixed_Detailed.2019_NSW_Greenethorpe_Mixed_Detailed.Field.Manager
        Report Static: same as 2019_NSW_Greenethorpe_Mixed_Detailed.2019_NSW_Greenethorpe_Mixed_Detailed.Field.Static
        Report DevelReport
          VariableNames:
            [Manager].Script.ID as id
            [Manager].Script.ymd as SampleDate
            [Manager].Script.Event as event
            [Lentil].Leaf.NodeNumber as Lentil_Node_No
            [Lentil].Leaf.Canopy.LAI as Lentil_LAI
        Report SoilReport
          VariableNames:
            [Manager].Script.ID as id
            [Manager].Script.ymd as SampleDate
            [Manager].Script.Event as event
            [Manager].Script.PAW_800mm as PAW_800mm
            [Manager].Script.ESWTot as ESWTot
            [Soil].Water.Volumetric as sw
        Report HarvestReport: same as 2019_NSW_Greenethorpe_Mixed_Detailed.2019_NSW_Greenethorpe_Mixed_Detailed.Field.HarvestReport
        Manager Irrigate on fixed dates (disabled): same as 2019_NSW_Greenethorpe_Mixed_Detailed.2019_NSW_Greenethorpe_Mixed_Detailed.Field.Irrigate on fixed dates
        Manager Reset on date (disabled): same as 2019_NSW_Greenethorpe_Mixed_Detailed.2019_NSW_Greenethorpe_Mixed_Detailed.Field.Reset on date
  Experiment 2024_SA_Warnertown_Lentil_Satellite
    Factors
      Permutation
        Factor TOS
          CompositeFactor TOS1
            Specifications:
              [Manager].Script.TOS = TOS1
              [Clock].StartDate = 2024-04-09T00:00:00
          CompositeFactor TOS2
            Specifications:
              [Manager].Script.TOS = TOS2
              [Clock].StartDate = 2024-05-14T00:00:00
        Factor Variety
          Specification=[Manager].Script.Variety = PBA_Jumbo2,PBA_Bolt,PBA_HallmarkXT,PBA_KelpieXT
        Factor WaterTrt: Specification=[Manager].Script.WaterTrt = RainFed
        Factor Agronomy: Specification=[Manager].Script.AgronomyTrt = Density_0.66,Density_1
    Simulation 2024_SA_Warnertown_Lentil_Satellite
      Weather: FileName=SA_Warnertown.met
      Manager LocalWeather (disabled): same as 2019_NSW_Greenethorpe_Mixed_Detailed.2019_NSW_Greenethorpe_Mixed_Detailed.LocalWeather
      Clock: Start=2022-01-01; End=2022-06-01
      Summary summaryfile
      SoilArbitrator Soil Arbitrator
      Zone Field: Area=1; Slope=0; AspectAngle=0; Altitude=50
        Soil: ASCOrder=Vertosol; ASCSubOrder=Red; SoilType=Clay loam; Site=Wandearah; NearestTown=Wandearah; Region=Mid North; State=South Australia; Country=Australia; ApsoilNumber=CU022; Latitude=-33.323; Longitude=138.061; LocationAccuracy=+/- 20m; Comments=Clay -
          DataSource=Soil water characteristics based on: Soil and Land Information (2002). Soil Data Sheets. [CD ROM]. Soil and Land Information Group, Department of Water, Land and Biodiversity Conservation, South Australia.
          Physical: same as 2022_SA_Warnertown_Lentil_Satellite.2022_SA_Warnertown_Lentil_Satellite.Field.Soil.Physical
          WaterBalance SoilWater: same as 2022_SA_Warnertown_Lentil_Satellite.2022_SA_Warnertown_Lentil_Satellite.Field.Soil.SoilWater
          Solute NO3: same as 2022_SA_Warnertown_Lentil_Satellite.2022_SA_Warnertown_Lentil_Satellite.Field.Soil.NO3
          Solute NH4: same as 2022_SA_Warnertown_Lentil_Satellite.2022_SA_Warnertown_Lentil_Satellite.Field.Soil.NO3
          Solute Urea: same as 2022_SA_Warnertown_Lentil_Satellite.2022_SA_Warnertown_Lentil_Satellite.Field.Soil.Urea
          Water: Thickness=[100, 200, 300, 350, 650]; InitialValues=[0.105, 0.184, 0.25, 0.25, 0.25]; FilledFromTop=true
          Organic: same as 2022_SA_Warnertown_Lentil_Satellite.2022_SA_Warnertown_Lentil_Satellite.Field.Soil.Organic
          Chemical: same as 2022_SA_Warnertown_Lentil_Satellite.2022_SA_Warnertown_Lentil_Satellite.Field.Soil.Chemical
          Nutrient
          SoilTemperature Temperature: InteractionsPerDay=8
          Memo Soil Translation Notes
            Soil Characterisation DB layers ( 100, 100, 300, 300, 300, 300, 300, 300 ) are not the same as soil.apsim ( 100, 200, 300, 350, 650 ) layers - remapping

            ISW is from site mean value
        SurfaceOrganicMatter: InitialResidueName=maize; InitialResidueType=maize; InitialResidueMass=500; InitialStandingFraction=0; InitialCPR=0; InitialCNR=65
        MicroClimate: a_interception=0; b_interception=1; c_interception=0; d_interception=0; SoilHeatFluxFraction=0.4; MinimumHeightDiffForNewLayer=0; NightInterceptionFraction=0.5; ReferenceHeight=1
        Irrigation
        Fertiliser
        Plant Lentil: ResourceName=Chickpea
        Operations
        Manager
          csvFile = 2024_SA_Warnertown_Lentil_Satellite.startingConditions.csv
          EYear = 2024
          State = SA
          Site = Warnertown
          TrialType = Satellite
          Crop = Lentil
          TOS = TOS1
          Variety =
          WaterTrt =
          Replicate = 0
          AgronomyTrt = None
          SowingDepth = 30
          RowSpacing = 300
          Population = 25
          SowDate = na
          UseStandardCultivars = False
          script: same as in 2019_NSW_Greenethorpe_Mixed_Detailed.2019_NSW_Greenethorpe_Mixed_Detailed.Field.Manager
        Report Static: same as 2019_NSW_Greenethorpe_Mixed_Detailed.2019_NSW_Greenethorpe_Mixed_Detailed.Field.Static
        Report DevelReport
          VariableNames:
            [Manager].Script.ID as id
            [Manager].Script.ymd as SampleDate
            [Manager].Script.Event as event
            [Lentil].Leaf.NodeNumber as Lentil_Node_No
            [Lentil].Leaf.Canopy.LAI as Lentil_LAI
        Report SoilReport
          VariableNames:
            [Manager].Script.ID as id
            [Manager].Script.ymd as SampleDate
            [Manager].Script.Event as event
            [Manager].Script.PAW_800mm as PAW_800mm
            [Manager].Script.ESWTot as ESWTot
            [Soil].Water.Volumetric as sw
        Report HarvestReport: same as 2019_NSW_Greenethorpe_Mixed_Detailed.2019_NSW_Greenethorpe_Mixed_Detailed.Field.HarvestReport
        Manager Irrigate on fixed dates (disabled): same as 2019_NSW_Greenethorpe_Mixed_Detailed.2019_NSW_Greenethorpe_Mixed_Detailed.Field.Irrigate on fixed dates
        Manager Reset on date (disabled): same as 2019_NSW_Greenethorpe_Mixed_Detailed.2019_NSW_Greenethorpe_Mixed_Detailed.Field.Reset on date
  Experiment 2024_Vic_Walpeup_Lentil_Satellite
    Factors
      Permutation
        Factor TOS
          CompositeFactor TOS1
            Specifications:
              [Manager].Script.TOS = TOS1
              [Clock].StartDate = 2024-05-08T00:00:00
          CompositeFactor TOS2
            Specifications:
              [Manager].Script.TOS = TOS2
              [Clock].StartDate = 2024-06-16T00:00:00
        Factor Variety
          Specification=[Manager].Script.Variety = PBA_Jumbo2,PBA_HallmarkXT,PBA_KelpieXT,PBA_Bolt
        Factor WaterTrt: Specification=[Manager].Script.WaterTrt = RainFed
    Simulation 2024_Vic_Walpeup_Lentil_Satellite
      Weather: FileName=Vic_Walpeup.met
      Manager LocalWeather (disabled): same as 2019_NSW_Greenethorpe_Mixed_Detailed.2019_NSW_Greenethorpe_Mixed_Detailed.LocalWeather
      Clock: Start=2022-01-01; End=2022-06-01
      Summary summaryfile
      SoilArbitrator Soil Arbitrator
      Zone Field: Area=1; Slope=0; AspectAngle=0; Altitude=50
        Soil: SoilType=Sandy duplex; Site=Walpeup; NearestTown=Walpeup; Region=Mallee; State=Victoria; Country=Australia; ApsoilNumber=726; Latitude=-35.031; Longitude=142.156; LocationAccuracy=+/- 1000m
          DataSource=Based on Soil Characterisation undertaken by Birchip Cropping Group during 2005
          Comments=Loamy sand - CMA 2005 site Walpeup MRI, also DPI Soil pit site 2; OC estimated below surface layer; CLL field measured; Observed rooting depth 120cm
          Memo
            Built from APSoil 726 Swale Loamy sand

            still need to update chemistry only no changes made
          Physical
            Thickness  ParticleSizeSand  ParticleSizeSilt  ParticleSizeClay  BD     AirDry  LL15  DUL   SAT
            100        85                2                 11                1.592  0.025   0.05  0.1   0.37
            300        71                3                 22                1.441  0.128   0.16  0.33  0.43
            300        47                1                 40                1.429  0.2     0.2   0.34  0.43
            300        -                 -                 -                 1.522  0.2     0.2   0.35  0.4
            300        -                 -                 -                 1.54   0.2     0.2   0.34  0.39
            SoilCrop LentilSoil: LL=[0.05, 0.16, 0.22, 0.2, 0.2]; KL=[0.06, 0.06, 0.04, 0.04, 0.04]; XF=[1, 1, 1, 1, 1]
              LL source: Field measured and checked for sensibility
          WaterBalance SoilWater: SummerDate=1-Nov; SummerU=6; SummerCona=3.5; WinterDate=1-Apr; WinterU=2; WinterCona=2; DiffusConst=88; DiffusSlope=35; Salb=0.16; CN2Bare=73; CNRed=20; CNCov=0.8; PSIDul=-100; Thickness=[100, 300, 300, 300, 300]; SWCON=[0.7, 0.7, 0.5, 0.5, 0.5]
          Solute NO3: same as 2022_Vic_Kalkee_Lentil_Detailed.2022_Vic_Kalkee_Lentil_Detailed.Field.Soil.NO3
          Solute NH4: same as 2022_Vic_Kalkee_Lentil_Detailed.2022_Vic_Kalkee_Lentil_Detailed.Field.Soil.NO3
          Solute Urea: same as 2022_Vic_Kalkee_Lentil_Detailed.2022_Vic_Kalkee_Lentil_Detailed.Field.Soil.Urea
          Water: Thickness=[100, 300, 300, 300, 300]; InitialValues=[0.0752, 0.2101, 0.2091, 0.2138, 0.2108]; FilledFromTop=true
          Organic: FOMCNRatio=40; CarbonUnits=WalkleyBlack
            Thickness  Carbon    SoilCNRatio  FBiom  FInert  FOM
            100        1.1       12           0.04   0.4     515.766
            300        0.876923  12           0.02   0.5     258.099
            300        0.553846  12           0.02   0.7     129.158
            300        0.276923  12           0.02   1       64.6333
            300        0.161538  12           0.01   1       32.3438
          Chemical: PHUnits=Water
            Thickness  PH   EC    ESP  CEC
            100        7.8  0.1   3    7.2
            300        8.1  0.14  4    11
            300        9.6  0.35  18   23
            300        9.9  0.7   34   15.5
            300        9.9  0.7   34   15.5
            EC, CL, CEC, PH source: Measured, Estimated based on local knowledge
            ESP source: C
          Nutrient
          SoilTemperature Temperature: InteractionsPerDay=8
          Memo Soil Translation Notes
            Soil Characterisation DB layers ( 100, 100, 300, 300, 300, 300, 300, 300 ) are not the same as soil.apsim ( 100, 300, 300, 300, 300 ) layers - remapping

            No lentil soilcrop data, trying Chickpea

            No lentil soilcrop data, trying Wheat

            fudging soilcrop from  Wheat

            ISW is from site mean value
        SurfaceOrganicMatter: InitialResidueName=maize; InitialResidueType=maize; InitialResidueMass=500; InitialStandingFraction=0; InitialCPR=0; InitialCNR=65
        MicroClimate: a_interception=0; b_interception=1; c_interception=0; d_interception=0; SoilHeatFluxFraction=0.4; MinimumHeightDiffForNewLayer=0; NightInterceptionFraction=0.5; ReferenceHeight=1
        Irrigation
        Fertiliser
        Plant Lentil: ResourceName=Chickpea
        Operations
        Manager
          csvFile = 2024_Vic_Walpeup_Lentil_Satellite.startingConditions.csv
          EYear = 2024
          State = Vic
          Site = Walpeup
          TrialType = Satellite
          Crop = Lentil
          TOS = TOS1
          Variety =
          WaterTrt =
          Replicate = 0
          AgronomyTrt = None
          SowingDepth = 30
          RowSpacing = 300
          Population = 25
          SowDate = na
          UseStandardCultivars = False
          script: same as in 2019_NSW_Greenethorpe_Mixed_Detailed.2019_NSW_Greenethorpe_Mixed_Detailed.Field.Manager
        Report Static: same as 2019_NSW_Greenethorpe_Mixed_Detailed.2019_NSW_Greenethorpe_Mixed_Detailed.Field.Static
        Report DevelReport
          VariableNames:
            [Manager].Script.ID as id
            [Manager].Script.ymd as SampleDate
            [Manager].Script.Event as event
            [Lentil].Leaf.NodeNumber as Lentil_Node_No
            [Lentil].Leaf.Canopy.LAI as Lentil_LAI
        Report SoilReport
          VariableNames:
            [Manager].Script.ID as id
            [Manager].Script.ymd as SampleDate
            [Manager].Script.Event as event
            [Manager].Script.PAW_800mm as PAW_800mm
            [Manager].Script.ESWTot as ESWTot
            [Soil].Water.Volumetric as sw
        Report HarvestReport: same as 2019_NSW_Greenethorpe_Mixed_Detailed.2019_NSW_Greenethorpe_Mixed_Detailed.Field.HarvestReport
        Manager Irrigate on fixed dates (disabled): same as 2019_NSW_Greenethorpe_Mixed_Detailed.2019_NSW_Greenethorpe_Mixed_Detailed.Field.Irrigate on fixed dates
        Manager Reset on date (disabled): same as 2019_NSW_Greenethorpe_Mixed_Detailed.2019_NSW_Greenethorpe_Mixed_Detailed.Field.Reset on date
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