Simulations: Version=186
  Playlist
    Text:
      APS*, GattonRowSpacing, Mer86, Mer73, Cunderdin97, Wongan83, Konya*, Lincoln*, Leeston*, Wakanui*
      Wagga1991, Wagga2013, Wagga2014, Ginninderraa1991, Mouse, ArazonaFACE*, Jamma
  Memo TitlePage
    # The APSIM Wheat Model

    _Brown, H.E., Huth, N.I. and Holzworth, D.P._
  Memo Introduction
    The APSIM wheat model has been developed using the Plant Modelling Framework (PMF) of [brown_plant_2014]. This new framework provides a library of plant organ and process submodels that can be coupled, at runtime, to construct a model in much the same way that models can be coupled to construct a simulation. This means that dynamic composition of lower level process and organ classes (e.g. photosynthesis, leaf) into larger constructions (e.g. maize, wheat, sorghum) can be achieved by the model developer without additional coding.

    The wheat model consists of:

    * a phenology model to simulate development through sequential developmental phases
    * a structure model to simulate plant morphology
    * a collection of organs to simulate the various plant parts
    * an arbitrator to allocate resources (N, biomass) to the various plant organs

    This work builds upon earlier APSIM Wheat models such as NWheat ([Asseng200225], [KeatingNWheat]), NWheatS ([Asseng1998163]), Cropmod-Wheat ([Wang2002GenericCropModel]), and the earlier versions developed in Plant (<a href=\"http://www.apsim.info/Documentation/Model,CropandSoil/CropModuleDocumentation/Wheat.aspx">APSIM Wheat 7.5</a>") and then within the Plant Modelling Framework ([brown_plant_2014]).
  Folder Replacements
    Report HarvestReport: EventNames=[Wheat].Harvesting
      VariableNames:
        [Clock].Today
        [Wheat].SowingDate
        [Wheat].SowingData.Cultivar
        [Wheat].Phenology.CurrentPhase.Name
        [Wheat].Phenology.CurrentStageName
        [Wheat].Phenology.EmergenceDAS
        [Wheat].Phenology.TerminalSpikeletDAS
        [Wheat].Phenology.FlagLeafDAS
        [Wheat].Phenology.HeadingDAS
        [Wheat].Phenology.FloweringDAS
        [Wheat].Phenology.FinalLeafNumber
        [Wheat].Phenology.MaturityDAS
        [Wheat].Grain.Wt
        [Wheat].Grain.N
        [Wheat].Grain.Number
        [Wheat].Grain.Size
        [Wheat].Grain.NConc
        [Wheat].AboveGround.Wt
        [Wheat].AboveGround.N
        [Wheat].Grain.Protein
        [Wheat].Grain.Size
        [Wheat].Population
        [Wheat].SowingData.Cultivar
        [Wheat].SowingDate.DayOfYear
        [Clock].StartDate
        ([Wheat].Phenology.FloweringDAS - [Wheat].Phenology.EmergenceDAS) as FloweringDAE
        [IWeather].Latitude
        [IWeather].Longitude
        [IWeather].FileName
        [IWeather].CO2
        [IWeather].Amp
        [IWeather].Tav
        [LocationInfo].Script.Country
        [LocationInfo].Script.State
        [LocationInfo].Script.Region
    Report DailyReport: EventNames=[Clock].DoReport
      VariableNames:
        [Clock].Today
        [Wheat].SowingDate
        [Simulation].Name
        [Soil].Water.Volumetric
        sum([Soil].Water.MM) as ProfileWater
        sum([Soil].NO3.kgha) as TotalNO3
        [IWeather].Radn
        [IWeather].MeanT
        [Wheat].Arbitrator.FN
        [Wheat].AboveGround.N
        [Wheat].AboveGround.Wt
        [Wheat].AboveGroundLive.N
        [Wheat].AboveGroundLive.Wt
        [Wheat].AboveGroundDead.N
        [Wheat].AboveGroundDead.Wt
        [Wheat].Ear.N
        [Wheat].Ear.Nconc
        [Wheat].Ear.Wt
        [Wheat].Grain.N
        [Wheat].Grain.NConc
        [Wheat].Grain.Number
        [Wheat].Grain.Size
        [Wheat].Grain.Wt
        [Wheat].Leaf.Canopy.CoverGreen
        [Wheat].Leaf.Canopy.CoverTotal
        [Wheat].Leaf.Dead.N
        [Wheat].Leaf.Dead.NConc
        [Wheat].Leaf.Dead.Wt
        [Wheat].Leaf.Canopy.GreenAreaIndex.ExpansionStress
        [Wheat].Leaf.FN
        [Wheat].Leaf.Canopy.FW
        [Wheat].Leaf.Canopy.Height
        [Wheat].Leaf.Canopy.LAI
        [Wheat].Leaf.Live.N
        [Wheat].Leaf.Live.NConc
        [Wheat].Leaf.Live.Wt
        [Wheat].Leaf.Canopy.SpecificArea
        [Wheat].Leaf.Canopy.Transpiration
        [Wheat].Leaf.HaunStage
        [Wheat].StemNumber
        [Wheat].StemNumber.DeadTillers
        [Wheat].StemPopulation
        [Wheat].TillerPopulation
        [Wheat].StemNumber
        [Wheat].TillerNumber
        [Wheat].Phenology.CurrentPhase.Name
        [Wheat].Phenology.CurrentStageName
        [Wheat].Phenology.EmergenceDAS
        [Wheat].Phenology.Stage
        [Wheat].Phenology.ThermalTime
        [Wheat].Phenology.Zadok.Stage
        [Wheat].Population
        [Wheat].Root.Network.Depth
        [Wheat].Root.N
        [Wheat].Root.Wt
        [Wheat].Root.Nconc
        [Wheat].Root.Network.WaterTensionFactor
        [Wheat].Spike.N
        [Wheat].Spike.NConc
        [Wheat].Spike.Wt
        [Wheat].Stem.N
        [Wheat].Stem.NConc
        [Wheat].Stem.Wt
        [Wheat].StemPlusSpike.Wt
        [Wheat].StemPlusSpike.N
        [Wheat].SowingData.Cultivar
        [Wheat].SowingData.Population
        [Wheat].Leaf.HaunStage
        [Wheat].Leaf.Canopy.Height
        [Wheat].Total.N
        [Wheat].Total.Wt
        ([Wheat].Leaf.Canopy.Transpiration + [Soil].SoilWater.Es + [MicroClimate].PrecipitationInterception) as ET
        [IWeather].MeanT
        [Wheat].Phenology.Photoperiod
        [Wheat].Phenology.AccumulatedTT
        [Wheat].Leaf.SenescenceRate
    Manager MaxLeafAreaCalc
```csharp
using Models.Soils;
using Models.PMF.Struct;
using System;
using System.Collections.Generic;
using System.Xml.Serialization;
using Models.Core;
using Models.Interfaces;
using Models.PMF;
using Models.PMF.Organs;
using Models.Soils.Arbitrator;
using APSIM.Shared.Utilities;
using Newtonsoft.Json;



namespace Models
{
    [Serializable] 
    public class Script : Model
    {
        public  event EventHandler LeafReport;
        
        [Link] private Zone zone;
        [Link] private Clock clock;
        
        [JsonIgnore] public int NextLeafPosition { get; set; }
        [JsonIgnore] public int LeafPosition { get; set; }
        [JsonIgnore] public double MaxLeafArea { get; set; }
        
        [EventSubscribe("[Wheat].Sowing")]
        private void OnSow(object sender, EventArgs e)
        {
        LeafPosition = 0;
        NextLeafPosition = 1;
        }
        
        [EventSubscribe("DoManagement")]
        private void OnDoManagement(object sender, EventArgs e)
        {
            double haunStage = (double)zone.Get("Wheat.Leaf.HaunStage.Value()");
            double maxLeafArea = (double)zone.Get("Wheat.Leaf.Canopy.GreenAreaIndex.MaxLeafArea.Value()");
            if (haunStage > NextLeafPosition) 
            {
                
                LeafPosition = (int)haunStage;
                NextLeafPosition = LeafPosition+1;
                MaxLeafArea = maxLeafArea;
                LeafReport.Invoke(this, new EventArgs());
            }
        }
    }
}
```
    Report MaxLeafAreaReport: EventNames=[MaxLeafAreaCalc].Script.LeafReport
      VariableNames:
        [MaxLeafAreaCalc].Script.MaxLeafArea
        [MaxLeafAreaCalc].Script.LeafPosition
        [Clock].Today
    Manager Harvesting
```csharp
using Models.PMF.Phen;
using APSIM.Shared.Utilities;
using System.Xml.Serialization;
using Models;
using Models.PMF;
using Models.Soils;
using System.Text;
using System.Collections.Generic;
using Models.Core;
using System;
using Models.Soils.Nutrients;

namespace Models
{
    [Serializable] 
    public class Script : Model
    {
        [Link] private Plant Wheat;
        [Link] private Simulation sim;
        [Link] private Clock clock;
        [Link(Type = LinkType.Path, Path = "[Wheat].Phenology")]
        private Phenology phenology;

        [EventSubscribe("DoManagement")]
        private void OnDoManagement(object sender, EventArgs e)
        {
            if (phenology.CurrentPhase.Name == "GrainRipening")
            {
                Wheat.Harvest();
                Wheat.EndCrop();
                sim.Set("Clock.EndDate", clock.Today);  
            }
        }

        [EventSubscribe("EndOfDay")]
        private void OnEndOfDay(object sender, EventArgs e)
        {
            if ((clock.Today.Equals(clock.EndDate))&&(Wheat.IsAlive))
            {
                Wheat.Harvest();
                Wheat.EndCrop();
                sim.Set("Clock.EndDate", clock.Today);  
            }
        }

    }
}
```
    Report SowingReport: EventNames=[Wheat].Sowing
      VariableNames:
        [Clock].Today
        [Wheat].SowingData.Cultivar
        [IWeather].Latitude
        [IWeather].Longitude
        [LocationInfo].Script.Country
        [LocationInfo].Script.State
        [LocationInfo].Script.Region
    Plant Wheat: PlantType=Wheat
      BiomassArbitrator Arbitrator
        Memo
          The partitioning of biomass to fodder beet organs follows a "Relative Allocation" routine (see Arbitrator module documentation) guided by coefficients derived from the October sowing date data of the test dataset
        PlantNutrientsDelta Carbon
        PlantNutrientsDelta Nitrogen
      RootUptakesArbitrator
      Phenology
        Memo
          Wheat exhibits a range of developmental responses to environment and these are strongly influenced by genotype characteristics.
          Temperature is the primary driver of development, increasing development rates and decreasing phase durations as it increases.  These affects are captured by thermal time.  However, wheat also exhibits cold and photoperiod sensitivities in its Vernalisaing phase and further photoperiod sensitivity in the SpikeletDifferenation and HeadEmergence phases.  Photoperiod responses are seen as a reduction in the length of a phase for a photoperiod sensitive genotype in response to a longer photoperiod.  Vernalisation responses are more complicated as they are driven by cool temperature but interact with photoperiod.  For vernalisation sensitive varieties (Winter types), exposure to cool temperatures and/or short photoperiods during the Vernalising phase may reduce its thermal time duration.

          APSIM wheat implements the Cereal Anthesis Molecular Phenology (CAMP) model to simulate development.  It is based on the Kirby Framework which assumes the timing of anthesis is a result of the timing of flag leaf and an additional thermal time passage from there to heading then anthesis.  It also assumes the timing of flag leaf is a result of the Final Leaf Number (which sets a target) and leaf appearance rate (which sets the rate of progress toward the target).  Leaf appearance rate is a function of Thermal time and a genotype specific Phyllochron which changes with Haun stage as described by [Jamieson_LeafAppearance_1995].

          Final Leaf Number (FLN) is set on the day that terminal spikelet occurs as:

          FLN = 2.85 + 1.1 * TSHS

          Where TSHS is the Haun stage on the day terminal spikelet stage occurs.  Terminal spikelet is at the end of the SpikeletDifferentaiation phase which is preceeded by the Emerging and Vernalising phases.  The mechanisums for progress through each of these phase are described below
        SubDailyInterpolation ThermalTime: agregationMethod=0
          XYPairs Response: X=[0, 26, 37]; Y=[0, 26, 0]
          Memo
            Thermal time determines the rate of developmental progress through many of the crops phases and is used by organs to determing potential growth rates.
          ThreeHourAirTemperature InterpolationMethod
        PhotoperiodFunction Photoperiod: Twilight=-6; DayLength=0
        VariableReference FinalLeafNumber: VariableName=[Phenology].CAMP.FLN
        Constant HeadEmergencePpSensitivity: FixedValue=2
          Memo
            The phyllochrons duration for the plant to go from flag leaf ligual appearance at 16 h Pp compared to the phyllochron duration for the same phase at 8 h Pp.
        Constant HeadEmergenceLongDayBase: FixedValue=200
          Memo
            The phyllochrons duration for the plant to go from flag leaf ligual appearance at 16 h Pp.
        GerminatingPhase Germinating: Start=Sowing; End=Germination; IsEmerged=false
          Constant MinSoilTemperature: FixedValue=0
        EmergingPhase Emerging: Start=Germination; End=Emergence; IsEmerged=true; TTForTimeStep=0
          VariableReference ThermalTime: VariableName=[Phenology].ThermalTime
          AddFunction Target
            Constant ShootLag: FixedValue=40
            MultiplyFunction DepthxRate
              VariableReference SowingDepth: VariableName=[Plant].SowingData.Depth
              Constant ShootRate: FixedValue=1.5
        VernalisationPhase Vernalising: Start=Emergence; End=VernalSaturation; IsEmerged=true
          Memo
            Progress through the vernalising phase is determined by the apparent expression of Vrn1 and Vrn2 genes.  The CAMP model predicts the expression of these two genes.
            Vrn1 is the gene that orchestrates cold temperature responses in development.  To complete the vernalising stage firstly apparent Vrn1 expression must reach a value of at least 1.0.  In warm temperatures (>18oC), Vrn1 is expressed at a base rate that is genotype dependent.  This base rate is lower for vernalisation sensitive genotypes which will develop slower in the warm.  Vrn1 expression (relative to Haun stage increment) increases as temperature decreases so exposure to cold conditions will cause vernalisation sensitive varieties to develop faster (i.e. reach vernalisation at a lower Haun stage).  Vrn2 is up-regulated by longer photoperiods.  It blocks the expression of Vrn3 (which is required for progression through the spikelet differentiation phase) and must be down regulated completely before the vernalising phase is complete.  Vrn1 blocks Vrn2 expression so in effect the expression of Vrn2 raises the target for Vrn1 expression above 1.0.  The longer the photoperiod the greater the target increase so exposure to short days will reduce the target and length of the vernalising phase, a phenomena some times called short day vernalisation.  Vrn3 may also be active and accelerate the expression of Vrn1 during the vernalisation phase.  This effect is currently captured by VrnX in CAMP.
            The duration of the vernalising phase will be the result of a complex interaction between temperature, photoperiod and the genotypes tendency to express Vrn1 at warm temperatures (baseDeltaVrn1) and Vrn2 and Vrn3 under long photoperiods (MaxDpVrn2, MaxDVrnX).  These three rates are derived internally by the CAMP model from the genotypes FLNparams.
        GenericPhase SpikeletDifferentiation: Start=VernalSaturation; End=TerminalSpikelet; IsEmerged=true
          VariableReference Progression: VariableName=[Phenology].CAMP.dVrn
          Constant Target: FixedValue=1
          Memo
            Progress through the Spike differentiation phase is determined by the apparent expression of Vrn3 as predicted by CAMP.
            Vrn3 is a photoperiod sensitive gene that promotes expression of Vrn1.  Vrn1 is not able to express to adequate levels to achieve reproductive transition without Vrn3 upregulation.   Here we assume an apparent Vrn3 expression of 1.0 is sufficient to upregulate Vrn1 enough to trigger terminal spikelet.
             Each genotype has a base rate of Vrn3 expression (baseDVrn3) at low photoperiods and a maximum rate of Vrn3 expression (maxDVrn3) under long photoperiods.  These two rates are derived internally by the CAMP model from the genotypes FLNparams.
        GenericPhase StemElongation: Start=TerminalSpikelet; End=FlagLeaf; IsEmerged=true
          VariableReference Progression: VariableName=[Leaf].HaunStage.Delta
          ExpressionFunction Target: Expression=[Phenology].CAMP.FLN - [Phenology].CAMP.TSHS
          Memo: same as Replacements.Wheat.Phenology.SpikeletDifferentiation.Memo
        GenericPhase HeadEmergence: Start=FlagLeaf; End=Heading; IsEmerged=true
          VariableReference Progression: VariableName=[Phenology].ThermalTime
          AddFunction Target
            VariableReference LongPpBase: VariableName=[Phenology].HeadEmergenceLongDayBase.FixedValue
            MultiplyFunction ShortPpExtension
              VariableReference LongPpBase: VariableName=[Phenology].HeadEmergenceLongDayBase.FixedValue
              VariableReference PpSens: VariableName=[Phenology].HeadEmergencePpSensitivity.FixedValue
              LinearInterpolationFunction PpResponse
                XYPairs: X=[6, 8, 20, 22]; Y=[1, 1, 0, 0]
                VariableReference XValue: VariableName=[Phenology].Photoperiod
        GenericPhase EarlyFlowering: Start=Heading; End=Flowering; IsEmerged=true
          VariableReference Progression: VariableName=[Phenology].ThermalTime
          Constant Target: FixedValue=80; Units=oCd
        GenericPhase GrainDevelopment: Start=Flowering; End=StartGrainFill; IsEmerged=true
          Constant Target: FixedValue=120
          VariableReference Progression: VariableName=[Phenology].ThermalTime
        GenericPhase GrainFilling: Start=StartGrainFill; End=EndGrainFill; IsEmerged=true
          Constant Target: FixedValue=545
          VariableReference Progression: VariableName=[Phenology].ThermalTime
        GenericPhase Maturing: Start=EndGrainFill; End=Maturity; IsEmerged=true
          Constant Target: FixedValue=100
          VariableReference Progression: VariableName=[Phenology].ThermalTime
        GenericPhase Ripening: Start=Maturity; End=HarvestRipe; IsEmerged=true
          Constant Target: FixedValue=300
          VariableReference Progression: VariableName=[Phenology].ThermalTime
        EndPhase ReadyForHarvesting: Start=HarvestRipe; End=Unused; IsEmerged=true
          VariableReference ThermalTime: VariableName=[Phenology].ThermalTime
        ZadokPMFWheat Zadok
          VariableReference HaunStage: VariableName=[Leaf].HaunStage
          VariableReference TillerNumber: VariableName=[Leaf].TillerPopulation.TillersPerPlant
        OnEventFunction TerminalSpikeletDAS: SetEvent=TerminalSpikelet; ReSetEvent=never
          Memo
            A function is used to provide flowering date as days after sowing(DAS).
          Constant PreEventValue: FixedValue=0
          VariableReference PostEventValue: VariableName=[Plant].DaysAfterSowing
        OnEventFunction FlagLeafDAS: SetEvent=FlagLeaf; ReSetEvent=never
          Memo
            A function is used to provide flowering date as days after sowing(DAS).
          Constant PreEventValue: FixedValue=0
          VariableReference PostEventValue: VariableName=[Plant].DaysAfterSowing
        OnEventFunction HeadingDAS: SetEvent=Heading; ReSetEvent=never
          Memo
            A function is used to provide heading date as days after sowing(DAS).
          Constant PreEventValue: FixedValue=0
          VariableReference PostEventValue: VariableName=[Plant].DaysAfterSowing
        OnEventFunction FloweringDAS: SetEvent=Flowering; ReSetEvent=Germination
          Memo
            A function is used to provide flowering date as days after sowing(DAS).
          Constant PreEventValue: FixedValue=0
          VariableReference PostEventValue: VariableName=[Plant].DaysAfterSowing
        OnEventFunction MaturityDAS: SetEvent=Maturity; ReSetEvent=never
          Memo
            A function is used to provide maturity date as days after sowing(DAS).
          Constant PreEventValue: FixedValue=0
          VariableReference PostEventValue: VariableName=[Plant].DaysAfterSowing
        OnEventFunction EmergenceDAS: SetEvent=Emergence; ReSetEvent=never
          Memo
            A function is used to provide flowering date as days after sowing(DAS).
          Constant PreEventValue: FixedValue=0
          VariableReference PostEventValue: VariableName=[Plant].DaysAfterSowing
        CAMP
          VariableReference Tt: VariableName=[Phenology].ThermalTime
          VariableReference HaunStage: VariableName=[Leaf].HaunStage
          VariableReference DeltaHaunStage: VariableName=[Leaf].HaunStage.Delta
          VariableReference BasePhyllochron: VariableName=[Leaf].Phyllochron.BasePhyllochron
          LinearInterpolationFunction PpResponse
            XYPairs: X=[0, 8, 16, 24]; Y=[0, 0, 1, 1]
            VariableReference XValue: VariableName=[Phenology].Photoperiod
          SubDailyInterpolation ColdVrnResponse: agregationMethod=1
            ColdVrnResponse Response
              Constant k: FixedValue=-0.17; Units=/oCd
              Constant DeVernalisationTemp: FixedValue=20; Units=/oCd
              Constant DeVernalisationRate: FixedValue=0; Units=/oCd
            HourlySinPpAdjusted InterpolationMethod
          FinalLeafNumberSet FLNparams: MinLN=8.3; PpLN=3.8; VrnLN=5; VxPLN=-2
          FLNParameterEnvironment EnvData: VrnTreatTemp=6; VrnTreatDuration=60; TreatmentPp_L=16; TtEmerge=90
          CalcCAMPVrnRates
            VariableReference BasePhyllochron: VariableName=[Leaf].Phyllochron.BasePhyllochron
          Memo
            The CAMP model was derived to integrate molecular and physiological models of cereal flowering time to better capture G x E x M interactions and to provide a framework for linking genetic data to field behaviour.  It calculates the current levels of expression of Vrn1, 2 and 3 genes from daily deltas that are all calculated relative to haun stage deltas in addition to temperature (Vrn1) and photoperiod (Vrn 2 and 3).  To reach the vernalisation stage Vrn1 must be upregulated to a value of at least 1.0.  Where Vrn2 is also being expressed the target for Vrn1 expression increases in parallel as more Vrn1 expression is needed to block Vrn2 and allow Vrn3 expression.  Once Vrn2 expression is blocked Vrn3 will be upregulated and terminal spikelet occurs when its apparent expression reaches 1.0.  CAMP also predicts expression of VrnX which represents the relative contributions of Vrn2 and Vrn3 prior to vernalisation.  The genotype specific rates of gene expression are derived from final leaf number parameters (FLNparams):

            MinLN - The final leaf number (FLN) of the genotype when fully vernalised early and grown under long (>=16) photoperiod following vernalisation (FLN_LV).  These conditions maximise the expression of vernalisation and photoperiod genes and this parameter provides a measure of inherent earliness of the genotype. It may vary between 5 and 15 leaves (7 is typical).

            PpLN - The difference between MinLN and the FLN of a genotype when fully vernalised early and grown under short (<=8h) photoperiod following vernalisation (FLN_SV).  These conditions maximise Vrn1 expression but minimise Vrn2 and 3 expression and PpLN provides a measure of photoperiod sensitivity of the genotype.  It may vary between 0 and 8 leaves with 1 being typical of a low sensitivity genotype and 4 being typical of a high sensitivity genotype.

            VrnLN - The difference between MinLN and the FLN – PpLN of the genotype when not vernalised and grown under short photoperiod (FLN_SN).  These conditions minimise Vrn and Pp gene expression to base (minimal) values and VrnLN is a measure of vernalisation sensitivity of the genotype.  It may vary between 0 and 9 leaves with 1 being typical for an insensitive variety and 5 being typical for a sensitive variety.

            VxPLN - The difference between MinLN + VrnLN and the FLN of the genotype when not vernalised and grown under long photoperiod (FLN_LN).  These conditions minimise upregulation of Vrn1 and maximise upregulation of Vrn2 and 3 and this parameter provides a measure of the relative activities of Vrn2 and Vrn3 during the vernalisation phase. A positive value shows short days accelerate vernalisation and a negative value shows short days slow vernalisation.  The value of VxPLN should be greater than the negative of VrnLN and typically varies between +2 and -4.
      Organ Grain: Cconc=0.4; IsAboveGround=true
        BiomassRemoval BiomassRemovalDefaults: HarvestFractionLiveToRemove=1; HarvestFractionDeadToRemove=0; HarvestFractionLiveToResidue=0; HarvestFractionDeadToResidue=0
        OrganNutrientDelta Carbon: MaxCDelta=0
          OrganNutrientSupplies Supplies: Fixation=0; Uptake=0
            NutrientPoolsState ReAllocation
            NutrientPoolsState ReTranslocation
          NutrientDemandFunctions Demand
            PhaseLookupValue Structural: Start=Flowering; End=EndGrainFill
              DeficitDemandFunction Structural
            PhaseLookupValue Metabolic: Start=Flowering; End=EndGrainFill
              DeficitDemandFunction Metabolic
            PhaseLookupValue Storage: Start=Flowering; End=EndGrainFill
              DeficitDemandFunction Storage
            Constant QStructuralPriority: FixedValue=1
            Constant QMetabolicPriority: FixedValue=1
            Constant QStoragePriority: FixedValue=1
          NutrientSupplyFunctions Supply
            Constant Fixation: FixedValue=0
            Constant Uptake: FixedValue=0
            NutrientPoolFunctions ReAllocation
              Constant Structural: FixedValue=0
              MobilisationSupplyFunction Metabolic
                Constant Multiplier: FixedValue=0
              MobilisationSupplyFunction Storage
                Constant Multiplier: FixedValue=0
            NutrientPoolFunctions ReTranslocation: same as Replacements.Wheat.Grain.Carbon.Supply.ReAllocation
          NutrientProportionFunctions Proportion
            CalculateCarbonFractionFromNConc Structural
            CalculateCarbonFractionFromNConc Metabolic
            CalculateCarbonFractionFromNConc Storage
        Constant DetachmentRate: FixedValue=0; Units=/d
        Constant InitialWt: FixedValue=0
        Constant InitialGrainProportion: FixedValue=0.05
        Constant MaximumPotentialGrainSize: FixedValue=0.05; Units=g
        Constant MaxNConcDailyGrowth: FixedValue=0.03
        OrganNutrientDelta Nitrogen: MaxCDelta=0
          OrganNutrientSupplies Supplies: Fixation=0; Uptake=0
            NutrientPoolsState ReAllocation
            NutrientPoolsState ReTranslocation
          NutrientDemandFunctions Demand
            PhaseLookupValue Structural: Start=Flowering; End=EndGrainFill
              MultiplyFunction FillingRage
                VariableReference ThermalTime: VariableName=[Phenology].ThermalTime
                VariableReference Number: VariableName=[Grain].Number
                ProtectedDivideFunction PotentialNDelta: NumeratorErrVal=0; DenominatorErrVal=0
                  MultiplyFunction PotentialSizeIncrement
                    VariableReference MaximumSize: VariableName=[Grain].MaximumPotentialGrainSize
                    VariableReference MaximumNConc: VariableName=[Grain].Nitrogen.Concentration.Maximum
                  AddFunction FillingDuration
                    VariableReference FloweringToGrainFilling: VariableName=[Phenology].GrainDevelopment.Target
                    VariableReference GrainFilling: VariableName=[Phenology].GrainFilling.Target
            Constant Metabolic: FixedValue=0
            Constant Storage: FixedValue=0
            Constant QStructuralPriority: FixedValue=100
            Constant QMetabolicPriority: FixedValue=1
            Constant QStoragePriority: FixedValue=1
          NutrientSupplyFunctions Supply
            Constant Fixation: FixedValue=0
            Constant Uptake: FixedValue=0
            NutrientPoolFunctions ReAllocation
              Constant Structural: FixedValue=0
              MobilisationSupplyFunction Metabolic
                Constant Multiplier: FixedValue=1
              MobilisationSupplyFunction Storage
                Constant Multiplier: FixedValue=1
            NutrientPoolFunctions ReTranslocation: same as Replacements.Wheat.Grain.Carbon.Supply.ReAllocation
          NutrientConcentrationFunctions Concentration
            Constant Maximum: FixedValue=0.03
            VariableReference Critical: VariableName=[Grain].Nitrogen.Concentration.Maximum
            Constant Minimum: FixedValue=0.0123
        Respiration
          Constant MaintenanceRespirationFunction: FixedValue=0; Units=0-1
          NutrientFunctions AssimilationCostFunctions
            Constant C: FixedValue=0; Units=0-1
            Constant N: FixedValue=0; Units=0-1
            Constant P: FixedValue=0; Units=0-1
            Constant K: FixedValue=0; Units=0-1
          NutrientFunctions MobilisationCostFunctions: same as Replacements.Wheat.Grain.Respiration.AssimilationCostFunctions
        Constant SenescenceRate: FixedValue=0; Units=/d
        MultiplyFunction TotalCarbonDemand
          PhaseLookup TotalDMDemand
            PhaseLookupValue InitialPhase: Start=Flowering; End=StartGrainFill
              MultiplyFunction FillingRate
                VariableReference ThermalTime: VariableName=[Phenology].ThermalTime
                VariableReference Number: VariableName=[Grain].Number
                ProtectedDivideFunction PotentialDMDelta: NumeratorErrVal=0; DenominatorErrVal=0
                  MultiplyFunction PotentialSizeIncrement
                    VariableReference InitialProportion: VariableName=[Grain].InitialGrainProportion
                    VariableReference MaximumSize: VariableName=[Grain].MaximumPotentialGrainSize
                  VariableReference FillingDuration: VariableName=[Phenology].GrainDevelopment.Target
            PhaseLookupValue LinearPhase: Start=StartGrainFill; End=EndGrainFill
              MultiplyFunction FillingRate
                VariableReference ThermalTime: VariableName=[Phenology].ThermalTime
                VariableReference Number: VariableName=[Grain].Number
                ProtectedDivideFunction PotentialDMDelta: NumeratorErrVal=0; DenominatorErrVal=0
                  MultiplyFunction PotentialSizeIncrement
                    SubtractFunction ProportionLinearPhase
                      Constant One: FixedValue=1
                      VariableReference InitialProportion: VariableName=[Grain].InitialGrainProportion
                    VariableReference MaximumSize: VariableName=[Grain].MaximumPotentialGrainSize
                  VariableReference FillingDuration: VariableName=[Phenology].GrainFilling.Target
          VariableReference CarbonConc: VariableName=[Grain].Cconc
        HoldFunction Number: WhenToHold=Flowering
          MultiplyFunction GrainNumber
            Constant GrainsPerGramOfStem: FixedValue=26; Units=grains
            VariableReference StemMass: VariableName=[StemPlusSpike].Wt
        ExpressionFunction Protein
          Expression=divide(([Grain].Live.N + [Grain].Dead.N),([Grain].Live.Wt + [Grain].Dead.Wt)) * 100 * 5.71
        Constant WaterContent: FixedValue=0.12
        ExpressionFunction Size: Expression=divide([Grain].Wt,[Grain].Number)
      Organ Leaf: Cconc=0.4; IsAboveGround=true
        Constant AreaOfLargest: FixedValue=0.0025
        BiomassRemoval BiomassRemovalDefaults: HarvestFractionLiveToRemove=0; HarvestFractionDeadToRemove=0; HarvestFractionLiveToResidue=0.3; HarvestFractionDeadToResidue=0.3
        EnergyBalance Canopy: Albedo=0.25; Gsmax350=0.015; R50=150; KDead=0; LAIDead=0
          Constant DeadExtinctionCoefficient: FixedValue=0.3
          MultiplyFunction DeadAreaIndex
            VariableReference SLA: VariableName=[Leaf].StructuralSpecificArea
            ProtectedDivideFunction LeafDeadWt: NumeratorErrVal=0; DenominatorErrVal=0
              VariableReference LeafDeadStructuralC: VariableName=[Leaf].Dead.Carbon.Structural
              VariableReference CarbonConc: VariableName=[Leaf].Cconc
          VariableReference Deepness: VariableName=[Plant].Height
          MinimumFunction FRGRer
            VariableReference RUE_FT: VariableName=[Leaf].Photosynthesis.FT
            VariableReference RUE_FN: VariableName=[Leaf].Photosynthesis.FN
            VariableReference RUE_FVPD: VariableName=[Leaf].Photosynthesis.FVPD
          LeafArea GreenAreaIndex
            MultiplyFunction Initial
              Constant AreaPerPlant: FixedValue=0.0001; Units=m2/plant
              VariableReference Population: VariableName=[Plant].Population
            AccumulateAtEvent AreaGrown: StartStageName=Emergence; EndStageName=Heading; AccumulateEventName=[Clock].DoActualPlantGrowth
              MultiplyFunction DeltaArea
                ProtectedDivideFunction DeltaWt: NumeratorErrVal=0; DenominatorErrVal=0
                  VariableReference DeltaCarbon: VariableName=[Leaf].Allocated.Carbon.Structural
                  VariableReference CarbonConc: VariableName=[Leaf].Cconc
                VariableReference SLA: VariableName=[Leaf].StructuralSpecificArea
            AccumulateAtEvent AreaSenesced: StartStageName=Emergence; EndStageName=HarvestRipe; AccumulateEventName=[Clock].DoActualPlantGrowth
              MultiplyFunction DeltaArea
                ProtectedDivideFunction DeltaWt: NumeratorErrVal=0; DenominatorErrVal=0
                  VariableReference DeltaCarbon: VariableName=[Leaf].Senesced.Carbon.Structural
                  VariableReference CarbonConc: VariableName=[Leaf].Cconc
                VariableReference SLA: VariableName=[Leaf].StructuralSpecificArea
            AccumulateAtEvent AreaRemoved: StartStageName=Emergence; EndStageName=HarvestRipe; AccumulateEventName=[Clock].DoReportCalculations
              MultiplyFunction DeltaArea
                ProtectedDivideFunction DeltaWt: NumeratorErrVal=0; DenominatorErrVal=0
                  VariableReference DeltaCarbon: VariableName=[Leaf].LiveRemoved.Carbon.Structural
                  VariableReference CarbonConc: VariableName=[Leaf].Cconc
                VariableReference SLA: VariableName=[Leaf].StructuralSpecificArea
            MinimumFunction ExpansionStress
              LinearInterpolationFunction WaterStressEffect
                XYPairs: X=[0, 0.5, 1, 1.3]; Y=[0, 0, 1, 1]
                VariableReference XValue: VariableName=[Leaf].Canopy.FW
              LinearInterpolationFunction NitrogenEffect
                Memo
                  Inadequate Nitrogen supply is assumed to affect tillering prior to any effect on photosynthesis or leaf size.
                XYPairs: X=[0, 1, 3]; Y=[1, 1, 1]
                VariableReference XValue: VariableName=[Arbitrator].FN
            MultiplyFunction MaxLeafArea
              VariableReference AreaOfLargest: VariableName=[Leaf].AreaOfLargest
              LinearInterpolationFunction RelativeArea
                XYPairs: X=[3, 3.1, 4.6, 5, 6]; Y=[0.1, 0.2, 0.4, 1, 1]
                VariableReference XValue: VariableName=[Phenology].Stage
              Memo
                The maximum size of the current appearing leaf
            MaximumFunction SenescenceStresses
              LinearInterpolationFunction NitrogenEffect
                Memo
                  Inadequate Nitrogen supply is assumed to affect tillering prior to any effect on photosynthesis or leaf size.
                XYPairs: X=[0, 0.2, 0.6, 1]; Y=[3, 3, 0, 0]
                VariableReference XValue: VariableName=[Arbitrator].FN
              LinearInterpolationFunction WaterEffect
                XYPairs: X=[0, 0.1, 0.5, 0.9, 1.3]; Y=[5, 5, 2.5, 0, 0]
                VariableReference XValue: VariableName=[Leaf].Canopy.FW
              LinearInterpolationFunction ShadingEffect
                XYPairs: X=[0, 0.3925, 0.96023, 0.9999, 1]; Y=[0, 0, 0.5, 1, 1]
                VariableReference XValue: VariableName=[Leaf].Canopy.CoverTotal
          MultiplyFunction GreenExtinctionCoefficient
            Constant VegetativePhase: FixedValue=0.7
            LinearInterpolationFunction DevelopmentFactor
              XYPairs: X=[3, 4, 5, 6]; Y=[1, 1, 0.8, 0.6]
              Memo
                Exntiction coefficient increases at stem extension as leaves become more prostrate
              VariableReference XValue: VariableName=[Phenology].Stage
          DivideFunction SpecificArea
            VariableReference LAI: VariableName=[Leaf].Canopy.LAI
            VariableReference LeafWt: VariableName=[Leaf].Live.Wt
          StomatalConductanceCO2Modifier
            VariableReference PhotosynthesisCO2Modifier: VariableName=[Leaf].Photosynthesis.FCO2
          VariableReference Tallness: VariableName=[Plant].Height
          Constant Wideness: FixedValue=0
        OrganNutrientDelta Carbon: MaxCDelta=0
          OrganNutrientSupplies Supplies: Fixation=0; Uptake=0
            NutrientPoolsState ReAllocation
            NutrientPoolsState ReTranslocation
          NutrientDemandFunctions Demand
            DeficitDemandFunction Structural
            PhaseLookupValue Metabolic: Start=Emergence; End=StartGrainFill
              DeficitDemandFunction Metabolic
            PhaseLookupValue Storage: Start=Emergence; End=StartGrainFill
              DeficitDemandFunction Storage
            Constant QStructuralPriority: FixedValue=1
            Constant QMetabolicPriority: FixedValue=1
            Constant QStoragePriority: FixedValue=1
          NutrientSupplyFunctions Supply
            MultiplyFunction Fixation
              VariableReference Fixation: VariableName=[Leaf].Photosynthesis
              VariableReference Cconc: VariableName=[Leaf].Cconc
            Constant Uptake: FixedValue=0
            NutrientPoolFunctions ReAllocation: same as Replacements.Wheat.Grain.Nitrogen.Supply.ReAllocation
            NutrientPoolFunctions ReTranslocation
              Constant Structural: FixedValue=0
              MobilisationSupplyFunction Metabolic
                Constant Multiplier: FixedValue=0.03
              MobilisationSupplyFunction Storage
                Constant Multiplier: FixedValue=0.03
          NutrientProportionFunctions Partition
            Constant Structural: FixedValue=0.3; Units=0-1
            Constant Metabolic: FixedValue=0.7; Units=0-1
            Constant Storage: FixedValue=0
        Constant DetachmentRate: FixedValue=0; Units=/d
        MultiplyFunction InitialWt
          DivideFunction WeightPerPlant
            VariableReference Area: VariableName=[Plant].Leaf.Canopy.GreenAreaIndex.Initial.AreaPerPlant
            VariableReference SpecificAreaTotal: VariableName=[Leaf].SpecificAreaTotal
          VariableReference Population: VariableName=[Plant].SowingData.Population
        VariableReference FinalLeafNumber: VariableName=[Phenology].CAMP.FLN
        AccumulateFunction HaunStage: StartStageName=Emergence; EndStageName=FlagLeaf; FractionRemovedOnCut=0; FractionRemovedOnHarvest=0; FractionRemovedOnGraze=0; FractionRemovedOnPrune=0
          DivideFunction Delta
            VariableReference ThermalTime: VariableName=[Phenology].ThermalTime
            VariableReference Phyllochron: VariableName=[Leaf].Phyllochron
        OrganNutrientDelta Nitrogen: MaxCDelta=0
          OrganNutrientSupplies Supplies: Fixation=0; Uptake=0
            NutrientPoolsState ReAllocation
            NutrientPoolsState ReTranslocation
          NutrientDemandFunctions Demand
            DeficitDemandFunction Structural
            PhaseLookupValue Metabolic: Start=Emergence; End=StartGrainFill
              DeficitDemandFunction Metabolic
            PhaseLookupValue Storage: Start=Emergence; End=StartGrainFill
              DeficitDemandFunction Storage
            Constant QStructuralPriority: FixedValue=1
            Constant QMetabolicPriority: FixedValue=1
            Constant QStoragePriority: FixedValue=0
          NutrientSupplyFunctions Supply
            Constant Fixation: FixedValue=0
            Constant Uptake: FixedValue=0
            NutrientPoolFunctions ReAllocation: same as Replacements.Wheat.Grain.Nitrogen.Supply.ReAllocation
            NutrientPoolFunctions ReTranslocation
              Constant Structural: FixedValue=0
              MobilisationSupplyFunction Metabolic
                Constant Multiplier: FixedValue=0.03
              MobilisationSupplyFunction Storage
                Constant Multiplier: FixedValue=0.05
          NutrientConcentrationFunctions Concentration
            LinearInterpolationFunction Maximum
              XYPairs: X=[3, 4.5, 6, 8]; Y=[0.065, 0.065, 0.04, 0.03]
              VariableReference XValue: VariableName=[Phenology].Stage
            MultiplyFunction Critical
              AddFunction CriticalNConcAt350ppm
                VariableReference MinNConc: VariableName=[Leaf].Nitrogen.Concentration.Minimum
                MultiplyFunction MetabolicN
                  Constant Propn: FixedValue=1
                  SubtractFunction NonStructural
                    VariableReference MaxNConc: VariableName=[Leaf].Nitrogen.Concentration.Maximum
                    VariableReference MinNConc: VariableName=[Leaf].Nitrogen.Concentration.Minimum
              LinearInterpolationFunction CO2Factor
                XYPairs: X=[350, 700]; Y=[1, 0.93]
                VariableReference XValue: VariableName=[IWeather].CO2
            Constant Minimum: FixedValue=0.003; Units=g/g
        AccumulateFunction Number: StartStageName=Emergence; EndStageName=Flowering; FractionRemovedOnCut=1; FractionRemovedOnHarvest=1; FractionRemovedOnGraze=1; FractionRemovedOnPrune=0
          MultiplyFunction DailyNumberIncrease
            VariableReference DeltaNode: VariableName=[Leaf].HaunStage.Delta
            VariableReference StemNumber: VariableName=[Plant].StemNumber
        RUEModel Photosynthesis
          Constant RUE: FixedValue=1.6
          WeightedTemperatureFunction FT: MaximumTemperatureWeighting=0.75
            XYPairs: X=[0, 15, 25, 35]; Y=[0, 1, 1, 0]
          LinearInterpolationFunction FN
            XYPairs: X=[0, 1, 1.5]; Y=[0, 1, 1]
            VariableReference XValue: VariableName=[Leaf].FN
          LinearInterpolationFunction FW
            XYPairs: X=[0, 1, 1]; Y=[0, 1, 1]
            VariableReference XValue: VariableName=[Leaf].Canopy.FW
          LinearInterpolationFunction FVPD
            XYPairs: X=[0, 20, 40]; Y=[1, 1, 0]
            VariableReference XValue: VariableName=[Leaf].Photosynthesis.VPD
          RUECO2Function FCO2: PhotosyntheticPathway=C3
          VariableReference RadnInt: VariableName=[Leaf].Canopy.RadiationIntercepted
        MultiplyFunction Phyllochron
          Memo Rational
            This is the thermal time between the emergence of leaf tips.  The model used here is based on [Jamieson_SIRIUS_1998] where leaf appearace could be described by a base phyllochron determined between leaves 2 and 7 and a phyllochron that was 70% of base phyllochron for leaves < 2 and 130% of base phyllochron for leaves > 7
          LinearInterpolationFunction LeafStageFactor
            XYPairs: X=[0, 2, 3, 7, 8, 11]; Y=[0.75, 0.75, 1, 1, 1.4, 1.4]
            VariableReference XValue: VariableName=[Leaf].HaunStage
          Constant BasePhyllochron: FixedValue=120; Units=oC.d
          AddFunction PhotoperiodEffect
            Constant One: FixedValue=1; Units=oC.d
            MultiplyFunction PhotoperiodResponse
              VariableReference PhotoperiodSensitivity: VariableName=[Leaf].PhyllochronPpSensitivity
              LinearInterpolationFunction PhotoPeriodResponseShape
                XYPairs: X=[8, 12, 20]; Y=[1, 0, 0]
                VariableReference XValue: VariableName=[Phenology].Photoperiod
        Constant PhyllochronPpSensitivity: FixedValue=0.6
        Respiration: same as Replacements.Wheat.Grain.Respiration
        PhaseLookup SenescenceRate
          PhaseLookupValue Vegetative: Start=Emergence; End=StartGrainFill
            AddFunction Total
              MultiplyFunction TillerDeath
                Constant RelativeSizeOfDyingTillers: FixedValue=0.5619
                DivideFunction FractionOfTillersDying
                  PhaseLookupValue TillerDeathPhase: Start=TerminalSpikelet; End=FlagLeaf
                    VariableReference DiedToday: VariableName=[Plant].StemNumber.DeadTillers.Attrition
                  VariableReference TotalStems: VariableName=[Plant].StemNumber.Total
              MultiplyFunction LeafDeath
                Constant MaxRate: FixedValue=0.00756
                VariableReference Stresses: VariableName=[Leaf].Canopy.GreenAreaIndex.SenescenceStresses
          PhaseLookupValue Reproductive: Start=StartGrainFill; End=HarvestRipe
            MinimumFunction ConstrainedRate
              AddFunction StressedRate
                BoundFunction AgeRate
                  DivideFunction Frac
                    VariableReference Tt: VariableName=[Phenology].ThermalTime
                    SubtractFunction TtRemaining
                      ExpressionFunction Target
                        Expression=[Phenology].GrainFilling.Target + [Phenology].Maturing.Target
                      ExpressionFunction Progress
                        Expression=[Phenology].GrainFilling.ProgressThroughPhase + [Phenology].Maturing.ProgressThroughPhase
                  Constant Lower: FixedValue=0
                  Constant Upper: FixedValue=1
                MultiplyFunction StressInduced
                  Constant MaxRate: FixedValue=0.0063
                  MaximumFunction SenescenceStresses
                    VariableReference WaterEffect: VariableName=[Leaf].Canopy.GreenAreaIndex.SenescenceStresses.WaterEffect
                    VariableReference NitrogenStressEffect
                      VariableName=[Leaf].Canopy.GreenAreaIndex.SenescenceStresses.NitrogenEffect
              Constant One: FixedValue=1
            Memo
              Leaf senescence rate is calculated to ensure that all leaves are senesced by crop maturity.
            Memo Memo1
              There is no data on detachment rates and so a simple value was chosen to ensure that leaves were not retained in the canopy. In the future, with more data available a thermal time basis leaf detachment rate will be explored.
        LinearInterpolationFunction SpecificAreaTotal
          XYPairs: X=[0, 2, 3, 15]; Y=[0.035, 0.035, 0.023, 0.023]
          VariableReference XValue: VariableName=[Leaf].Canopy.LAI
        ProtectedDivideFunction StructuralSpecificArea: NumeratorErrVal=0; DenominatorErrVal=0
          VariableReference SpecificArea: VariableName=[Leaf].SpecificAreaTotal
          VariableReference StructuralFraction: VariableName=[Leaf].Carbon.Partition.Structural
        MultiplyFunction TotalCarbonDemand
          DivideFunction TotalDMDemand
            PhaseLookup DeltaLAIPotential
              Memo
                DeltaLAI describes the LAI variation over the cycle and is calculated using the Area of Largest Leaf, relative leaf area, plant number, branch number and leaf appearance rate (thermal time/phyllochron).
              PhaseLookupValue Vegetative: Start=Emergence; End=Heading
                MultiplyFunction Delta
                  VariableReference MaxLeafArea: VariableName=[Leaf].Canopy.GreenAreaIndex.MaxLeafArea
                  VariableReference PlantNumber: VariableName=[Plant].SowingData.Population
                  VariableReference StemsPerPlant: VariableName=[Plant].StemNumber
                  DivideFunction LAR
                    VariableReference TT: VariableName=[Phenology].ThermalTime
                    VariableReference Phyllochron: VariableName=[Leaf].Phyllochron
                  VariableReference ExpansionStress: VariableName=[Leaf].Canopy.GreenAreaIndex.ExpansionStress
              PhaseLookupValue Reproductive: Start=Heading; End=HarvestRipe
                Constant: FixedValue=0
            VariableReference SLA: VariableName=[Leaf].SpecificAreaTotal
            Memo
              Growth in leaf area is used to calculate the leaf dry matter demand. The same was assumed in the original crop models in APSIM. Further model development can be taken once new experimental data for metabolic, structural and storage forms are provided.
            Memo Memo1
              DeltaLAI describes the LAI variation over the cycle and is calculated using the Area of Largest Leaf, relative leaf area, plant number, branch number and leaf appearance rate (thermal time/phyllochron).
          VariableReference CarbonConc: VariableName=[Leaf].Cconc
      Organ Spike: Cconc=0.4; IsAboveGround=true
        BiomassRemoval BiomassRemovalDefaults: HarvestFractionLiveToRemove=0.5; HarvestFractionDeadToRemove=0; HarvestFractionLiveToResidue=0.1; HarvestFractionDeadToResidue=0
        OrganNutrientDelta Carbon: MaxCDelta=0
          OrganNutrientSupplies Supplies: Fixation=0; Uptake=0
            NutrientPoolsState ReAllocation
            NutrientPoolsState ReTranslocation
          NutrientDemandFunctions Demand
            DeficitDemandFunction Structural
            PhaseLookupValue Metabolic: Start=TerminalSpikelet; End=StartGrainFill
              DeficitDemandFunction Metabolic
            PhaseLookupValue Storage: Start=TerminalSpikelet; End=StartGrainFill
              DeficitDemandFunction Storage
            Constant QStructuralPriority: FixedValue=1
            Constant QMetabolicPriority: FixedValue=1
            Constant QStoragePriority: FixedValue=1
          NutrientSupplyFunctions Supply
            Constant Fixation: FixedValue=0
            Constant Uptake: FixedValue=0
            NutrientPoolFunctions ReAllocation: same as Replacements.Wheat.Grain.Nitrogen.Supply.ReAllocation
            NutrientPoolFunctions ReTranslocation
              Constant Structural: FixedValue=0
              MobilisationSupplyFunction Metabolic
                Constant Multiplier: FixedValue=0
              MobilisationSupplyFunction Storage
                Constant Multiplier: FixedValue=1
          NutrientProportionFunctions Partition
            Constant Structural: FixedValue=1
            Constant Metabolic: FixedValue=0
            Constant Storage: FixedValue=0
        Constant DetachmentRate: FixedValue=0; Units=/d
        VariableReference HeadNumber: VariableName=[Plant].Population
        Constant InitialWt: FixedValue=0; Units=g/m2
        OrganNutrientDelta Nitrogen: MaxCDelta=0
          OrganNutrientSupplies Supplies: Fixation=0; Uptake=0
            NutrientPoolsState ReAllocation
            NutrientPoolsState ReTranslocation
          NutrientDemandFunctions Demand: same as Replacements.Wheat.Spike.Carbon.Demand
          NutrientSupplyFunctions Supply: same as Replacements.Wheat.Grain.Nitrogen.Supply
          NutrientConcentrationFunctions Concentration
            Constant Maximum: FixedValue=0.025
            AddFunction Critical
              VariableReference MinimumNConc: VariableName=[Spike].Nitrogen.Concentration.Minimum
              MultiplyFunction MetabolicNconc
                SubtractFunction NonStructuralN
                  VariableReference MaximumNConc: VariableName=[Spike].Nitrogen.Concentration.Maximum
                  VariableReference MinimumNConc: VariableName=[Spike].Nitrogen.Concentration.Minimum
                Constant Proportion: FixedValue=0.8
            Constant Minimum: FixedValue=0.004
        Respiration: same as Replacements.Wheat.Grain.Respiration
        VariableReference SenescenceRate: VariableName=[Leaf].SenescenceRate.Reproductive
        MultiplyFunction TotalCarbonDemand
          MultiplyFunction TotalDMDemand
            SubtractFunction Remaining Growth
              MultiplyFunction TargetWt
                VariableReference StemWt: VariableName=[Stem].Live.Wt
                Constant SpikeFraction: FixedValue=0.33; Units=g spike/g stem
              VariableReference CurrentWt: VariableName=[Spike].Live.Wt
            LinearInterpolationFunction GrowthPattern
              XYPairs: X=[6, 6.7, 7.2, 8.25, 8.3]; Y=[0, 0.01, 1, 1, 0]
              VariableReference XValue: VariableName=[Phenology].Stage
          VariableReference CarbonConc: VariableName=[Spike].Cconc
      Organ Stem: Cconc=0.4; IsAboveGround=true
        BiomassRemoval BiomassRemovalDefaults: HarvestFractionLiveToRemove=0.5; HarvestFractionDeadToRemove=0; HarvestFractionLiveToResidue=0.1; HarvestFractionDeadToResidue=0
        OrganNutrientDelta Carbon: MaxCDelta=0
          OrganNutrientSupplies Supplies: Fixation=0; Uptake=0
            NutrientPoolsState ReAllocation
            NutrientPoolsState ReTranslocation
          NutrientDemandFunctions Demand
            PhaseLookupValue Structural: Start=Emergence; End=Flowering
              DeficitDemandFunction Structural
            PhaseLookupValue Metabolic: Start=Emergence; End=StartGrainFill
              DeficitDemandFunction Metabolic
            PhaseLookupValue Storage: Start=Emergence; End=EndGrainFill
              DeficitDemandFunction Storage
            Constant QStructuralPriority: FixedValue=1
            Constant QMetabolicPriority: FixedValue=1
            PhaseLookup QStoragePriority
              PhaseLookupValue Vegetative: Start=Emergence; End=Flowering
                Constant Priority: FixedValue=0
              PhaseLookupValue Reproductive: Start=Flowering; End=EndGrainFill
                Constant Priority: FixedValue=0
          NutrientSupplyFunctions Supply
            Constant Fixation: FixedValue=0
            Constant Uptake: FixedValue=0
            NutrientPoolFunctions ReAllocation: same as Replacements.Wheat.Grain.Nitrogen.Supply.ReAllocation
            NutrientPoolFunctions ReTranslocation: same as Replacements.Wheat.Grain.Nitrogen.Supply.ReAllocation
          NutrientProportionFunctions Partition
            PhaseLookup Structural
              PhaseLookupValue Vegetative: Start=Emergence; End=Flowering
                Constant StemFraction: FixedValue=0.6
              PhaseLookupValue Reproductive: Start=Flowering; End=EndGrainFill
                Constant StemFraction: FixedValue=0.6
            Constant Metabolic: FixedValue=0
            SubtractFunction Storage
              Constant One: FixedValue=1
              VariableReference Structural: VariableName=[Stem].Carbon.Partition.Structural
        Constant DetachmentRate: FixedValue=0; Units=/d
        VariableReference HeadNumber: VariableName=[Plant].StemPopulation
        Constant InitialWt: FixedValue=0; Units=g/m2
        OrganNutrientDelta Nitrogen: MaxCDelta=0
          OrganNutrientSupplies Supplies: Fixation=0; Uptake=0
            NutrientPoolsState ReAllocation
            NutrientPoolsState ReTranslocation
          NutrientDemandFunctions Demand: same as Replacements.Wheat.Leaf.Nitrogen.Demand
          NutrientSupplyFunctions Supply
            Constant Fixation: FixedValue=0
            Constant Uptake: FixedValue=0
            NutrientPoolFunctions ReAllocation: same as Replacements.Wheat.Grain.Nitrogen.Supply.ReAllocation
            NutrientPoolFunctions ReTranslocation: same as Replacements.Wheat.Leaf.Carbon.Supply.ReTranslocation
          NutrientConcentrationFunctions Concentration
            LinearInterpolationFunction Maximum
              XYPairs: X=[3, 4, 5, 6, 7, 8]; Y=[0.07, 0.04, 0.04, 0.015, 0.012, 0.012]
              VariableReference XValue: VariableName=[Phenology].Stage
            AddFunction Critical
              VariableReference MinimumNConc: VariableName=[Stem].Nitrogen.Concentration.Minimum
              MultiplyFunction MetabolicNconc
                SubtractFunction NonStructuralN
                  VariableReference MaximumNConc: VariableName=[Stem].Nitrogen.Concentration.Maximum
                  VariableReference MinimumNConc: VariableName=[Stem].Nitrogen.Concentration.Minimum
                Constant Proportion: FixedValue=0.8
            Constant Minimum: FixedValue=0.0025
        DivideFunction PercentWSC
          VariableReference WSC: VariableName=[Stem].Live.StorageWt
          VariableReference StemWt: VariableName=[Stem].Live.Wt
        Respiration: same as Replacements.Wheat.Grain.Respiration
        VariableReference SenescenceRate: VariableName=[Leaf].SenescenceRate.Reproductive
        PhaseLookupValue TotalCarbonDemandDiscarded: Start=Emergence; End=Flowering
          AllometricDemandFunction TotalCarbonDemand: Const=0.3; Power=1.1
            VariableReference XValue
              VariableName=[Wheat].AboveGroundLive.Carbon.Structural +[Wheat].AboveGroundLive.Carbon.Metabolic + [Wheat].Arbitrator.TotalCFixationSupply
            VariableReference YValue: VariableName=[Wheat].Stem.Live.C
        MultiplyFunction TotalCarbonDemandNotUsedEither
          AllometricDemandFunction: Const=0.3; Power=1.1
            VariableReference XValue
              VariableName=[Wheat].AboveGroundLive.C.Total + [Wheat].Arbitrator.TotalCFixationSupply
            VariableReference YValue: VariableName=[Wheat].Stem.Live.C.Total
          VariableReference CarbonConc: VariableName=[Stem].Cconc
        MultiplyFunction TotalCarbonDemand
          VariableReference PotentialPhotosynthesis: VariableName=[Leaf].Photosynthesis
          VariableReference CarbonConc: VariableName=[Stem].Cconc
          PhaseLookup PartitionFraction
            PhaseLookupValue Establishment: Start=Emergence; End=VernalSaturation
              Constant StemFraction: FixedValue=0.3
            PhaseLookupValue PreStemElongation: Start=VernalSaturation; End=TerminalSpikelet
              Constant StemFraction: FixedValue=0.4
            PhaseLookupValue StemElongation: Start=TerminalSpikelet; End=Heading
              Constant StemFraction: FixedValue=0.7; Units=0
            PhaseLookupValue EarDevelopment: Start=Heading; End=StartGrainFill
              Constant StemFraction: FixedValue=1
            PhaseLookupValue GrainFill: Start=StartGrainFill; End=HarvestRipe
              Constant StemFraction: FixedValue=0
      Organ Root: Cconc=0.4; IsAboveGround=false
        BiomassRemoval BiomassRemovalDefaults: HarvestFractionLiveToRemove=0; HarvestFractionDeadToRemove=0; HarvestFractionLiveToResidue=0.2; HarvestFractionDeadToResidue=0
        OrganNutrientDelta Carbon: MaxCDelta=0
          OrganNutrientSupplies Supplies: Fixation=0; Uptake=0
            NutrientPoolsState ReAllocation
            NutrientPoolsState ReTranslocation
          NutrientDemandFunctions Demand
            DeficitDemandFunction Structural
            PhaseLookupValue Metabolic: Start=Emergence; End=EndGrainFill
              DeficitDemandFunction Metabolic
            PhaseLookupValue Storage: Start=Emergence; End=EndGrainFill
              DeficitDemandFunction Storage
            Constant QStructuralPriority: FixedValue=1
            Constant QMetabolicPriority: FixedValue=1
            Constant QStoragePriority: FixedValue=1
          NutrientSupplyFunctions Supply: same as Replacements.Wheat.Grain.Nitrogen.Supply
          NutrientProportionFunctions Partition: same as Replacements.Wheat.Spike.Carbon.Partition
        Constant DetachmentRate: FixedValue=0; Units=/d
        MultiplyFunction InitialWt
          Constant RootWtPerPlant: FixedValue=0.005; Units=g
          VariableReference Population: VariableName=[Plant].SowingData.Population
        RootNetwork Network
          Constant KLModifier: FixedValue=1
          Constant KNO3: FixedValue=0.02
          Constant KNH4: FixedValue=0.01
          Constant MaxDailyNUptake: FixedValue=20; Units=g/m2
          Constant MaximumRootDepth: FixedValue=1000000
          LinearInterpolationFunction NUptakeSWFactor
            SoilWaterScale: LLModel=1
            XYPairs: X=[0, 1]; Y=[0, 1]
            Memo
              This is modelled in the same way as the old wheat model where potential N uptake is decreased as the soil dries as described by NUptakeSWFactor
            VariableReference XValue: VariableName=[SoilWaterScale]
          Constant SpecificRootLength: FixedValue=105; Units=m/g
          Constant SoilWaterEffect: FixedValue=1
          Constant RootDepthStressFactor: FixedValue=1
          MultiplyFunction RootFrontVelocity
            PhaseLookup PotentialRootFrontVelocity
              PhaseLookupValue PreEmergence: Start=Germination; End=Emergence
                Constant Value: FixedValue=5; Units=mm/d
              PhaseLookupValue PostEmergence: Start=Emergence; End=StartGrainFill
                Constant Value: FixedValue=20; Units=mm/d
            WeightedTemperatureFunction TemperatureFactor: MaximumTemperatureWeighting=0.5
              XYPairs: X=[0, 15, 25, 35]; Y=[0, 1, 1, 0]
            LinearInterpolationFunction WaterFactor
              SoilWaterScale: LLModel=1
              XYPairs: X=[0, 0.25, 1]; Y=[0, 1, 1]
              VariableReference XValue: VariableName=[SoilWaterScale]
          RootShapeCylinder RootShape
        OrganNutrientDelta Nitrogen: MaxCDelta=0
          OrganNutrientSupplies Supplies: Fixation=0; Uptake=0
            NutrientPoolsState ReAllocation
            NutrientPoolsState ReTranslocation
          NutrientDemandFunctions Demand: same as Replacements.Wheat.Leaf.Nitrogen.Demand
          NutrientSupplyFunctions Supply: same as Replacements.Wheat.Grain.Nitrogen.Supply
          NutrientConcentrationFunctions Concentration
            Constant Maximum: FixedValue=0.01
            Constant Critical: FixedValue=0.01
            Constant Minimum: FixedValue=0.01
        Respiration: same as Replacements.Wheat.Grain.Respiration
        Constant SenescenceRate2: FixedValue=0.005
        MultiplyFunction SenescenceRate
          ExponentialFunction: A=0; B=1; C=1
            DivideFunction
              SubtractFunction
                SoilTemperatureDepthFunction: Depth=100
                Constant: FixedValue=20
              Constant: FixedValue=10
          Constant Coefficient: FixedValue=0.015
        MultiplyFunction TotalCarbonDemand
          MultiplyFunction TotalDMDemand
            VariableReference PotentialPhotosynthesis: VariableName=[Leaf].Photosynthesis
            PhaseLookup PartitionFraction
              PhaseLookupValue PreEmergence: Start=Germination; End=Emergence
                Constant Value: FixedValue=0
              PhaseLookupValue PreFlowering: Start=Emergence; End=FlagLeaf
                LinearInterpolationFunction AgeFactor
                  XYPairs: X=[3, 5, 6]; Y=[0.5, 0.2, 0.2]
                  VariableReference XValue: VariableName=[Phenology].Stage
              PhaseLookupValue PostFlowering: Start=FlagLeaf; End=EndGrainFill
                Constant Value: FixedValue=0
          VariableReference CarbonConc: VariableName=[Root].Cconc
      HeightFunction Height
        MultiplyFunction PotentialHeight
          Constant HeightAtMaturity: FixedValue=1000; Units=mm
          LinearInterpolationFunction DevelopmentEffect
            XYPairs: X=[3, 4, 5, 6, 7, 8]; Y=[0.01, 0.2, 0.2, 1, 1, 1]
            VariableReference XValue: VariableName=[Phenology].Stage
        LinearInterpolationFunction WaterStress
          XYPairs: X=[0.3, 1]; Y=[0, 1]
          VariableReference XValue: VariableName=[Leaf].Canopy.FW
        VariableReference XValue: VariableName=[Phenology].Stage
      SubtractFunction StemNumber
        AddFunction Total
          Constant MainStem: FixedValue=1
          AccumulateFunction Tillers: StartStageName=Emergence; EndStageName=TerminalSpikelet; FractionRemovedOnCut=0; FractionRemovedOnHarvest=1; FractionRemovedOnGraze=0; FractionRemovedOnPrune=0
            MultiplyFunction Tillering
              VariableReference DeltaNode: VariableName=[Plant].Leaf.HaunStage.Delta
              VariableReference TilleringRate: VariableName=[Plant].TilleringRate
              MinimumFunction StressFactors
                LinearInterpolationFunction CoverEffect
                  Memo
                    Tillering is said to cease once a threshold fraction of incoming radiation has been achieved.  This captures shading effects on tillering described by [evers2006cessation].
                  XYPairs: X=[0, 0.1, 0.5]; Y=[1, 1, 0]
                  VariableReference XValue: VariableName=[Leaf].Canopy.CoverTotal
                VariableReference ExpansionStress: VariableName=[Leaf].Canopy.GreenAreaIndex.ExpansionStress
        AccumulateFunction DeadTillers: StartStageName=TerminalSpikelet; EndStageName=FlagLeaf; FractionRemovedOnCut=0; FractionRemovedOnHarvest=1; FractionRemovedOnGraze=0; FractionRemovedOnPrune=0
          MultiplyFunction Attrition
            VariableReference TillerNumber: VariableName=[Plant].TillerNumber
            Constant MaxRate: FixedValue=0.01743
            VariableReference Stresses: VariableName=[Leaf].Canopy.GreenAreaIndex.SenescenceStresses
      MultiplyFunction StemPopulation
        VariableReference StemNumber: VariableName=[Plant].StemNumber
        VariableReference PlantPopulation: VariableName=[Plant].SowingData.Population
      SubtractFunction TillerNumber
        VariableReference StemNumber: VariableName=[Plant].StemNumber
        Constant MainStem: FixedValue=1
      Constant Tillerocity: FixedValue=1; Units=0-1
      MultiplyFunction TillerPopulation
        VariableReference TillerNumber: VariableName=[Plant].TillerNumber
        VariableReference PlantPopulation: VariableName=[Plant].SowingData.Population
      PhaseLookup TilleringRate
        PhaseLookupValue Vegetative: Start=Emergence; End=TerminalSpikelet
          MultiplyFunction StressedRate
            MultiplyFunction PotentialtilleringRate
              LinearInterpolationFunction SpeciesUpperLimit
                XYPairs: X=[1, 2, 3, 4, 5, 6, 7]; Y=[0, 1, 2, 4, 7, 12, 20]
                VariableReference XValue: VariableName=[Leaf].HaunStage
              VariableReference GenotypeTilleringTendency: VariableName=[Plant].Tillerocity
            MinimumFunction Stresses
              VariableReference ExpansionStress: VariableName=[Leaf].Canopy.GreenAreaIndex.ExpansionStress
              LinearInterpolationFunction CoverEffect
                XYPairs: X=[0, 0.15, 0.45, 1]; Y=[1, 1, 0, 0]
                VariableReference XValue: VariableName=[Leaf].Canopy.Covertotal
        PhaseLookupValue Reproductive: Start=TerminalSpikelet; End=HarvestRipe
          Constant Zero: FixedValue=0
        Memo
          Potential branching rate is determined by the commonly observed pattern of tillering in wheat, in which each tiller emerges with the third leaf on its parent axis (e.g. first tiller emerges at the same time as the third leaf on the main stem, the first secondary tiller appears with the third leaf on tiller 1).  This is described as a simple function of main stem leaf number.
      CompositeStates AboveGround
        Propertys=[[Leaf].Live, [Leaf].Dead, [Grain].Live, [Grain].Dead, [Stem].Live, [Stem].Dead, [Spike].Live, [Spike].Dead]
      CompositeStates AboveGroundLive: Propertys=[[Leaf].Live, [Grain].Live, [Stem].Live, [Spike].Live]
      CompositeStates AboveGroundDead: Propertys=[[Leaf].Dead, [Grain].Dead, [Stem].Dead, [Spike].Dead]
      CompositeStates BelowGround: Propertys=[[Root].Live, [Root].Dead]
      CompositeStates Total
        Propertys=[[Root].Live, [Root].Dead, [Leaf].Live, [Leaf].Dead, [Grain].Live, [Grain].Dead, [Stem].Live, [Stem].Dead, [Spike].Live, [Spike].Dead]
      CompositeStates TotalLive
        Propertys=[[Root].Live, [Leaf].Live, [Grain].Live, [Stem].Live, [Spike].Live]
      CompositeStates TotalDead
        Propertys=[[Root].Dead, [Leaf].Dead, [Grain].Dead, [Stem].Dead, [Spike].Dead]
      CompositeStates Ear: Propertys=[[Grain].Live, [Grain].Dead, [Spike].Live, [Spike].Dead]
      CompositeStates StemPlusSpike: Propertys=[[Stem].Live, [Stem].Dead, [Spike].Live, [Spike].Dead]
      LinearInterpolationFunction MortalityRate
        XYPairs: X=[0.98, 1]; Y=[0, 0]
        VariableReference XValue: VariableName=[Leaf].Canopy.CoverGreen
      Constant seedMortalityRate: FixedValue=0
      Folder Cultivars
        Folder New Zealand
          Cultivar Amarok
            Command:
              [Phenology].HeadEmergencePpSensitivity.FixedValue = 4
              [Leaf].Phyllochron.BasePhyllochron.FixedValue = 100.0
              [Leaf].PhyllochronPpSensitivity.FixedValue = 0.6
              [Phenology].CAMP.FLNparams.MinLN = 8
              [Phenology].CAMP.FLNparams.PpLN = 4
              [Phenology].CAMP.FLNparams.VrnLN = 5
              [Phenology].CAMP.FLNparams.VxPLN = 2
              [Phenology].HeadEmergenceLongDayBase.FixedValue = 90
              [Phenology].CAMP.EnvData.VrnTreatTemp = 6
              [Phenology].CAMP.EnvData.VrnTreatDuration = 60
          Cultivar BattenWinter
            Command:
              [Phenology].HeadEmergencePpSensitivity.FixedValue = 3.8423212708469157
              [Leaf].Phyllochron.BasePhyllochron.FixedValue = 100.0
              [Leaf].Canopy.GreenExtinctionCoefficient.VegetativePhase.FixedValue = 0.7
              //[Grain].Number.GrainNumber.GrainsPerGramOfStem.FixedValue = 22
              [Leaf].PhyllochronPpSensitivity.FixedValue = 0.6
              [Phenology].CAMP.FLNparams.MinLN = 8.15781757053076
              [Phenology].CAMP.FLNparams.PpLN = 3.6074343511019427
              [Phenology].CAMP.FLNparams.VrnLN = 3.096547775405041
              [Phenology].CAMP.FLNparams.VxPLN = 6.987099381114945
              [Phenology].HeadEmergenceLongDayBase.FixedValue = 266.0
              [Phenology].CAMP.EnvData.VrnTreatTemp = 6
              [Phenology].CAMP.EnvData.VrnTreatDuration = 60
          Cultivar BattenSpring
            Command:
              [Phenology].HeadEmergencePpSensitivity.FixedValue = 0.006727231500210627
              [Leaf].Phyllochron.BasePhyllochron.FixedValue = 100.0
              [Leaf].Canopy.GreenExtinctionCoefficient.VegetativePhase.FixedValue = 0.7
              //[Grain].Number.GrainNumber.GrainsPerGramOfStem.FixedValue = 22
              [Leaf].PhyllochronPpSensitivity.FixedValue = 0.6
              [Phenology].CAMP.FLNparams.MinLN = 8.25262475446035
              [Phenology].CAMP.FLNparams.PpLN = 7.552256317837019
              [Phenology].CAMP.FLNparams.VrnLN = 0.18541366678983096
              [Phenology].CAMP.FLNparams.VxPLN = -0.03479769923441367
              [Phenology].HeadEmergenceLongDayBase.FixedValue = 107.0
              [Phenology].CAMP.EnvData.VrnTreatTemp = 6
              [Phenology].CAMP.EnvData.VrnTreatDuration = 60
          Cultivar Claire
            Command:
              [Phenology].HeadEmergencePpSensitivity.FixedValue = 2
              [Leaf].Phyllochron.BasePhyllochron.FixedValue = 100
              [Phenology].CAMP.FLNparams.MinLN = 9
              [Phenology].CAMP.FLNparams.PpLN = 5
              [Phenology].CAMP.FLNparams.VrnLN = 4
              [Phenology].CAMP.FLNparams.VxPLN = 4
              [Phenology].HeadEmergenceLongDayBase.FixedValue = 150
              [Phenology].CAMP.EnvData.VrnTreatTemp = 6
              [Phenology].CAMP.EnvData.VrnTreatDuration = 60
          Cultivar Conquest
            Command:
              [Leaf].Phyllochron.BasePhyllochron.FixedValue = 100
              [Phenology].CAMP.FLNparams.MinLN = 7.5
              [Phenology].CAMP.FLNparams.PpLN = 2.5
              [Phenology].CAMP.FLNparams.VrnLN = 0.0
              [Phenology].CAMP.FLNparams.VxPLN = 0.0
              [Phenology].HeadEmergenceLongDayBase.FixedValue = 100
              [Phenology].HeadEmergencePpSensitivity.FixedValue = 1.0
              [Phenology].CAMP.EnvData.VrnTreatTemp = 6
              [Phenology].CAMP.EnvData.VrnTreatDuration = 60
          Cultivar CRWT153
            Command:
              [Leaf].Phyllochron.BasePhyllochron.FixedValue = 100.0
              [Leaf].PhyllochronPpSensitivity.FixedValue = 0.6
              [Phenology].CAMP.FLNparams.MinLN = 14.27272727272727
              [Phenology].CAMP.FLNparams.PpLN = -0.028282828282829797
              [Phenology].CAMP.FLNparams.VrnLN = 2.6000000000000014
              [Phenology].CAMP.FLNparams.VxPLN = -1.2477272727272712
              [Phenology].HeadEmergenceLongDayBase.FixedValue = 200
              [Phenology].HeadEmergencePpSensitivity.FixedValue = 2.3
              [Phenology].CAMP.EnvData.VrnTreatTemp = 6
              [Phenology].CAMP.EnvData.VrnTreatDuration = 60
          Cultivar Discovery
            Command:
              [Leaf].Phyllochron.BasePhyllochron.FixedValue = 80
              //[Grain].MaximumPotentialGrainSize.FixedValue = 0.051
              //[Grain].Number.GrainNumber.GrainsPerGramOfStem.FixedValue = 35
              //[Leaf].Canopy.GreenExtinctionCoefficient.VegetativePhase.FixedValue = 0.5
              //[Grain].Nitrogen.Concentration.Maximum.FixedValue = 0.025
              //[Grain].MaxNConcDailyGrowth.FixedValue = 0.025
              //[Leaf].ExtinctionCoefficient.DevelopmentFactor.XYPairs.Y = 1,1,1,1,1.4
              //[Leaf].MinimumNConc.XYPairs.Y = 0.01,0.008, 0.008,0.008, 0.008, 0.008
              //[Stem].MinimumNConc.FixedValue = 0.006
              //[Spike].DMRetranslocationFactor.ReproductiveGrowth.DMRetranslocationFactor.FixedValue = 0.05
              [Phenology].CAMP.FLNparams.MinLN = 10.0
              [Phenology].CAMP.FLNparams.PpLN = 0.0
              [Phenology].CAMP.FLNparams.VrnLN = 0.0
              [Phenology].CAMP.FLNparams.VxPLN = 0.0
              [Phenology].HeadEmergenceLongDayBase.FixedValue = 100
              [Phenology].HeadEmergencePpSensitivity.FixedValue = 1.0
              [Phenology].CAMP.EnvData.VrnTreatTemp = 6
              [Phenology].CAMP.EnvData.VrnTreatDuration = 60
              [Plant].Tillerocity.FixedValue=0.2
              [Leaf].AreaOfLargest.FixedValue = 0.0015
            Memo
              This is a spring wheat with a high grain number and later tillering
          Cultivar Exceed
            Command:
              [Phenology].CAMP.FLNparams.MinLN = 9
              [Phenology].CAMP.FLNparams.PpLN = 3.0
              [Phenology].CAMP.FLNparams.VrnLN = 7
              [Phenology].CAMP.FLNparams.VxPLN = 0.0
          Cultivar Option
            Command:
              [Phenology].CAMP.FLNparams.MinLN = 9
              [Phenology].CAMP.FLNparams.PpLN = 3.0
              [Phenology].CAMP.FLNparams.VrnLN = 7
              [Phenology].CAMP.FLNparams.VxPLN = 0.0
          Cultivar Otane
            Command:
              [Phenology].HeadEmergencePpSensitivity.FixedValue = 2
              [Leaf].Phyllochron.BasePhyllochron.FixedValue = 100.0
              [Leaf].PhyllochronPpSensitivity.FixedValue = 0.6
              [Phenology].CAMP.FLNparams.MinLN = 7
              [Phenology].CAMP.FLNparams.PpLN = 4
              [Phenology].CAMP.FLNparams.VrnLN = 0
              [Phenology].CAMP.FLNparams.VxPLN = 0
              [Phenology].HeadEmergenceLongDayBase.FixedValue = 150
              [Phenology].CAMP.EnvData.VrnTreatTemp = 6
              [Phenology].CAMP.EnvData.VrnTreatDuration = 60
          Cultivar Regency
            Command:
              [Phenology].CAMP.FLNparams.MinLN = 9
              [Phenology].CAMP.FLNparams.PpLN = 3.0
              [Phenology].CAMP.FLNparams.VrnLN = 7
              [Phenology].CAMP.FLNparams.VxPLN = 0.0
          Cultivar Robigus
            Command:
              [Phenology].CAMP.FLNparams.MinLN = 9
              [Phenology].CAMP.FLNparams.PpLN = 3.0
              [Phenology].CAMP.FLNparams.VrnLN = 7
              [Phenology].CAMP.FLNparams.VxPLN = 0.0
          Cultivar Rongotea
            Command:
              [Phenology].HeadEmergencePpSensitivity.FixedValue = 3.92123686073301
              [Leaf].Phyllochron.BasePhyllochron.FixedValue = 100
              [Phenology].CAMP.FLNparams.MinLN = 7.73858795204672
              [Phenology].CAMP.FLNparams.PpLN = 10.6418278399273
              [Phenology].CAMP.FLNparams.VrnLN = 0.307012432477857
              [Phenology].CAMP.FLNparams.VxPLN = -0.256935248010825
              [Phenology].HeadEmergenceLongDayBase.FixedValue = 168
              [Phenology].CAMP.EnvData.VrnTreatTemp = 6
              [Phenology].CAMP.EnvData.VrnTreatDuration = 60
          Cultivar Sage
            Command:
              [Phenology].CAMP.FLNparams.MinLN = 9
              [Phenology].CAMP.FLNparams.PpLN = 3.0
              [Phenology].CAMP.FLNparams.VrnLN = 7
              [Phenology].CAMP.FLNparams.VxPLN = 0.0
          Cultivar Saracen
            Command:
              [Leaf].Phyllochron.BasePhyllochron.FixedValue = 100.0
              [Leaf].PhyllochronPpSensitivity.FixedValue = 0.6
              [Phenology].CAMP.FLNparams.MinLN = 8
              [Phenology].CAMP.FLNparams.PpLN = 2
              [Phenology].CAMP.FLNparams.VrnLN = 1
              [Phenology].CAMP.FLNparams.VxPLN = 2
              [Phenology].HeadEmergenceLongDayBase.FixedValue = 170
              [Phenology].HeadEmergencePpSensitivity.FixedValue = 4
              [Phenology].CAMP.EnvData.VrnTreatTemp = 6
              [Phenology].CAMP.EnvData.VrnTreatDuration = 60
          Cultivar Solstice
            Command:
              [Phenology].CAMP.FLNparams.MinLN = 9
              [Phenology].CAMP.FLNparams.PpLN = 3.0
              [Phenology].CAMP.FLNparams.VrnLN = 7
              [Phenology].CAMP.FLNparams.VxPLN = 0.0
          Cultivar Tribute
            Command:
              [Phenology].CAMP.FLNparams.MinLN = 9
              [Phenology].CAMP.FLNparams.PpLN = 3.0
              [Phenology].CAMP.FLNparams.VrnLN = 7
              [Phenology].CAMP.FLNparams.VxPLN = 0.0
          Cultivar Wakanui
            Command:
              [Phenology].HeadEmergenceLongDayBase.FixedValue = 180
              [Leaf].Phyllochron.BasePhyllochron.FixedValue = 105.0
              [Leaf].Canopy.GreenExtinctionCoefficient.VegetativePhase.FixedValue = 0.75
              [Leaf].PhyllochronPpSensitivity.FixedValue = 0.33
              [Phenology].CAMP.FLNparams.MinLN = 10
              [Phenology].CAMP.FLNparams.PpLN = 12
              [Phenology].CAMP.FLNparams.VrnLN =12
              [Phenology].CAMP.FLNparams.VxPLN = 12
              [Phenology].HeadEmergencePpSensitivity.FixedValue = 3
              [Phenology].CAMP.EnvData.VrnTreatTemp = 6
              [Phenology].CAMP.EnvData.VrnTreatDuration = 60
          Cultivar CRW247
            Command:
              [Phenology].CAMP.FLNparams.MinLN = 9
              [Phenology].CAMP.FLNparams.PpLN = 6
              [Phenology].CAMP.FLNparams.VrnLN = 6
              [Phenology].CAMP.FLNparams.VxPLN = 6
              //[Phenology].Phyllochron.BasePhyllochron.FixedValue = 80
              //[Leaf].CohortParameters.MaxArea.AreaLargestLeaves.FixedValue = 1600
              //[Grain].MaximumPotentialGrainSize.FixedValue = 0.051
              //[Grain].NumberFunction.GrainNumber.GrainsPerGramOfStem.FixedValue = 35
              [Leaf].Canopy.GreenExtinctionCoefficient.VegetativePhase.FixedValue = 1.0
              //[Structure].BranchingRate.PotentialBranchingRate.Vegetative.PotentialBranchingRate.XYPairs.Y = 0,0,0,0,4,7,12,20
              //[Grain].MaximumNConc.FixedValue = 0.025
              //[Grain].MaxNConcDailyGrowth.FixedValue = 0.025
              //[Leaf].ExtinctionCoeff.DevelopmentFactor.XYPairs.Y = 1,1,1,1,1.4
              //[Leaf].CohortParameters.MinimumNConc.XYPairs.Y = 0.01,0.008, 0.008,0.008, 0.008, 0.008
              //[Stem].MinimumNConc.FixedValue = 0.006
              //[Spike].DMRetranslocationFactor.ReproductiveGrowth.DMRetranslocationFactor.FixedValue = 0.05
          Cultivar Graham
            Command:
              [Phenology].CAMP.FLNparams.MinLN = 10
              [Phenology].CAMP.FLNparams.PpLN = 7
              [Phenology].CAMP.FLNparams.VrnLN = 6
              [Phenology].CAMP.FLNparams.VxPLN = 4
              [Leaf].PhyllochronPpSensitivity.FixedValue = 0.33
              //[Phenology].Phyllochron.BasePhyllochron.FixedValue = 100
              //[Phenology].DailyVernalisation.TempResponseProfile.Response.X = 0,1,8
              //[Phenology].DailyVernalisation.TempResponseProfile.Response.Y = 0,1.204,0
              //[Leaf].ExtinctionCoeff.VegetativePhase.FixedValue = 0.7
              //[Grain].NumberFunction.GrainNumber.GrainsPerGramOfStem.FixedValue = 22
              //[Grain].MaximumPotentialGrainSize.FixedValue = 0.045
              //[Leaf].AreaOfLargest.FixedValue = 0.0035
          Cultivar Kerrin
            Command:
              //[Phenology].MinimumLeafNumber.FixedValue = 7
              //[Phenology].VrnSensitivity.FixedValue = 7
              //[Phenology].PpSensitivity.FixedValue = 3
              //[Phenology].HeadEmergenceLongDayBase.FixedValue = 4
              //[Phenology].Phyllochron.BasePhyllochron.FixedValue = 100
              //[Phenology].DailyVernalisation.TempResponseProfile.Response.X = 0,1,8
              //[Phenology].DailyVernalisation.TempResponseProfile.Response.Y = 0,1.204,0
              //[Leaf].ExtinctionCoeff.VegetativePhase.FixedValue = 0.5
              //[Grain].NumberFunction.GrainNumber.GrainsPerGramOfStem.FixedValue = 22
              //[Grain].MaximumPotentialGrainSize.FixedValue = 0.045
              //[Leaf].CohortParameters.MaxArea.AreaLargestLeaves.FixedValue = 3000
              //[Wheat].Phenology.Emerging.Target.DepthxRate.ShootRate.FixedValue = 3.5
              //[Wheat].Leaf.CohortParameters.SpecificLeafAreaMax.XYPairs.X = 1,10
              //[Wheat].Leaf.CohortParameters.SpecificLeafAreaMax.XYPairs.Y = 23000,23000
              //[Wheat].Leaf.CohortParameters.SpecificLeafAreaMin.XYPairs.X = 1,10
              //[Wheat].Leaf.CohortParameters.SpecificLeafAreaMin.XYPairs.Y = 23000,23000
              //[Wheat].Structure.BranchingRate.StressFactors.CoverEffect.XYPairs.X = 0,0.1,0.25
          Cultivar Zyatt
            Command:
              //[Phenology].MinimumLeafNumber.FixedValue = 8
              //[Phenology].VrnSensitivity.FixedValue = 10
              //[Phenology].PpSensitivity.FixedValue = 0
              //[Phenology].HeadEmergenceLongDayBase.FixedValue = 4
              //[Phenology].Phyllochron.BasePhyllochron.FixedValue = 100
              //[Phenology].DailyVernalisation.TempResponseProfile.Response.X = 0,1,8
              //[Phenology].DailyVernalisation.TempResponseProfile.Response.Y = 0,1.204,0
              //[Leaf].ExtinctionCoeff.VegetativePhase.FixedValue = 0.7
              //[Grain].NumberFunction.GrainNumber.GrainsPerGramOfStem.FixedValue = 22
              //[Grain].MaximumPotentialGrainSize.FixedValue = 0.045
              //[Leaf].CohortParameters.MaxArea.AreaLargestLeaves.FixedValue = 3000
          Cultivar Voltron
            Command:
              //[Leaf].Phyllochron.BasePhyllochron.FixedValue = 80
              //[Grain].MaximumPotentialGrainSize.FixedValue = 0.051
              //[Grain].Number.GrainNumber.GrainsPerGramOfStem.FixedValue = 35
              //[Leaf].Canopy.GreenExtinctionCoefficient.VegetativePhase.FixedValue = 0.5
              //[Grain].Nitrogen.Concentration.Maximum.FixedValue = 0.025
              //[Grain].MaxNConcDailyGrowth.FixedValue = 0.025
              //[Leaf].ExtinctionCoefficient.DevelopmentFactor.XYPairs.Y = 1,1,1,1,1.4
              //[Leaf].MinimumNConc.XYPairs.Y = 0.01,0.008, 0.008,0.008, 0.008, 0.008
              //[Stem].MinimumNConc.FixedValue = 0.006
              //[Spike].DMRetranslocationFactor.ReproductiveGrowth.DMRetranslocationFactor.FixedValue = 0.05
              //[Phenology].CAMP.FLNparams.MinLN = 9.0
              //[Phenology].CAMP.FLNparams.PpLN = 0.0
              //[Phenology].CAMP.FLNparams.VrnLN = 0.0
              //[Phenology].CAMP.FLNparams.VxPLN = 0.0
              //[Phenology].HeadEmergenceLongDayBase.FixedValue = 100
              //[Phenology].HeadEmergencePpSensitivity.FixedValue = 1.0
              //[Phenology].CAMP.EnvData.VrnTreatTemp = 6
              //[Phenology].CAMP.EnvData.VrnTreatDuration = 60
              //[Plant].Tillerocity.FixedValue=0.2
              //[Leaf].AreaOfLargest.FixedValue = 0.0015
            Memo
              This is a spring wheat with a high grain number and later tillering
        Folder Australia
          Cultivar Axe
            Command:
              [Phenology].HeadEmergencePpSensitivity.FixedValue = 1
              [Leaf].Phyllochron.BasePhyllochron.FixedValue = 92.9812317822162
              [Leaf].PhyllochronPpSensitivity.FixedValue = 0.268590208069814
              [Phenology].CAMP.FLNparams.MinLN = 7
              [Phenology].CAMP.FLNparams.PpLN = 2
              [Phenology].CAMP.FLNparams.VrnLN = 0
              [Phenology].CAMP.FLNparams.VxPLN = 0
              [Phenology].CAMP.EnvData.VrnTreatTemp = 5.8
              [Phenology].CAMP.EnvData.VrnTreatDuration = 60
              [Phenology].HeadEmergenceLongDayBase.FixedValue = 130
          Cultivar Bolac
            Command:
              [Leaf].Phyllochron.BasePhyllochron.FixedValue = 99.3767047504637
              [Leaf].PhyllochronPpSensitivity.FixedValue = 0.204801292585874
              [Phenology].CAMP.FLNparams.MinLN = 7
              [Phenology].CAMP.FLNparams.PpLN = 5
              [Phenology].CAMP.FLNparams.VrnLN = 1
              [Phenology].CAMP.FLNparams.VxPLN = 0
              [Phenology].CAMP.EnvData.VrnTreatTemp = 5.8
              [Phenology].CAMP.EnvData.VrnTreatDuration = 60
              [Phenology].HeadEmergenceLongDayBase.FixedValue = 170
              [Phenology].HeadEmergencePpSensitivity.FixedValue = 1
          Cultivar Cunningham
            Command:
              [Leaf].Phyllochron.BasePhyllochron.FixedValue = 100
              [Phenology].CAMP.FLNparams.MinLN = 7
              [Phenology].CAMP.FLNparams.PpLN = 12
              [Phenology].CAMP.FLNparams.VrnLN = 9
              [Phenology].CAMP.FLNparams.VxPLN = -9
              [Phenology].HeadEmergenceLongDayBase.FixedValue = 50
              [Phenology].HeadEmergencePpSensitivity.FixedValue = 0
          Cultivar Derrimut
            Command:
              [Leaf].Phyllochron.BasePhyllochron.FixedValue = 94.7552823110091
              [Leaf].PhyllochronPpSensitivity.FixedValue = 0.263180943521024
              [Phenology].CAMP.FLNparams.MinLN = 7
              [Phenology].CAMP.FLNparams.PpLN = 3
              [Phenology].CAMP.FLNparams.VrnLN = 2
              [Phenology].CAMP.FLNparams.VxPLN = -2
              [Phenology].CAMP.EnvData.VrnTreatTemp = 5.8
              [Phenology].CAMP.EnvData.VrnTreatDuration = 60
              [Phenology].HeadEmergenceLongDayBase.FixedValue = 150
              [Phenology].HeadEmergencePpSensitivity.FixedValue = 1
          Cultivar Gregory
            Command:
              [Leaf].Phyllochron.BasePhyllochron.FixedValue = 96.2227321902995
              [Leaf].PhyllochronPpSensitivity.FixedValue = 0.199981872553676
              [Phenology].CAMP.FLNparams.MinLN = 8
              [Phenology].CAMP.FLNparams.PpLN = 2
              [Phenology].CAMP.FLNparams.VrnLN = 4
              [Phenology].CAMP.FLNparams.VxPLN = -3
              [Phenology].CAMP.EnvData.VrnTreatTemp = 6
              [Phenology].CAMP.EnvData.VrnTreatDuration = 60
              [Phenology].HeadEmergenceLongDayBase.FixedValue = 110
              [Phenology].HeadEmergencePpSensitivity.FixedValue = 1
          Cultivar Gamenya
            Command:
              [Leaf].Phyllochron.BasePhyllochron.FixedValue = 100
              [Leaf].PhyllochronPpSensitivity.FixedValue = 0.349562436956343
              [Phenology].CAMP.FLNparams.MinLN = 8
              [Phenology].CAMP.FLNparams.PpLN = 3
              [Phenology].CAMP.FLNparams.VrnLN = 0.5
              [Phenology].CAMP.FLNparams.VxPLN = 0
              [Phenology].CAMP.EnvData.VrnTreatTemp = 6
              [Phenology].CAMP.EnvData.VrnTreatDuration = 60
              [Phenology].HeadEmergenceLongDayBase.FixedValue = 50
              [Phenology].HeadEmergencePpSensitivity.FixedValue = 4
          Cultivar Gauntlet
            Command:
              [Leaf].Phyllochron.BasePhyllochron.FixedValue = 91.4777217640106
              [Leaf].PhyllochronPpSensitivity.FixedValue = 0.28135751778138
              [Phenology].CAMP.FLNparams.MinLN = 7
              [Phenology].CAMP.FLNparams.PpLN = 2
              [Phenology].CAMP.FLNparams.VrnLN = 4
              [Phenology].CAMP.FLNparams.VxPLN = -4
              [Phenology].CAMP.EnvData.VrnTreatTemp = 5.8
              [Phenology].CAMP.EnvData.VrnTreatDuration = 60
              [Phenology].HeadEmergenceLongDayBase.FixedValue = 230
              [Phenology].HeadEmergencePpSensitivity.FixedValue = 1
          Cultivar Gladius
            Command:
              [Leaf].Phyllochron.BasePhyllochron.FixedValue = 100
              [Phenology].CAMP.FLNparams.MinLN = 6
              [Phenology].CAMP.FLNparams.PpLN = 5.0
              [Phenology].CAMP.FLNparams.VrnLN = 0
              [Phenology].CAMP.FLNparams.VxPLN = 0.0
          Cultivar Gutha
            Command:
              [Leaf].Phyllochron.BasePhyllochron.FixedValue = 107
              [Leaf].PhyllochronPpSensitivity.FixedValue = 0.247088996399892
              [Grain].Number.GrainNumber.GrainsPerGramOfStem.FixedValue = 17
              [Phenology].CAMP.EnvData.VrnTreatTemp = 5.8
              [Phenology].CAMP.EnvData.VrnTreatDuration = 60
              [Phenology].CAMP.FLNparams.MinLN = 7
              [Phenology].CAMP.FLNparams.PpLN = 2
              [Phenology].CAMP.FLNparams.VrnLN = 1
              [Phenology].CAMP.FLNparams.VxPLN = 0
              [Phenology].HeadEmergenceLongDayBase.FixedValue = 50
              [Phenology].HeadEmergencePpSensitivity.FixedValue = 5
          Cultivar H45
            Command:
              [Leaf].Phyllochron.BasePhyllochron.FixedValue = 85.6989214218668
              [Grain].Number.GrainNumber.GrainsPerGramOfStem.FixedValue = 20
              [Leaf].PhyllochronPpSensitivity.FixedValue = 0.349562436956343
              [Phenology].CAMP.FLNparams.MinLN = 8
              [Phenology].CAMP.FLNparams.PpLN = 3
              [Phenology].CAMP.FLNparams.VrnLN = 0
              [Phenology].CAMP.FLNparams.VxPLN = 0
              [Phenology].CAMP.EnvData.VrnTreatTemp = 6
              [Phenology].CAMP.EnvData.VrnTreatDuration = 60
              [Phenology].HeadEmergenceLongDayBase.FixedValue = 50
              [Phenology].HeadEmergencePpSensitivity.FixedValue = 4
          Cultivar H46
            Command:
              [Leaf].Phyllochron.BasePhyllochron.FixedValue = 100
              [Phenology].CAMP.FLNparams.MinLN = 8
              [Phenology].CAMP.FLNparams.PpLN = 4.0
              [Phenology].CAMP.FLNparams.VrnLN = 0
              [Phenology].CAMP.FLNparams.VxPLN = 0.0
          Cultivar Hartog
            Command:
              [Leaf].Phyllochron.BasePhyllochron.FixedValue = 107.48
              //[Grain].MaximumPotentialGrainSize.FixedValue = 0.041
              [Leaf].PhyllochronPpSensitivity.FixedValue = 0.247
              [Phenology].CAMP.FLNparams.MinLN = 7
              [Phenology].CAMP.FLNparams.PpLN = 4
              [Phenology].CAMP.FLNparams.VrnLN = 2
              [Phenology].CAMP.FLNparams.VxPLN = 0
              [Phenology].HeadEmergenceLongDayBase.FixedValue = 50
              [Phenology].HeadEmergencePpSensitivity.FixedValue = 5
              [Phenology].CAMP.EnvData.VrnTreatTemp = 6
              [Phenology].CAMP.EnvData.VrnTreatDuration = 60
          Cultivar Wills
            Command:
              [Leaf].Phyllochron.BasePhyllochron.FixedValue = 94.9906866085437
              [Leaf].PhyllochronPpSensitivity.FixedValue = 0.264808096779551
              [Phenology].CAMP.EnvData.VrnTreatTemp = 5.8
              [Phenology].CAMP.EnvData.VrnTreatDuration = 60
              [Phenology].CAMP.FLNparams.MinLN = 8
              [Phenology].CAMP.FLNparams.PpLN = 2
              [Phenology].CAMP.FLNparams.VrnLN = 4
              [Phenology].CAMP.FLNparams.VxPLN = -3
              [Phenology].HeadEmergenceLongDayBase.FixedValue = 110
              [Phenology].HeadEmergencePpSensitivity.FixedValue = 1
          Cultivar Mercury
            Command:
              [Phenology].HeadEmergenceLongDayBase.FixedValue = 100
              [Leaf].Phyllochron.BasePhyllochron.FixedValue = 80
              [Phenology].CAMP.FLNparams.MinLN = 9.0
              [Phenology].CAMP.FLNparams.PpLN = 2.0
              [Phenology].CAMP.FLNparams.VrnLN = 0.0
              [Phenology].CAMP.FLNparams.VxPLN = 0.0
              [Phenology].HeadEmergencePpSensitivity.FixedValue = 0.0
              [Phenology].CAMP.EnvData.VrnTreatTemp = 6
              [Phenology].CAMP.EnvData.VrnTreatDuration = 60
          Cultivar Batavia
            Command:
              [Leaf].Phyllochron.BasePhyllochron.FixedValue = 100
              [Phenology].CAMP.FLNparams.MinLN = 5
              [Phenology].CAMP.FLNparams.PpLN = 9
              [Phenology].CAMP.FLNparams.VrnLN = 0
              [Phenology].CAMP.FLNparams.VxPLN = 6
              [Phenology].HeadEmergenceLongDayBase.FixedValue = 130
              [Phenology].HeadEmergencePpSensitivity.FixedValue = 6
          Cultivar Egret
            Command:
              [Leaf].Phyllochron.BasePhyllochron.FixedValue =80
              [Phenology].CAMP.FLNparams.MinLN = 8
              [Phenology].CAMP.FLNparams.PpLN = 9
              [Phenology].CAMP.FLNparams.VrnLN = 8
              [Phenology].CAMP.FLNparams.VxPLN = -8
              [Phenology].HeadEmergenceLongDayBase.FixedValue = 110
              [Phenology].HeadEmergencePpSensitivity.FixedValue = 0
              [Phenology].CAMP.EnvData.VrnTreatTemp = 6
              [Phenology].CAMP.EnvData.VrnTreatDuration = 60
          Cultivar Janz
            Command:
              [Leaf].Phyllochron.BasePhyllochron.FixedValue = 91.4460925764448
              [Leaf].PhyllochronPpSensitivity.FixedValue = 0.235020437209909
              [Phenology].CAMP.FLNparams.MinLN = 8
              [Phenology].CAMP.FLNparams.PpLN = 3
              [Phenology].CAMP.FLNparams.VrnLN = 1
              [Phenology].CAMP.FLNparams.VxPLN = -1
              [Phenology].CAMP.EnvData.VrnTreatTemp = 5.8
              [Phenology].CAMP.EnvData.VrnTreatDuration = 60
              [Phenology].HeadEmergenceLongDayBase.FixedValue = 130
              [Phenology].HeadEmergencePpSensitivity.FixedValue = 1
          Cultivar Kellalac
            Command:
              [Leaf].Phyllochron.BasePhyllochron.FixedValue = 88.1945544451052
              [Leaf].PhyllochronPpSensitivity.FixedValue = 0.350967201537242
              [Phenology].CAMP.FLNparams.MinLN = 7
              [Phenology].CAMP.FLNparams.PpLN = 4
              [Phenology].CAMP.FLNparams.VrnLN = 2
              [Phenology].CAMP.FLNparams.VxPLN = 0
              [Phenology].CAMP.EnvData.VrnTreatTemp = 6
              [Phenology].CAMP.EnvData.VrnTreatDuration = 60
              [Phenology].HeadEmergenceLongDayBase.FixedValue = 210
              [Phenology].HeadEmergencePpSensitivity.FixedValue = 3
          Cultivar Kennedy
            Command:
              [Leaf].Phyllochron.BasePhyllochron.FixedValue = 100
              [Phenology].CAMP.FLNparams.MinLN = 8
              [Phenology].CAMP.FLNparams.PpLN = 4.0
              [Phenology].CAMP.FLNparams.VrnLN = 0
              [Phenology].CAMP.FLNparams.VxPLN = 0.0
          Cultivar Lang
            Command:
              [Leaf].Phyllochron.BasePhyllochron.FixedValue = 100
              [Phenology].CAMP.FLNparams.MinLN = 7
              [Phenology].CAMP.FLNparams.PpLN = 7
              [Phenology].CAMP.FLNparams.VrnLN = 0
              [Phenology].CAMP.FLNparams.VxPLN = 0
              [Phenology].HeadEmergenceLongDayBase.FixedValue = 70
              [Phenology].HeadEmergencePpSensitivity.FixedValue = 4
              [Phenology].CAMP.EnvData.VrnTreatTemp = 6
              [Phenology].CAMP.EnvData.VrnTreatDuration = 60
          Cultivar Livingston
            Command:
              [Leaf].Phyllochron.BasePhyllochron.FixedValue = 100
              [Phenology].CAMP.FLNparams.MinLN = 6.1
              [Phenology].CAMP.FLNparams.PpLN = 3.0
              [Phenology].CAMP.FLNparams.VrnLN = 1.8000000000000007
              [Phenology].CAMP.FLNparams.VxPLN = 4.0
              [Phenology].HeadEmergenceLongDayBase.FixedValue = 108
              [Phenology].HeadEmergencePpSensitivity.FixedValue = 1.3
              [Phenology].CAMP.EnvData.VrnTreatTemp = 6
              [Phenology].CAMP.EnvData.VrnTreatDuration = 60
          Cultivar Lincoln
            Command:
              [Leaf].Phyllochron.BasePhyllochron.FixedValue = 100
              [Phenology].CAMP.FLNparams.MinLN = 6
              [Phenology].CAMP.FLNparams.PpLN = 4.0
              [Phenology].CAMP.FLNparams.VrnLN = 0
              [Phenology].CAMP.FLNparams.VxPLN = 0.0
          Cultivar Mace
            Command:
              [Leaf].Phyllochron.BasePhyllochron.FixedValue = 106.268453805677
              [Leaf].PhyllochronPpSensitivity.FixedValue = 0.137742329295879
              [Phenology].CAMP.EnvData.VrnTreatTemp = 6
              [Phenology].CAMP.EnvData.VrnTreatDuration = 60
              [Phenology].CAMP.FLNparams.MinLN = 7
              [Phenology].CAMP.FLNparams.PpLN = 2
              [Phenology].CAMP.FLNparams.VrnLN = 3
              [Phenology].CAMP.FLNparams.VxPLN = -3
              [Phenology].HeadEmergenceLongDayBase.FixedValue = 70
              [Phenology].HeadEmergencePpSensitivity.FixedValue = 1
          Cultivar MacKellar
            Command:
              [Phenology].HeadEmergenceLongDayBase.FixedValue = 114.0
              [Leaf].Phyllochron.BasePhyllochron.FixedValue = 100
              [Phenology].CAMP.FLNparams.MinLN = 8.664527440257086
              [Phenology].CAMP.FLNparams.PpLN = 1.0215422635640583
              [Phenology].CAMP.FLNparams.VrnLN = 10.022473345513335
              [Phenology].CAMP.FLNparams.VxPLN = -2.1045318640627455
              [Phenology].HeadEmergencePpSensitivity.FixedValue = 3.533066035654082
              [Phenology].CAMP.EnvData.VrnTreatTemp = 6
              [Phenology].CAMP.EnvData.VrnTreatDuration = 60
          Cultivar Matong
            Command:
              [Leaf].Phyllochron.BasePhyllochron.FixedValue = 100
              //[Grain].Number.GrainNumber.GrainsPerGramOfStem.FixedValue = 22
              [Phenology].CAMP.FLNparams.MinLN = 7
              [Phenology].CAMP.FLNparams.PpLN = 4.0
              [Phenology].CAMP.FLNparams.VrnLN = 1
              [Phenology].CAMP.FLNparams.VxPLN = 0.0
          Cultivar McCubbin
            Command:
              [Leaf].Phyllochron.BasePhyllochron.FixedValue = 90
              [Phenology].CAMP.FLNparams.MinLN = 8.0
              [Phenology].CAMP.FLNparams.PpLN = 8.0
              [Phenology].CAMP.FLNparams.VrnLN = 0.0
              [Phenology].CAMP.FLNparams.VxPLN = 3.0
              [Phenology].HeadEmergenceLongDayBase.FixedValue = 200.0
              [Phenology].HeadEmergencePpSensitivity.FixedValue = 2.0
              [Phenology].CAMP.EnvData.VrnTreatTemp = 6
              [Phenology].CAMP.EnvData.VrnTreatDuration = 60
          Cultivar Ruby
            Command:
              [Leaf].Phyllochron.BasePhyllochron.FixedValue = 100
              [Phenology].CAMP.FLNparams.MinLN = 8
              [Phenology].CAMP.FLNparams.PpLN = 4.0
              [Phenology].CAMP.FLNparams.VrnLN = 0
              [Phenology].CAMP.FLNparams.VxPLN = 0.0
          Cultivar Spear
            Command:
              [Leaf].Phyllochron.BasePhyllochron.FixedValue = 102.794916048683
              [Leaf].PhyllochronPpSensitivity.FixedValue = 0.192036818570067
              //[Grain].Number.GrainNumber.GrainsPerGramOfStem.FixedValue = 22
              [Phenology].CAMP.EnvData.VrnTreatTemp = 6
              [Phenology].CAMP.EnvData.VrnTreatDuration = 60
              [Phenology].CAMP.FLNparams.MinLN = 7
              [Phenology].CAMP.FLNparams.PpLN = 2
              [Phenology].CAMP.FLNparams.VrnLN = 4
              [Phenology].CAMP.FLNparams.VxPLN = -2
              [Phenology].HeadEmergenceLongDayBase.FixedValue = 170
              [Phenology].HeadEmergencePpSensitivity.FixedValue = 0
          Cultivar Sunbri
            Command:
              [Leaf].Phyllochron.BasePhyllochron.FixedValue = 91.5032903672171
              [Leaf].PhyllochronPpSensitivity.FixedValue = 0.207593313150283
              [Phenology].CAMP.EnvData.VrnTreatTemp = 5.8
              [Phenology].CAMP.EnvData.VrnTreatDuration = 60
              [Phenology].CAMP.FLNparams.MinLN = 8
              [Phenology].CAMP.FLNparams.PpLN = 4
              [Phenology].CAMP.FLNparams.VrnLN = 2
              [Phenology].CAMP.FLNparams.VxPLN = -1
              [Phenology].HeadEmergenceLongDayBase.FixedValue = 170
              [Phenology].HeadEmergencePpSensitivity.FixedValue = 2
          Cultivar Sunco
            Command:
              [Phenology].HeadEmergencePpSensitivity.FixedValue = 1
              [Leaf].Phyllochron.BasePhyllochron.FixedValue = 100
              [Phenology].CAMP.FLNparams.MinLN = 6
              [Phenology].CAMP.FLNparams.PpLN = 11
              [Phenology].CAMP.FLNparams.VrnLN = 10
              [Phenology].CAMP.FLNparams.VxPLN = -9
              [Phenology].HeadEmergenceLongDayBase.FixedValue = 170
          Cultivar Ventura
            Command:
              [Leaf].Phyllochron.BasePhyllochron.FixedValue = 100
              [Phenology].CAMP.FLNparams.MinLN = 8
              [Phenology].CAMP.FLNparams.PpLN = 4.0
              [Phenology].CAMP.FLNparams.VrnLN = 0
              [Phenology].CAMP.FLNparams.VxPLN = 0.0
          Cultivar Eaglehawk
            Command:
              [Leaf].Phyllochron.BasePhyllochron.FixedValue = 122.758992485634
              [Leaf].PhyllochronPpSensitivity.FixedValue = 0.119042603665788
              [Phenology].CAMP.FLNparams.MinLN = 6
              [Phenology].CAMP.FLNparams.PpLN = 3
              [Phenology].CAMP.FLNparams.VrnLN = 1
              [Phenology].CAMP.FLNparams.VxPLN = 3
              [Phenology].CAMP.EnvData.VrnTreatTemp = 5.8
              [Phenology].CAMP.EnvData.VrnTreatDuration = 60
              [Phenology].HeadEmergenceLongDayBase.FixedValue = 190
              [Phenology].HeadEmergencePpSensitivity.FixedValue = 4
          Cultivar Wedgetail
            Command:
              [Leaf].Phyllochron.BasePhyllochron.FixedValue = 111.579556421375
              [Leaf].PhyllochronPpSensitivity.FixedValue = 0.217687425020179
              [Phenology].CAMP.EnvData.VrnTreatTemp = 5.8
              [Phenology].CAMP.EnvData.VrnTreatDuration = 60
              [Phenology].CAMP.FLNparams.MinLN = 7
              [Phenology].CAMP.FLNparams.PpLN = 1
              [Phenology].CAMP.FLNparams.VrnLN = 9
              [Phenology].CAMP.FLNparams.VxPLN = -1
              [Phenology].HeadEmergenceLongDayBase.FixedValue = 170
              [Phenology].HeadEmergencePpSensitivity.FixedValue = 2
          Cultivar Wilgoyne
            Command:
              [Leaf].Phyllochron.BasePhyllochron.FixedValue = 100
              [Leaf].PhyllochronPpSensitivity.FixedValue = 0.349562436956343
              //[Grain].Number.GrainNumber.GrainsPerGramOfStem.FixedValue = 17
              [Phenology].CAMP.FLNparams.MinLN = 8
              [Phenology].CAMP.FLNparams.PpLN = 3
              [Phenology].CAMP.FLNparams.VrnLN = 0.5
              [Phenology].CAMP.FLNparams.VxPLN = 0
              [Phenology].CAMP.EnvData.VrnTreatTemp = 6
              [Phenology].CAMP.EnvData.VrnTreatDuration = 60
              [Phenology].HeadEmergenceLongDayBase.FixedValue = 50
              [Phenology].HeadEmergencePpSensitivity.FixedValue = 4
          Cultivar Wyalkatchem
            Command:
              [Leaf].Phyllochron.BasePhyllochron.FixedValue = 101.991162889267
              [Leaf].PhyllochronPpSensitivity.FixedValue = 0.203541157884576
              [Phenology].CAMP.EnvData.VrnTreatTemp = 5.8
              [Phenology].CAMP.EnvData.VrnTreatDuration = 60
              [Phenology].CAMP.FLNparams.MinLN = 7
              [Phenology].CAMP.FLNparams.PpLN = 2
              [Phenology].CAMP.FLNparams.VrnLN = 3
              [Phenology].CAMP.FLNparams.VxPLN = -3
              [Phenology].HeadEmergenceLongDayBase.FixedValue = 90
              [Phenology].HeadEmergencePpSensitivity.FixedValue = 3
          Cultivar Yitpi
            Command:
              [Leaf].Phyllochron.BasePhyllochron.FixedValue = 107.48018743345
              [Leaf].PhyllochronPpSensitivity.FixedValue = 0.247088996399892
              [Phenology].CAMP.EnvData.VrnTreatTemp = 5.8
              [Phenology].CAMP.EnvData.VrnTreatDuration = 60
              [Phenology].CAMP.FLNparams.MinLN = 7
              [Phenology].CAMP.FLNparams.PpLN = 4
              [Phenology].CAMP.FLNparams.VrnLN = 2
              [Phenology].CAMP.FLNparams.VxPLN = 0
              [Phenology].HeadEmergenceLongDayBase.FixedValue = 50
              [Phenology].HeadEmergencePpSensitivity.FixedValue = 5
          Cultivar Young
            Command:
              [Leaf].Phyllochron.BasePhyllochron.FixedValue = 86.0661362380018
              [Leaf].PhyllochronPpSensitivity.FixedValue = 0.347762945437436
              [Phenology].CAMP.EnvData.VrnTreatTemp = 5.8
              [Phenology].CAMP.EnvData.VrnTreatDuration = 60
              [Phenology].CAMP.FLNparams.MinLN = 8
              [Phenology].CAMP.FLNparams.PpLN = 1
              [Phenology].CAMP.FLNparams.VrnLN = 1
              [Phenology].CAMP.FLNparams.VxPLN = -1
              [Phenology].HeadEmergenceLongDayBase.FixedValue = 150
              [Phenology].HeadEmergencePpSensitivity.FixedValue = 1
          Cultivar Scepter
            Command:
              [Leaf].Phyllochron.BasePhyllochron.FixedValue = 107.602580952482
              [Leaf].PhyllochronPpSensitivity.FixedValue = 0.23032920462638
              [Phenology].CAMP.EnvData.VrnTreatTemp = 6
              [Phenology].CAMP.EnvData.VrnTreatDuration = 60
              [Phenology].CAMP.FLNparams.MinLN = 7
              [Phenology].CAMP.FLNparams.PpLN = 2
              [Phenology].CAMP.FLNparams.VrnLN = 2
              [Phenology].CAMP.FLNparams.VxPLN = -1
              [Phenology].HeadEmergenceLongDayBase.FixedValue = 170
              [Phenology].HeadEmergencePpSensitivity.FixedValue = 0
          Cultivar Cutlass
            Command:
              [Leaf].Phyllochron.BasePhyllochron.FixedValue = 95.8008034182983
              [Leaf].PhyllochronPpSensitivity.FixedValue = 0.352406544577556
              [Phenology].CAMP.FLNparams.MinLN = 7
              [Phenology].CAMP.FLNparams.PpLN = 5
              [Phenology].CAMP.FLNparams.VrnLN = 1
              [Phenology].CAMP.FLNparams.VxPLN = 2
              [Phenology].CAMP.EnvData.VrnTreatTemp = 5.8
              [Phenology].CAMP.EnvData.VrnTreatDuration = 60
              [Phenology].HeadEmergenceLongDayBase.FixedValue = 130
              [Phenology].HeadEmergencePpSensitivity.FixedValue = 2
          Cultivar Longsword
            Command:
              [Leaf].Phyllochron.BasePhyllochron.FixedValue = 100.389906627796
              [Leaf].PhyllochronPpSensitivity.FixedValue = 0.205225247925933
              [Phenology].CAMP.EnvData.VrnTreatTemp = 5.8
              [Phenology].CAMP.EnvData.VrnTreatDuration = 60
              [Phenology].CAMP.FLNparams.MinLN = 8
              [Phenology].CAMP.FLNparams.PpLN = 1
              [Phenology].CAMP.FLNparams.VrnLN = 7
              [Phenology].CAMP.FLNparams.VxPLN = 1
              [Phenology].HeadEmergenceLongDayBase.FixedValue = 110
              [Phenology].HeadEmergencePpSensitivity.FixedValue = 2
          Cultivar CSIROW007
            Command:
              [Leaf].Phyllochron.BasePhyllochron.FixedValue = 102.785879373288
              [Leaf].PhyllochronPpSensitivity.FixedValue = 0.18434106648197
              [Phenology].CAMP.FLNparams.MinLN = 7.326398633965955
              [Phenology].CAMP.FLNparams.PpLN = 0.0
              [Phenology].CAMP.FLNparams.VrnLN = 7.554300061869201
              [Phenology].CAMP.FLNparams.VxPLN = -1.6841419188674127
              [Phenology].CAMP.EnvData.VrnTreatTemp = 5.8
              [Phenology].CAMP.EnvData.VrnTreatDuration = 60
              [Phenology].HeadEmergenceLongDayBase.FixedValue = 193.0
              [Phenology].HeadEmergencePpSensitivity.FixedValue = 1.4807227520020911
          Cultivar CSIROW023
            Command:
              [Leaf].Phyllochron.BasePhyllochron.FixedValue = 102.809488116017
              [Leaf].PhyllochronPpSensitivity.FixedValue = 0.218898108718466
              [Phenology].CAMP.FLNparams.MinLN = 7.493027691870457
              [Phenology].CAMP.FLNparams.PpLN = 2.584156511279189
              [Phenology].CAMP.FLNparams.VrnLN = 2.37442378811967
              [Phenology].CAMP.FLNparams.VxPLN = 0.28214981195795374
              [Phenology].CAMP.EnvData.VrnTreatTemp = 5.8
              [Phenology].CAMP.EnvData.VrnTreatDuration = 60
              [Phenology].HeadEmergenceLongDayBase.FixedValue = 219.0
              [Phenology].HeadEmergencePpSensitivity.FixedValue = 0.0
          Cultivar CSIROW073
            Command:
              [Leaf].Phyllochron.BasePhyllochron.FixedValue = 95.6693440169749
              [Leaf].PhyllochronPpSensitivity.FixedValue = 0.226791235396558
              [Phenology].CAMP.FLNparams.MinLN = 8.790112770072708
              [Phenology].CAMP.FLNparams.PpLN = 0.7295023618186995
              [Phenology].CAMP.FLNparams.VrnLN = 4.373125182546708
              [Phenology].CAMP.FLNparams.VxPLN = 9.99670899443495
              [Phenology].CAMP.EnvData.VrnTreatTemp = 5.8
              [Phenology].CAMP.EnvData.VrnTreatDuration = 60
              [Phenology].HeadEmergenceLongDayBase.FixedValue = 50.0
              [Phenology].HeadEmergencePpSensitivity.FixedValue = 3.5452031099169528
        Folder Turkey
          Cultivar Konya
            Command:
              [Leaf].Phyllochron.BasePhyllochron.FixedValue = 100
              [Grain].Number.GrainNumber.GrainsPerGramOfStem.FixedValue = 13
              [Grain].MaximumPotentialGrainSize.FixedValue = 0.055
              [Grain].Nitrogen.Concentration.Maximum.FixedValue = 0.026
              //[Phenology].GrainFilling.Target.FixedValue = 450
              //[Stem].DMRetranslocationFactor.ReproductiveGrowth.DMRetranslocationFactor.FixedValue = 0.2
              //[Stem].DMDemands.Structural.StructuralFraction.VegetativeGrowth.Fraction.FixedValue = 0.6
              [Leaf].Canopy.GreenExtinctionCoefficient.VegetativePhase.FixedValue = 0.8
              [Phenology].CAMP.FLNparams.MinLN = 7
              [Phenology].CAMP.FLNparams.PpLN = 4.0
              [Phenology].CAMP.FLNparams.VrnLN = 4
              [Phenology].CAMP.FLNparams.VxPLN = 0.0
        Folder China
          Cultivar Keyu13
            Command:
              [Leaf].Phyllochron.BasePhyllochron.FixedValue = 100
              [Phenology].CAMP.FLNparams.MinLN = 6
              [Phenology].CAMP.FLNparams.PpLN = 2.0
              [Phenology].CAMP.FLNparams.VrnLN = 2
              [Phenology].CAMP.FLNparams.VxPLN = 0.0
        Folder USA
          Cultivar Yecora
            Command:
              [Leaf].Phyllochron.BasePhyllochron.FixedValue = 90
              [Phenology].CAMP.FLNparams.MinLN = 7
              [Phenology].CAMP.FLNparams.PpLN = 2
              [Phenology].CAMP.FLNparams.VrnLN = 2
              [Phenology].CAMP.FLNparams.VxPLN = 2
              [Phenology].HeadEmergenceLongDayBase.FixedValue = 110
              [Phenology].HeadEmergencePpSensitivity.FixedValue = 0
              [Phenology].CAMP.EnvData.VrnTreatTemp = 6
              [Phenology].CAMP.EnvData.VrnTreatDuration = 60
          Cultivar Rex
            Command:
              [Grain].Number.GrainNumber.GrainsPerGramOfStem.FixedValue = 18
              [Grain].Nitrogen.Concentration.Maximum.FixedValue = 0.02
              [Phenology].CAMP.FLNparams.MinLN = 7
              [Phenology].CAMP.FLNparams.PpLN = 4.0
              [Phenology].CAMP.FLNparams.VrnLN = 6
              [Phenology].CAMP.FLNparams.VxPLN = 0.0
          Cultivar Nugaines
            Command:
              [Grain].Number.GrainNumber.GrainsPerGramOfStem.FixedValue = 20
              [Grain].Nitrogen.Concentration.Maximum.FixedValue = 0.02
              [Phenology].CAMP.FLNparams.MinLN = 7
              [Phenology].CAMP.FLNparams.PpLN = 4.0
              [Phenology].CAMP.FLNparams.VrnLN = 6
              [Phenology].CAMP.FLNparams.VxPLN = 0.0
          Cultivar Hyslop
            Command:
              [Grain].Number.GrainNumber.GrainsPerGramOfStem.FixedValue = 22
              [Grain].Nitrogen.Concentration.Maximum.FixedValue = 0.02
              [Phenology].CAMP.FLNparams.MinLN = 7
              [Phenology].CAMP.FLNparams.PpLN = 4.0
              [Phenology].CAMP.FLNparams.VrnLN = 6
              [Phenology].CAMP.FLNparams.VxPLN = 0.0
          Cultivar Stephens
            Command:
              [Grain].Number.GrainNumber.GrainsPerGramOfStem.FixedValue = 25
              [Grain].Nitrogen.Concentration.Maximum.FixedValue = 0.02
              [Phenology].CAMP.FLNparams.MinLN = 7
              [Phenology].CAMP.FLNparams.PpLN = 4.0
              [Phenology].CAMP.FLNparams.VrnLN = 6
              [Phenology].CAMP.FLNparams.VxPLN = 0.0
          Cultivar YacoraFACE
            Command:
              [Leaf].Phyllochron.BasePhyllochron.FixedValue = 90
              [Phenology].CAMP.FLNparams.MinLN = 7
              [Phenology].CAMP.FLNparams.PpLN = 6
              //[Phenology].CAMP.FLNparams.PpLN = 2
              [Phenology].CAMP.FLNparams.VrnLN = 2
              [Phenology].CAMP.FLNparams.VxPLN = 2
              [Phenology].HeadEmergenceLongDayBase.FixedValue = 110
              [Phenology].HeadEmergencePpSensitivity.FixedValue = 0
              [Phenology].CAMP.EnvData.VrnTreatTemp = 6
              [Phenology].CAMP.EnvData.VrnTreatDuration = 60
              [Phenology].GrainFilling.Target.FixedValue = 700
        Folder Europe
          Cultivar Dekan
            Command:
              [Phenology].HeadEmergencePpSensitivity.FixedValue = 3
              [Leaf].Phyllochron.BasePhyllochron.FixedValue = 100.0
              [Leaf].Canopy.GreenExtinctionCoefficient.VegetativePhase.FixedValue = 0.8
              [Leaf].PhyllochronPpSensitivity.FixedValue = 0.6
              [Phenology].CAMP.FLNparams.MinLN = 9
              [Phenology].CAMP.FLNparams.PpLN = 3.0
              [Phenology].CAMP.FLNparams.VrnLN = 7
              [Phenology].CAMP.FLNparams.VxPLN = 0.0
          Cultivar Rosario: same as Replacements.Wheat.Cultivars.Europe.Dekan
          Cultivar Ararat: same as Replacements.Wheat.Cultivars.Europe.Dekan
          Cultivar Tybalt
            Command:
              [Leaf].Phyllochron.BasePhyllochron.FixedValue = 90.0
              [Leaf].PhyllochronPpSensitivity.FixedValue = 0.6
              [Phenology].CAMP.FLNparams.MinLN = 9.0
              [Phenology].CAMP.FLNparams.PpLN = 0.0
              [Phenology].CAMP.FLNparams.VrnLN = 0.0
              [Phenology].CAMP.FLNparams.VxPLN = 0.0
              [Phenology].HeadEmergenceLongDayBase.FixedValue = 145
              [Phenology].HeadEmergencePpSensitivity.FixedValue = 0.0
              [Phenology].CAMP.EnvData.VrnTreatTemp = 6
              [Phenology].CAMP.EnvData.VrnTreatDuration = 60
        Folder Africa
          Cultivar HAR1685
            Command:
              [Leaf].Phyllochron.BasePhyllochron.FixedValue = 100
              [Grain].Number.GrainNumber.GrainsPerGramOfStem.FixedValue = 17
              [Phenology].GrainFilling.Target.FixedValue = 350
              [Phenology].CAMP.FLNparams.MinLN = 7
              [Phenology].CAMP.FLNparams.PpLN = 3.0
              [Phenology].CAMP.FLNparams.VrnLN = 0
              [Phenology].CAMP.FLNparams.VxPLN = 0.0
        Folder Iran
          Cultivar Gorgan
            Command:
              [Leaf].Phyllochron.BasePhyllochron.FixedValue = 100
              [Phenology].CAMP.FLNparams.MinLN = 7
              [Phenology].CAMP.FLNparams.PpLN = 4.0
              [Phenology].CAMP.FLNparams.VrnLN = 0
              [Phenology].CAMP.FLNparams.VxPLN = 0.0
        Folder Just Added
          Cultivar Adv08_0008
            Command:
              [Leaf].Phyllochron.BasePhyllochron.FixedValue = 107.385378970476
              [Leaf].PhyllochronPpSensitivity.FixedValue = 0.246728222459184
              [Phenology].CAMP.EnvData.VrnTreatTemp = 5.8
              [Phenology].CAMP.EnvData.VrnTreatDuration = 60
              [Phenology].CAMP.FLNparams.MinLN = 8
              [Phenology].CAMP.FLNparams.VrnLN = 5
              [Phenology].CAMP.FLNparams.PpLN = 1
              [Phenology].CAMP.FLNparams.VxPLN = 0
              [Phenology].HeadEmergenceLongDayBase.FixedValue = 290
              [Phenology].HeadEmergencePpSensitivity.FixedValue = 0
          Cultivar Bennett
            Command:
              [Leaf].Phyllochron.BasePhyllochron.FixedValue = 106.269847259128
              [Leaf].PhyllochronPpSensitivity.FixedValue = 0.221423439420895
              [Phenology].CAMP.FLNparams.MinLN = 8
              [Phenology].CAMP.FLNparams.PpLN = 1
              [Phenology].CAMP.FLNparams.VrnLN = 6
              [Phenology].CAMP.FLNparams.VxPLN = 1
              [Phenology].CAMP.EnvData.VrnTreatTemp = 5.8
              [Phenology].CAMP.EnvData.VrnTreatDuration = 60
              [Phenology].HeadEmergenceLongDayBase.FixedValue = 230
              [Phenology].HeadEmergencePpSensitivity.FixedValue = 2
          Cultivar Scythe
            Command:
              [Leaf].Phyllochron.BasePhyllochron.FixedValue = 106.486507449716
              [Leaf].PhyllochronPpSensitivity.FixedValue = 0.22806739407445
              [Phenology].CAMP.EnvData.VrnTreatTemp = 5.8
              [Phenology].CAMP.EnvData.VrnTreatDuration = 60
              [Phenology].CAMP.FLNparams.MinLN = 6
              [Phenology].CAMP.FLNparams.PpLN = 4
              [Phenology].CAMP.FLNparams.VrnLN = 2
              [Phenology].CAMP.FLNparams.VxPLN = 2
              [Phenology].HeadEmergenceLongDayBase.FixedValue = 90
              [Phenology].HeadEmergencePpSensitivity.FixedValue = 4
          Cultivar Beaufort
            Command:
              [Leaf].Phyllochron.BasePhyllochron.FixedValue = 102.321288321408
              [Leaf].PhyllochronPpSensitivity.FixedValue = 0.254667061341894
              [Phenology].CAMP.FLNparams.MinLN = 8
              [Phenology].CAMP.FLNparams.PpLN = 3
              [Phenology].CAMP.FLNparams.VrnLN = 3
              [Phenology].CAMP.FLNparams.VxPLN = 3
              [Phenology].CAMP.EnvData.VrnTreatTemp = 6
              [Phenology].CAMP.EnvData.VrnTreatDuration = 60
              [Phenology].HeadEmergenceLongDayBase.FixedValue = 170
              [Phenology].HeadEmergencePpSensitivity.FixedValue = 0
          Cultivar Braewood
            Command:
              [Leaf].Phyllochron.BasePhyllochron.FixedValue = 92.1177406284002
              [Leaf].PhyllochronPpSensitivity.FixedValue = 0.269041869726177
              [Phenology].CAMP.FLNparams.MinLN = 8
              [Phenology].CAMP.FLNparams.PpLN = 2
              [Phenology].CAMP.FLNparams.VrnLN = 3
              [Phenology].CAMP.FLNparams.VxPLN = -3
              [Phenology].CAMP.EnvData.VrnTreatTemp = 5.8
              [Phenology].CAMP.EnvData.VrnTreatDuration = 60
              [Phenology].HeadEmergenceLongDayBase.FixedValue = 150
              [Phenology].HeadEmergencePpSensitivity.FixedValue = 2
          Cultivar Calingiri
            Command:
              [Leaf].Phyllochron.BasePhyllochron.FixedValue = 112.665706012865
              [Leaf].PhyllochronPpSensitivity.FixedValue = 0.16928704526596
              [Phenology].CAMP.FLNparams.MinLN = 7
              [Phenology].CAMP.FLNparams.PpLN = 2
              [Phenology].CAMP.FLNparams.VrnLN = 2
              [Phenology].CAMP.FLNparams.VxPLN = -1
              [Phenology].CAMP.EnvData.VrnTreatTemp = 5.8
              [Phenology].CAMP.EnvData.VrnTreatDuration = 60
              [Phenology].HeadEmergenceLongDayBase.FixedValue = 50
              [Phenology].HeadEmergencePpSensitivity.FixedValue = 4
          Cultivar Catalina
            Command:
              [Leaf].Phyllochron.BasePhyllochron.FixedValue = 93.1373432728081
              [Leaf].PhyllochronPpSensitivity.FixedValue = 0.403019826488085
              [Phenology].CAMP.FLNparams.MinLN = 7
              [Phenology].CAMP.FLNparams.PpLN = 1
              [Phenology].CAMP.FLNparams.VrnLN = 0
              [Phenology].CAMP.FLNparams.VxPLN = 0
              [Phenology].CAMP.EnvData.VrnTreatTemp = 5.8
              [Phenology].CAMP.EnvData.VrnTreatDuration = 60
              [Phenology].HeadEmergenceLongDayBase.FixedValue = 230
              [Phenology].HeadEmergencePpSensitivity.FixedValue = 1
          Cultivar Condo
            Command:
              [Leaf].Phyllochron.BasePhyllochron.FixedValue = 94.4306598856844
              [Leaf].PhyllochronPpSensitivity.FixedValue = 0.179475706868039
              [Phenology].CAMP.FLNparams.MinLN = 7
              [Phenology].CAMP.FLNparams.PpLN = 2
              [Phenology].CAMP.FLNparams.VrnLN = 3
              [Phenology].CAMP.FLNparams.VxPLN = 0
              [Phenology].CAMP.EnvData.VrnTreatTemp = 5.8
              [Phenology].CAMP.EnvData.VrnTreatDuration = 60
              [Phenology].HeadEmergenceLongDayBase.FixedValue = 190
              [Phenology].HeadEmergencePpSensitivity.FixedValue = 0
          Cultivar Crusader
            Command:
              [Leaf].Phyllochron.BasePhyllochron.FixedValue = 100.832025052954
              [Leaf].PhyllochronPpSensitivity.FixedValue = 0.199967770650946
              [Phenology].CAMP.FLNparams.MinLN = 6
              [Phenology].CAMP.FLNparams.PpLN = 5
              [Phenology].CAMP.FLNparams.VrnLN = 3
              [Phenology].CAMP.FLNparams.VxPLN = 0
              [Phenology].CAMP.EnvData.VrnTreatTemp = 6
              [Phenology].CAMP.EnvData.VrnTreatDuration = 60
              [Phenology].HeadEmergenceLongDayBase.FixedValue = 230
              [Phenology].HeadEmergencePpSensitivity.FixedValue = 0
          Cultivar CSIROW002
            Command:
              [Leaf].Phyllochron.BasePhyllochron.FixedValue = 97.1048561789481
              [Leaf].PhyllochronPpSensitivity.FixedValue = 0.330486171103675
              [Phenology].CAMP.FLNparams.MinLN = 6.658457459336699
              [Phenology].CAMP.FLNparams.PpLN = 1.9822634447408163
              [Phenology].CAMP.FLNparams.VrnLN = 2.6921517428015016
              [Phenology].CAMP.FLNparams.VxPLN = 0.012348660067480921
              [Phenology].CAMP.EnvData.VrnTreatTemp = 5.8
              [Phenology].CAMP.EnvData.VrnTreatDuration = 60
              [Phenology].HeadEmergenceLongDayBase.FixedValue = 169.0
              [Phenology].HeadEmergencePpSensitivity.FixedValue = 1.3207357239932465
          Cultivar CSIROW003
            Command:
              [Leaf].Phyllochron.BasePhyllochron.FixedValue = 97.9080402900587
              [Leaf].PhyllochronPpSensitivity.FixedValue = 0.219427317086708
              [Phenology].CAMP.FLNparams.MinLN = 5.793366821378284
              [Phenology].CAMP.FLNparams.PpLN = 0.0
              [Phenology].CAMP.FLNparams.VrnLN = 4.787965491738554
              [Phenology].CAMP.FLNparams.VxPLN = -2.8680601480674017
              [Phenology].CAMP.EnvData.VrnTreatTemp = 5.8
              [Phenology].CAMP.EnvData.VrnTreatDuration = 60
              [Phenology].HeadEmergenceLongDayBase.FixedValue = 145.0
              [Phenology].HeadEmergencePpSensitivity.FixedValue = 2.658836674667949
          Cultivar CSIROW005
            Command:
              [Leaf].Phyllochron.BasePhyllochron.FixedValue = 100.324132823901
              [Leaf].PhyllochronPpSensitivity.FixedValue = 0.16547784419225
              [Phenology].CAMP.FLNparams.MinLN = 5.759207332491177
              [Phenology].CAMP.FLNparams.PpLN = 2.4191796388445765
              [Phenology].CAMP.FLNparams.VrnLN = 3.0756722363145896
              [Phenology].CAMP.FLNparams.VxPLN = -0.2627994305564112
              [Phenology].CAMP.EnvData.VrnTreatTemp = 5.8
              [Phenology].CAMP.EnvData.VrnTreatDuration = 60
              [Phenology].HeadEmergenceLongDayBase.FixedValue = 369.0
              [Phenology].HeadEmergencePpSensitivity.FixedValue = 0.0
          Cultivar CSIROW011
            Command:
              [Leaf].Phyllochron.BasePhyllochron.FixedValue = 90.109466190558
              [Leaf].PhyllochronPpSensitivity.FixedValue = 0.349636600984782
              [Phenology].CAMP.FLNparams.MinLN = 6.0
              [Phenology].CAMP.FLNparams.PpLN = 1.0
              [Phenology].CAMP.FLNparams.VrnLN = 1.0
              [Phenology].CAMP.FLNparams.VxPLN = -1.0
              [Phenology].CAMP.EnvData.VrnTreatTemp = 5.8
              [Phenology].CAMP.EnvData.VrnTreatDuration = 60
              [Phenology].HeadEmergenceLongDayBase.FixedValue = 200.0
              [Phenology].HeadEmergencePpSensitivity.FixedValue = 2.0
          Cultivar CSIROW018
            Command:
              [Leaf].Phyllochron.BasePhyllochron.FixedValue = 100.218976921681
              [Leaf].PhyllochronPpSensitivity.FixedValue = 0.305627551956816
              [Phenology].CAMP.FLNparams.MinLN = 5.0
              [Phenology].CAMP.FLNparams.PpLN = 2.0037887506286465
              [Phenology].CAMP.FLNparams.VrnLN = 3.5823533971961172
              [Phenology].CAMP.FLNparams.VxPLN = -2.0415045806529806
              [Phenology].CAMP.EnvData.VrnTreatTemp = 5.8
              [Phenology].CAMP.EnvData.VrnTreatDuration = 60
              [Phenology].HeadEmergenceLongDayBase.FixedValue = 371.0
              [Phenology].HeadEmergencePpSensitivity.FixedValue = 0.94606616045257
          Cultivar CSIROW021
            Command:
              [Leaf].Phyllochron.BasePhyllochron.FixedValue = 100.85898282236
              [Leaf].PhyllochronPpSensitivity.FixedValue = 0.228645304743823
              [Phenology].CAMP.FLNparams.MinLN = 8.0
              [Phenology].CAMP.FLNparams.PpLN = 1.333333333333334
              [Phenology].CAMP.FLNparams.VrnLN = 6.166666666666666
              [Phenology].CAMP.FLNparams.VxPLN = -0.8333333333333357
              [Phenology].CAMP.EnvData.VrnTreatTemp = 5.8
              [Phenology].CAMP.EnvData.VrnTreatDuration = 60
              [Phenology].HeadEmergenceLongDayBase.FixedValue = 200.0
              [Phenology].HeadEmergencePpSensitivity.FixedValue = 2.0
          Cultivar CSIROW027
            Command:
              [Leaf].Phyllochron.BasePhyllochron.FixedValue = 91.9686702262851
              [Leaf].PhyllochronPpSensitivity.FixedValue = 0.298865609355012
              [Phenology].CAMP.FLNparams.MinLN = 5.666666666666667
              [Phenology].CAMP.FLNparams.PpLN = 1.0
              [Phenology].CAMP.FLNparams.VrnLN = 1.0
              [Phenology].CAMP.FLNparams.VxPLN = -0.666666666666667
              [Phenology].CAMP.EnvData.VrnTreatTemp = 5.8
              [Phenology].CAMP.EnvData.VrnTreatDuration = 60
              [Phenology].HeadEmergenceLongDayBase.FixedValue = 200.0
              [Phenology].HeadEmergencePpSensitivity.FixedValue = 2.0
          Cultivar CSIROW029
            Command:
              [Leaf].Phyllochron.BasePhyllochron.FixedValue = 98.5813007346922
              [Leaf].PhyllochronPpSensitivity.FixedValue = 0.228833970802351
              [Phenology].CAMP.FLNparams.MinLN = 5.666666666666667
              [Phenology].CAMP.FLNparams.PpLN = 0.33333333333333304
              [Phenology].CAMP.FLNparams.VrnLN = 1.0
              [Phenology].CAMP.FLNparams.VxPLN = -0.666666666666667
              [Phenology].CAMP.EnvData.VrnTreatTemp = 5.8
              [Phenology].CAMP.EnvData.VrnTreatDuration = 60
              [Phenology].HeadEmergenceLongDayBase.FixedValue = 200.0
              [Phenology].HeadEmergencePpSensitivity.FixedValue = 2.0
          Cultivar CSIROW077
            Command:
              [Leaf].Phyllochron.BasePhyllochron.FixedValue = 89.0413135981221
              [Leaf].PhyllochronPpSensitivity.FixedValue = 0.320389882541901
              [Phenology].CAMP.FLNparams.MinLN = 5.0
              [Phenology].CAMP.FLNparams.PpLN = 0.7789007198658495
              [Phenology].CAMP.FLNparams.VrnLN = 0.9296483932829428
              [Phenology].CAMP.FLNparams.VxPLN = -0.4548378579547272
              [Phenology].CAMP.EnvData.VrnTreatTemp = 5.8
              [Phenology].CAMP.EnvData.VrnTreatDuration = 60
              [Phenology].HeadEmergenceLongDayBase.FixedValue = 201.0
              [Phenology].HeadEmergencePpSensitivity.FixedValue = 1.988848467332372
          Cultivar CSIROW087
            Command:
              [Leaf].Phyllochron.BasePhyllochron.FixedValue = 95.8407854192227
              [Leaf].PhyllochronPpSensitivity.FixedValue = 0.379363409943707
              [Phenology].CAMP.FLNparams.MinLN = 6.088762673975456
              [Phenology].CAMP.FLNparams.PpLN = 1.3098995454756082
              [Phenology].CAMP.FLNparams.VrnLN = 1.7408533665776218
              [Phenology].CAMP.FLNparams.VxPLN = -1.377321640166457
              [Phenology].CAMP.EnvData.VrnTreatTemp = 5.8
              [Phenology].CAMP.EnvData.VrnTreatDuration = 60
              [Phenology].HeadEmergenceLongDayBase.FixedValue = 214.0
              [Phenology].HeadEmergencePpSensitivity.FixedValue = 2.2429157431718143
          Cultivar CSIROW102
            Command:
              [Leaf].Phyllochron.BasePhyllochron.FixedValue = 88.798911538629
              [Leaf].PhyllochronPpSensitivity.FixedValue = 0.366324783260731
              [Phenology].CAMP.FLNparams.MinLN = 5.431828108909145
              [Phenology].CAMP.FLNparams.PpLN = 0.9159899681289015
              [Phenology].CAMP.FLNparams.VrnLN = 3.8766835434634936
              [Phenology].CAMP.FLNparams.VxPLN = -2.3613865675565133
              [Phenology].CAMP.EnvData.VrnTreatTemp = 5.8
              [Phenology].CAMP.EnvData.VrnTreatDuration = 60
              [Phenology].HeadEmergenceLongDayBase.FixedValue = 211.0
              [Phenology].HeadEmergencePpSensitivity.FixedValue = 1.796407285473646
          Cultivar CSIROW105
            Command:
              [Leaf].Phyllochron.BasePhyllochron.FixedValue = 93.3581645003809
              [Leaf].PhyllochronPpSensitivity.FixedValue = 0.233916879031932
              [Phenology].CAMP.FLNparams.MinLN = 5.0
              [Phenology].CAMP.FLNparams.PpLN = 1.0
              [Phenology].CAMP.FLNparams.VrnLN = 1.0
              [Phenology].CAMP.FLNparams.VxPLN = 0.0
              [Phenology].CAMP.EnvData.VrnTreatTemp = 5.8
              [Phenology].CAMP.EnvData.VrnTreatDuration = 60
              [Phenology].HeadEmergenceLongDayBase.FixedValue = 200.0
              [Phenology].HeadEmergencePpSensitivity.FixedValue = 2.0
          Cultivar Hume
            Command:
              [Leaf].Phyllochron.BasePhyllochron.FixedValue = 86.6877539944917
              [Leaf].PhyllochronPpSensitivity.FixedValue = 0.340327517277635
              [Phenology].CAMP.FLNparams.MinLN = 7
              [Phenology].CAMP.FLNparams.PpLN = 3
              [Phenology].CAMP.FLNparams.VrnLN = 1
              [Phenology].CAMP.FLNparams.VxPLN = -1
              [Phenology].CAMP.EnvData.VrnTreatTemp = 5.8
              [Phenology].CAMP.EnvData.VrnTreatDuration = 60
              [Phenology].HeadEmergenceLongDayBase.FixedValue = 190
              [Phenology].HeadEmergencePpSensitivity.FixedValue = 1
          Cultivar Ellison
            Command:
              [Leaf].Phyllochron.BasePhyllochron.FixedValue = 110.512287746208
              [Leaf].PhyllochronPpSensitivity.FixedValue = 0.282156394448543
              [Phenology].CAMP.FLNparams.MinLN = 6
              [Phenology].CAMP.FLNparams.PpLN = 4
              [Phenology].CAMP.FLNparams.VrnLN = 1
              [Phenology].CAMP.FLNparams.VxPLN = 2
              [Phenology].CAMP.EnvData.VrnTreatTemp = 5.8
              [Phenology].CAMP.EnvData.VrnTreatDuration = 60
              [Phenology].HeadEmergenceLongDayBase.FixedValue = 130
              [Phenology].HeadEmergencePpSensitivity.FixedValue = 4
          Cultivar Emu_Rock
            Command:
              [Leaf].Phyllochron.BasePhyllochron.FixedValue = 94.7698873180009
              [Leaf].PhyllochronPpSensitivity.FixedValue = 0.358007951256312
              [Phenology].CAMP.FLNparams.MinLN = 6
              [Phenology].CAMP.FLNparams.PpLN = 1
              [Phenology].CAMP.FLNparams.VrnLN = 1
              [Phenology].CAMP.FLNparams.VxPLN = -1
              [Phenology].CAMP.EnvData.VrnTreatTemp = 5.8
              [Phenology].CAMP.EnvData.VrnTreatDuration = 60
              [Phenology].HeadEmergenceLongDayBase.FixedValue = 183.0
              [Phenology].HeadEmergencePpSensitivity.FixedValue = 1.7962741039794823
          Cultivar Forrest
            Command:
              [Leaf].Phyllochron.BasePhyllochron.FixedValue = 99.8910902837222
              [Leaf].PhyllochronPpSensitivity.FixedValue = 0.417874283738016
              [Phenology].CAMP.FLNparams.MinLN = 6
              [Phenology].CAMP.FLNparams.PpLN = 5
              [Phenology].CAMP.FLNparams.VrnLN = 2
              [Phenology].CAMP.FLNparams.VxPLN = 1
              [Phenology].CAMP.EnvData.VrnTreatTemp = 5.8
              [Phenology].CAMP.EnvData.VrnTreatDuration = 60
              [Phenology].HeadEmergenceLongDayBase.FixedValue = 370
              [Phenology].HeadEmergencePpSensitivity.FixedValue = 1
          Cultivar Grenade
            Command:
              [Leaf].Phyllochron.BasePhyllochron.FixedValue = 96.8120116390919
              [Leaf].PhyllochronPpSensitivity.FixedValue = 0.3478103654812
              [Phenology].CAMP.FLNparams.MinLN = 7
              [Phenology].CAMP.FLNparams.PpLN = 3
              [Phenology].CAMP.FLNparams.VrnLN = 1
              [Phenology].CAMP.FLNparams.VxPLN = 0
              [Phenology].CAMP.EnvData.VrnTreatTemp = 5.8
              [Phenology].CAMP.EnvData.VrnTreatDuration = 60
              [Phenology].HeadEmergenceLongDayBase.FixedValue = 230
              [Phenology].HeadEmergencePpSensitivity.FixedValue = 0
          Cultivar Kittyhawk
            Command:
              [Leaf].Phyllochron.BasePhyllochron.FixedValue = 93.7220123291132
              [Leaf].PhyllochronPpSensitivity.FixedValue = 0.212225680614483
              [Phenology].CAMP.FLNparams.MinLN = 10
              [Phenology].CAMP.FLNparams.PpLN = 2
              [Phenology].CAMP.FLNparams.VrnLN = 8
              [Phenology].CAMP.FLNparams.VxPLN = -1
              [Phenology].CAMP.EnvData.VrnTreatTemp = 5.8
              [Phenology].CAMP.EnvData.VrnTreatDuration = 60
              [Phenology].HeadEmergenceLongDayBase.FixedValue = 50
              [Phenology].HeadEmergencePpSensitivity.FixedValue = 4
          Cultivar Lancer
            Command:
              [Leaf].Phyllochron.BasePhyllochron.FixedValue = 85.6623042725763
              [Leaf].PhyllochronPpSensitivity.FixedValue = 0.324980109776406
              [Phenology].CAMP.FLNparams.MinLN = 8
              [Phenology].CAMP.FLNparams.PpLN = 4
              [Phenology].CAMP.FLNparams.VrnLN = 2
              [Phenology].CAMP.FLNparams.VxPLN = -2
              [Phenology].CAMP.EnvData.VrnTreatTemp = 5.8
              [Phenology].CAMP.EnvData.VrnTreatDuration = 60
              [Phenology].HeadEmergenceLongDayBase.FixedValue = 150
              [Phenology].HeadEmergencePpSensitivity.FixedValue = 1
          Cultivar Nighthawk
            Command:
              [Leaf].Phyllochron.BasePhyllochron.FixedValue = 97.5749140549815
              [Leaf].PhyllochronPpSensitivity.FixedValue = 0.234188946138953
              [Phenology].CAMP.EnvData.VrnTreatTemp = 5.8
              [Phenology].CAMP.EnvData.VrnTreatDuration = 60
              [Phenology].CAMP.FLNparams.MinLN = 8
              [Phenology].CAMP.FLNparams.VrnLN = 4
              [Phenology].CAMP.FLNparams.PpLN = 2
              [Phenology].CAMP.FLNparams.VxPLN = -1
              [Phenology].HeadEmergenceLongDayBase.FixedValue = 70
              [Phenology].HeadEmergencePpSensitivity.FixedValue = 8
          Cultivar Magenta
            Command:
              [Leaf].Phyllochron.BasePhyllochron.FixedValue = 113.040956826707
              [Leaf].PhyllochronPpSensitivity.FixedValue = 0.138444741551648
              [Phenology].CAMP.EnvData.VrnTreatTemp = 5.8
              [Phenology].CAMP.EnvData.VrnTreatDuration = 60
              [Phenology].CAMP.FLNparams.MinLN = 7
              [Phenology].CAMP.FLNparams.PpLN = 3
              [Phenology].CAMP.FLNparams.VrnLN = 2
              [Phenology].CAMP.FLNparams.VxPLN = 1
              [Phenology].HeadEmergenceLongDayBase.FixedValue = 130
              [Phenology].HeadEmergencePpSensitivity.FixedValue = 0
          Cultivar Manning
            Command:
              [Leaf].Phyllochron.BasePhyllochron.FixedValue = 104.816433323058
              [Leaf].PhyllochronPpSensitivity.FixedValue = 0.253254338348875
              [Phenology].CAMP.EnvData.VrnTreatTemp = 6
              [Phenology].CAMP.EnvData.VrnTreatDuration = 60
              [Phenology].CAMP.FLNparams.MinLN = 9
              [Phenology].CAMP.FLNparams.PpLN = 6
              [Phenology].CAMP.FLNparams.VrnLN = 8
              [Phenology].CAMP.FLNparams.VxPLN = 0
              [Phenology].HeadEmergenceLongDayBase.FixedValue = 230
              [Phenology].HeadEmergencePpSensitivity.FixedValue = 0
          Cultivar Merinda
            Command:
              [Leaf].Phyllochron.BasePhyllochron.FixedValue = 98.5779272570712
              [Leaf].PhyllochronPpSensitivity.FixedValue = 0.347160824156039
              [Phenology].CAMP.EnvData.VrnTreatTemp = 5.8
              [Phenology].CAMP.EnvData.VrnTreatDuration = 60
              [Phenology].CAMP.FLNparams.MinLN = 7
              [Phenology].CAMP.FLNparams.PpLN = 1
              [Phenology].CAMP.FLNparams.VrnLN = 1
              [Phenology].CAMP.FLNparams.VxPLN = -1
              [Phenology].HeadEmergenceLongDayBase.FixedValue = 210
              [Phenology].HeadEmergencePpSensitivity.FixedValue = 1
          Cultivar Mitch
            Command:
              [Leaf].Phyllochron.BasePhyllochron.FixedValue = 90.7949886258521
              [Leaf].PhyllochronPpSensitivity.FixedValue = 0.313387918745248
              [Phenology].CAMP.EnvData.VrnTreatTemp = 5.8
              [Phenology].CAMP.EnvData.VrnTreatDuration = 60
              [Phenology].CAMP.FLNparams.MinLN = 8
              [Phenology].CAMP.FLNparams.PpLN = 2
              [Phenology].CAMP.FLNparams.VrnLN = 3
              [Phenology].CAMP.FLNparams.VxPLN = -2
              [Phenology].HeadEmergenceLongDayBase.FixedValue = 130
              [Phenology].HeadEmergencePpSensitivity.FixedValue = 1
          Cultivar Ouyen
            Command:
              [Leaf].Phyllochron.BasePhyllochron.FixedValue = 84.1472430387947
              [Leaf].PhyllochronPpSensitivity.FixedValue = 0.332456383177313
              [Phenology].CAMP.EnvData.VrnTreatTemp = 5.8
              [Phenology].CAMP.EnvData.VrnTreatDuration = 60
              [Phenology].CAMP.FLNparams.MinLN = 8
              [Phenology].CAMP.FLNparams.PpLN = 2
              [Phenology].CAMP.FLNparams.VrnLN = 2
              [Phenology].CAMP.FLNparams.VxPLN = -2
              [Phenology].HeadEmergenceLongDayBase.FixedValue = 190
              [Phenology].HeadEmergencePpSensitivity.FixedValue = 1
          Cultivar Peake
            Command:
              [Leaf].Phyllochron.BasePhyllochron.FixedValue = 87.7433052533018
              [Leaf].PhyllochronPpSensitivity.FixedValue = 0.44431162843274
              [Phenology].CAMP.EnvData.VrnTreatTemp = 5.8
              [Phenology].CAMP.EnvData.VrnTreatDuration = 60
              [Phenology].CAMP.FLNparams.MinLN = 7
              [Phenology].CAMP.FLNparams.PpLN = 2
              [Phenology].CAMP.FLNparams.VrnLN = 0
              [Phenology].CAMP.FLNparams.VxPLN = 0
              [Phenology].HeadEmergenceLongDayBase.FixedValue = 190
              [Phenology].HeadEmergencePpSensitivity.FixedValue = 1
          Cultivar Revenue
            Command:
              [Leaf].Phyllochron.BasePhyllochron.FixedValue = 113.782112306367
              [Leaf].PhyllochronPpSensitivity.FixedValue = 0.155926785053575
              [Phenology].CAMP.EnvData.VrnTreatTemp = 5.8
              [Phenology].CAMP.EnvData.VrnTreatDuration = 60
              [Phenology].CAMP.FLNparams.MinLN = 8
              [Phenology].CAMP.FLNparams.PpLN = 2
              [Phenology].CAMP.FLNparams.VrnLN = 7
              [Phenology].CAMP.FLNparams.VxPLN = 2
              [Phenology].HeadEmergenceLongDayBase.FixedValue = 150
              [Phenology].HeadEmergencePpSensitivity.FixedValue = 4
          Cultivar Rosella
            Command:
              [Leaf].Phyllochron.BasePhyllochron.FixedValue = 96.7111881914136
              [Leaf].PhyllochronPpSensitivity.FixedValue = 0.209478791477046
              [Phenology].CAMP.EnvData.VrnTreatTemp = 5.8
              [Phenology].CAMP.EnvData.VrnTreatDuration = 60
              [Phenology].CAMP.FLNparams.MinLN = 7
              [Phenology].CAMP.FLNparams.PpLN = 5
              [Phenology].CAMP.FLNparams.VrnLN = 8
              [Phenology].CAMP.FLNparams.VxPLN = 5
              [Phenology].HeadEmergenceLongDayBase.FixedValue = 90
              [Phenology].HeadEmergencePpSensitivity.FixedValue = 5
          Cultivar Scout
            Command:
              [Leaf].Phyllochron.BasePhyllochron.FixedValue = 102.794916048683
              [Leaf].PhyllochronPpSensitivity.FixedValue = 0.192036818570067
              [Phenology].CAMP.EnvData.VrnTreatTemp = 6
              [Phenology].CAMP.EnvData.VrnTreatDuration = 60
              [Phenology].CAMP.FLNparams.MinLN = 7
              [Phenology].CAMP.FLNparams.PpLN = 2
              [Phenology].CAMP.FLNparams.VrnLN = 4
              [Phenology].CAMP.FLNparams.VxPLN = -2
              [Phenology].HeadEmergenceLongDayBase.FixedValue = 170
              [Phenology].HeadEmergencePpSensitivity.FixedValue = 0
          Cultivar Spitfire
            Command:
              [Leaf].Phyllochron.BasePhyllochron.FixedValue = 87.8426291924597
              [Leaf].PhyllochronPpSensitivity.FixedValue = 0.226170449889058
              [Phenology].CAMP.EnvData.VrnTreatTemp = 5.8
              [Phenology].CAMP.EnvData.VrnTreatDuration = 60
              [Phenology].CAMP.FLNparams.MinLN = 8
              [Phenology].CAMP.FLNparams.PpLN = 1
              [Phenology].CAMP.FLNparams.VrnLN = 3
              [Phenology].CAMP.FLNparams.VxPLN = -3
              [Phenology].HeadEmergenceLongDayBase.FixedValue = 130
              [Phenology].HeadEmergencePpSensitivity.FixedValue = 1
            Alias Drysdale
          Cultivar Strzelecki
            Command:
              [Leaf].Phyllochron.BasePhyllochron.FixedValue = 96.5633530493006
              [Leaf].PhyllochronPpSensitivity.FixedValue = 0.245575047413057
              [Phenology].CAMP.EnvData.VrnTreatTemp = 5.8
              [Phenology].CAMP.EnvData.VrnTreatDuration = 60
              [Phenology].CAMP.FLNparams.MinLN = 7
              [Phenology].CAMP.FLNparams.PpLN = 3
              [Phenology].CAMP.FLNparams.VrnLN = 3
              [Phenology].CAMP.FLNparams.VxPLN = 0
              [Phenology].HeadEmergenceLongDayBase.FixedValue = 110
              [Phenology].HeadEmergencePpSensitivity.FixedValue = 3
          Cultivar Sunbee
            Command:
              [Leaf].Phyllochron.BasePhyllochron.FixedValue = 97.2940011008473
              [Leaf].PhyllochronPpSensitivity.FixedValue = 0.185142054210791
              [Phenology].CAMP.EnvData.VrnTreatTemp = 5.8
              [Phenology].CAMP.EnvData.VrnTreatDuration = 60
              [Phenology].CAMP.FLNparams.MinLN = 7
              [Phenology].CAMP.FLNparams.PpLN = 1
              [Phenology].CAMP.FLNparams.VrnLN = 3
              [Phenology].CAMP.FLNparams.VxPLN = -3
              [Phenology].HeadEmergenceLongDayBase.FixedValue = 370
              [Phenology].HeadEmergencePpSensitivity.FixedValue = 0
          Cultivar Sunlamb
            Command:
              [Leaf].Phyllochron.BasePhyllochron.FixedValue = 100.382265746297
              [Leaf].PhyllochronPpSensitivity.FixedValue = 0.154235967458266
              [Phenology].CAMP.EnvData.VrnTreatTemp = 5.8
              [Phenology].CAMP.EnvData.VrnTreatDuration = 60
              [Phenology].CAMP.FLNparams.MinLN = 7
              [Phenology].CAMP.FLNparams.PpLN = 5
              [Phenology].CAMP.FLNparams.VrnLN = 10
              [Phenology].CAMP.FLNparams.VxPLN = -5
              [Phenology].HeadEmergenceLongDayBase.FixedValue = 150
              [Phenology].HeadEmergencePpSensitivity.FixedValue = 4
          Cultivar Sunstate
            Command:
              [Leaf].Phyllochron.BasePhyllochron.FixedValue = 95.0758950229683
              [Leaf].PhyllochronPpSensitivity.FixedValue = 0.225986092694718
              [Phenology].CAMP.EnvData.VrnTreatTemp = 6
              [Phenology].CAMP.EnvData.VrnTreatDuration = 60
              [Phenology].CAMP.FLNparams.MinLN = 7
              [Phenology].CAMP.FLNparams.PpLN = 1
              [Phenology].CAMP.FLNparams.VrnLN = 4
              [Phenology].CAMP.FLNparams.VxPLN = -4
              [Phenology].HeadEmergenceLongDayBase.FixedValue = 190
              [Phenology].HeadEmergencePpSensitivity.FixedValue = 1
          Cultivar Suntop
            Command:
              [Leaf].Phyllochron.BasePhyllochron.FixedValue = 93.1036394598307
              [Leaf].PhyllochronPpSensitivity.FixedValue = 0.335203758711104
              [Phenology].CAMP.EnvData.VrnTreatTemp = 5.8
              [Phenology].CAMP.EnvData.VrnTreatDuration = 60
              [Phenology].CAMP.FLNparams.MinLN = 8
              [Phenology].CAMP.FLNparams.PpLN = 2
              [Phenology].CAMP.FLNparams.VrnLN = 0
              [Phenology].CAMP.FLNparams.VxPLN = 0
              [Phenology].HeadEmergenceLongDayBase.FixedValue = 210
              [Phenology].HeadEmergencePpSensitivity.FixedValue = 0
          Cultivar Trojan
            Command:
              [Leaf].Phyllochron.BasePhyllochron.FixedValue = 99.1351271229079
              [Leaf].PhyllochronPpSensitivity.FixedValue = 0.35511766231399
              [Phenology].CAMP.EnvData.VrnTreatTemp = 6
              [Phenology].CAMP.EnvData.VrnTreatDuration = 60
              [Phenology].CAMP.FLNparams.MinLN = 7
              [Phenology].CAMP.FLNparams.PpLN = 5
              [Phenology].CAMP.FLNparams.VrnLN = 2
              [Phenology].CAMP.FLNparams.VxPLN = 1
              [Phenology].HeadEmergenceLongDayBase.FixedValue = 50
              [Phenology].HeadEmergencePpSensitivity.FixedValue = 4
          Cultivar Illabo
            Command:
              [Leaf].Phyllochron.BasePhyllochron.FixedValue = 100.550798402656
              [Leaf].PhyllochronPpSensitivity.FixedValue = 0.238435422022958
              [Phenology].CAMP.EnvData.VrnTreatTemp = 5.8
              [Phenology].CAMP.EnvData.VrnTreatDuration = 60
              [Phenology].CAMP.FLNparams.MinLN = 8
              [Phenology].CAMP.FLNparams.VrnLN = 7
              [Phenology].CAMP.FLNparams.PpLN = 1
              [Phenology].CAMP.FLNparams.VxPLN = -1
              [Phenology].HeadEmergenceLongDayBase.FixedValue = 110
              [Phenology].HeadEmergencePpSensitivity.FixedValue = 0
          Cultivar Whistler
            Command:
              [Leaf].Phyllochron.BasePhyllochron.FixedValue = 101.152462224521
              [Leaf].PhyllochronPpSensitivity.FixedValue = 0.160519169483945
              [Phenology].CAMP.FLNparams.MinLN = 8
              [Phenology].CAMP.FLNparams.PpLN = 2
              [Phenology].CAMP.FLNparams.VrnLN = 8
              [Phenology].CAMP.FLNparams.VxPLN = -2
              [Phenology].CAMP.EnvData.VrnTreatTemp = 5.8
              [Phenology].CAMP.EnvData.VrnTreatDuration = 60
              [Phenology].HeadEmergenceLongDayBase.FixedValue = 150
              [Phenology].HeadEmergencePpSensitivity.FixedValue = 1
          Cultivar Suneca
            Command:
              [Phenology].CAMP.FLNparams.MinLN = 5
              [Phenology].CAMP.FLNparams.PpLN = 6
              [Phenology].CAMP.FLNparams.VrnLN = 3
              [Phenology].CAMP.FLNparams.VxPLN = 3
              [Phenology].HeadEmergenceLongDayBase.FixedValue = 190
              [Phenology].HeadEmergencePpSensitivity.FixedValue = 2
          Cultivar Cesario: same as Replacements.Wheat.Cultivars.Just Added.Manning
          Cultivar Stockade: same as Replacements.Wheat.Cultivars.Just Added.Manning
          Cultivar Sorrial
            Command:
              [Phenology].CAMP.FLNparams.MinLN = 12
              [Phenology].CAMP.FLNparams.PpLN = 0
              [Phenology].CAMP.FLNparams.VrnLN = 0
              [Phenology].CAMP.FLNparams.VxPLN = 0
              //[Phenology].Phyllochron.BasePhyllochron.FixedValue = 80
              //[Leaf].CohortParameters.MaxArea.AreaLargestLeaves.FixedValue = 1600
              //[Grain].MaximumPotentialGrainSize.FixedValue = 0.051
              //[Grain].NumberFunction.GrainNumber.GrainsPerGramOfStem.FixedValue = 35
              //[Leaf].ExtinctionCoeff.VegetativePhase.FixedValue = 0.5
              //[Structure].BranchingRate.PotentialBranchingRate.Vegetative.PotentialBranchingRate.XYPairs.Y = 0,0,0,0,4,7,12,20
              //[Grain].MaximumNConc.FixedValue = 0.025
              //[Grain].MaxNConcDailyGrowth.FixedValue = 0.025
              //[Leaf].ExtinctionCoeff.DevelopmentFactor.XYPairs.Y = 1,1,1,1,1.4
              //[Leaf].CohortParameters.MinimumNConc.XYPairs.Y = 0.01,0.008, 0.008,0.008, 0.008, 0.008
              //[Stem].MinimumNConc.FixedValue = 0.006
              //[Spike].DMRetranslocationFactor.ReproductiveGrowth.DMRetranslocationFactor.FixedValue = 0.05
    Manager SetCropParams
```csharp
using System;
using Models.Core;
using Models.Interfaces;
using Models.PMF;
using APSIM.Shared.Utilities;

namespace Models
{
    [Serializable]
    public class Script : Model
    {
        [Link] Zone zone;
        [EventSubscribe("Sowing")]
        private void OnSowing(object sender, EventArgs e)
        {
            object Pval = 0;
            Pval = 0.5912695606044487;
            zone.Set("[Leaf].Canopy.GreenAreaIndex.SenescenceStresses.ShadingEffect.XYPairs.X[2]", Pval);
            Pval = 0.9744508026705297;
            zone.Set("[Leaf].Canopy.GreenAreaIndex.SenescenceStresses.ShadingEffect.XYPairs.X[3]", Pval);
            Pval = 0.9999780124771328;
            zone.Set("[Leaf].Canopy.GreenAreaIndex.SenescenceStresses.ShadingEffect.XYPairs.X[4]", Pval);
            Pval = 0.3267285923368672;
            zone.Set("[Leaf].SenescenceRate.Vegetative.Total.TillerDeath.RelativeSizeOfDyingTillers.FixedValue", Pval);
            Pval = 0.006825415895610151;
            zone.Set("[Leaf].SenescenceRate.Vegetative.Total.LeafDeath.MaxRate.FixedValue", Pval);
            Pval = 0.021347004281443264;
            zone.Set("[Wheat].StemNumber.DeadTillers.Attrition.MaxRate.FixedValue", Pval);
            Pval = 0.21090288678566643;
            zone.Set("[Wheat].TilleringRate.Vegetative.StressedRate.Stresses.CoverEffect.XYPairs.X[2]", Pval);
            Pval = 0.301361852154739;
            zone.Set("[Wheat].TilleringRate.Vegetative.StressedRate.Stresses.CoverEffect.XYPairs.X[3]", Pval);
        }       
    }
}
```
  DataStore
    ExcelInput ExcelMultiInput: SheetNames=[Observed, MaxLeafArea]
      FileNames=[Observed.xlsx, LaTrobeCE_Obs.xlsx, LincolnCE_Obs.xlsx, PalmerstonNorthCE_Obs.xlsx, Gatton2014_2016.xlsx, 2020Results.xlsx, PalmerstonNorth1989.xlsx, Obs_APSIMX_NPIField2019_Wheat.xlsx, NPIValidation.xlsx, Obs_APSIMX_NPIField2020_Wheat.xlsx, Lincoln2021.xlsx, Lincoln2023.xlsx]
    PredictedObserved DailyObsPred: PredictedTableName=DailyReport; ObservedTableName=Observed; FieldNameUsedForMatch=SimulationName; FieldName2UsedForMatch=Clock.Today; AllColumns=false
    PredictedObserved HarvestObsPred: PredictedTableName=HarvestReport; ObservedTableName=Observed; FieldNameUsedForMatch=SimulationName; FieldName2UsedForMatch=Wheat.Phenology.CurrentStageName; AllColumns=false
    PredictedObserved MaxLeafAreaObsPred: PredictedTableName=MaxLeafAreaReport; ObservedTableName=MaxLeafArea; FieldNameUsedForMatch=SimulationName; FieldName2UsedForMatch=MaxLeafAreaCalc.Script.LeafPosition; AllColumns=false
  Folder Validation
    Memo
      A test dataset has been developed to test the APSIM Wheat model for a range of environmental (soil and climate) conditions, management options (sowing dates, populations, nitrogen rates, row spacing, irrigation), genetic backgrounds (different regions, cultivar types) and for special considerations such as crop damage.  These tests have been grouped into various geographical regions to allow the user to evaluate the suitability of the model for their particular region of interest.  Graphs of model performance are provided for yield, biomass production, canopy development, phenological development, water and nitrogen uptake, and grain yield components.
    Folder Combined Results
      Memo Combined Results
        Simulation results for the combined datasets from the various countries are shown in the following graphs.  The model is able to adequately capture the influence of growing conditions (soil, climate) and management (population, Nitrogen, irrigation, sowing date).
    Folder SE Queensland
      Memo
        South-eastern Queensland has a warm subtropical environment.  Daytime temperatures are moderate due to the relatively low latitudes for wheat growing in Australia, but inland continental conditions can provide cool nights with occaisional frosts.  Many of the datasets used here have been published as part of previous APSIM Wheat model tests.  Further datasets have been added to provide information on phenological development of modern cultivars.
      Experiment APS26
        Memo
          This trial was conducted at Gatton in 1995 using the local variety, Hartog.  It consisted of 4 Nitrogen rates (0,40,80,160) with two irrigation rates (minimal amount for establishment, fully irrigated).  Yields ranged from 1.4 t/ha to 5.4 t/ha.
        Factors
          Permutation
            Factor NRate: Specification=[ApplyFertiliser].Script.Amount=0,40,80,160
            Factor Water: Specification=[IrrigationSchedule]
              Operations Wet
                1995-05-31  [Irrigation].Apply(amount:31);
                1995-06-01  [Irrigation].Apply(amount:13);
                1995-06-02  [Irrigation].Apply(amount:26);
                1995-06-05  [Irrigation].Apply(amount:26);
                1995-06-06  [Irrigation].Apply(amount:26);
                1995-06-07  [Irrigation].Apply(amount:26);
                1995-06-08  [Irrigation].Apply(amount:26);
                1995-06-15  [Wheat].Sow(population:120, cultivar:"Hartog", depth:40, rowSpacing:250);
                1995-07-05  [Irrigation].Apply(amount:26);
                1995-07-21  [Irrigation].Apply(amount:14);
                1995-08-01  [Irrigation].Apply(amount:28);
                1995-08-11  [Irrigation].Apply(amount:30);
                1995-08-25  [Irrigation].Apply(amount:15);
                1995-08-31  [Irrigation].Apply(amount:14);
                1995-09-04  [Irrigation].Apply(amount:15);
                1995-09-15  [Irrigation].Apply(amount:25);
                1995-09-22  [Irrigation].Apply(amount:20);
                1995-10-02  [Irrigation].Apply(amount:11);
              Operations Dry
                1995-06-15  [Wheat].Sow(population:120, cultivar:"Hartog", depth:40, rowSpacing:250);
        Simulation APS26NRate160WaterWet
          Clock: Start=1995-06-13; End=1995-10-31
          Summary summaryfile
          Weather: FileName=APS26Silo.met; Latitude=-27.55; Tav=20.06; Amp=11.85
          SoilArbitrator Soil Arbitrator
          Zone paddock: Area=1; Slope=0; AspectAngle=0; Altitude=50
            Plant Wheat
            Soil APS26Field: SoilType=APS26Soil; LocalName=APS26Site; Site=APS26Site; NearestTown=Unknown; Region=Lawes; NaturalVegetation=Unknown; Latitude=0; Longitude=0
              Physical
                Thickness  BD    AirDry  LL15  DUL   SAT
                150        1.38  0.1     0.2   0.38  0.44
                150        1.38  0.1     0.2   0.38  0.44
                300        1.38  0.1     0.2   0.38  0.44
                300        1.38  0.1     0.2   0.38  0.44
                300        1.46  0.1     0.21  0.38  0.43
                300        1.51  0.1     0.19  0.4   0.42
                300        1.49  0.1     0.14  0.38  0.43
                300        1.47  0.1     0.14  0.38  0.43
                300        1.47  0.1     0.19  0.33  0.43
                SoilCrop WheatSoil: LL=[0.24, 0.24, 0.22, 0.24, 0.23, 0.23, 0.18, 0.18, 0.18]; KL=[0.06, 0.045, 0.045, 0.04, 0.04, 0.06, 0.06, 0.06, 0.06]; XF=[1, 1, 1, 1, 1, 1, 1, 1, 1]
              WaterBalance SoilWater: SummerDate=1-Nov; SummerU=6; SummerCona=3.5; WinterDate=1-Apr; WinterU=6; WinterCona=3.5; DiffusConst=10; DiffusSlope=16; Salb=0.13; CN2Bare=78; CNRed=20; CNCov=0.8; DischargeWidth=0; CatchmentArea=0; PSIDul=-100
                Thickness  SWCON  KLAT
                150        0.3    0
                150        0.3    0
                150        0.3    0
                150        0.3    0
                300        0.3    0
                300        0.3    0
                300        0.3    0
                300        0.3    0
                300        0.3    0
                300        0.3    0
              Organic: FOMCNRatio=40; CarbonUnits=Total
                Thickness  Carbon  SoilCNRatio  FBiom  FInert  FOM
                150        2.2     14.5         0.024  0.45    118.866
                150        1.6     14.5         0.024  0.6     98.5437
                150        1.35    14.5         0.01   0.7     81.6956
                150        0.95    14.5         0.01   0.85    67.728
                300        1       14.5         0.01   0.9     46.5487
                300        0.8     14.5         0.01   0.95    31.9925
                300        0.45    14.5         0.01   0.95    21.9881
                300        0.45    14.5         0.01   0.95    15.1122
                300        0.45    14.5         0.01   0.95    10.3864
                300        0.45    14.5         0.01   0.95    7.13848
              Chemical: Thickness=[150, 150, 150, 150, 300, 300, 300, 300, 300, 300]; PH=[7.5, 8, 8, 8, 8, 8, 8, 8, 8, 8]; PHUnits=Water
              Water: Thickness=[150, 150, 150, 150, 300, 300, 300, 300, 300, 300]; InitialPAWmm=286.035; RelativeTo=LL15; FilledFromTop=false
                InitialValues=[0.3274, 0.3429, 0.334, 0.334, 0.3303, 0.3106, 0.306, 0.2694, 0.269, 0.269]
              CERESSoilTemperature Temperature
              Nutrient
              Solute NO3: Thickness=[150, 150, 150, 150, 300, 300, 300, 300, 300, 300]; InitialValues=[1.5, 1.8, 1.5, 1.5, 0.4, 0.2, 0.4, 0.3, 0.3, 0.3]; InitialValuesUnits=ppm; WaterTableConcentration=0; D0=0; DepthConstant=0; MaxDepthSoluteAccessible=0; RunoffEffectivenessAtMovingSolute=0; MaxEffectiveRunoff=0
              Solute NH4: Thickness=[150, 150, 150, 150, 300, 300, 300, 300, 300, 300]; InitialValues=[0.5, 0.8, 0.5, 0.5, 0.42, 0.42, 0.37, 0.25, 0.3, 0.3]; InitialValuesUnits=ppm; WaterTableConcentration=0; D0=0; DepthConstant=0; MaxDepthSoluteAccessible=0; RunoffEffectivenessAtMovingSolute=0; MaxEffectiveRunoff=0
              Solute Urea: Thickness=[150, 150, 150, 150, 300, 300, 300, 300, 300, 300]; InitialValues=[0, 0, 0, 0, 0, 0, 0, 0, 0, 0]; InitialValuesUnits=kg/ha; WaterTableConcentration=0; D0=0; DepthConstant=0; MaxDepthSoluteAccessible=0; RunoffEffectivenessAtMovingSolute=0; MaxEffectiveRunoff=0
            Manager ApplyFertiliser
              FertDayOfYear = 186
              Amount = 160
```csharp
using Models.Soils;
using System;
using Models.Core;
using Models.PMF;
using APSIM.Shared.Utilities;

namespace Models
{
    [Serializable]
    public class Script : Model
    {
        [Link] Clock Clock;
        [Link] Fertiliser Fertiliser;
        [Link] Summary Summary;
        
        [Description("Day of year fertiliser is to be applied")]
        public int FertDayOfYear { get; set; }

        [Description("Amount of fertiliser to be applied")]
        public double Amount { get; set; }

        [EventSubscribe("DoManagement")]
        private void OnDoManagement(object sender, EventArgs e)
        {
            if (Clock.Today.DayOfYear == FertDayOfYear)
            {
                Fertiliser.Apply(Amount: Amount, Type: Fertiliser.Types.NO3N);
            }
        
        }
        
    }
}
```
            Fertiliser
            Operations IrrigationSchedule: same as Validation.SE Queensland.APS26.Factors.Permutation.Water.Wet
            Irrigation
            SurfaceOrganicMatter: InitialResidueName=wheat_stubble; InitialResidueType=Wheat; InitialResidueMass=0; InitialStandingFraction=0; InitialCPR=0; InitialCNR=80
            MicroClimate: a_interception=0; b_interception=1; c_interception=0; d_interception=0; SoilHeatFluxFraction=0.4; MinimumHeightDiffForNewLayer=0; NightInterceptionFraction=0.5; ReferenceHeight=2
            Manager Harvesting
```csharp
using Models.PMF.Phen;
using APSIM.Shared.Utilities;
using System.Xml.Serialization;
using Models;
using Models.PMF;
using Models.Soils;
using System.Text;
using System.Collections.Generic;
using Models.Core;
using System;
using Models.Soils.Nutrients;

namespace Models
{
    [Serializable] 
    public class Script : Model
    {
        [Link] private Plant Wheat;
        [Link(Type = LinkType.Path, Path = "[Wheat].Phenology")]
        private Phenology phenology;
        [EventSubscribe("DoManagement")]
        private void OnDoManagement(object sender, EventArgs e)
        {
            if (phenology.CurrentPhase.Name == "GrainRipening")
            {
                Wheat.Harvest();
                Wheat.EndCrop();
            }
        }
    }
}
```
            Report DailyReport
            Report HarvestReport
            Report SowingReport
            Manager SetCropParams
          Manager LocationInfo
            Country = Australia
            State = Queensland
            Region = QLD Coast
```csharp
using Models.Soils;
using System;
using Models.Core;
using Models.PMF;
using APSIM.Shared.Utilities;

namespace Models
{
    [Serializable]
    public class Script : Model
    {
        [Link] Clock Clock;
        [Link] Fertiliser Fertiliser;
        [Link] Summary Summary;
        
        [Description("Country")]
        public string Country { get; set; }

        [Description("State")]
        public string State { get; set; }

        [Description("Region")]
        public string Region { get; set; }

    }
}
```
      Experiment APS6
        Factors
          Factor NRate: Specification=[ApplyFertiliser]
            Operations 0
            Operations 40
              1992-06-16  [Fertiliser].Apply(Amount: 40, Type: Fertiliser.Types.NO3N);
            Operations 80
              1992-06-16  [Fertiliser].Apply(Amount: 80, Type: Fertiliser.Types.NO3N);
            Operations 120
              1992-06-16  [Fertiliser].Apply(Amount: 60, Type: Fertiliser.Types.NO3N);
              1992-08-05  [Fertiliser].Apply(Amount: 60, Type: Fertiliser.Types.NO3N);
            Operations 160
              1992-06-16  [Fertiliser].Apply(Amount: 40, Type: Fertiliser.Types.NO3N);
              1992-08-05  [Fertiliser].Apply(Amount: 120, Type: Fertiliser.Types.NO3N);
            Operations 360
              1992-06-16  [Fertiliser].Apply(Amount: 120, Type: Fertiliser.Types.NO3N);
              1992-08-05  [Fertiliser].Apply(Amount: 120, Type: Fertiliser.Types.NO3N);
              1992-09-08  [Fertiliser].Apply(Amount: 120, Type: Fertiliser.Types.NO3N);
        Memo
          NOTE: High N treatment logdged.  Final grain sizes were less than expected.
        Simulation APS6Base
          Clock: Start=1992-06-14; End=1992-11-17
          Summary summaryfile
          Weather: FileName=APS6.met; Latitude=-27.536; Tav=21; Amp=12
          Zone paddock: Area=1; Slope=0; AspectAngle=0; Altitude=50
            Irrigation
            Fertiliser
            Soil APS6Field: SoilType=APS6Soil; LocalName=APS6Site; Site=APS6Site; NearestTown=Unknown; Region=Lawes; NaturalVegetation=Unknown; Latitude=0; Longitude=0
              Physical
                Thickness  BD    AirDry  LL15  DUL   SAT
                150        1.38  0.1     0.2   0.38  0.43
                150        1.34  0.1     0.2   0.38  0.43
                300        1.35  0.1     0.22  0.4   0.43
                300        1.5   0.1     0.18  0.4   0.43
                300        1.49  0.1     0.14  0.39  0.42
                300        1.46  0.1     0.2   0.38  0.4
                300        1.46  0.1     0.2   0.38  0.4
                SoilCrop WheatSoil: LL=[0.2, 0.2, 0.22, 0.18, 0.14, 0.25, 0.28]; KL=[0.06, 0.05, 0.05, 0.04, 0.04, 0.06, 0.06]; XF=[1, 1, 1, 1, 1, 1, 1]
              WaterBalance SoilWater: SummerDate=1-Nov; SummerU=6; SummerCona=3.5; WinterDate=1-Apr; WinterU=6; WinterCona=3.5; DiffusConst=88; DiffusSlope=35.4; Salb=0.13; CN2Bare=60; CNRed=20; CNCov=0.8; DischargeWidth=0; CatchmentArea=0; PSIDul=-100
                Thickness  SWCON  KLAT
                150        0.3    0
                150        0.3    0
                300        0.3    0
                300        0.3    0
                300        0.3    0
                300        0.3    0
                300        0.3    0
              Organic: FOMCNRatio=60; CarbonUnits=Total
                Thickness  Carbon  SoilCNRatio  FBiom  FInert  FOM
                150        2.2     14.5         0.03   0.45    694.258
                150        1.6     14.5         0.02   0.6     540.689
                300        1.15    14.5         0.01   0.78    327.944
                300        1       14.5         0.01   0.9     198.908
                300        0.8     14.5         0.01   0.99    120.644
                300        0.45    14.5         0.01   0.99    73.1743
                300        0.45    14.5         0.01   0.99    44.3824
              Chemical: Thickness=[150, 150, 300, 300, 300, 300, 300]; PH=[7.5, 8, 8, 8, 8, 8, 8]; PHUnits=Water
              Water: Thickness=[150, 150, 300, 300, 300, 300, 300]; InitialValues=[0.326, 0.326, 0.346, 0.333, 0.315, 0.326, 0.326]; InitialPAWmm=249.6; RelativeTo=LL15; FilledFromTop=false
              CERESSoilTemperature Temperature
              Nutrient
              Solute NO3: Thickness=[150, 150, 300, 300, 300, 300, 300]; InitialValues=[1.3, 0.6, 0.25, 0.2, 0.1, 0.1, 0.1]; InitialValuesUnits=ppm; WaterTableConcentration=0; D0=0; DepthConstant=0; MaxDepthSoluteAccessible=0; RunoffEffectivenessAtMovingSolute=0; MaxEffectiveRunoff=0
              Solute NH4: Thickness=[150, 150, 300, 300, 300, 300, 300]; InitialValues=[1.3, 1, 1, 0.8, 0.8, 0.5, 0.5]; InitialValuesUnits=ppm; WaterTableConcentration=0; D0=0; DepthConstant=0; MaxDepthSoluteAccessible=0; RunoffEffectivenessAtMovingSolute=0; MaxEffectiveRunoff=0
              Solute Urea: Thickness=[150, 150, 300, 300, 300, 300, 300]; InitialValues=[0, 0, 0, 0, 0, 0, 0]; InitialValuesUnits=kg/ha; WaterTableConcentration=0; D0=0; DepthConstant=0; MaxDepthSoluteAccessible=0; RunoffEffectivenessAtMovingSolute=0; MaxEffectiveRunoff=0
            SurfaceOrganicMatter: InitialResidueName=wheat_stubble; InitialResidueType=wheat; InitialResidueMass=500; InitialStandingFraction=0; InitialCPR=0; InitialCNR=100
            Plant Wheat
            Operations ApplyFertiliser
              1992-06-16  [Fertiliser].Apply(Amount: 0, Type: Fertiliser.Types.NO3N);
            Operations IrrigationSchedule
              1992-06-17  [Wheat].Sow(population:121.61, cultivar:"Hartog", depth:30, rowSpacing:250);
              1992-06-24  [Irrigation].Apply(amount:10);
              1992-06-26  [Irrigation].Apply(amount:10);
              1992-07-28  [Irrigation].Apply(amount:30);
              1992-08-05  [Irrigation].Apply(amount:30);
              1992-08-19  [Irrigation].Apply(amount:40);
              1992-08-26  [Irrigation].Apply(amount:40);
              1992-09-09  [Irrigation].Apply(amount:40);
              1992-09-21  [Irrigation].Apply(amount:40);
              1992-10-01  [Irrigation].Apply(amount:50);
              1992-10-07  [Irrigation].Apply(amount:20);
              1992-10-08  [Irrigation].Apply(amount:20);
              1992-10-09  [Irrigation].Apply(amount:20);
              1992-10-13  [Irrigation].Apply(amount:20);
            MicroClimate: a_interception=0; b_interception=1; c_interception=0; d_interception=0; SoilHeatFluxFraction=0.4; MinimumHeightDiffForNewLayer=0; NightInterceptionFraction=0.5; ReferenceHeight=2
            Report DailyReport
            Report HarvestReport
            Manager HarvestAfterDate
              HarvestDate = 1-nov
```csharp
using Models.Soils;
using System;
using Models.Core;
using System.Text;
using Models.PMF;
using Models;
using APSIM.Shared.Utilities;
using Models.PMF.Phen;

namespace Models
{
    [Serializable] 
    public class Script : Model
    {
        [Link] ISummary summary;
        [Link] private Plant wheat;
        [Link(Type = LinkType.Path, Path = "[Wheat].Phenology")]
        private Phenology phenology;
                [Link] Clock Clock;

        private bool Harvestable = false;

        [Description("Harvest Date (d-mmm)")]
        public string HarvestDate { get; set; }   
      
        [EventSubscribe("DoManagement")]
        private void OnDoManagement(object sender, EventArgs e)
        {
           
            if (Harvestable && (phenology.CurrentPhase.Name == "GrainRipening" || phenology.CurrentPhase.Name == "GrainRipening"))
            {
                wheat.Harvest();
                wheat.EndCrop();                
            }
            
            if (DateUtilities.DatesAreEqual(HarvestDate, Clock.Today))
                Harvestable = true;

        }
    }
}
```
            Report SowingReport
            Report: EventNames=[Clock].EndOfDay
              VariableNames:
                [Clock].Today
                [Wheat].AboveGround.Wt
                [Wheat].AboveGround.N
                [Wheat].AboveGroundDead.Wt
                [Wheat].AboveGroundDead.N
                [Wheat].AboveGroundDead.NConc
                [Wheat].BelowGround.N
                [Wheat].TotalDead.N
                [Wheat].TotalLive.N
                [Wheat].Total.C
                [Wheat].Total.Wt*0.4 as TotalC
                [Wheat].TotalLive.Wt*0.4 as TotalLiveC
                [Wheat].TotalDead.Wt*0.4 as TotalDeadC
                [Wheat].Arbitrator.Nitrogen.TotalUptakeSupply
                [Wheat].Arbitrator.Nitrogen.TotalReAllocationSupply
                [Wheat].Arbitrator.Nitrogen.TotalReTranslocationSupply
                [Wheat].Arbitrator.UnallocatedN
                [Wheat].Arbitrator.Carbon.TotalFixationSupply
                [Wheat].Arbitrator.Carbon.TotalReAllocationSupply
                [Wheat].Arbitrator.Carbon.TotalReTranslocationSupply
                [Wheat].Arbitrator.UnallocatedC
                [Wheat].Grain.Nitrogen.Demands.Total
                [Wheat].Leaf.Nitrogen.Demands.Total
                [Wheat].Stem.Nitrogen.Demands.Total
                [Wheat].Spike.Nitrogen.Demands.Total
                [Wheat].Root.Nitrogen.Demands.Total
                [Wheat].Grain.Carbon.Demands.Total
                [Wheat].Leaf.Carbon.Demands.Total
                [Wheat].Stem.Carbon.Demands.Total
                [Wheat].Spike.Carbon.Demands.Total
                [Wheat].Root.Carbon.Demands.Total
                [Wheat].Leaf.Carbon.Supplies.Fixation
                [Wheat].Leaf.Photosynthesis
                [Wheat].Leaf.Photosynthesis.FT
                [Fertiliser].NitrogenApplied
                [Wheat].Leaf.Canopy.CoverDead
                [Wheat].Leaf.Canopy.CoverGreen
                [Wheat].Leaf.Canopy.CoverTotal
                [Wheat].Leaf.Canopy.FW
                [Wheat].Leaf.Canopy.Height
                [Wheat].Leaf.Canopy.LAI
                [Wheat].Leaf.Canopy.Transpiration
                [Wheat].Leaf.Carbon.Demands.Total
                [Wheat].Leaf.Photosynthesis.RadnInt
                [Wheat].Leaf.Nitrogen.ConcentrationOrFraction.Metabolic
                [Wheat].Leaf.Dead.N
                [Wheat].Leaf.Dead.NConc
                [Wheat].Leaf.Dead.Nitrogen.Metabolic
                [Wheat].Leaf.Dead.Nitrogen.Storage
                [Wheat].Leaf.Dead.Nitrogen.Structural
                [Wheat].Leaf.Dead.Wt
                //[Wheat].Leaf.DeltaLAI
                [Wheat].Leaf.FN
                [Wheat].Leaf.Canopy.FW
                [Wheat].Leaf.Live.N
                [Wheat].Leaf.Live.NConc
                [Wheat].Leaf.Live.Wt
                [Wheat].Leaf.Nitrogen.ConcentrationOrFraction.Storage
                [Wheat].Leaf.Nitrogen.ConcentrationOrFraction.Structural
                [Wheat].Leaf.Live.Nitrogen.Structural
                [Wheat].Leaf.Live.Nitrogen.Metabolic
                [Wheat].Leaf.Live.Nitrogen.Storage
                [Wheat].Leaf.Nitrogen.Demand.Structural
                [Wheat].Leaf.Nitrogen.Demand.Metabolic
                [Wheat].Leaf.Nitrogen.Demand.Storage
                [Wheat].Leaf.Allocated.Nitrogen.Structural
                [Wheat].Leaf.Allocated.Nitrogen.Metabolic
                [Wheat].Leaf.Allocated.Nitrogen.Storage
                [Wheat].Leaf.Allocated.Weight.Structural
                [Wheat].Leaf.Allocated.Weight.Metabolic
                [Wheat].Leaf.Allocated.Weight.Storage
                [Wheat].Leaf.HaunStage
                [Wheat].Leaf.Canopy.SpecificArea
                [Wheat].Stem.Nitrogen.ConcentrationOrFraction.Metabolic
                [Wheat].Stem.Dead.NConc
                [Wheat].Stem.Live.N
                [Wheat].Stem.Live.NConc
                [Wheat].Stem.Live.Wt
                [Wheat].Stem.Nitrogen.ConcentrationOrFraction.Storage
                [Wheat].Stem.Nitrogen.ConcentrationOrFraction.Structural
                [Wheat].Stem.NConc
                [Wheat].Spike.Nitrogen.ConcentrationOrFraction.Metabolic
                [Wheat].Spike.Dead.NConc
                [Wheat].Spike.Live.N
                [Wheat].Spike.Live.NConc
                [Wheat].Spike.Live.Wt
                [Wheat].Spike.Nitrogen.ConcentrationOrFraction.Storage
                [Wheat].Spike.Nitrogen.ConcentrationOrFraction.Structural
                [Wheat].Spike.NConc
                //[Wheat].Phenology.AccumulatedThermalTime
                [Wheat].Phenology.CurrentPhase.Name
                [Wheat].Phenology.CurrentStageName
                [Wheat].Phenology.Photoperiod
                [Wheat].Phenology.Stage
                [Wheat].Phenology.ThermalTime
                [Wheat].Root.Nitrogen.ConcentrationOrFraction.Metabolic
                [Wheat].Root.Live.N
                [Wheat].Root.Live.NConc
                [Wheat].Root.Live.Wt
                [Wheat].Root.Dead.NConc
                [Wheat].Root.Nitrogen.ConcentrationOrFraction.Storage
                [Wheat].Root.Nitrogen.ConcentrationOrFraction.Structural
                [Wheat].Root.N
                [Wheat].Root.Nconc
                [Wheat].Root.Network.Depth
                [Wheat].Root.Network.WaterUptake
                //[Wheat].SCS
                [Wheat].SowingData.Cultivar
                [Wheat].Grain.Nitrogen.ConcentrationOrFraction.Metabolic
                [Wheat].Grain.Live.N
                [Wheat].Grain.Live.NConc
                [Wheat].Grain.Live.Wt
                [Wheat].Grain.Nitrogen.ConcentrationOrFraction.Storage
                [Wheat].Grain.Nitrogen.ConcentrationOrFraction.Structural
                [Wheat].Grain.NConc
                [Wheat].Grain.Wt
                //[Wheat].Total.N
                //[Wheat].Total.NConc
                //[Wheat].Total.Wt
                //[Wheat].TotalDead.N
                //[Wheat].TotalDead.NConc
                //[Wheat].TotalDead.Wt
                [Irrigation].IrrigationApplied
                [Phenology].Photoperiod
                [Soil].SoilWater.LeachNO3
                [Soil].Water.Volumetric
                [Soil].Water.MM
                [SurfaceOrganicMatter].Wt
                [Weather].MeanT
                [Weather].Rain
                sum([Soil].Nutrient.MineralN) as ProfileN
                sum([Soil].NO3.kgha) as TotalSoilNitrogen
                sum([Soil].Water.MM[1:7]) as ProfileWater
                [Soil].Nutrient.MineralN
                [Wheat].Grain.Live.C + [Wheat].Grain.Dead.C + [Wheat].Leaf.Live.C + [Wheat].Leaf.Dead.C + [Wheat].Root.Live.C + [Wheat].Root.Dead.C + [Wheat].Stem.Live.C + [Wheat].Stem.Dead.C as SumPlantC
            Manager SetCropParams
          SoilArbitrator Soil Arbitrator
          Manager LocationInfo: same as Validation.SE Queensland.APS26.APS26NRate160WaterWet.LocationInfo
      Experiment APS14
        Factors
          Permutation
            Factor Stubble: Specification=[OMSchedule]
              Operations Bare
                1993-06-03  [SurfaceOrganicMatter].Incorporate(fraction: 1.0, depth:100);
              Operations Lucerne
                1993-06-03  [SurfaceOrganicMatter].Add(mass: 3560, N: 108.8, P:0.0, type: "lucerne", name: "");
                1993-06-03  [SurfaceOrganicMatter].Incorporate(fraction: 1.0, depth:100);
              Operations Straw
                1993-06-03  [SurfaceOrganicMatter].Add(mass: 3584, N: 28.8, P:0.0, type: "barley", name: "");
                1993-06-03  [SurfaceOrganicMatter].Incorporate(fraction: 1.0, depth:100);
            Factor NRate: Specification=[FertiliserSchedule]
              Operations 000
                1993-06-18  [Fertiliser].Apply(Amount: 0, Type: Fertiliser.Types.NO3N);
              Operations 040
                1993-06-18  [Fertiliser].Apply(Amount: 40, Type: Fertiliser.Types.NO3N);
              Operations 080
                1993-06-18  [Fertiliser].Apply(Amount: 80, Type: Fertiliser.Types.NO3N);
              Operations 200
                1993-06-18  [Fertiliser].Apply(Amount: 120, Type: Fertiliser.Types.NO3N);
                1993-08-18  [Fertiliser].Apply(Amount: 80, Type: Fertiliser.Types.NO3N);
        Simulation APS14StubbleBareNRate0
          Clock: Start=1993-06-02; End=1993-11-26
          Summary summaryfile
          Weather: FileName=APS14.met; Latitude=-27.536; Tav=21; Amp=12
          Zone paddock: Area=1; Slope=0; AspectAngle=0; Altitude=50
            Irrigation
            Fertiliser
            Soil APS14Field: SoilType=Clay Loam; LocalName=Gatton; Site=Gatton; NearestTown=Gatton; Region=Lockyer Valley; State=Qld; Country=Australia; NaturalVegetation=Unknown; Latitude=0; Longitude=0
              Physical
                Thickness  BD    AirDry  LL15  DUL   SAT
                150        1.38  0.1     0.2   0.38  0.43
                150        1.34  0.2     0.2   0.38  0.43
                150        1.31  0.24    0.24  0.4   0.45
                150        1.4   0.19    0.19  0.41  0.45
                300        1.5   0.18    0.18  0.4   0.43
                300        1.49  0.14    0.14  0.39  0.43
                300        1.46  0.2     0.2   0.38  0.4
                300        1.46  0.2     0.2   0.38  0.4
                SoilCrop WheatSoil: LL=[0.2, 0.2, 0.24, 0.19, 0.18, 0.14, 0.25, 0.28]; KL=[0.06, 0.06, 0.06, 0.05, 0.04, 0.03, 0.02, 0.02]; XF=[1, 1, 1, 1, 1, 1, 1, 1]
              WaterBalance SoilWater: SummerDate=1-Nov; SummerU=6; SummerCona=3.5; WinterDate=1-Apr; WinterU=6; WinterCona=3.5; DiffusConst=40; DiffusSlope=16; Salb=0.13; CN2Bare=60; CNRed=20; CNCov=0.8; DischargeWidth=0; CatchmentArea=0; PSIDul=-100
                Thickness  SWCON  KLAT
                150        0.3    0
                150        0.3    0
                150        0.3    0
                150        0.3    0
                300        0.3    0
                300        0.3    0
                300        0.3    0
                300        0.3    0
              Organic: FOMCNRatio=40; CarbonUnits=Total
                Thickness  Carbon  SoilCNRatio  FBiom  FInert  FOM
                150        2.2     14.5         0.02   0.4     430.132
                150        1.6     14.5         0.02   0.6     334.987
                150        1.35    14.5         0.01   0.7     260.888
                150        0.95    14.5         0.01   0.8     203.18
                300        1       14.5         0.01   0.9     123.235
                300        0.8     14.5         0.01   0.9     74.7457
                300        0.45    14.5         0.01   0.9     45.3356
                300        0.45    14.5         0.01   0.9     27.4974
              Chemical: Thickness=[150, 150, 150, 150, 300, 300, 300, 300]; PH=[7.5, 8, 8, 8, 8, 8, 8, 8]; PHUnits=Water
              Water: Thickness=[150, 150, 150, 150, 300, 300, 300, 300]; InitialValues=[0.336, 0.336, 0.302, 0.302, 0.319, 0.345, 0.294, 0.264]; InitialPAWmm=217.5; RelativeTo=LL15; FilledFromTop=false
              CERESSoilTemperature Temperature
              Nutrient
              Solute NO3: Thickness=[150, 150, 150, 150, 300, 300, 300, 300]; InitialValues=[2, 0.5, 0.2, 0.2, 0.2, 0.2, 0.2, 0.2]; InitialValuesUnits=ppm; WaterTableConcentration=0; D0=0; DepthConstant=0; MaxDepthSoluteAccessible=0; RunoffEffectivenessAtMovingSolute=0; MaxEffectiveRunoff=0
              Solute NH4: Thickness=[150, 150, 150, 150, 300, 300, 300, 300]; InitialValues=[0.3, 0.3, 0.2, 0.1, 0.1, 0.1, 0.1, 0.1]; InitialValuesUnits=ppm; WaterTableConcentration=0; D0=0; DepthConstant=0; MaxDepthSoluteAccessible=0; RunoffEffectivenessAtMovingSolute=0; MaxEffectiveRunoff=0
              Solute Urea: Thickness=[150, 150, 150, 150, 300, 300, 300, 300]; InitialValues=[0, 0, 0, 0, 0, 0, 0, 0]; InitialValuesUnits=kg/ha; WaterTableConcentration=0; D0=0; DepthConstant=0; MaxDepthSoluteAccessible=0; RunoffEffectivenessAtMovingSolute=0; MaxEffectiveRunoff=0
            SurfaceOrganicMatter: InitialResidueName=wheat_stubble; InitialResidueType=Wheat; InitialResidueMass=500; InitialStandingFraction=0; InitialCPR=0; InitialCNR=120
            Plant Wheat
            Operations IrrigationSchedule
              1993-06-04  [Irrigation].Apply(amount:14);
              1993-06-18  [Irrigation].Apply(amount:26);
              1993-06-23  [Irrigation].Apply(amount:13);
              1993-07-09  [Irrigation].Apply(amount:25);
              1993-07-22  [Irrigation].Apply(amount:20);
              1993-08-06  [Irrigation].Apply(amount:31);
              1993-08-18  [Irrigation].Apply(amount:36);
              1993-08-27  [Irrigation].Apply(amount:38);
              1993-09-06  [Irrigation].Apply(amount:33);
              1993-09-24  [Irrigation].Apply(amount:35);
              1993-10-01  [Irrigation].Apply(amount:36);
            MicroClimate: a_interception=0; b_interception=1; c_interception=0; d_interception=0; SoilHeatFluxFraction=0.4; MinimumHeightDiffForNewLayer=0; NightInterceptionFraction=0.5; ReferenceHeight=2
            Operations FertiliserSchedule
              1993-06-18  [Fertiliser].Apply(Amount: 0, Type: Fertiliser.Types.NO3N);
            Operations OMSchedule
              1993-06-03  [SurfaceOrganicMatter].Add(mass: 0, N: 0, P:0.0, type: "wheat", name: "");
              1993-06-03  [SurfaceOrganicMatter].Incorporate(fraction: 1.0, depth:100);
            Operations SowingSchedule
              1993-06-29  [Wheat].Sow(population:114, cultivar:"Hartog", depth:30, rowSpacing:250);
            Report DailyReport
            Report HarvestReport
            Manager Harvesting: same as Validation.SE Queensland.APS26.APS26NRate160WaterWet.paddock.Harvesting
            Report SowingReport
            Manager SetCropParams
          SoilArbitrator Soil Arbitrator
          Manager LocationInfo: same as Validation.SE Queensland.APS26.APS26NRate160WaterWet.LocationInfo
      Experiment APS2
        Memo
          This simple experiment was conducted to investigate the impact of time of sowing on canopy development and growth of wheat.  Wheat (cv. Hartog) was sown at Gatton on 30th of May and 30th of July in 1991.  Data were collected on canopy development, biomass accumulation and yield.
        Factors
          Factor TOS: Specification=[Sowing]
            Operations 1
              1991-05-29  [Wheat].Sow(population: 60, cultivar: "Hartog", depth: 30, rowSpacing: 250);
              1991-05-29  [Wheat].Phenology.SetEmergenceDate("1-Jun");
              1991-05-29  [Fertiliser].Apply(Amount: 40, Type: Fertiliser.Types.UreaN);
              1991-06-18  [Fertiliser].Apply(Amount: 60, Type: Fertiliser.Types.UreaN);
              1991-08-20  [Fertiliser].Apply(Amount: 60, Type: Fertiliser.Types.UreaN);
              1991-05-31  [Irrigation].Apply(amount:20, depth:0,efficiency:1, willRunoff:false);
              1991-06-03  [Irrigation].Apply(amount:20, depth:0,efficiency:1, willRunoff:false);
              1991-06-17  [Irrigation].Apply(amount:40, depth:0,efficiency:1, willRunoff:false);
              1991-07-07  [Irrigation].Apply(amount:40, depth:0,efficiency:1, willRunoff:false);
              1991-07-31  [Irrigation].Apply(amount:40, depth:0,efficiency:1, willRunoff:false);
              1991-08-20  [Irrigation].Apply(amount:40, depth:0,efficiency:1, willRunoff:false);
              1991-08-30  [Irrigation].Apply(amount:40, depth:0,efficiency:1, willRunoff:false);
              1991-09-09  [Irrigation].Apply(amount:40, depth:0,efficiency:1, willRunoff:false);
              1991-09-19  [Irrigation].Apply(amount:40, depth:0,efficiency:1, willRunoff:false);
              1991-09-29  [Irrigation].Apply(amount:50, depth:0,efficiency:1, willRunoff:false);
              1991-10-09  [Irrigation].Apply(amount:50, depth:0,efficiency:1, willRunoff:false);
              1991-10-19  [Irrigation].Apply(amount:50, depth:0,efficiency:1, willRunoff:false);
              1991-10-29  [Irrigation].Apply(amount:50, depth:0,efficiency:1, willRunoff:false);
              1991-11-08  [Irrigation].Apply(amount:50, depth:0,efficiency:1, willRunoff:false);
              1991-10-19  [Wheat].Harvest();
              1991-10-19  [Wheat].EndCrop();
            Operations 2
              1991-05-29  [Fertiliser].Apply(Amount: 40, Type: Fertiliser.Types.UreaN);
              1991-07-30  [Wheat].Sow(population: 60, cultivar: "Hartog", depth: 30, rowSpacing: 250);
              1991-07-30  [Wheat].Phenology.SetEmergenceDate("1-Aug");
              1991-08-20  [Fertiliser].Apply(Amount: 40, Type: Fertiliser.Types.UreaN);
              1991-09-02  [Fertiliser].Apply(Amount: 20, Type: Fertiliser.Types.UreaN);
              1991-05-31  [Irrigation].Apply(amount:20, depth:0,efficiency:1, willRunoff:false);
              1991-06-03  [Irrigation].Apply(amount:20, depth:0,efficiency:1, willRunoff:false);
              1991-06-17  [Irrigation].Apply(amount:40, depth:0,efficiency:1, willRunoff:false);
              1991-07-07  [Irrigation].Apply(amount:40, depth:0,efficiency:1, willRunoff:false);
              1991-07-31  [Irrigation].Apply(amount:40, depth:0,efficiency:1, willRunoff:false);
              1991-08-20  [Irrigation].Apply(amount:40, depth:0,efficiency:1, willRunoff:false);
              1991-08-30  [Irrigation].Apply(amount:40, depth:0,efficiency:1, willRunoff:false);
              1991-09-09  [Irrigation].Apply(amount:40, depth:0,efficiency:1, willRunoff:false);
              1991-09-19  [Irrigation].Apply(amount:40, depth:0,efficiency:1, willRunoff:false);
              1991-09-29  [Irrigation].Apply(amount:50, depth:0,efficiency:1, willRunoff:false);
              1991-10-09  [Irrigation].Apply(amount:50, depth:0,efficiency:1, willRunoff:false);
              1991-10-19  [Irrigation].Apply(amount:50, depth:0,efficiency:1, willRunoff:false);
              1991-10-29  [Irrigation].Apply(amount:50, depth:0,efficiency:1, willRunoff:false);
              1991-11-08  [Irrigation].Apply(amount:50, depth:0,efficiency:1, willRunoff:false);
              1991-11-13  [Wheat].Harvest();
              1991-11-13  [Wheat].EndCrop();
        Simulation APS2Base
          Clock: Start=1991-05-29; End=1991-12-30
          Summary summaryfile
          Weather: FileName=aps02.met; Latitude=-27.536; Tav=21; Amp=12
          SoilArbitrator Soil Arbitrator
          Zone Field: Area=1; Slope=0; AspectAngle=0; Altitude=50
            Irrigation
            Fertiliser
            Soil APS6Field: SoilType=APS6Soil; LocalName=APS6Site; Site=APS6Site; NearestTown=Unknown; Region=Lawes; NaturalVegetation=Unknown; Latitude=0; Longitude=0
              Physical
                Thickness  BD    AirDry  LL15  DUL   SAT
                150        1.38  0.1     0.2   0.38  0.43
                150        1.34  0.1     0.2   0.38  0.43
                300        1.35  0.1     0.22  0.4   0.43
                300        1.5   0.1     0.18  0.4   0.43
                300        1.49  0.1     0.14  0.39  0.42
                300        1.46  0.1     0.2   0.38  0.4
                300        1.46  0.1     0.2   0.38  0.4
                SoilCrop WheatSoil: LL=[0.2, 0.2, 0.22, 0.18, 0.14, 0.2, 0.2]; KL=[0.06, 0.06, 0.06, 0.06, 0.06, 0.06, 0.06]; XF=[1, 1, 1, 1, 1, 1, 1]
              WaterBalance SoilWater: same as Validation.SE Queensland.APS6.APS6Base.paddock.APS6Field.SoilWater
              Organic: FOMCNRatio=20; CarbonUnits=Total
                Thickness  Carbon  SoilCNRatio  FBiom  FInert  FOM
                150        2.2     14.5         0.03   0.45    173.565
                150        1.6     14.5         0.02   0.6     135.172
                300        1.15    14.5         0.01   0.78    81.9861
                300        1       14.5         0.01   0.9     49.7271
                300        0.8     14.5         0.01   0.99    30.161
                300        0.45    14.5         0.01   0.99    18.2936
                300        0.45    14.5         0.01   0.99    11.0956
              Chemical: Thickness=[150, 150, 300, 300, 300, 300, 300]; PH=[7.5, 8, 8, 8, 8, 8, 8]; PHUnits=Water
              Water: Thickness=[150, 150, 300, 300, 300, 300, 300]; InitialValues=[0.2, 0.28, 0.29, 0.34, 0.32, 0.32, 0.32]; InitialPAWmm=207; RelativeTo=LL15; FilledFromTop=false
              CERESSoilTemperature Temperature
              Nutrient
              Solute NO3: Thickness=[150, 150, 300, 300, 300, 300, 300]; InitialValues=[14.3, 5.9, 1.35, 1, 0.2, 0.1, 0.1]; InitialValuesUnits=ppm; WaterTableConcentration=0; D0=0; DepthConstant=0; MaxDepthSoluteAccessible=0; RunoffEffectivenessAtMovingSolute=0; MaxEffectiveRunoff=0
              Solute NH4: Thickness=[150, 150, 300, 300, 300, 300, 300]; InitialValues=[1.5, 1.5, 1, 1, 0.5, 0.5, 0.5]; InitialValuesUnits=ppm; WaterTableConcentration=0; D0=0; DepthConstant=0; MaxDepthSoluteAccessible=0; RunoffEffectivenessAtMovingSolute=0; MaxEffectiveRunoff=0
              Solute Urea: same as Validation.SE Queensland.APS6.APS6Base.paddock.APS6Field.Urea
            Operations Sowing
            SurfaceOrganicMatter: InitialResidueName=wheat_stubble; InitialResidueType=wheat; InitialResidueMass=500; InitialStandingFraction=0; InitialCPR=0; InitialCNR=100
            Plant Wheat
            MicroClimate: a_interception=0; b_interception=1; c_interception=0; d_interception=0; SoilHeatFluxFraction=0.4; MinimumHeightDiffForNewLayer=0; NightInterceptionFraction=0.5; ReferenceHeight=2
            Report DailyReport
            Report HarvestReport
            Manager MaxLeafAreaCalc
```csharp
using Models.Soils;
using System;
using System.Collections.Generic;
using System.Xml.Serialization;
using Models.Core;
using Models.Interfaces;
using APSIM.Shared.Utilities;



namespace Models
{
    [Serializable] 
    public class Script : Model
    {
    
        
    }
}
```
            Report MaxLeafAreaReport
            Report SowingReport
            Manager SetCropParams
          Manager LocationInfo: same as Validation.SE Queensland.APS26.APS26NRate160WaterWet.LocationInfo
      Experiment GattonRowSpacing
        Memo
          This simple experiment was conducted to investigate the light interception and subsequent growth of wheat under different populations invoked using row spacing.  Wheat was sown at Gatton on 15th of June 2011 at 25cm row spacing.  Soon after emergence, alternate rows were removed from selected plots to produce half populations at 50cm row spacing.  A zero N treatment was used to identfy the inherent fertility of the site to assist in model parameterisation.  Data were collected on light interception,  canopy development, biomass accumulation and yield.
        Factors
          Factor RowSpace: Specification=[Sowing]
            Operations 25cm
              2011-06-15  [Wheat].Sow(population:160, cultivar:"Hartog", depth:30, rowSpacing:250);
              2011-08-15  [Fertiliser].Apply(Amount: 100, Type: Fertiliser.Types.UreaN);
              2011-11-05  [Wheat].Harvest();
              2011-11-05  [Wheat].EndCrop();
            Operations 50cm
              2011-06-15  [Wheat].Sow(population:80, cultivar:"Hartog", depth:30, rowSpacing:500);
              2011-08-15  [Fertiliser].Apply(Amount: 100, Type: Fertiliser.Types.UreaN);
              2011-11-05  [Wheat].Harvest();
              2011-11-05  [Wheat].EndCrop();
            Operations N0
              2011-06-15  [Wheat].Sow(population:160, cultivar:"Hartog", depth:30, rowSpacing:250);
              2011-11-05  [Wheat].Harvest();
              2011-11-05  [Wheat].EndCrop();
        Simulation RowSpace
          Clock: Start=2011-05-01; End=2011-11-12
          Summary summaryfile
          Weather: FileName=Gatton2011.met; Latitude=-27.55; Tav=19.17; Amp=12.65
          SoilArbitrator Soil Arbitrator
          Zone Field: Area=1; Slope=0; AspectAngle=0; Altitude=50
            Irrigation
            Fertiliser
            Operations Sowing: same as Validation.SE Queensland.GattonRowSpacing.Factors.RowSpace.N0
            Soil: SoilType=Black Vertosol; Site=Lawes; NearestTown=Lawes, Q 4343; Region=Lockyer; State=Queensland; Country=Australia; NaturalVegetation=Blue Gum, Moreton Bay Ash, Tea Tree; ApsoilNumber=37; Latitude=-27.537; Longitude=152.336; LocationAccuracy=+-20m; DataSource=CSIRO Sustainable Ecosystems, Toowoomba
              Comments=Soil naming structure: \State\Region\Classification-Local Name (Site/district and locator number); oc and ph estimated
              Physical
                Thickness  BD    AirDry  LL15  DUL   SAT
                150        1.32  0.13    0.26  0.41  0.47
                150        1.3   0.208   0.26  0.43  0.48
                300        1.23  0.26    0.26  0.46  0.51
                300        1.27  0.26    0.26  0.44  0.49
                300        1.37  0.25    0.25  0.4   0.45
                300        1.35  0.26    0.26  0.41  0.46
                300        1.35  0.26    0.26  0.38  0.46
                SoilCrop WheatSoil: LL=[0.26, 0.26, 0.26, 0.26, 0.25, 0.29, 0.36]; KL=[0.06, 0.06, 0.06, 0.04, 0.04, 0.02, 0.02]; XF=[1, 1, 1, 1, 1, 1, 1]
              WaterBalance SoilWater: SummerDate=1-Nov; SummerU=6; SummerCona=3.5; WinterDate=1-Apr; WinterU=4; WinterCona=2.5; DiffusConst=40; DiffusSlope=16; Salb=0.12; CN2Bare=73; CNRed=20; CNCov=0.8; PSIDul=-100; Thickness=[150, 150, 300, 300, 300, 300, 300]; SWCON=[0.3, 0.3, 0.3, 0.3, 0.3, 0.3, 0.3]
              Organic: FOMCNRatio=40; CarbonUnits=Total
                Thickness  Carbon  SoilCNRatio  FBiom  FInert  FOM
                150        0.954   12           0.04   0.4     347.129
                150        0.954   12           0.02   0.6     270.344
                300        0.962   12           0.02   0.8     163.972
                300        0.846   12           0.02   1       99.454
                300        0.546   12           0.01   1       60.322
                300        0.262   12           0.01   1       36.587
                300        0.2     12           0.01   1       22.191
              Chemical: Thickness=[150, 150, 300, 300, 300, 300, 300]; PH=[8, 8, 8, 8, 8, 8, 8]; PHUnits=Water
              Water: Thickness=[150, 150, 300, 300, 300, 300, 300]; InitialValues=[0.41, 0.43, 0.46, 0.44, 0.4, 0.41, 0.38]; InitialPAWmm=288; RelativeTo=LL15; FilledFromTop=true
              CERESSoilTemperature Temperature
              Nutrient
              Solute NO3: Thickness=[150, 150, 300, 300, 300, 300, 300]; InitialValues=[45, 25, 0.422, 0.422, 0.422, 0.422, 0.422]; InitialValuesUnits=ppm; WaterTableConcentration=0; D0=0; DepthConstant=0; MaxDepthSoluteAccessible=0; RunoffEffectivenessAtMovingSolute=0; MaxEffectiveRunoff=0
              Solute NH4: Thickness=[150, 150, 300, 300, 300, 300, 300]; InitialValues=[0.38, 0.155, 0.042, 0.042, 0.042, 0.042, 0.042]; InitialValuesUnits=ppm; WaterTableConcentration=0; D0=0; DepthConstant=0; MaxDepthSoluteAccessible=0; RunoffEffectivenessAtMovingSolute=0; MaxEffectiveRunoff=0
              Solute Urea: same as Validation.SE Queensland.APS6.APS6Base.paddock.APS6Field.Urea
            SurfaceOrganicMatter: InitialResidueName=wheat_stubble; InitialResidueType=wheat; InitialResidueMass=500; InitialStandingFraction=0; InitialCPR=0; InitialCNR=100
            Plant Wheat
            MicroClimate: a_interception=0; b_interception=1; c_interception=0; d_interception=0; SoilHeatFluxFraction=0.4; MinimumHeightDiffForNewLayer=0; NightInterceptionFraction=0.5; ReferenceHeight=2
            Manager Automatic irrigation based on water deficit
              FASW = 0
              WaterDeficit = 0
              AutoIrrigationOn = True
              FASWThreshold = 0.9
              FASWDepth = 600
```csharp
using Models.Interfaces;
using APSIM.Shared.Utilities;
using System.Xml.Serialization;
using Models;
using Models.PMF;
using Models.Soils;
using System.Text;
using System.Collections.Generic;
using Models.Core;
using System;
using Models.Soils.Nutrients;

namespace Models
{
    [Serializable] 
    public class Script : Model
    {
        [Link] private Zone zone;
        [Link] private Irrigation irrigation;
        [Link] private Soil soil;
        [Link]
        private IPhysical soilPhysical;
        [Link]
        private ISoilWater waterBalance;
        public double FASW { get; set; }
        public double WaterDeficit  { get; set; }
    
        
        [Description("Auto irrigation on?")]
        public bool AutoIrrigationOn { get; set; }

        [Description("Threshold fraction available water (0-1)")]
        public double FASWThreshold { get; set; }

        [Description("Soil depth (mm) to which fraction available water is calculated")]
        public double FASWDepth { get; set; }

        [EventSubscribe("DoManagement")]
        private void OnDoManagement(object sender, EventArgs e)
        {
            CalculateFASW();
            if (AutoIrrigationOn)
            {
                if (FASW < FASWThreshold)
                {
                    double amount = 10;
                    irrigation.Apply(WaterDeficit, depth: 0);
                }
            }
        }
        
        private void CalculateFASW()
        {
            double[] LL15 = MathUtilities.Multiply(soilPhysical.LL15, soilPhysical.Thickness);
            double[] DUL = MathUtilities.Multiply(soilPhysical.DUL, soilPhysical.Thickness);
        
            int nlayr = GetLayerIndex();
            double cumdep = MathUtilities.Sum(soilPhysical.Thickness, 0, nlayr, 0.0);

            double excess_fr = MathUtilities.Divide((cumdep - FASWDepth), soilPhysical.Thickness[nlayr], 0.0);

            // note that results may be strange if swdep < ll15
            double avail_sw = (MathUtilities.Sum(waterBalance.SWmm, 0, nlayr, 0.0)
                              - excess_fr * waterBalance.SWmm[nlayr])
                              - (MathUtilities.Sum(LL15, 0, nlayr, 0.0)
                              - excess_fr * LL15[nlayr]);


            double pot_avail_sw = (MathUtilities.Sum(DUL, 0, nlayr, 0.0)
                                  - excess_fr * DUL[nlayr])
                                  - (MathUtilities.Sum(LL15, 0, nlayr, 0.0)
                                  - excess_fr * LL15[nlayr]);

            FASW = MathUtilities.Divide(avail_sw, pot_avail_sw, 0.0);
            WaterDeficit = MathUtilities.Constrain(pot_avail_sw - avail_sw, 0.0, 100000);
        }

        private int GetLayerIndex()
        {
            double[] cumThickness = soilPhysical.ThicknessCumulative;
            for (int i = 1; i < cumThickness.Length; i++)
            {
                if (FASWDepth < cumThickness[i])
                    return i - 1;
            }
            
            return cumThickness.Length - 1;
        }

    }
}
```
            Report HarvestReport
            Report DailyReport
            Report SowingReport
            Manager SetCropParams
          Manager LocationInfo
            Country = Australia
            State = Queensland
            Region =
            script: same as in Validation.SE Queensland.APS26.APS26NRate160WaterWet.LocationInfo
      Experiment Gatton94
        Memo
          This simple experiment was conducted to investigate the impact of time of sowing on  wheat.  Wheat (cv. Hartog and Batavia) was sown at Gatton on six dates during 1994.  Various data were collected. However final growth data was compromised by mouse damage.  The dataset is used here to study the impact of sowing time on phenological development.
        Factors
          Permutation
            Factor Cv: Specification=[Sowing].Script.CultivarName = Hartog, Batavia
            Factor TOS
              Specification=[Sowing].Script.SowDate = 29-Apr, 20-May, 10-Jun, 4-Jul, 22-Jul, 15-Aug
        Simulation Gatton94Base
          Clock: Start=1994-04-29; End=1994-12-30
          Summary summaryfile
          Weather: FileName=Gatton1994.met; Latitude=-27.536; Tav=21; Amp=12
          SoilArbitrator Soil Arbitrator
          Zone Field: Area=1; Slope=0; AspectAngle=0; Altitude=50
            Irrigation
            Fertiliser
            Soil APS6Field: SoilType=APS6Soil; LocalName=APS6Site; Site=APS6Site; NearestTown=Unknown; Region=Lawes; NaturalVegetation=Unknown; Latitude=0; Longitude=0
              Physical
                Thickness  BD    AirDry  LL15  DUL   SAT
                150        1.38  0.1     0.2   0.38  0.43
                150        1.34  0.1     0.2   0.38  0.43
                300        1.35  0.1     0.22  0.4   0.43
                300        1.5   0.1     0.18  0.4   0.43
                300        1.49  0.1     0.14  0.39  0.42
                300        1.46  0.1     0.2   0.38  0.4
                300        1.46  0.1     0.2   0.38  0.4
                SoilCrop WheatSoil: LL=[0.2, 0.2, 0.22, 0.18, 0.14, 0.25, 0.28]; KL=[0.06, 0.06, 0.06, 0.06, 0.06, 0.06, 0.06]; XF=[1, 1, 1, 1, 1, 1, 1]
              WaterBalance SoilWater: same as Validation.SE Queensland.APS6.APS6Base.paddock.APS6Field.SoilWater
              Organic: same as Validation.SE Queensland.APS6.APS6Base.paddock.APS6Field.Organic
              Chemical: Thickness=[150, 150, 300, 300, 300, 300, 300]; PH=[7.5, 8, 8, 8, 8, 8, 8]; PHUnits=Water
              Water: Thickness=[150, 150, 300, 300, 300, 300, 300]; InitialValues=[0.326, 0.326, 0.346, 0.333, 0.315, 0.326, 0.326]; InitialPAWmm=249.6; RelativeTo=LL15; FilledFromTop=false
              CERESSoilTemperature Temperature
              Nutrient
              Solute NO3: same as Validation.SE Queensland.APS6.APS6Base.paddock.APS6Field.NO3
              Solute NH4: same as Validation.SE Queensland.APS6.APS6Base.paddock.APS6Field.NH4
              Solute Urea: same as Validation.SE Queensland.APS6.APS6Base.paddock.APS6Field.Urea
            SurfaceOrganicMatter: InitialResidueName=wheat_stubble; InitialResidueType=wheat; InitialResidueMass=500; InitialStandingFraction=0; InitialCPR=0; InitialCNR=100
            Plant Wheat
            MicroClimate: a_interception=0; b_interception=1; c_interception=0; d_interception=0; SoilHeatFluxFraction=0.4; MinimumHeightDiffForNewLayer=0; NightInterceptionFraction=0.5; ReferenceHeight=2
            Report DailyReport
            Report HarvestReport
            Manager Sowing
              SowDate = 25-May
              CultivarName = Hartog
              SowingDepth = 40
              RowSpacing = 250
              Population = 100
```csharp
using Models.Soils.Nutrients;
using System;
using Models.Core;
using Models.PMF;
using Models.Soils;
using Models.Soils.Nutrients;
using Models.Utilities;
using APSIM.Shared.Utilities;

namespace Models
{
    [Serializable]
    public class Script : Model
    {
        [Link] Clock Clock;
        [Link] Fertiliser Fertiliser;
        [Link] Summary Summary;
        [Link] Plant Wheat;
        [Link] Soil Soil;
        Accumulator accumulatedRain;
        
        [Description("Sowing date (d-mmm)")]
        public string SowDate { get; set; }
        [Description("Cultivar to be sown")]
        public string CultivarName { get; set; }
        [Description("Sowing depth (mm)")]
        public double SowingDepth { get; set; }
        [Description("Row spacing (mm)")]
        public double RowSpacing { get; set; }
        [Description("Plant population (/m2)")]
        public double Population { get; set; }
        
        


        [EventSubscribe("DoManagement")]
        private void OnDoManagement(object sender, EventArgs e)
        {
        
            
            if (DateUtilities.WithinDates(SowDate, Clock.Today, SowDate))
            {
                Wheat.Sow(population: Population, cultivar: CultivarName, depth: SowingDepth, rowSpacing: RowSpacing);    
            }
        
        }
        
    }
}
```
            Manager Harvesting: same as Validation.SE Queensland.APS26.APS26NRate160WaterWet.paddock.Harvesting
            Manager AutoIrrigate
              FASW = 0
              WaterDeficit = 0
              AutoIrrigationOn = True
              StartStageName = Emergence
              EndStageName = EndGrainFill
              FASWThreshold = 0.9
              FASWDepth = 1000
```csharp
using Models.Interfaces;
using Models.Soils.Nutrients;
using System;
using Models.Core;
using System.Collections.Generic;
using System.Text;
using Models.Soils;
using Models.PMF;
using Models;
using System.Xml.Serialization;
using APSIM.Shared.Utilities;
using Models.PMF.Phen;

namespace Models
{
    [Serializable] 
    public class Script : Model
    {
        [Link] private Plant Chickpea;
        [Link] private Zone zone;
        [Link] private Irrigation irrigation;
        [Link] private Soil soil;
        [Link]
        private Phenology phenology;
        [Link]
        private IPhysical soilPhysical;
        [Link]
        private ISoilWater waterBalance;
        public double FASW { get; set; }
        public double WaterDeficit  { get; set; }
    
        
        [Description("Auto irrigation on?")]
        public bool AutoIrrigationOn { get; set; }
        
        [Description("Irrigation window start stage")]
        public string StartStageName { get; set; }
        [Description("Irrigation window end stage")]
        public string EndStageName { get; set; }

        [Description("Threshold fraction available water (0-1)")]
        public double FASWThreshold { get; set; }

        [Description("Soil depth (mm) to which fraction available water is calculated")]
        public double FASWDepth { get; set; }

        [EventSubscribe("DoManagement")]
        private void OnDoManagement(object sender, EventArgs e)
        {
            CalculateFASW();
            if (AutoIrrigationOn && phenology.Between(StartStageName, EndStageName))
            {
                if (FASW < FASWThreshold)
                {
                    double amount = 10;
                    irrigation.Apply(WaterDeficit, depth: 0);
                }
            }
        }
        
        private void CalculateFASW()
        {
            double[] LL15 = MathUtilities.Multiply(soilPhysical.LL15, soilPhysical.Thickness);
            double[] DUL = MathUtilities.Multiply(soilPhysical.DUL, soilPhysical.Thickness);
        
            int nlayr = GetLayerIndex();
            double cumdep = MathUtilities.Sum(soilPhysical.Thickness, 0, nlayr, 0.0);

            double excess_fr = MathUtilities.Divide((cumdep - FASWDepth), soilPhysical.Thickness[nlayr], 0.0);

            // note that results may be strange if swdep < ll15
            double avail_sw = (MathUtilities.Sum(waterBalance.SWmm, 0, nlayr, 0.0)
                              - excess_fr * waterBalance.SWmm[nlayr])
                              - (MathUtilities.Sum(LL15, 0, nlayr, 0.0)
                              - excess_fr * LL15[nlayr]);


            double pot_avail_sw = (MathUtilities.Sum(DUL, 0, nlayr, 0.0)
                                  - excess_fr * DUL[nlayr])
                                  - (MathUtilities.Sum(LL15, 0, nlayr, 0.0)
                                  - excess_fr * LL15[nlayr]);

            FASW = MathUtilities.Divide(avail_sw, pot_avail_sw, 0.0);
            WaterDeficit = MathUtilities.Constrain(pot_avail_sw - avail_sw, 0.0, 100000);
        }

        private int GetLayerIndex()
        {
            double[] cumThickness = soilPhysical.ThicknessCumulative;
            for (int i = 1; i < cumThickness.Length; i++)
            {
                if (FASWDepth < cumThickness[i])
                    return i - 1;
            }
            
            return cumThickness.Length - 1;
        }

    }
}
```
            Operations ApplyFertiliser
              1994-04-29  [Fertiliser].Apply(Amount: 200, Type: Fertiliser.Types.NO3N);
              Memo
                Add sufficient N to remove limitation
            Report SowingReport
            Manager SetCropParams
          Manager LocationInfo: same as Validation.SE Queensland.APS26.APS26NRate160WaterWet.LocationInfo
      Experiment Gatton2009
        Factors
          Permutation
            Factor TOS: Specification=[SowingRule].Script.TOS = 1, 2, 3
            Factor Cv
              Specification=[SowingRule].Script.Cultivar = Bolac, Derrimut, Gregory, Gladius, H46, Hartog, Janz, Kellalac, Kennedy, MacKellar, Ruby, Ventura, Wedgetail, Wyalkatchem, Yitpi, Young
        Simulation Gatton2009Base
          Clock: Start=2009-04-01; End=2009-12-30
          Summary summaryfile
          Weather: FileName=Gatton2009.met; Latitude=-27.536; Tav=21; Amp=12
          SoilArbitrator Soil Arbitrator
          Zone Field: Area=1; Slope=0; AspectAngle=0; Altitude=50
            Irrigation
            Fertiliser
            Soil APS6Field: same as Validation.SE Queensland.Gatton94.Gatton94Base.Field.APS6Field
            Manager SowingRule
              TOS = 1
              Cultivar = Hartog
```csharp
using Models.Soils;
using System;
using Models.Core;
using Models.PMF;
namespace Models
{
           
    [Serializable] 
    [System.Xml.Serialization.XmlInclude(typeof(Model))]
    public class Script : Model
    {
    
        [Link] Plant Wheat;
        [Link] Clock Clock;
            
        [Description("Time of Sowing")]
        public int TOS { get; set; }

        [Description("Cultivar")]
        public String Cultivar { get; set; }
        
        [EventSubscribe("DoManagement")]
        private void OnDoManagement(object sender, EventArgs e)
        {
            if ((Clock.Today.DayOfYear == 120) && (TOS == 1)) 
            {
                Wheat.Sow(population: 100, cultivar: Cultivar, depth: 30, rowSpacing: 250);
                Wheat.Phenology.SetEmergenceDate("10-May");
            }
            if((Clock.Today.DayOfYear == 150) && (TOS == 2)) 
            {
                Wheat.Sow(population: 100, cultivar: Cultivar, depth: 30, rowSpacing: 250);
                Wheat.Phenology.SetEmergenceDate("10-Jun");
            }
            if((Clock.Today.DayOfYear == 177) && (TOS == 3))
            {
                Wheat.Sow(population: 100, cultivar: Cultivar, depth: 30, rowSpacing: 250);
                Wheat.Phenology.SetEmergenceDate("11-Jul");
            }
        }


    }
}
```
            SurfaceOrganicMatter: InitialResidueName=wheat_stubble; InitialResidueType=wheat; InitialResidueMass=500; InitialStandingFraction=0; InitialCPR=0; InitialCNR=100
            Plant Wheat
            MicroClimate: a_interception=0; b_interception=1; c_interception=0; d_interception=0; SoilHeatFluxFraction=0.4; MinimumHeightDiffForNewLayer=0; NightInterceptionFraction=0.5; ReferenceHeight=2
            Report DailyReport
            Report HarvestReport
            Report SowingReport
            Operations Harvesting
              2009-12-30  [Wheat].Harvest()
            Manager SetCropParams
          Manager LocationInfo: same as Validation.SE Queensland.APS26.APS26NRate160WaterWet.LocationInfo
      Experiment Gatton2011: DisabledSimNames=[Gatton2011TOS2CvEaglehawk]
        Factors
          Permutation
            Factor TOS: Specification=[SowingRule].Script.TOS = 1, 2
            Factor Cv
              Specification=[SowingRule].Script.Cultivar = Axe, Bolac, Derrimut, Eaglehawk, Gregory, Lincoln, Mace, Scout
        Simulation Gatton2011Base
          Clock: Start=2011-05-05; End=2011-12-01
          Summary summaryfile
          Weather: FileName=Gatton2011.met; Latitude=-27.55; Tav=19.17; Amp=12.65
          SoilArbitrator Soil Arbitrator
          Zone Field: Area=1; Slope=0; AspectAngle=0; Altitude=50
            Irrigation
            Fertiliser
            Soil APS6Field: same as Validation.SE Queensland.Gatton94.Gatton94Base.Field.APS6Field
            Manager SowingRule
              TOS = 1
              Cultivar = Hartog
```csharp
using Models.Soils;
using System;
using Models.Core;
using Models.PMF;
namespace Models
{
           
    [Serializable] 
    [System.Xml.Serialization.XmlInclude(typeof(Model))]
    public class Script : Model
    {
    
        [Link] Plant Wheat;
        [Link] Clock Clock;
            
        [Description("Time of Sowing")]
        public int TOS { get; set; }

        [Description("Cultivar")]
        public String Cultivar { get; set; }
        
        [EventSubscribe("DoManagement")]
        private void OnDoManagement(object sender, EventArgs e)
        {
            if (((Clock.Today.DayOfYear == 136) && (TOS == 1)) ||  //16 May
                ((Clock.Today.DayOfYear == 177) && (TOS == 2)))    //26 June
            {
                Wheat.Sow(population: 100, cultivar: Cultivar, depth: 30, rowSpacing: 250);
            }

            if ((Clock.Today.DayOfYear == 136) && (TOS == 1)) 
            {
                Wheat.Sow(population: 100, cultivar: Cultivar, depth: 30, rowSpacing: 250);
                Wheat.Phenology.SetEmergenceDate("22-May");
            }
            if ((Clock.Today.DayOfYear == 177) && (TOS == 2)) 
            {
                Wheat.Sow(population: 100, cultivar: Cultivar, depth: 30, rowSpacing: 250);
                Wheat.Phenology.SetEmergenceDate("30-Jun");
            }
        }
    }
}
```
            Operations
              2011-05-13  [Fertiliser].Apply(Amount: 55, Type: Fertiliser.Types.UreaN);
              2011-05-13  [Irrigation].Apply(amount:11);
              2011-06-30  [Fertiliser].Apply(Amount: 43, Type: Fertiliser.Types.UreaN);
              2011-08-08  [Fertiliser].Apply(Amount: 90, Type: Fertiliser.Types.UreaN);
              2011-12-01  [Wheat].Harvest();
              2011-12-01  [Wheat].EndCrop();
            SurfaceOrganicMatter: InitialResidueName=wheat_stubble; InitialResidueType=wheat; InitialResidueMass=500; InitialStandingFraction=0; InitialCPR=0; InitialCNR=100
            Plant Wheat
            MicroClimate: a_interception=0; b_interception=1; c_interception=0; d_interception=0; SoilHeatFluxFraction=0.4; MinimumHeightDiffForNewLayer=0; NightInterceptionFraction=0.5; ReferenceHeight=2
            Report DailyReport
            Report HarvestReport
            Report SowingReport
            Report SupReport (disabled): EventNames=[Clock].DoReport
              VariableNames:
                [Clock].Today
                [Wheat].DaysAfterSowing
                [Wheat].Phenology.CAMP.Vrn1
                [Wheat].Phenology.CAMP.BaseVrn1
                [Wheat].Phenology.CAMP.MethColdVrn1
                [Wheat].Phenology.CAMP.ColdVrn1
                [Wheat].Phenology.CAMP.pVrn2
                [Wheat].Phenology.CAMP.Vrn2
                [Wheat].Phenology.CAMP.Vrn3
                [Wheat].Phenology.CAMP.VrnX
                [Wheat].Phenology.CAMP.dBP
                [Wheat].Phenology.AccumulatedTT
                [Wheat].Phenology.ThermalTime
                [IWeather].MinT
                [IWeather].MaxT
            Manager Harvesting (disabled)
              script: same as in Validation.SE Queensland.APS26.APS26NRate160WaterWet.paddock.Harvesting
            Manager SetCropParams
          Manager LocationInfo: same as Validation.SE Queensland.APS26.APS26NRate160WaterWet.LocationInfo
      Experiment Gatton2014
        Factors
          Permutation
            Factor TOS: Specification=[Sowing].Script.SowDate = 11-Apr, 13-May, 16-Jul, 12-Aug
            Factor Cv
              Specification=[Sowing].Script.CultivarName = Axe, Bolac, Braewood, Calingiri, Catalina, Crusader, Derrimut, Eaglehawk, Ellison, Forrest, Gauntlet, Gregory, H45, Hume, Janz, Kellalac, Lancer, Mace, Magenta, Merinda, Ouyen, Peake, Revenue, Rosella, Scout, Scythe, Spitfire, Strzelecki, Sunbri, Sunstate, Suntop, Wedgetail, Whistler, Wills, Wyalkatchem, Yitpi, Young
        Simulation 14SOWbase
          Clock: Start=2014-04-10; End=2015-04-01
          Summary SummaryFile
          Weather: FileName=14SSOW-1.met; Latitude=-27.54087; Tav=20.47; Amp=12.78
          SoilArbitrator
          Zone Field: Area=1; Slope=0; AspectAngle=0; Altitude=50
            Report DailyReport
            Report HarvestReport
            Fertiliser
            Soil: ASCOrder=Vertosol; ASCSubOrder=Black; SoilType=Clay; Site=Norwin; NearestTown=Norwin; Region=Darling Downs and Granite Belt; State=Queensland; Country=Australia; NaturalVegetation=Qld. Bluegrass, possible Qld. Blue gum; ApsoilNumber=900; Latitude=-27.5818; Longitude=151.3202; LocationAccuracy=+/- 20m
              DataSource=CSIRO Sustainable Ecosystems, Toowoomba; Characteriesd as part of the GRDC funded project"Doing it better, doing it smarter, managing soil water in Australian agriculture' 2011
              Comments=OC, CLL for all crops estimated-based on Bongeen Mywybilla Soil No1
              Physical
                Thickness  BD      AirDry  LL15    DUL     SAT     KS
                150        1.0106  0.1303  0.2605  0.521   0.5887  20
                150        1.0715  0.1987  0.2484  0.4967  0.5657  20
                300        1.0939  0.28    0.28    0.4884  0.5572  20
                300        1.1586  0.28    0.28    0.4803  0.5328  20
                300        1.173   0.28    0.28    0.4716  0.5274  20
                300        1.1629  0.28    0.28    0.4571  0.5312  20
                300        1.1875  0.28    0.28    0.4523  0.5219  20
                SoilCrop WheatSoil: LL=[0.261, 0.248, 0.28, 0.306, 0.36, 0.392, 0.446]; KL=[0.06, 0.06, 0.06, 0.04, 0.04, 0.02, 0.01]; XF=[1, 1, 1, 1, 1, 1, 1]
              WaterBalance SoilWater: SummerDate=1-Nov; SummerU=5; SummerCona=5; WinterDate=1-Apr; WinterU=5; WinterCona=5; DiffusConst=40; DiffusSlope=16; Salb=0.12; CN2Bare=73; CNRed=20; CNCov=0.8; PSIDul=-100; Thickness=[150, 150, 300, 300, 300, 300, 300]; SWCON=[0.3, 0.3, 0.3, 0.3, 0.3, 0.3, 0.3]
              Organic: FOMCNRatio=40; CarbonUnits=Total
                Thickness  Carbon  SoilCNRatio  FBiom  FInert  FOM
                150        1.2     12           0.04   0.4     347.129
                150        0.96    12           0.02   0.6     270.3444
                300        0.6     12           0.02   0.8     163.9721
                300        0.3     12           0.02   1       99.4541
                300        0.18    12           0.01   1       60.322
                300        0.12    12           0.01   1       36.5871
                300        0.12    12           0.01   1       22.1912
              Chemical: Thickness=[150, 150, 300, 300, 300, 300, 300]; PH=[8, 8, 8, 8, 8, 8, 8]; PHUnits=Water
              Water: Thickness=[150, 150, 300, 300, 300, 300, 300]; InitialValues=[0.521, 0.4967, 0.4884, 0.4803, 0.4716, 0.4571, 0.4523]; InitialPAWmm=361.23; RelativeTo=LL15; FilledFromTop=false
              CERESSoilTemperature Temperature
              Nutrient
              Solute NO3: Thickness=[150, 150, 300, 300, 300, 300, 300]; InitialValues=[1, 1, 1, 1, 1, 1, 1]; InitialValuesUnits=ppm; WaterTableConcentration=0; D0=0; DepthConstant=0; MaxDepthSoluteAccessible=0; RunoffEffectivenessAtMovingSolute=0; MaxEffectiveRunoff=0
              Solute NH4: Thickness=[150, 150, 300, 300, 300, 300, 300]; InitialValues=[0.1, 0.1, 0.1, 0.1, 0.1, 0.1, 0.1]; InitialValuesUnits=ppm; WaterTableConcentration=0; D0=0; DepthConstant=0; MaxDepthSoluteAccessible=0; RunoffEffectivenessAtMovingSolute=0; MaxEffectiveRunoff=0
              Solute Urea: same as Validation.SE Queensland.APS6.APS6Base.paddock.APS6Field.Urea
            SurfaceOrganicMatter: InitialResidueName=wheat_stubble; InitialResidueType=wheat; InitialResidueMass=500; InitialStandingFraction=0; InitialCPR=0; InitialCNR=100
            Plant Wheat
            MicroClimate: a_interception=0; b_interception=1; c_interception=0; d_interception=0; SoilHeatFluxFraction=0.4; MinimumHeightDiffForNewLayer=0; NightInterceptionFraction=0.5; ReferenceHeight=2
            Manager SowingFertiliser
              Amount = 300
              CropName = wheat
```csharp
using Models.Soils;
using System;
using Models.Core;
using Models.PMF;
namespace Models
{
    [Serializable]
    public class Script : Model
    {
        [Link] Clock Clock;
        [Link] Fertiliser Fertiliser;
        [Link] Summary Summary;
        
        
        [Description("Amount of fertiliser to be applied (kg/ha)")]
        public double Amount { get; set;}
        
        [Description("Crop to be fertilised")]
        public string CropName { get; set;}
        
        
        

        [EventSubscribe("Sowing")]
        private void OnSowing(object sender, EventArgs e)
        {
            Model crop = sender as Model;
            if (crop.Name.ToLower()==CropName.ToLower())
                Fertiliser.Apply(Amount: Amount, Type: Fertiliser.Types.NO3N);
        }
        
    }
}
```
            Manager Harvesting
```csharp
using APSIM.Shared.Utilities;
using Models.Utilities;
using Models.Soils;
using Models.PMF;
using Models.Core;
using System;

namespace Models
{
    [Serializable]
    public class Script : Model
    {
        [Link] Plant Wheat;

        [EventSubscribe("DoManagement")]
        private void OnDoManagement(object sender, EventArgs e)
        {
            if (Wheat.IsReadyForHarvesting)
            {
               Wheat.Harvest();
               Wheat.EndCrop();    
            }
        
        }
        
    }
}
```
            Manager Sowing
              SowDate = =
              CultivarName = Hartog
              SowingDepth = 50
              RowSpacing = 250
              Population = 150
```csharp
using Models.Soils.Nutrients;
using System;
using Models.Core;
using Models.PMF;
using Models.Soils;
using Models.Soils.Nutrients;
using Models.Utilities;
using APSIM.Shared.Utilities;

namespace Models
{
    [Serializable]
    public class Script : Model
    {
        [Link] Clock Clock;
        [Link] Fertiliser Fertiliser;
        [Link] Summary Summary;
        [Link] Plant Wheat;
        [Link] Soil Soil;
        Accumulator accumulatedRain;
        
        [Description("Sowing date (d-mmm)")]
        public string SowDate { get; set; }
        [Description("Cultivar to be sown")]
        public string CultivarName { get; set; }
        [Description("Sowing depth (mm)")]
        public double SowingDepth { get; set; }
        [Description("Row spacing (mm)")]
        public double RowSpacing { get; set; }
        [Description("Plant population (/m2)")]
        public double Population { get; set; }
        
        


        [EventSubscribe("DoManagement")]
        private void OnDoManagement(object sender, EventArgs e)
        {
        
            
            if (DateUtilities.WithinDates(SowDate, Clock.Today, SowDate))
            {
                Wheat.Sow(population: Population, cultivar: CultivarName, depth: SowingDepth, rowSpacing: RowSpacing);

                if(SowDate == "11-Apr")
                {
                    Wheat.Phenology.SetEmergenceDate("16-Apr");
                }
                if(SowDate == "13-May")
                {
                    Wheat.Phenology.SetEmergenceDate("20-May");
                }
                if(SowDate == "16-Jul")
                {
                    Wheat.Phenology.SetEmergenceDate("23-Jul");
                }
                if(SowDate == "12-Aug")
                {
                    Wheat.Phenology.SetEmergenceDate("19-Aug");
                }
            }
        
        }
        
    }
}
```
            Report SowingReport
            Manager SetCropParams
          Manager LocationInfo: same as Validation.SE Queensland.GattonRowSpacing.RowSpace.LocationInfo
      Experiment Gatton2014AE
        Factors
          Permutation
            Factor V
              CompositeFactor 1
                Specifications:
                  [Sowing].Script.SowDate = 19-Jun
                  [Sowing].Script.EmergeDate = 23-Jun
              CompositeFactor 2
                Specifications:
                  [Sowing].Script.SowDate = 24-Apr
                  [Sowing].Script.EmergeDate = 21-Jun
            Factor P
              CompositeFactor 1: Specifications=[PhotoperiodExtension].Script.ExtraHours = 0
              CompositeFactor 2: Specifications=[PhotoperiodExtension].Script.ExtraHours = 8
            Factor Cv: same as Validation.SE Queensland.Gatton2014.Factors.Permutation.Cv
        Simulation 14VPbase
          Clock: Start=2014-04-23; End=2015-04-15
          Summary SummaryFile
          Weather: FileName=14SSOW-1.met; Latitude=-27.54087; Tav=20.47; Amp=12.78
          SoilArbitrator
          Zone Field: Area=1; Slope=0; AspectAngle=0; Altitude=50
            Report DailyReport
            Report HarvestReport
            Fertiliser
            Soil: same as Validation.SE Queensland.Gatton2014.14SOWbase.Field.Soil
            SurfaceOrganicMatter: InitialResidueName=wheat_stubble; InitialResidueType=wheat; InitialResidueMass=500; InitialStandingFraction=0; InitialCPR=0; InitialCNR=100
            Plant Wheat
            MicroClimate: a_interception=0; b_interception=1; c_interception=0; d_interception=0; SoilHeatFluxFraction=0.4; MinimumHeightDiffForNewLayer=0; NightInterceptionFraction=0.5; ReferenceHeight=2
            Manager SowingFertiliser: same as Validation.SE Queensland.Gatton2014.14SOWbase.Field.SowingFertiliser
            Manager Harvesting: same as Validation.SE Queensland.Gatton2014.14SOWbase.Field.Harvesting
            Manager Sowing
              SowDate =
              EmergeDate =
              CultivarName =
              SowingDepth = 30
              RowSpacing = 250
              Population = 150
```csharp
using Models.Soils.Nutrients;
using System;
using Models.Core;
using Models.PMF;
using Models.Soils;
using Models.Soils.Nutrients;
using Models.Utilities;
using APSIM.Shared.Utilities;

namespace Models
{
    [Serializable]
    public class Script : Model
    {
        [Link] Clock Clock;
        [Link] Fertiliser Fertiliser;
        [Link] Summary Summary;
        [Link] Plant Wheat;
        [Link] Soil Soil;
        Accumulator accumulatedRain;
        
        [Description("Sowing date (d-mmm)")]
        public string SowDate { get; set; }
        [Description("Emergence date (d-mmm)")]
        public string EmergeDate { get; set; }
        [Description("Cultivar to be sown")]
        public string CultivarName { get; set; }
        [Description("Sowing depth (mm)")]
        public double SowingDepth { get; set; }
        [Description("Row spacing (mm)")]
        public double RowSpacing { get; set; }
        [Description("Plant population (/m2)")]
        public double Population { get; set; }
        
        


        [EventSubscribe("DoManagement")]
        private void OnDoManagement(object sender, EventArgs e)
        {
        
            
            if (DateUtilities.WithinDates(SowDate, Clock.Today, SowDate))
            {
                Wheat.Sow(population: Population, cultivar: CultivarName, depth: SowingDepth, rowSpacing: RowSpacing);    
                Wheat.Phenology.SetEmergenceDate(EmergeDate);
            }
        
        }
        
    }
}
```
            Report SowingReport
            Manager PreSowVernalisation
              StartDate = 04/24/2014 00:00:00
              EndDate = 06/18/2014 00:00:00
```csharp
using Models.Soils;
using System.Xml.Serialization;
using Models;
using Models.PMF;
using System.Text;
using System.Collections.Generic;
using APSIM.Shared.Utilities;
using Models.Core;
using System;
using Models.Climate;

namespace Models
{
    [Serializable] 
    [System.Xml.Serialization.XmlInclude(typeof(Model))]
    public class Script : Model
    {
        [Link] Weather Met;
        [Link] Clock Clock;
    
        [Description("Start Date")]
        public DateTime StartDate { get; set; }
        
        [Description("End Date")]
        public DateTime EndDate { get; set; }
 
    
        [EventSubscribe("PreparingNewWeatherData")]
        private void OnPreparingNewWeatherData(object sender, EventArgs e)
        {
            if ((Clock.Today.Date >= StartDate) && (Clock.Today.Date <= EndDate))
                Met.MaxT = 4.0;
                Met.MinT = 4.0;        
        }
    }
}
```
            Manager PhotoperiodExtension
              StartDate = 04/20/2014 00:00:00
              EndDate = 11/01/2014 00:00:00
              ExtraHours = -
```csharp
using Models.Soils;
using System.Xml.Serialization;
using Models;
using Models.PMF;
using System.Text;
using System.Collections.Generic;
using APSIM.Shared.Utilities;
using Models.Core;
using System;
using Models.Climate;

namespace Models
{
    [Serializable] 
    [System.Xml.Serialization.XmlInclude(typeof(Model))]
    public class Script : Model
    {
        [Link] Weather Met;
        [Link] Clock Clock;
    
        [Description("Start Date")]
        public DateTime StartDate { get; set; }
        
        [Description("End Date")]
        public DateTime EndDate { get; set; }
 
        [Description("Photoperiod extension (hours)")]
        public double ExtraHours { get; set; }
        [EventSubscribe("PreparingNewWeatherData")]
        private void OnPreparingNewWeatherData(object sender, EventArgs e)
        {
            if ((Clock.Today.Date >= StartDate) && (Clock.Today.Date <= EndDate))
                Met.DayLength = Met.CalculateDayLength(-6) + ExtraHours;
        }
    }
}
```
            Manager SetCropParams
          Manager LocationInfo: same as Validation.SE Queensland.GattonRowSpacing.RowSpace.LocationInfo
      Experiment TraitMod2015
        Factors
          Permutation
            Factor TOS: Specification=[Sowing].Script.SowDate = 21-May, 22-Jun
            Factor Cv
              Specification=[Sowing].Script.CultivarName = Drysdale, Gregory, Hartog, Spitfire, Suntop
        Simulation 15TraitModbase
          Weather: FileName=gatton-15-g3.met; Latitude=-27.54087; Tav=20.47; Amp=6.09
          Clock: Start=2015-05-19; End=2015-11-17
          Summary
          SoilArbitrator
          Zone Field: Area=1; Slope=0; AspectAngle=0; Altitude=50
            Soil: SoilType=Black Vertosol; Site=Lawes; NearestTown=Lawes, Q 4343; Region=Lockyer; State=Queensland; Country=Australia; NaturalVegetation=Blue Gum, Moreton Bay Ash, Tea Tree; ApsoilNumber=38; Latitude=-27.537; Longitude=152.336; LocationAccuracy=+-20m; DataSource=CSIRO Sustainable Ecosystems, Toowoomba
              Comments=Soil naming structure: \State\Region\Classification-Local Name (Site/district and locator number); oc and ph estimated
              Physical: same as Validation.SE Queensland.GattonRowSpacing.RowSpace.Field.Soil.Physical
              WaterBalance SoilWater: same as Validation.SE Queensland.GattonRowSpacing.RowSpace.Field.Soil.SoilWater
              Organic: FOMCNRatio=40; CarbonUnits=Total
                Thickness  Carbon  SoilCNRatio  FBiom  FInert  FOM
                150        0.9538  12           0.04   0.4     347.129
                150        0.9538  12           0.02   0.6     270.344
                300        0.9615  12           0.02   0.8     163.972
                300        0.8462  12           0.02   1       99.4541
                300        0.5462  12           0.01   1       60.322
                300        0.2615  12           0.01   1       36.5871
                300        0.2     12           0.01   1       22.1912
              Chemical: Thickness=[150, 150, 300, 300, 300, 300, 300]; PH=[8, 8, 8, 8, 8, 8, 8]; PHUnits=Water
              Water: Thickness=[150, 150, 300, 300, 300, 300, 300]; InitialValues=[0.41, 0.43, 0.46, 0.44, 0.4, 0.41, 0.38]; InitialPAWmm=288; RelativeTo=LL15; FilledFromTop=true
              CERESSoilTemperature Temperature
              Nutrient
              Solute NO3: Thickness=[150, 150, 300, 300, 300, 300, 300]; InitialValuesUnits=ppm; WaterTableConcentration=0; D0=0; DepthConstant=0; MaxDepthSoluteAccessible=0; RunoffEffectivenessAtMovingSolute=0; MaxEffectiveRunoff=0
                InitialValues=[10.101, 10.2564, 2.71003, 0.787402, 0.486618, 0.246914, 0.246914]
              Solute NH4: Thickness=[150, 150, 300, 300, 300, 300, 300]; InitialValuesUnits=ppm; WaterTableConcentration=0; D0=0; DepthConstant=0; MaxDepthSoluteAccessible=0; RunoffEffectivenessAtMovingSolute=0; MaxEffectiveRunoff=0
                InitialValues=[0.505051, 0.512821, 0.271003, 0.262467, 0.243309, 0.246914, 0.246914]
              Solute Urea: same as Validation.SE Queensland.APS6.APS6Base.paddock.APS6Field.Urea
            Report DailyReport
            Report HarvestReport
            Fertiliser
            SurfaceOrganicMatter: InitialResidueName=wheat_stubble; InitialResidueType=wheat; InitialResidueMass=500; InitialStandingFraction=0; InitialCPR=0; InitialCNR=100
            Plant Wheat
            MicroClimate: a_interception=0; b_interception=1; c_interception=0; d_interception=0; SoilHeatFluxFraction=0.4; MinimumHeightDiffForNewLayer=0; NightInterceptionFraction=0.5; ReferenceHeight=2
            Manager SowingFertiliser: same as Validation.SE Queensland.Gatton2014.14SOWbase.Field.SowingFertiliser
            Manager Harvesting: same as Validation.SE Queensland.Gatton2014.14SOWbase.Field.Harvesting
            Manager Sowing
              SowDate = 19-Jun
              CultivarName = Hartog
              SowingDepth = 50
              RowSpacing = 250
              Population = 150
```csharp
using Models.Soils.Nutrients;
using System;
using Models.Core;
using Models.PMF;
using Models.Soils;
using Models.Soils.Nutrients;
using Models.Utilities;
using APSIM.Shared.Utilities;

namespace Models
{
    [Serializable]
    public class Script : Model
    {
        [Link] Clock Clock;
        [Link] Fertiliser Fertiliser;
        [Link] Summary Summary;
        [Link] Plant Wheat;
        [Link] Soil Soil;
        Accumulator accumulatedRain;
        
        [Description("Sowing date (d-mmm)")]
        public string SowDate { get; set; }
        [Description("Cultivar to be sown")]
        public string CultivarName { get; set; }
        [Description("Sowing depth (mm)")]
        public double SowingDepth { get; set; }
        [Description("Row spacing (mm)")]
        public double RowSpacing { get; set; }
        [Description("Plant population (/m2)")]
        public double Population { get; set; }
        
        


        [EventSubscribe("DoManagement")]
        private void OnDoManagement(object sender, EventArgs e)
        {
        
            
            if (DateUtilities.WithinDates(SowDate, Clock.Today, SowDate))
            {
                Wheat.Sow(population: Population, cultivar: CultivarName, depth: SowingDepth, rowSpacing: RowSpacing);    
                if(SowDate == "21-May")
                {
                    Wheat.Phenology.SetEmergenceDate("27-May");
                }
                if(SowDate == "22-Jun")
                {
                    Wheat.Phenology.SetEmergenceDate("30-Jun");
                }
            }
        
        }
        
    }
}
```
            Report SowingReport
            Operations Management
              2015-06-23  [Fertiliser].Apply(Amount: 205, Type: Fertiliser.Types.Urea);
              2015-05-22  [Irrigation].Apply(amount:24);
              2015-06-26  [Irrigation].Apply(amount:25);
              2015-07-14  [Irrigation].Apply(amount:26);
              2015-07-31  [Irrigation].Apply(amount:26);
              2015-08-14  [Irrigation].Apply(amount:25);
              2015-08-26  [Irrigation].Apply(amount:25);
              2015-09-09  [Irrigation].Apply(amount:25);
              2015-10-12  [Irrigation].Apply(amount:25);
            Irrigation
            Manager SetCropParams
          Manager LocationInfo: same as Validation.SE Queensland.APS26.APS26NRate160WaterWet.LocationInfo
      Experiment TraitMod2016
        Factors
          Permutation
            Factor TOS: Specification=[Sowing].Script.SowDate = 21-May
            Factor Cv
              Specification=[Sowing].Script.CultivarName = Drysdale, Gregory, Hartog, Spitfire, Suntop
        Simulation 16TraitModbase
          Weather: FileName=gatton2016.met; Latitude=-27.54; Tav=21; Amp=10.43
          Summary
          SoilArbitrator
          Clock: Start=2016-05-15; End=2016-12-17
          Zone Field: Area=1; Slope=0; AspectAngle=0; Altitude=50
            Soil: same as Validation.SE Queensland.TraitMod2015.15TraitModbase.Field.Soil
            Report DailyReport
            Report HarvestReport
            Fertiliser
            SurfaceOrganicMatter: InitialResidueName=wheat_stubble; InitialResidueType=wheat; InitialResidueMass=500; InitialStandingFraction=0; InitialCPR=0; InitialCNR=100
            Plant Wheat
            MicroClimate: a_interception=0; b_interception=1; c_interception=0; d_interception=0; SoilHeatFluxFraction=0.4; MinimumHeightDiffForNewLayer=0; NightInterceptionFraction=0.5; ReferenceHeight=2
            Manager SowingFertiliser: same as Validation.SE Queensland.Gatton2014.14SOWbase.Field.SowingFertiliser
            Manager Harvesting: same as Validation.SE Queensland.Gatton2014.14SOWbase.Field.Harvesting
            Manager Sowing
              SowDate =
              CultivarName =
              SowingDepth = 50
              RowSpacing = 250
              Population = 150
```csharp
using Models.Soils.Nutrients;
using System;
using Models.Core;
using Models.PMF;
using Models.Soils;
using Models.Soils.Nutrients;
using Models.Utilities;
using APSIM.Shared.Utilities;

namespace Models
{
    [Serializable]
    public class Script : Model
    {
        [Link] Clock Clock;
        [Link] Fertiliser Fertiliser;
        [Link] Summary Summary;
        [Link] Plant Wheat;
        [Link] Soil Soil;
        Accumulator accumulatedRain;
        
        [Description("Sowing date (d-mmm)")]
        public string SowDate { get; set; }
        [Description("Cultivar to be sown")]
        public string CultivarName { get; set; }
        [Description("Sowing depth (mm)")]
        public double SowingDepth { get; set; }
        [Description("Row spacing (mm)")]
        public double RowSpacing { get; set; }
        [Description("Plant population (/m2)")]
        public double Population { get; set; }
        
        


        [EventSubscribe("DoManagement")]
        private void OnDoManagement(object sender, EventArgs e)
        {
        
            
            if (DateUtilities.WithinDates(SowDate, Clock.Today, SowDate))
            {
                Wheat.Sow(population: Population, cultivar: CultivarName, depth: SowingDepth, rowSpacing: RowSpacing);    
                Wheat.Phenology.SetEmergenceDate("24-May");
            }
        
        }
        
    }
}
```
            Report SowingReport
            Operations Management
              2016-05-10  [Fertiliser].Apply(Amount: 310, Type: Fertiliser.Types.Urea)
              2016-05-19  [Irrigation].Apply(amount: 30, depth: 0, efficiency: 1, willRunoff: false)
              2016-07-22  [Irrigation].Apply(amount: 30, depth: 0, efficiency: 1, willRunoff: false)
              2016-08-05  [Irrigation].Apply(amount: 30, depth: 0, efficiency: 1, willRunoff: false)
              2016-08-12  [Irrigation].Apply(amount: 30, depth: 0, efficiency: 1, willRunoff: false)
              2016-08-29  [Irrigation].Apply(amount: 30, depth: 0, efficiency: 1, willRunoff: false)
              2016-09-07  [Irrigation].Apply(amount: 30, depth: 0, efficiency: 1, willRunoff: false)
            Irrigation
            Manager SetCropParams
          Manager LocationInfo: same as Validation.SE Queensland.APS26.APS26NRate160WaterWet.LocationInfo
      Folder AddingValueToNVT
        Memo
          The "Adding Value to the National Variety Trials" project aimed to use measurement and modelling to explain GeneXEnvironmentXManagement interactions for Australian Wheat cultivars.  A description of this national trial can be found in [Lawes201638].  Here we include some of the data from south-eastern Queensland.
        Experiment Goondiwindi2011
          Factors
            Permutation
              Factor Cv: Specification=[Sowing].Script.CultivarName = Janz, Lang, Gregory
              Factor TOS: Specification=[Sowing].Script.SowDate = 19-May, 9-Jun, 28-Jun
          Simulation Goondiwindi2011Base
            Clock: Start=2011-04-01; End=2011-12-30
            Summary summaryfile
            Weather: FileName=Goondiwindi2011.met; Latitude=-28.55; Tav=20.81; Amp=16.65
            SoilArbitrator Soil Arbitrator
            Zone Field: Area=1; Slope=0; AspectAngle=0; Altitude=50
              Irrigation
              Fertiliser
              Soil APS6Field: same as Validation.SE Queensland.Gatton94.Gatton94Base.Field.APS6Field
              SurfaceOrganicMatter: InitialResidueName=wheat_stubble; InitialResidueType=wheat; InitialResidueMass=500; InitialStandingFraction=0; InitialCPR=0; InitialCNR=100
              Plant Wheat
              MicroClimate: a_interception=0; b_interception=1; c_interception=0; d_interception=0; SoilHeatFluxFraction=0.4; MinimumHeightDiffForNewLayer=0; NightInterceptionFraction=0.5; ReferenceHeight=2
              Report DailyReport
              Report HarvestReport
              Manager Sowing
                SowDate =
                CultivarName = Hartog
                SowingDepth = 40
                RowSpacing = 250
                Population = 100
```csharp
using Models.Soils.Nutrients;
using System;
using Models.Core;
using Models.PMF;
using Models.Soils;
using Models.Soils.Nutrients;
using Models.Utilities;
using APSIM.Shared.Utilities;

namespace Models
{
    [Serializable]
    public class Script : Model
    {
        [Link] Clock Clock;
        [Link] Fertiliser Fertiliser;
        [Link] Summary Summary;
        [Link] Plant Wheat;
        [Link] Soil Soil;
        Accumulator accumulatedRain;
        
        [Description("Sowing date (d-mmm)")]
        public string SowDate { get; set; }
        [Description("Cultivar to be sown")]
        public string CultivarName { get; set; }
        [Description("Sowing depth (mm)")]
        public double SowingDepth { get; set; }
        [Description("Row spacing (mm)")]
        public double RowSpacing { get; set; }
        [Description("Plant population (/m2)")]
        public double Population { get; set; }
        
        


        [EventSubscribe("DoManagement")]
        private void OnDoManagement(object sender, EventArgs e)
        {
        
            
            if (DateUtilities.WithinDates(SowDate, Clock.Today, SowDate))
            {
                Wheat.Sow(population: Population, cultivar: CultivarName, depth: SowingDepth, rowSpacing: RowSpacing);    
                if(SowDate == "19-May")
                {
                    Wheat.Phenology.SetEmergenceDate("28-May");
                }
                if(SowDate == "9-June")
                {
                    Wheat.Phenology.SetEmergenceDate("15-Jun");
                }
                if(SowDate == "28-Jun")
                {
                    Wheat.Phenology.SetEmergenceDate("4-Jul");
                }
                if(SowDate == "12-Aug")
                {
                    Wheat.Phenology.SetEmergenceDate("22-Aug");
                }
            }
        
        }
        
    }
}
```
              Manager Harvesting: same as Validation.SE Queensland.APS26.APS26NRate160WaterWet.paddock.Harvesting
              Manager AutoIrrigate: same as Validation.SE Queensland.Gatton94.Gatton94Base.Field.AutoIrrigate
              Operations ApplyFertiliser: same as Validation.SE Queensland.Gatton94.Gatton94Base.Field.ApplyFertiliser
              Report SowingReport
              Manager SetCropParams
            Manager LocationInfo
              Country = Australia
              State = New South Wales
              Region = NSW North East QLD South East
              script: same as in Validation.SE Queensland.APS26.APS26NRate160WaterWet.LocationInfo
        Experiment Nagwee2012
          Memo
            INSERT TEXT HERE
          Factors
            Permutation
              Factor Cv: Specification=[Sowing].Script.CultivarName = Janz, Lang, Gregory
              Factor TOS: Specification=[Sowing].Script.SowDate = 17-May, 31-May, 23-Jun
          Simulation Nangwee2012Base
            Clock: Start=2012-04-01; End=2012-12-30
            Summary summaryfile
            Weather: FileName=Nangwee2012.met; Latitude=-27.55; Tav=19.63; Amp=15.05
            SoilArbitrator Soil Arbitrator
            Zone Field: Area=1; Slope=0; AspectAngle=0; Altitude=50
              Irrigation
              Fertiliser
              Soil APS6Field: same as Validation.SE Queensland.Gatton94.Gatton94Base.Field.APS6Field
              SurfaceOrganicMatter: InitialResidueName=wheat_stubble; InitialResidueType=wheat; InitialResidueMass=500; InitialStandingFraction=0; InitialCPR=0; InitialCNR=100
              Plant Wheat
              MicroClimate: a_interception=0; b_interception=1; c_interception=0; d_interception=0; SoilHeatFluxFraction=0.4; MinimumHeightDiffForNewLayer=0; NightInterceptionFraction=0.5; ReferenceHeight=2
              Report DailyReport
              Report HarvestReport
              Manager Sowing
                SowDate =
                CultivarName = Hartog
                SowingDepth = 40
                RowSpacing = 250
                Population = 100
```csharp
using Models.Soils.Nutrients;
using System;
using Models.Core;
using Models.PMF;
using Models.Soils;
using Models.Soils.Nutrients;
using Models.Utilities;
using APSIM.Shared.Utilities;

namespace Models
{
    [Serializable]
    public class Script : Model
    {
        [Link] Clock Clock;
        [Link] Fertiliser Fertiliser;
        [Link] Summary Summary;
        [Link] Plant Wheat;
        [Link] Soil Soil;
        Accumulator accumulatedRain;
        
        [Description("Sowing date (d-mmm)")]
        public string SowDate { get; set; }
        [Description("Cultivar to be sown")]
        public string CultivarName { get; set; }
        [Description("Sowing depth (mm)")]
        public double SowingDepth { get; set; }
        [Description("Row spacing (mm)")]
        public double RowSpacing { get; set; }
        [Description("Plant population (/m2)")]
        public double Population { get; set; }
        
        


        [EventSubscribe("DoManagement")]
        private void OnDoManagement(object sender, EventArgs e)
        {
        
            
            if (DateUtilities.WithinDates(SowDate, Clock.Today, SowDate))
            {
                Wheat.Sow(population: Population, cultivar: CultivarName, depth: SowingDepth, rowSpacing: RowSpacing);    
                if(SowDate == "17-May")
                {
                    Wheat.Phenology.SetEmergenceDate("30-May");
                }
                if(SowDate == "31-May")
                {
                    Wheat.Phenology.SetEmergenceDate("10-Jun");
                }
                if(SowDate == "23-Jun")
                {
                    Wheat.Phenology.SetEmergenceDate("5-Jul");
                }
            }
        
        }
        
    }
}
```
              Manager Harvesting: same as Validation.SE Queensland.APS26.APS26NRate160WaterWet.paddock.Harvesting
              Manager AutoIrrigate: same as Validation.SE Queensland.Gatton94.Gatton94Base.Field.AutoIrrigate
              Operations ApplyFertiliser: same as Validation.SE Queensland.Gatton94.Gatton94Base.Field.ApplyFertiliser
              Report SowingReport
              Manager SetCropParams
            Manager LocationInfo
              Country = Australia
              State = Queensland
              Region = NSW North East QLD South East
              script: same as in Validation.SE Queensland.APS26.APS26NRate160WaterWet.LocationInfo
        Experiment Bungunya2012
          Memo
            INSERT TEXT HERE
          Factors
            Permutation
              Factor Cv: Specification=[Sowing].Script.CultivarName = Janz, Lang, Gregory
              Factor TOS: Specification=[Sowing].Script.SowDate = 10-May, 22-May, 23-Jun
          Simulation Bungunya2012Base
            Clock: Start=2012-04-01; End=2012-12-30
            Summary summaryfile
            Weather: FileName=Bungunya2012.met; Latitude=-28.43; Tav=21.17; Amp=16.8
            SoilArbitrator Soil Arbitrator
            Zone Field: Area=1; Slope=0; AspectAngle=0; Altitude=50
              Irrigation
              Fertiliser
              Soil APS6Field: same as Validation.SE Queensland.Gatton94.Gatton94Base.Field.APS6Field
              SurfaceOrganicMatter: InitialResidueName=wheat_stubble; InitialResidueType=wheat; InitialResidueMass=500; InitialStandingFraction=0; InitialCPR=0; InitialCNR=100
              Plant Wheat
              MicroClimate: a_interception=0; b_interception=1; c_interception=0; d_interception=0; SoilHeatFluxFraction=0.4; MinimumHeightDiffForNewLayer=0; NightInterceptionFraction=0.5; ReferenceHeight=2
              Report DailyReport
              Report HarvestReport
              Manager Sowing
                SowDate =
                CultivarName = Hartog
                SowingDepth = 40
                RowSpacing = 250
                Population = 100
```csharp
using Models.Soils.Nutrients;
using System;
using Models.Core;
using Models.PMF;
using Models.Soils;
using Models.Soils.Nutrients;
using Models.Utilities;
using APSIM.Shared.Utilities;

namespace Models
{
    [Serializable]
    public class Script : Model
    {
        [Link] Clock Clock;
        [Link] Fertiliser Fertiliser;
        [Link] Summary Summary;
        [Link] Plant Wheat;
        [Link] Soil Soil;
        Accumulator accumulatedRain;
        
        [Description("Sowing date (d-mmm)")]
        public string SowDate { get; set; }
        [Description("Cultivar to be sown")]
        public string CultivarName { get; set; }
        [Description("Sowing depth (mm)")]
        public double SowingDepth { get; set; }
        [Description("Row spacing (mm)")]
        public double RowSpacing { get; set; }
        [Description("Plant population (/m2)")]
        public double Population { get; set; }
        
        


        [EventSubscribe("DoManagement")]
        private void OnDoManagement(object sender, EventArgs e)
        {
        
            
            if (DateUtilities.WithinDates(SowDate, Clock.Today, SowDate))
            {
                Wheat.Sow(population: Population, cultivar: CultivarName, depth: SowingDepth, rowSpacing: RowSpacing);    
                if(SowDate == "10-May")
                {
                    Wheat.Phenology.SetEmergenceDate("21-May");
                }
                if(SowDate == "22-May")
                {
                    Wheat.Phenology.SetEmergenceDate("3-Jun");
                }
                if(SowDate == "23-Jun")
                {
                    Wheat.Phenology.SetEmergenceDate("6-Jul");
                }
            }
        
        }
        
    }
}
```
              Manager Harvesting: same as Validation.SE Queensland.APS26.APS26NRate160WaterWet.paddock.Harvesting
              Manager AutoIrrigate: same as Validation.SE Queensland.Gatton94.Gatton94Base.Field.AutoIrrigate
              Operations ApplyFertiliser: same as Validation.SE Queensland.Gatton94.Gatton94Base.Field.ApplyFertiliser
              Report SowingReport
              Manager SetCropParams
            Manager LocationInfo: same as Validation.SE Queensland.AddingValueToNVT.Nagwee2012.Nangwee2012Base.LocationInfo
      PredictedObserved SEQObsPred: PredictedTableName=HarvestReport; ObservedTableName=Observed; FieldNameUsedForMatch=SimulationName; FieldName2UsedForMatch=Wheat.Phenology.CurrentStageName; AllColumns=false
      Folder Phenology1996
        Memo
          This dataset includes observed heading date for six cultivars (Batavia, Cunningham, Hartog, Janz, Sunbri, Suneca) for a range of locations and planting dates in the northern grain-growing region of Australia.
        Experiment Goondiwindi1996
          Factors
            Permutation
              Factor Cv
                Specification=[Sowing].Script.CultivarName = Batavia, Cunningham, Hartog, Janz, Sunbri, Suneca
              Factor TOS: Specification=[Sowing].Script.SowDate = 16-Apr, 24-May, 30-Jun
          Simulation Goondiwindi1996Base
            Clock: Start=1996-04-01; End=1996-12-31
            Summary summaryfile
            Weather: FileName=Goondiwindi1996.met; Latitude=-28.52; Tav=19.31; Amp=14.6
            SoilArbitrator Soil Arbitrator
            Zone Field: same as Validation.SE Queensland.Gatton94.Gatton94Base.Field
            Manager LocationInfo: same as Validation.SE Queensland.AddingValueToNVT.Nagwee2012.Nangwee2012Base.LocationInfo
        Experiment Miles1996
          Factors
            Permutation
              Factor Cv
                Specification=[Sowing].Script.CultivarName = Batavia, Cunningham, Hartog, Janz, Sunbri, Suneca
              Factor TOS
                Specification=[Sowing].Script.SowDate = 18-Apr, 11-May, 1-Jun, 21-Jun, 16-Jul
          Simulation Miles1996Base
            Clock: Start=1996-04-01; End=1996-12-04
            Summary summaryfile
            Weather: FileName=miles96.met; Latitude=-26.67; Tav=20.0345; Amp=14.7337
            SoilArbitrator Soil Arbitrator
            Zone Field: same as Validation.SE Queensland.Gatton94.Gatton94Base.Field
            Manager LocationInfo: same as Validation.SE Queensland.AddingValueToNVT.Nagwee2012.Nangwee2012Base.LocationInfo
        Experiment Emerald1996
          Factors
            Permutation
              Factor Cv
                Specification=[Sowing].Script.CultivarName = Batavia, Cunningham, Hartog, Janz, Sunbri, Suneca
              Factor TOS: Specification=[Sowing].Script.SowDate = 11-Apr, 6-May, 21-May, 16-Jun
          Simulation Emerald1996Base
            Clock: Start=1996-04-01; End=1996-12-04
            Summary summaryfile
            Weather: FileName=emer96.met; Latitude=-23.52; Tav=22.9165; Amp=12.5261
            SoilArbitrator Soil Arbitrator
            Zone Field: same as Validation.SE Queensland.Gatton94.Gatton94Base.Field
            Manager LocationInfo
              Country = Australia
              State = Queensland
              Region = QLD Central Zone
              script: same as in Validation.SE Queensland.APS26.APS26NRate160WaterWet.LocationInfo
        Experiment Biloela1996
          Factors
            Permutation
              Factor Cv
                Specification=[Sowing].Script.CultivarName = Batavia, Cunningham, Hartog, Janz, Sunbri, Suneca
              Factor TOS
                Specification=[Sowing].Script.SowDate = 11-Apr, 29-Apr, 15-May, 13-Jun, 16-Jul
          Simulation Biloela1996Base
            Clock: Start=1996-04-01; End=1996-12-04
            Summary summaryfile
            Weather: FileName=Biloela1996.met; Latitude=-24.38; Tav=21.49; Amp=13.27
            SoilArbitrator Soil Arbitrator
            Zone Field: same as Validation.SE Queensland.Gatton94.Gatton94Base.Field
            Manager LocationInfo: same as Validation.SE Queensland.Phenology1996.Emerald1996.Emerald1996Base.LocationInfo
        Experiment Moree1996
          Factors
            Permutation
              Factor Cv
                Specification=[Sowing].Script.CultivarName = Batavia, Cunningham, Hartog, Janz, Sunbri, Suneca
              Factor TOS: Specification=[Sowing].Script.SowDate = 7-May, 16-May, 18-Jul
          Simulation Moree1996Base
            Clock: Start=1996-04-01; End=1996-12-31
            Summary summaryfile
            Weather: FileName=moree96.met; Latitude=-29.49; Tav=18.69; Amp=14.72
            SoilArbitrator Soil Arbitrator
            Zone Field: same as Validation.SE Queensland.Gatton94.Gatton94Base.Field
            Manager LocationInfo: same as Validation.SE Queensland.AddingValueToNVT.Goondiwindi2011.Goondiwindi2011Base.LocationInfo
    Folder Western Australia
      Memo
        The wheat belt of Western Australia has a Mediteranean climate (winter dominant rainfall patterns) with mostly sandy soils.  Data from [Asseng1998163].   and some more recent studies have been included to extend the range of conditions studied and to include more modern cultivars.
      Experiment Mer86
        Factors
          Permutation
            Factor NRate: Specification=[FertiliserOperations]
              Operations 15
                1986-06-14  [Fertiliser].Apply(Amount: 15, Type: Fertiliser.Types.NO3N, Depth: 50);
              Operations 60
                1986-05-29  [Fertiliser].Apply(Amount: 30, Type: Fertiliser.Types.NO3N, Depth: 50);
            Factor Water: Specification=[IrrigationOperations]
              Operations Dry
                1986-09-03  [Irrigation].Apply (amount:0);
                1986-09-05  [Irrigation].Apply (amount:0);
                1986-09-10  [Irrigation].Apply (amount:0);
                1986-09-11  [Irrigation].Apply (amount:0);
                1986-09-14  [Irrigation].Apply (amount:0);
                1986-09-16  [Irrigation].Apply (amount:0);
                1986-09-18  [Irrigation].Apply (amount:0);
                1986-09-21  [Irrigation].Apply (amount:0);
                1986-09-23  [Irrigation].Apply (amount:0);
                1986-09-24  [Irrigation].Apply (amount:0);
                1986-09-30  [Irrigation].Apply (amount:0);
                1986-10-02  [Irrigation].Apply (amount:0);
                1986-10-04  [Irrigation].Apply (amount:0);
                1986-10-10  [Irrigation].Apply (amount:0);
                1986-10-12  [Irrigation].Apply (amount:0);
                1986-10-14  [Irrigation].Apply (amount:0);
                1986-10-16  [Irrigation].Apply (amount:0);
                1986-10-18  [Irrigation].Apply (amount:0);
                1986-10-20  [Irrigation].Apply (amount:0);
                1986-10-22  [Irrigation].Apply (amount:0);
                1986-10-25  [Irrigation].Apply (amount:0);
                1986-10-26  [Irrigation].Apply (amount:0);
                1986-10-28  [Irrigation].Apply (amount:0);
                1986-10-30  [Irrigation].Apply (amount:0);
                1986-11-01  [Irrigation].Apply (amount:0);
                1986-11-03  [Irrigation].Apply (amount:0);
                1986-11-05  [Irrigation].Apply (amount:0);
                1986-11-07  [Irrigation].Apply (amount:0);
              Operations Wet
                1986-09-03  [Irrigation].Apply (amount:10);
                1986-09-05  [Irrigation].Apply (amount:20);
                1986-09-10  [Irrigation].Apply (amount:20);
                1986-09-11  [Irrigation].Apply (amount:10);
                1986-09-14  [Irrigation].Apply (amount:10);
                1986-09-16  [Irrigation].Apply (amount:10);
                1986-09-18  [Irrigation].Apply (amount:10);
                1986-09-21  [Irrigation].Apply (amount:10);
                1986-09-23  [Irrigation].Apply (amount:10);
                1986-09-24  [Irrigation].Apply (amount:20);
                1986-09-30  [Irrigation].Apply (amount:30);
                1986-10-02  [Irrigation].Apply (amount:20);
                1986-10-04  [Irrigation].Apply (amount:20);
                1986-10-10  [Irrigation].Apply (amount:20);
                1986-10-12  [Irrigation].Apply (amount:20);
                1986-10-14  [Irrigation].Apply (amount:20);
                1986-10-16  [Irrigation].Apply (amount:20);
                1986-10-18  [Irrigation].Apply (amount:20);
                1986-10-20  [Irrigation].Apply (amount:20);
                1986-10-22  [Irrigation].Apply (amount:20);
                1986-10-25  [Irrigation].Apply (amount:20);
                1986-10-26  [Irrigation].Apply (amount:20);
                1986-10-28  [Irrigation].Apply (amount:20);
                1986-10-30  [Irrigation].Apply (amount:20);
                1986-11-01  [Irrigation].Apply (amount:20);
                1986-11-03  [Irrigation].Apply (amount:20);
                1986-11-05  [Irrigation].Apply (amount:20);
                1986-11-07  [Irrigation].Apply (amount:20);
        Simulation Mer86Base
          Clock: Start=1986-05-01; End=1986-11-30
          Summary summaryfile
          Weather: FileName=MER-86.met; Latitude=-31.483; Tav=18.2; Amp=13.8
          Zone paddock: Area=1; Slope=0; AspectAngle=0; Altitude=50
            Soil MER-86Field: SoilType=sand; LocalName=Merredin; Site=Merredin; NearestTown=Unknown; Region=WA; NaturalVegetation=Unknown; Latitude=0; Longitude=0
              Physical
                Thickness  BD    AirDry  LL15  DUL   SAT
                100        1.7   0.03    0.03  0.16  0.26
                100        1.75  0.03    0.03  0.21  0.26
                100        1.8   0.03    0.03  0.22  0.25
                100        1.85  0.04    0.05  0.23  0.24
                100        1.85  0.04    0.1   0.22  0.23
                100        1.85  0.04    0.12  0.22  0.22
                100        1.85  0.04    0.17  0.22  0.22
                200        1.85  0.04    0.17  0.22  0.23
                200        1.85  0.04    0.17  0.22  0.23
                200        1.85  0.04    0.17  0.22  0.23
                SoilCrop WheatSoil
                  LL=[0.03, 0.03, 0.03, 0.05, 0.1, 0.12, 0.17, 0.17, 0.17, 0.17]
                  KL=[0.06, 0.06, 0.06, 0.06, 0.06, 0.06, 0.06, 0.06, 0.06, 0.06]
                  XF=[0.2, 0.6, 0.6, 0.6, 0.6, 0.6, 0.6, 0.6, 0.6, 0.6]
              WaterBalance SoilWater: SummerDate=1-Nov; SummerU=6; SummerCona=2; WinterDate=1-Apr; WinterU=6; WinterCona=2; DiffusConst=88; DiffusSlope=35; Salb=0.13; CN2Bare=60; CNRed=20; CNCov=0.8; DischargeWidth=0; CatchmentArea=0; PSIDul=-100
                Thickness  SWCON  KLAT
                100        1      0
                100        1      0
                100        1      0
                100        1      0
                100        0.3    0
                100        1      0
                100        1      0
                200        1      0
                200        1      0
                200        1      0
              Organic: FOMCNRatio=40; CarbonUnits=Total
                Thickness  Carbon  SoilCNRatio  FBiom  FInert  FOM
                100        0.5     13           0.04   0.1     237.652
                100        0.1     13           0.03   0.1     188.677
                100        0.1     13           0.02   0.2     149.795
                100        0.05    13           0.01   0.8     118.926
                100        0.05    13           0.01   0.9     94.4178
                100        0.05    13           0.01   0.9     74.9605
                100        0.05    13           0.01   0.9     59.5128
                200        0.05    13           0.01   0.9     37.5117
                200        0.05    13           0.01   0.9     23.6441
                200        0.05    13           0.01   0.9     14.9032
              Chemical: Thickness=[100, 100, 100, 100, 100, 100, 100, 200, 200, 200]; PH=[4.7, 4.7, 4.7, 6, 6, 6, 6, 6, 6, 6]; PHUnits=Water
              Water: Thickness=[100, 100, 100, 100, 100, 100, 100, 200, 200, 200]; InitialValues=[0.03, 0.03, 0.07, 0.1, 0.22, 0.22, 0.22, 0.22, 0.21, 0.19]; InitialPAWmm=58; RelativeTo=LL15; FilledFromTop=false
              CERESSoilTemperature Temperature
              Nutrient
              Solute NO3: Thickness=[100, 100, 100, 100, 100, 100, 100, 200, 200, 200]; InitialValues=[10, 5, 0.3, 0, 0, 0, 0, 0, 0, 0]; InitialValuesUnits=ppm; WaterTableConcentration=0; D0=0; DepthConstant=0; MaxDepthSoluteAccessible=0; RunoffEffectivenessAtMovingSolute=0; MaxEffectiveRunoff=0
              Solute NH4: Thickness=[100, 100, 100, 100, 100, 100, 100, 200, 200, 200]; InitialValues=[5, 3, 1, 0, 0, 0, 0, 0, 0, 0]; InitialValuesUnits=ppm; WaterTableConcentration=0; D0=0; DepthConstant=0; MaxDepthSoluteAccessible=0; RunoffEffectivenessAtMovingSolute=0; MaxEffectiveRunoff=0
              Solute Urea: Thickness=[100, 100, 100, 100, 100, 100, 100, 200, 200, 200]; InitialValues=[0, 0, 0, 0, 0, 0, 0, 0, 0, 0]; InitialValuesUnits=kg/ha; WaterTableConcentration=0; D0=0; DepthConstant=0; MaxDepthSoluteAccessible=0; RunoffEffectivenessAtMovingSolute=0; MaxEffectiveRunoff=0
            Irrigation
            SurfaceOrganicMatter: InitialResidueName=wheat_stubble; InitialResidueType=wheat; InitialResidueMass=0; InitialStandingFraction=0; InitialCPR=0; InitialCNR=80
            Operations SowingOperations
              1986-05-29  [Wheat].Sow(population:149, cultivar:"Gutha", depth:30, rowSpacing:250);
            Plant Wheat
            MicroClimate: a_interception=0; b_interception=1; c_interception=0; d_interception=0; SoilHeatFluxFraction=0.4; MinimumHeightDiffForNewLayer=0; NightInterceptionFraction=0.5; ReferenceHeight=2
            MicroClimate MicroClimate1: a_interception=0; b_interception=1; c_interception=0; d_interception=0; SoilHeatFluxFraction=0.4; MinimumHeightDiffForNewLayer=0; NightInterceptionFraction=0.5; ReferenceHeight=2
            Fertiliser
            Operations FertiliserOperations
              1986-06-14  [Fertiliser].Apply(Amount: 15, Type: Fertiliser.Types.NO3N, Depth: 50);
            Operations IrrigationOperations: same as Validation.Western Australia.Mer86.Factors.Permutation.Water.Wet
            Report DailyReport
            Report HarvestReport
            Manager Harvesting
```csharp
using Models.PMF.Phen;
using APSIM.Shared.Utilities;
using System.Xml.Serialization;
using Models;
using Models.PMF;
using Models.Soils;
using System.Text;
using System.Collections.Generic;
using Models.Core;
using System;
using Models.Soils.Nutrients;

namespace Models
{
    [Serializable] 
    public class Script : Model
    {
        [Link] private Plant Wheat;
        [Link(Type = LinkType.Path, Path = "[Wheat].Phenology")]
        private Phenology phenology;
        [EventSubscribe("DoManagement")]
        private void OnDoManagement(object sender, EventArgs e)
        {
            if (phenology.CurrentPhase.Name == "ReadyForHarvesting")
            {
                Wheat.Harvest();
                Wheat.EndCrop();
            }
        }
    }
}
```
            Report SowingReport
            Manager SetCropParams
          SoilArbitrator Soil Arbitrator
          Manager LocationInfo
            Country = Australia
            State = Western Australia
            Region = WA Eastern Zone
            script: same as in Validation.SE Queensland.APS26.APS26NRate160WaterWet.LocationInfo
      Experiment Mer73
        Factors
          Permutation
            Factor NRate: Specification=[FertiliserOperations]
              Operations 0
                1986-06-14  [Fertiliser].Apply(Amount: 0, Type: Fertiliser.Types.NO3N, Depth: 50);
              Operations 15
                1973-06-21  [Fertiliser].Apply(Amount: 15, Type: Fertiliser.Types.NO3N, Depth: 50);
            Factor Water: Specification=[IrrigationOperations]
              Operations Dry: same as Validation.Western Australia.Mer86.Factors.Permutation.Water.Dry
              Operations 40
                1973-09-21  [Irrigation].Apply (amount:40);
              Operations 150
                1973-08-28  [Irrigation].Apply (amount:20);
                1973-09-21  [Irrigation].Apply (amount:30);
                1973-10-12  [Irrigation].Apply (amount:50);
                1973-10-28  [Irrigation].Apply (amount:50);
        Simulation Mer73Base
          Clock: Start=1973-05-01; End=1973-11-30
          Summary summaryfile
          Weather: FileName=MER-73.met; Latitude=-31.483; Tav=18.2; Amp=13.8
          Zone paddock: Area=1; Slope=0; AspectAngle=0; Altitude=50
            Soil MER-73Field: SoilType=sand; LocalName=Merredin; Site=Merredin; NearestTown=Unknown; Region=WA; NaturalVegetation=Unknown; Latitude=0; Longitude=0
              Physical
                Thickness  BD    AirDry  LL15  DUL   SAT
                100        1.7   0.03    0.03  0.15  0.28
                100        1.85  0.03    0.04  0.2   0.27
                100        1.75  0.03    0.04  0.2   0.27
                100        1.7   0.04    0.05  0.2   0.25
                100        1.7   0.04    0.05  0.21  0.25
                100        1.85  0.04    0.08  0.21  0.25
                100        1.95  0.04    0.11  0.21  0.25
                200        2     0.04    0.14  0.21  0.23
                200        2     0.04    0.16  0.23  0.23
                200        2     0.04    0.14  0.23  0.23
                SoilCrop WheatSoil
                  LL=[0.03, 0.03, 0.03, 0.05, 0.1, 0.12, 0.17, 0.17, 0.17, 0.17]
                  KL=[0.06, 0.06, 0.06, 0.06, 0.06, 0.06, 0.06, 0.06, 0.06, 0.06]
                  XF=[0.2, 0.2, 0.4, 0.4, 0.4, 0.4, 0.4, 0.4, 0.2, 0]
              WaterBalance SoilWater: SummerDate=1-Nov; SummerU=6; SummerCona=2; WinterDate=1-Apr; WinterU=6; WinterCona=2; DiffusConst=88; DiffusSlope=35; Salb=0.13; CN2Bare=60; CNRed=20; CNCov=0.8; DischargeWidth=0; CatchmentArea=0; PSIDul=-100
                Thickness  SWCON  KLAT
                100        1      0
                100        1      0
                100        1      0
                100        1      0
                100        0.1    0
                100        1      0
                100        1      0
                200        1      0
                200        1      0
                200        1      0
              Organic: FOMCNRatio=20; CarbonUnits=Total
                Thickness  Carbon  SoilCNRatio  FBiom  FInert  FOM
                100        1.2     13           0.04   0.1     356.478
                100        0.8     13           0.03   0.1     283.016
                100        0.3     13           0.02   0.2     224.693
                100        0.05    13           0.01   0.8     178.389
                100        0.05    13           0.01   0.9     141.627
                100        0.05    13           0.01   0.9     112.441
                100        0.05    13           0.01   0.9     89.2692
                200        0.05    13           0.01   0.9     56.2676
                200        0.05    13           0.01   0.9     35.4662
                200        0.05    13           0.01   0.9     22.3548
              Chemical: Thickness=[100, 100, 100, 100, 100, 100, 100, 200, 200, 200]; PH=[4.7, 4.7, 4.7, 6, 6, 6, 6, 6, 6, 6]; PHUnits=Water
              Water: Thickness=[100, 100, 100, 100, 100, 100, 100, 200, 200, 200]; InitialValues=[0.03, 0.03, 0.07, 0.1, 0.22, 0.22, 0.22, 0.22, 0.21, 0.19]; InitialPAWmm=85; RelativeTo=LL15; FilledFromTop=false
              CERESSoilTemperature Temperature
              Nutrient
              Solute NO3: Thickness=[100, 100, 100, 100, 100, 100, 100, 200, 200, 200]; InitialValues=[2, 1, 0, 0, 0, 0, 0, 0, 0, 0]; InitialValuesUnits=ppm; WaterTableConcentration=0; D0=0; DepthConstant=0; MaxDepthSoluteAccessible=0; RunoffEffectivenessAtMovingSolute=0; MaxEffectiveRunoff=0
              Solute NH4: Thickness=[100, 100, 100, 100, 100, 100, 100, 200, 200, 200]; InitialValues=[1, 0, 0, 0, 0, 0, 0, 0, 0, 0]; InitialValuesUnits=ppm; WaterTableConcentration=0; D0=0; DepthConstant=0; MaxDepthSoluteAccessible=0; RunoffEffectivenessAtMovingSolute=0; MaxEffectiveRunoff=0
              Solute Urea: same as Validation.Western Australia.Mer86.Mer86Base.paddock.MER-86Field.Urea
            Irrigation
            SurfaceOrganicMatter: InitialResidueName=wheat_stubble; InitialResidueType=wheat; InitialResidueMass=2500; InitialStandingFraction=0; InitialCPR=0; InitialCNR=30
            Operations SowingOperations
              1973-06-21  [Wheat].Sow(population:100, cultivar:"Gamenya", depth:30, rowSpacing:250);
            Plant Wheat
            MicroClimate: a_interception=0; b_interception=1; c_interception=0; d_interception=0; SoilHeatFluxFraction=0.4; MinimumHeightDiffForNewLayer=0; NightInterceptionFraction=0.5; ReferenceHeight=2
            Fertiliser
            Operations FertiliserOperations
              1986-06-14  [Fertiliser].Apply(Amount: 15, Type: Fertiliser.Types.NO3N, Depth: 50);
            Operations IrrigationOperations: same as Validation.Western Australia.Mer86.Factors.Permutation.Water.Wet
            Report HarvestReport
            Manager Harvesting: same as Validation.SE Queensland.APS26.APS26NRate160WaterWet.paddock.Harvesting
            Report DailyReport
            Report SowingReport
            Manager SetCropParams
          SoilArbitrator Soil Arbitrator
          Manager LocationInfo: same as Validation.Western Australia.Mer86.Mer86Base.LocationInfo
      Experiment Cunderdin97
        Factors
          Permutation
            Factor Sow: Specification=[SowingSchedule]
              Operations SpearEarly
                1997-06-06  [Wheat].Sow(population:150, cultivar:"Spear", depth:30, rowSpacing:250);
              Operations SpearMid
                1997-07-08  [Wheat].Sow(population:108, cultivar:"Spear", depth:30, rowSpacing:250);
              Operations WilgoyneEarly
                1997-06-06  [Wheat].Sow(population:150, cultivar:"Wilgoyne", depth:30, rowSpacing:250);
              Operations WilgoyneMid
                1997-07-08  [Wheat].Sow(population:108, cultivar:"Wilgoyne", depth:30, rowSpacing:250);
              Operations WilgoyneLate
                1997-07-30  [Wheat].Sow(population:100, cultivar:"Wilgoyne", depth:30, rowSpacing:250);
            Factor SowN: Specification=[SowingFertiliser].Script.Amount=0,50
            Factor TopN: Specification=[TopdressFertiliser].Script.Amount=0,30
            Factor Irr: Specification=[IrrigationSchedule]
              Operations Wet
                1997-09-23  [Irrigation].Apply(amount:15);
                1997-10-01  [Irrigation].Apply(amount:15);
                1997-10-06  [Irrigation].Apply(amount:15);
                1997-10-14  [Irrigation].Apply(amount:20);
                1997-10-21  [Irrigation].Apply(amount:17.5);
                1997-10-26  [Irrigation].Apply(amount:17.5);
              Operations Dry
        Simulation Cunderdin97Base
          Clock: Start=1997-04-16; End=1997-12-30
          Summary summaryfile
          Weather: FileName=Cunderdin.met; Latitude=-31.65; Tav=18.2; Amp=13.8
          SoilArbitrator Soil Arbitrator
          Zone paddock: Area=1; Slope=0; AspectAngle=0; Altitude=50
            Irrigation
            Soil: SoilType=heavy; LocalName=Beverley; Site=Cunderdin; NearestTown=Cunderdin; Region=WA; NaturalVegetation=Unknown; Latitude=0; Longitude=0
              Physical
                Thickness  BD   AirDry  LL15   DUL    SAT
                50         1.3  0.034   0.07   0.156  0.48
                50         1.3  0.034   0.07   0.156  0.48
                100        1.4  0.121   0.121  0.22   0.44
                100        1.4  0.123   0.123  0.224  0.44
                100        1.5  0.132   0.132  0.243  0.4
                100        1.5  0.132   0.132  0.243  0.4
                100        1.5  0.135   0.135  0.243  0.4
                100        1.5  0.145   0.145  0.243  0.4
                200        1.5  0.145   0.145  0.243  0.4
                200        1.5  0.145   0.145  0.243  0.4
                200        1.5  0.145   0.145  0.243  0.4
                200        1.5  0.145   0.145  0.243  0.4
                200        1.5  0.145   0.145  0.243  0.4
                200        1.5  0.145   0.145  0.243  0.4
                200        1.5  0.145   0.145  0.243  0.4
                200        1.5  0.145   0.145  0.243  0.4
                200        1.5  0.145   0.145  0.243  0.4
                SoilCrop wheatSoil
                  LL=[0.07, 0.07, 0.121, 0.123, 0.132, 0.132, 0.135, 0.145, 0.145, 0.145, 0.145, 0.145, 0.145, 0.145, 0.145, 0.145, 0.145]
                  KL=[0.06, 0.06, 0.05, 0.05, 0.04, 0.04, 0.04, 0.04, 0.03, 0.03, 0.03, 0.03, 0.03, 0.03, 0.03, 0.03, 0.03]
                  XF=[0.7, 0.6, 0.5, 0.5, 0.5, 0.5, 0.5, 0.5, 0.3, 0.3, 0.3, 0.3, 0.3, 0.3, 0.3, 0.3, 0.3]
              WaterBalance SoilWater: SummerDate=1-Nov; SummerU=7.5; SummerCona=3; WinterDate=1-Apr; WinterU=2; WinterCona=2; DiffusConst=88; DiffusSlope=35; Salb=0.13; CN2Bare=25; CNRed=20; CNCov=0.8; DischargeWidth=0; CatchmentArea=0; PSIDul=-100
                Thickness  SWCON  KLAT
                50         0.6    0
                50         0.6    0
                100        0.6    0
                100        0.6    0
                100        0.6    0
                100        0.6    0
                100        0.6    0
                100        0.6    0
                200        0.6    0
                200        0.6    0
                200        0.6    0
                200        0.6    0
                200        0.6    0
                200        0.6    0
                200        0.6    0
                200        0.6    0
                200        0.6    0
              Organic: FOMCNRatio=40; CarbonUnits=Total
                Thickness  Carbon  SoilCNRatio  FBiom  FInert  FOM
                50         0.73    13           0.03   0.3     69.1755
                50         0.73    13           0.03   0.3     65.1471
                100        0.46    13           0.02   0.3     57.7803
                100        0.39    13           0.01   0.4     51.2465
                100        0.3     13           0.01   0.8     45.4516
                100        0.22    13           0.01   0.9     40.3119
                100        0.19    13           0.01   0.9     35.7535
                100        0.19    13           0.01   0.9     31.7105
                200        0.1     13           0.01   0.9     24.9443
                200        0.1     13           0.01   0.9     19.6219
                200        0.1     13           0.01   0.9     15.4351
                200        0.1     13           0.01   0.9     12.1417
                200        0.1     13           0.01   0.9     9.55101
                200        0.1     13           0.01   0.9     7.51309
                200        0.1     13           0.01   0.9     5.91001
                200        0.1     13           0.01   0.9     4.64898
                200        0.1     13           0.01   0.9     3.65701
              Chemical: PH=[4.7, 4.7, 4.7, 4.7, 6, 6, 6, 6, 6, 6, 6, 6, 6, 6, 6, 6, 6]; PHUnits=Water
                Thickness=[50, 50, 100, 100, 100, 100, 100, 100, 200, 200, 200, 200, 200, 200, 200, 200, 200]
              Water: InitialPAWmm=84.9; RelativeTo=LL15; FilledFromTop=false
                Thickness=[50, 50, 100, 100, 100, 100, 100, 100, 200, 200, 200, 200, 200, 200, 200, 200, 200]
                InitialValues=[0.034, 0.156, 0.22, 0.224, 0.244, 0.245, 0.246, 0.243, 0.24, 0.145, 0.145, 0.145, 0.145, 0.145, 0.145, 0.145, 0.145]
              CERESSoilTemperature Temperature
              Nutrient
              Solute NO3: InitialValues=[23, 23, 12, 9, 9, 9, 9, 6, 6, 6, 6, 6, 2, 2, 2, 2, 2]; InitialValuesUnits=ppm; WaterTableConcentration=0; D0=0; DepthConstant=0; MaxDepthSoluteAccessible=0; RunoffEffectivenessAtMovingSolute=0; MaxEffectiveRunoff=0
                Thickness=[50, 50, 100, 100, 100, 100, 100, 100, 200, 200, 200, 200, 200, 200, 200, 200, 200]
              Solute NH4: InitialValues=[2, 2, 1, 2, 1, 1, 1, 1, 1, 1, 1, 1, 1, 1, 1, 1, 1]; InitialValuesUnits=ppm; WaterTableConcentration=0; D0=0; DepthConstant=0; MaxDepthSoluteAccessible=0; RunoffEffectivenessAtMovingSolute=0; MaxEffectiveRunoff=0
                Thickness=[50, 50, 100, 100, 100, 100, 100, 100, 200, 200, 200, 200, 200, 200, 200, 200, 200]
              Solute Urea: InitialValues=[0, 0, 0, 0, 0, 0, 0, 0, 0, 0, 0, 0, 0, 0, 0, 0, 0]; InitialValuesUnits=kg/ha; WaterTableConcentration=0; D0=0; DepthConstant=0; MaxDepthSoluteAccessible=0; RunoffEffectivenessAtMovingSolute=0; MaxEffectiveRunoff=0
                Thickness=[50, 50, 100, 100, 100, 100, 100, 100, 200, 200, 200, 200, 200, 200, 200, 200, 200]
            SurfaceOrganicMatter: InitialResidueName=wheat_stubble; InitialResidueType=wheat; InitialResidueMass=500; InitialStandingFraction=0; InitialCPR=0; InitialCNR=120
            Fertiliser
            Plant Wheat
            Operations IrrigationSchedule: same as Validation.SE Queensland.APS14.APS14StubbleBareNRate0.paddock.IrrigationSchedule
            MicroClimate: a_interception=0; b_interception=1; c_interception=0; d_interception=0; SoilHeatFluxFraction=0.4; MinimumHeightDiffForNewLayer=0; NightInterceptionFraction=0.5; ReferenceHeight=2
            Operations SowingSchedule
              1993-06-29  [Wheat].Sow(population:114, cultivar:"Hartog", depth:30, rowSpacing:250);
            Manager SowingFertiliser
              Amount = 160
```csharp
using Models.Soils;
using System;
using Models.Core;
using Models.PMF;
using APSIM.Shared.Utilities;

namespace Models
{
    [Serializable]
    public class Script : Model
    {
        [Link] Clock Clock;
        [Link] Fertiliser Fertiliser;
        [Link] Summary Summary;
        
        [Description("Amount of fertiliser to be applied")]
        public double Amount { get; set; }

        [EventSubscribe("Sowing")]
        private void OnSowing(object sender, EventArgs e)
        {
            Fertiliser.Apply(Amount: Amount, Type: Fertiliser.Types.NO3N);
        }
        
    }
}
```
            Manager TopdressFertiliser
              FertDayOfYear = 239
              Amount = 0
              script: same as in Validation.SE Queensland.APS26.APS26NRate160WaterWet.paddock.ApplyFertiliser
            Report DailyReport
            Report HarvestReport
            Manager Harvesting: same as Validation.SE Queensland.APS26.APS26NRate160WaterWet.paddock.Harvesting
            Report SowingReport
            Manager SetCropParams
          Manager LocationInfo
            Country = Australia
            State = Western Australia
            Region = WA Central Zone
            script: same as in Validation.SE Queensland.APS26.APS26NRate160WaterWet.LocationInfo
      Experiment Wongan83
        Factors
          Permutation
            Factor Soil
              CompositeFactor Ripped: Specifications=[Physical]
                Physical
                  Thickness  BD    AirDry  LL15  DUL   SAT
                  50         1.31  0.04    0.07  0.11  0.35
                  50         1.31  0.05    0.07  0.11  0.35
                  100        1.45  0.05    0.08  0.14  0.35
                  200        1.48  0.05    0.09  0.14  0.35
                  200        1.53  0.05    0.09  0.15  0.35
                  200        1.5   0.05    0.09  0.15  0.35
                  400        1.5   0.05    0.1   0.16  0.35
                  400        1.5   0.05    0.11  0.17  0.35
                  600        1.5   0.05    0.13  0.17  0.35
                  600        1.5   0.05    0.13  0.17  0.35
                  SoilCrop WheatSoil
                    LL=[0.08, 0.08, 0.09, 0.1, 0.11, 0.12, 0.12, 0.12, 0.14, 0.14]
                    KL=[0.06, 0.06, 0.06, 0.06, 0.06, 0.06, 0.06, 0.06, 0.06, 0.06]
                    XF=[1, 1, 1, 1, 1, 1, 1, 1, 1, 1]
              CompositeFactor UnRipped: Specifications=[Physical]
                Physical
                  Thickness  BD    AirDry  LL15  DUL   SAT
                  50         1.31  0.04    0.07  0.13  0.35
                  50         1.31  0.05    0.07  0.13  0.35
                  100        1.45  0.05    0.08  0.14  0.35
                  200        1.48  0.05    0.09  0.14  0.35
                  200        1.53  0.05    0.09  0.15  0.35
                  200        1.5   0.05    0.09  0.15  0.35
                  400        1.5   0.05    0.1   0.16  0.35
                  400        1.5   0.05    0.11  0.17  0.35
                  600        1.5   0.05    0.13  0.17  0.35
                  600        1.5   0.05    0.13  0.17  0.35
                  SoilCrop WheatSoil
                    LL=[0.08, 0.08, 0.09, 0.1, 0.11, 0.12, 0.12, 0.12, 0.14, 0.14]
                    KL=[0.06, 0.06, 0.06, 0.06, 0.06, 0.06, 0.06, 0.06, 0.06, 0.06]
                    XF=[0.2, 0.2, 0.2, 0.7, 1, 1, 1, 1, 1, 1]
            Factor N: Specification=[SowingFertiliser].Script.Amount=0,10,25,50,100
        Simulation WonganBase
          Clock: Start=1983-06-13; End=1983-12-01
          Summary summaryfile
          Weather: FileName=Wongan83.met; Latitude=-30.9; Tav=18.6; Amp=14
          Zone paddock: Area=1; Slope=0; AspectAngle=0; Altitude=50
            Irrigation
            Soil WonganSoil: SoilType=sand; LocalName=WonganSite; Site=WonganSite; NearestTown=Unknown; Region=WA; NaturalVegetation=Unknown; Latitude=0; Longitude=0
              Physical: same as Validation.Western Australia.Wongan83.Factors.Permutation.Soil.UnRipped.Physical
              WaterBalance SoilWater: SummerDate=1-Nov; SummerU=6; SummerCona=2; WinterDate=1-Apr; WinterU=2; WinterCona=2; DiffusConst=88; DiffusSlope=35; Salb=0.13; CN2Bare=60; CNRed=20; CNCov=0.8; PSIDul=-100; Thickness=[50, 50, 100, 200, 200, 200, 400, 400, 600, 600]
                SWCON=[0.35, 0.35, 0.35, 0.35, 0.35, 0.35, 0.35, 0.35, 0.35, 0.35]
              Organic: FOMCNRatio=40; CarbonUnits=Total
                Thickness  Carbon  SoilCNRatio  FBiom  FInert  FOM
                50         1.23    13           0.04   0.1     292.785
                50         0.43    13           0.04   0.1     277.513
                100        0.37    13           0.03   0.1     249.317
                200        0.26    13           0.02   0.2     201.228
                200        0.21    13           0.01   0.8     162.415
                200        0.2     13           0.01   0.9     131.088
                400        0.18    13           0.01   0.9     85.3957
                400        0.18    13           0.01   0.9     55.6301
                600        0.17    13           0.01   0.9     29.2496
                600        0.17    13           0.01   0.9     15.3791
              Chemical: Thickness=[50, 50, 100, 200, 200, 200, 400, 400, 600, 600]; PH=[4.7, 5.1, 5.1, 6, 6, 6, 6, 6, 6, 6]; PHUnits=Water
              Water: Thickness=[50, 50, 100, 200, 200, 200, 400, 400, 600, 600]; InitialValues=[0.07, 0.07, 0.13, 0.14, 0.14, 0.11, 0.1, 0.11, 0.12, 0.13]; InitialPAWmm=23; RelativeTo=LL15; FilledFromTop=false
              CERESSoilTemperature Temperature
              Nutrient
              Solute NO3: Thickness=[50, 50, 100, 200, 200, 200, 400, 400, 600, 600]; InitialValues=[7, 7, 5, 3, 2, 2, 2, 1, 1, 1]; InitialValuesUnits=ppm; WaterTableConcentration=0; D0=0; DepthConstant=0; MaxDepthSoluteAccessible=0; RunoffEffectivenessAtMovingSolute=0; MaxEffectiveRunoff=0
              Solute NH4: Thickness=[50, 50, 100, 200, 200, 200, 400, 400, 600, 600]; InitialValues=[2, 2, 1, 1, 0, 0, 0, 0, 0, 0]; InitialValuesUnits=ppm; WaterTableConcentration=0; D0=0; DepthConstant=0; MaxDepthSoluteAccessible=0; RunoffEffectivenessAtMovingSolute=0; MaxEffectiveRunoff=0
              Solute Urea: Thickness=[50, 50, 100, 200, 200, 200, 400, 400, 600, 600]; InitialValues=[0, 0, 0, 0, 0, 0, 0, 0, 0, 0]; InitialValuesUnits=kg/ha; WaterTableConcentration=0; D0=0; DepthConstant=0; MaxDepthSoluteAccessible=0; RunoffEffectivenessAtMovingSolute=0; MaxEffectiveRunoff=0
            SurfaceOrganicMatter: InitialResidueName=wheat_stubble; InitialResidueType=wheat; InitialResidueMass=1000; InitialStandingFraction=0; InitialCPR=0; InitialCNR=20
            Fertiliser
            Plant Wheat
            MicroClimate: a_interception=0; b_interception=1; c_interception=0; d_interception=0; SoilHeatFluxFraction=0.4; MinimumHeightDiffForNewLayer=0; NightInterceptionFraction=0.5; ReferenceHeight=2
            Operations SowingSchedule
              1983-06-14  [Wheat].Sow(population:159, cultivar:"gamenya", depth:80, rowSpacing:250);
              1983-12-01  [Wheat].Harvest();
              1983-12-01  [Wheat].EndCrop();
            Manager SowingFertiliser
              Amount = 0
              script: same as in Validation.Western Australia.Cunderdin97.Cunderdin97Base.paddock.SowingFertiliser
            Report HarvestReport
            Report DailyReport
            Report SowingReport
            Manager SetCropParams
          SoilArbitrator Soil Arbitrator
          Manager LocationInfo: same as Validation.Western Australia.Cunderdin97.Cunderdin97Base.LocationInfo
      PredictedObserved WAtObsPred: PredictedTableName=HarvestReport; ObservedTableName=Observed; FieldNameUsedForMatch=SimulationName; FieldName2UsedForMatch=Wheat.Phenology.CurrentStageName; AllColumns=false
    Folder Turkey
      Memo
        The dataset of [Tari2016] includes 4 irrigation deficit treatments applied at each of 3 plant growth stages.  The experiment was conducted at Konya in the Central Anatolia region of Turkey. Yields ranged from 2.88 t/ha to 6.82 t/ha.  These treatments were reproduced over two growing seasons, resulting in 44 individual wheat crops including differing levels of water stress at different stages of development.  Soil data have been estimated from that provided within the original publication.
      Experiment Konya09
        Factors
          Factor Water: Specification=[IrrigationSchedule]
            Operations AAA
              2010-04-09  [Irrigation].Apply(amount:150);
              2010-05-06  [Irrigation].Apply(amount:154);
              2010-05-26  [Irrigation].Apply(amount:152);
            Operations BAA
              2010-04-09  [Irrigation].Apply(amount:97);
              2010-05-06  [Irrigation].Apply(amount:154);
              2010-05-26  [Irrigation].Apply(amount:152);
            Operations CAA
              2010-04-09  [Irrigation].Apply(amount:52);
              2010-05-06  [Irrigation].Apply(amount:154);
              2010-05-26  [Irrigation].Apply(amount:152);
            Operations DAA
              2010-04-09  [Irrigation].Apply(amount:0);
              2010-05-06  [Irrigation].Apply(amount:154);
              2010-05-26  [Irrigation].Apply(amount:152);
            Operations ABA
              2010-04-09  [Irrigation].Apply(amount:150);
              2010-05-06  [Irrigation].Apply(amount:100);
              2010-05-26  [Irrigation].Apply(amount:152);
            Operations ACA
              2010-04-09  [Irrigation].Apply(amount:150);
              2010-05-06  [Irrigation].Apply(amount:54);
              2010-05-26  [Irrigation].Apply(amount:152);
            Operations ADA
              2010-04-09  [Irrigation].Apply(amount:150);
              2010-05-06  [Irrigation].Apply(amount:0);
              2010-05-26  [Irrigation].Apply(amount:152);
            Operations AAB
              2010-04-09  [Irrigation].Apply(amount:150);
              2010-05-06  [Irrigation].Apply(amount:154);
              2010-05-26  [Irrigation].Apply(amount:98);
            Operations AAC
              2010-04-09  [Irrigation].Apply(amount:150);
              2010-05-06  [Irrigation].Apply(amount:154);
              2010-05-26  [Irrigation].Apply(amount:53);
            Operations AAD
              2010-04-09  [Irrigation].Apply(amount:150);
              2010-05-06  [Irrigation].Apply(amount:154);
              2010-05-26  [Irrigation].Apply(amount:0);
            Operations ABB
              2010-04-09  [Irrigation].Apply(amount:150);
              2010-05-06  [Irrigation].Apply(amount:100);
              2010-05-26  [Irrigation].Apply(amount:99);
            Operations ACC
              2010-04-09  [Irrigation].Apply(amount:150);
              2010-05-06  [Irrigation].Apply(amount:54);
              2010-05-26  [Irrigation].Apply(amount:53);
            Operations ADD
              2010-04-09  [Irrigation].Apply(amount:150);
              2010-05-06  [Irrigation].Apply(amount:0);
              2010-05-26  [Irrigation].Apply(amount:0);
            Operations BAB
              2010-04-09  [Irrigation].Apply(amount:97);
              2010-05-06  [Irrigation].Apply(amount:154);
              2010-05-26  [Irrigation].Apply(amount:99);
            Operations CAC
              2010-04-09  [Irrigation].Apply(amount:52);
              2010-05-06  [Irrigation].Apply(amount:154);
              2010-05-26  [Irrigation].Apply(amount:53);
            Operations DAD
              2010-04-09  [Irrigation].Apply(amount:0);
              2010-05-06  [Irrigation].Apply(amount:154);
              2010-05-26  [Irrigation].Apply(amount:0);
            Operations BBA
              2010-04-09  [Irrigation].Apply(amount:97);
              2010-05-06  [Irrigation].Apply(amount:100);
              2010-05-26  [Irrigation].Apply(amount:152);
            Operations CCA
              2010-04-09  [Irrigation].Apply(amount:52);
              2010-05-06  [Irrigation].Apply(amount:54);
              2010-05-26  [Irrigation].Apply(amount:152);
            Operations DDA
              2010-04-09  [Irrigation].Apply(amount:0);
              2010-05-06  [Irrigation].Apply(amount:0);
              2010-05-26  [Irrigation].Apply(amount:152);
            Operations BBB
              2010-04-09  [Irrigation].Apply(amount:97);
              2010-05-06  [Irrigation].Apply(amount:100);
              2010-05-26  [Irrigation].Apply(amount:99);
            Operations CCC
              2010-04-09  [Irrigation].Apply(amount:52);
              2010-05-06  [Irrigation].Apply(amount:54);
              2010-05-26  [Irrigation].Apply(amount:53);
            Operations DDD
              2010-04-09  [Irrigation].Apply(amount:0);
              2010-05-06  [Irrigation].Apply(amount:0);
              2010-05-26  [Irrigation].Apply(amount:0);
        Simulation Konya09
          Clock: Start=2009-11-12; End=2010-07-30
          Summary summaryfile
          Weather: FileName=Konya.met; Latitude=38; Tav=12.9; Amp=26.7
          SoilArbitrator Soil Arbitrator
          Zone paddock: Area=1; Slope=0; AspectAngle=0; Altitude=50
            Irrigation
            Fertiliser
            SurfaceOrganicMatter: InitialResidueName=wheat; InitialResidueType=wheat; InitialResidueMass=1000; InitialStandingFraction=0; InitialCPR=0; InitialCNR=80
            Plant Wheat
            Operations CropSchedule
              2009-11-12  [Wheat].Sow(population:360, cultivar:"Konya", depth:20, rowSpacing:135);
              2009-11-12  [Fertiliser].Apply(Amount: 80, Type: Fertiliser.Types.UreaN);
              2010-02-01  [Fertiliser].Apply(Amount: 80, Type: Fertiliser.Types.UreaN);
              2010-07-14  [Wheat].Harvest();
              2010-07-14  [Wheat].EndCrop();
            Operations IrrigationSchedule
            MicroClimate: a_interception=0; b_interception=1; c_interception=0; d_interception=0; SoilHeatFluxFraction=0.4; MinimumHeightDiffForNewLayer=0; NightInterceptionFraction=0.5; ReferenceHeight=2
            Soil: Site=Konya; NearestTown=Konya; Region=Central Anatolia; Country=Turkey; Latitude=0; Longitude=0
              Physical
                Thickness  BD    AirDry  LL15  DUL    SAT
                150        1.56  0.05    0.12  0.253  0.411
                150        1.56  0.12    0.12  0.253  0.411
                300        1.56  0.12    0.12  0.253  0.41
                300        1.56  0.12    0.12  0.253  0.41
                300        1.56  0.12    0.12  0.25   0.4
                400        1.56  0.12    0.12  0.25   0.4
                400        1.56  0.12    0.12  0.25   0.4
                SoilCrop WheatSoil: LL=[0.12, 0.12, 0.12, 0.12, 0.25, 0.25, 0.25]; KL=[0.06, 0.06, 0.04, 0.02, 0.02, 0.01, 0.01]; XF=[1, 1, 1, 1, 1, 1, 1]
              WaterBalance SoilWater: SummerDate=1-Apr; SummerU=6; SummerCona=3.5; WinterDate=1-Nov; WinterU=2; WinterCona=2; DiffusConst=44; DiffusSlope=16; Salb=0.13; CN2Bare=75; CNRed=20; CNCov=0.8; PSIDul=-100; Thickness=[150, 150, 300, 300, 300, 300, 300, 300]; SWCON=[0.5, 0.4, 0.3, 0.3, 0.2, 0.1, 0.1, 0.1]
              Organic: FOMCNRatio=45; CarbonUnits=Total
                Thickness  Carbon  SoilCNRatio  FBiom  FInert  FOM
                150        1       12.5         0.03   0.4     468.708
                150        0.5     12.5         0.02   0.6     378.303
                300        0.5     12.5         0.02   0.7     246.441
                300        0.5     12.5         0.02   0.8     160.541
                300        0.5     12.5         0.01   0.9     104.583
                300        0.5     12.5         0.01   0.9     68.1294
                300        0.5     12.5         0.01   1       44.3822
                300        0.5     12.5         0.01   1       28.9123
              Chemical: Thickness=[150, 150, 300, 300, 300, 300, 300, 300]; PH=[7.9, 7.9, 7.9, 8, 8, 8, 8, 8]; PHUnits=Water
              Water: Thickness=[150, 150, 300, 300, 300, 400, 400]; InitialValues=[0.253, 0.253, 0.253, 0.253, 0.25, 0.25, 0.25]; InitialPAWmm=262.7; RelativeTo=LL15; FilledFromTop=false
              CERESSoilTemperature Temperature
              Nutrient
              Solute NO3: Thickness=[150, 150, 300, 300, 300, 300, 300, 300]; InitialValues=[10, 10, 10, 10, 2, 2, 2, 2]; InitialValuesUnits=ppm; WaterTableConcentration=0; D0=0; DepthConstant=0; MaxDepthSoluteAccessible=0; RunoffEffectivenessAtMovingSolute=0; MaxEffectiveRunoff=0
              Solute NH4: Thickness=[150, 150, 300, 300, 300, 300, 300, 300]; InitialValues=[0, 0, 0, 0, 0, 0, 0, 0]; InitialValuesUnits=ppm; WaterTableConcentration=0; D0=0; DepthConstant=0; MaxDepthSoluteAccessible=0; RunoffEffectivenessAtMovingSolute=0; MaxEffectiveRunoff=0
              Solute Urea: Thickness=[150, 150, 300, 300, 300, 300, 300, 300]; InitialValues=[0, 0, 0, 0, 0, 0, 0, 0]; InitialValuesUnits=kg/ha; WaterTableConcentration=0; D0=0; DepthConstant=0; MaxDepthSoluteAccessible=0; RunoffEffectivenessAtMovingSolute=0; MaxEffectiveRunoff=0
            Report DailyReport
            Report HarvestReport
            Report SowingReport
            Manager SetCropParams
          Manager LocationInfo
            Country =
            State =
            Region =
            script: same as in Validation.SE Queensland.APS26.APS26NRate160WaterWet.LocationInfo
      Experiment Konya11
        Factors
          Factor Water: Specification=[IrrigationSchedule]
            Operations AAA
              2012-04-16  [Irrigation].Apply(amount:100);
              2012-05-21  [Irrigation].Apply(amount:148);
              2012-06-08  [Irrigation].Apply(amount:161);
            Operations BAA
              2012-04-16  [Irrigation].Apply(amount:65);
              2012-05-21  [Irrigation].Apply(amount:148);
              2012-06-08  [Irrigation].Apply(amount:161);
            Operations CAA
              2012-04-16  [Irrigation].Apply(amount:35);
              2012-05-21  [Irrigation].Apply(amount:148);
              2012-06-08  [Irrigation].Apply(amount:161);
            Operations DAA
              2012-04-16  [Irrigation].Apply(amount:0);
              2012-05-21  [Irrigation].Apply(amount:148);
              2012-06-08  [Irrigation].Apply(amount:161);
            Operations ABA
              2012-04-16  [Irrigation].Apply(amount:100);
              2012-05-21  [Irrigation].Apply(amount:96);
              2012-06-08  [Irrigation].Apply(amount:161);
            Operations ACA
              2012-04-16  [Irrigation].Apply(amount:100);
              2012-05-21  [Irrigation].Apply(amount:52);
              2012-06-08  [Irrigation].Apply(amount:161);
            Operations ADA
              2012-04-16  [Irrigation].Apply(amount:100);
              2012-05-21  [Irrigation].Apply(amount:0);
              2012-06-08  [Irrigation].Apply(amount:161);
            Operations AAB
              2012-04-16  [Irrigation].Apply(amount:100);
              2012-05-21  [Irrigation].Apply(amount:148);
              2012-06-08  [Irrigation].Apply(amount:105);
            Operations AAC
              2012-04-16  [Irrigation].Apply(amount:100);
              2012-05-21  [Irrigation].Apply(amount:148);
              2012-06-08  [Irrigation].Apply(amount:56);
            Operations AAD
              2012-04-16  [Irrigation].Apply(amount:100);
              2012-05-21  [Irrigation].Apply(amount:148);
              2012-06-08  [Irrigation].Apply(amount:0);
            Operations ABB
              2012-04-16  [Irrigation].Apply(amount:100);
              2012-05-21  [Irrigation].Apply(amount:96);
              2012-06-08  [Irrigation].Apply(amount:105);
            Operations ACC
              2012-04-16  [Irrigation].Apply(amount:100);
              2012-05-21  [Irrigation].Apply(amount:52);
              2012-06-08  [Irrigation].Apply(amount:56);
            Operations ADD
              2012-04-16  [Irrigation].Apply(amount:100);
              2012-05-21  [Irrigation].Apply(amount:0);
              2012-06-08  [Irrigation].Apply(amount:0);
            Operations BAB
              2012-04-16  [Irrigation].Apply(amount:65);
              2012-05-21  [Irrigation].Apply(amount:148);
              2012-06-08  [Irrigation].Apply(amount:105);
            Operations CAC
              2012-04-16  [Irrigation].Apply(amount:35);
              2012-05-21  [Irrigation].Apply(amount:148);
              2012-06-08  [Irrigation].Apply(amount:56);
            Operations DAD
              2012-04-16  [Irrigation].Apply(amount:0);
              2012-05-21  [Irrigation].Apply(amount:148);
              2012-06-08  [Irrigation].Apply(amount:0);
            Operations BBA
              2012-04-16  [Irrigation].Apply(amount:65);
              2012-05-21  [Irrigation].Apply(amount:96);
              2012-06-08  [Irrigation].Apply(amount:161);
            Operations CCA
              2012-04-16  [Irrigation].Apply(amount:35);
              2012-05-21  [Irrigation].Apply(amount:52);
              2012-06-08  [Irrigation].Apply(amount:161);
            Operations DDA
              2012-04-16  [Irrigation].Apply(amount:0);
              2012-05-21  [Irrigation].Apply(amount:0);
              2012-06-08  [Irrigation].Apply(amount:161);
            Operations BBB
              2012-04-16  [Irrigation].Apply(amount:65);
              2012-05-21  [Irrigation].Apply(amount:96);
              2012-06-08  [Irrigation].Apply(amount:105);
            Operations CCC
              2012-04-16  [Irrigation].Apply(amount:35);
              2012-05-21  [Irrigation].Apply(amount:52);
              2012-06-08  [Irrigation].Apply(amount:56);
            Operations DDD
              2012-04-16  [Irrigation].Apply(amount:0);
              2012-05-21  [Irrigation].Apply(amount:0);
              2012-06-08  [Irrigation].Apply(amount:0);
        Simulation Konya11
          Clock: Start=2011-11-16; End=2012-07-30
          Summary summaryfile
          Weather: FileName=Konya.met; Latitude=38; Tav=12.9; Amp=26.7
          SoilArbitrator Soil Arbitrator
          Zone paddock: Area=1; Slope=0; AspectAngle=0; Altitude=50
            Irrigation
            Fertiliser
            SurfaceOrganicMatter: InitialResidueName=canola; InitialResidueType=canola; InitialResidueMass=1000; InitialStandingFraction=0; InitialCPR=0; InitialCNR=80
            Plant Wheat
            Operations CropSchedule
              2011-11-16  [Wheat].Sow(population:360, cultivar:"Konya", depth:50, rowSpacing:135);
              2011-11-16  [Fertiliser].Apply(Amount: 80, Type: Fertiliser.Types.UreaN);
              2012-02-01  [Fertiliser].Apply(Amount: 80, Type: Fertiliser.Types.UreaN);
              2012-07-16  [Wheat].Harvest();
              2012-07-16  [Wheat].EndCrop();
            Operations IrrigationSchedule
            MicroClimate: a_interception=0; b_interception=1; c_interception=0; d_interception=0; SoilHeatFluxFraction=0.4; MinimumHeightDiffForNewLayer=0; NightInterceptionFraction=0.5; ReferenceHeight=2
            Soil: Site=Konya; NearestTown=Konya; Region=Central Anatolia; Country=Turkey; Latitude=0; Longitude=0
              Physical: same as Validation.Turkey.Konya09.Konya09.paddock.Soil.Physical
              WaterBalance SoilWater: SummerDate=1-Apr; SummerU=6; SummerCona=3.5; WinterDate=1-Nov; WinterU=2; WinterCona=2; DiffusConst=44; DiffusSlope=16; Salb=0.13; CN2Bare=84; CNRed=20; CNCov=0.8; PSIDul=-100; Thickness=[150, 150, 300, 300, 300, 300, 300, 300]; SWCON=[0.5, 0.4, 0.3, 0.3, 0.2, 0.1, 0.1, 0.1]
              Organic: same as Validation.Turkey.Konya09.Konya09.paddock.Soil.Organic
              Chemical: Thickness=[150, 150, 300, 300, 300, 300, 300, 300]; PH=[7.9, 7.9, 7.9, 8, 8, 8, 8, 8]; PHUnits=Water
              Water: Thickness=[150, 150, 300, 300, 300, 400, 400]; InitialValues=[0.253, 0.253, 0.253, 0.253, 0.25, 0.25, 0.25]; InitialPAWmm=262.7; RelativeTo=LL15; FilledFromTop=false
              CERESSoilTemperature Temperature
              Nutrient
              Solute NO3: same as Validation.Turkey.Konya09.Konya09.paddock.Soil.NO3
              Solute NH4: same as Validation.Turkey.Konya09.Konya09.paddock.Soil.NH4
              Solute Urea: same as Validation.Turkey.Konya09.Konya09.paddock.Soil.Urea
            Report DailyReport
            Report HarvestReport
            Report SowingReport
            Manager SetCropParams
          Manager LocationInfo: same as Validation.Turkey.Konya09.Konya09.LocationInfo
    Folder New Zealand
      Experiment PalmerstonNorth1989
        Memo
          The design, management and yield results of this trial have been described in full by [Craigie_Wheat_2015].  In brief, this trial was conducted to assess the impact of earlier sowing on potential yields of 'Wakanui' wheat grown at Wakanui (the cultivar was named after the area) in Mid Canterbury, New Zealand.  it was a 4 x 4 factorial with 4 replicates of the following treatments:

          1. Sowing date (20 February, 10 March, 28 March, 23 April)
          2. Sowing density (50,100,150 and 200 plants/m^2^

          In addition to yield, measurements of leaf appearance and senescence and canopy cover (measured with NDVI)  were measured at 10 - 14 day intervals and biomass measurements were taken at growth stages 32 and 65.

          Considerable canopy decay was observed during the winter for the early sown treatments and we have not introduced mechanisms into the model to capture this yet so there is a genral over prediction of canopy size and biomass in these first sowing dates.
        Factors
          Permutation
            Factor Sow
              Specification=[Sowing].Script.SowDate = 2-Jun,24-Jul,18-Sep,25-Nov,21-Feb,5-Apr
            Factor Cv: Specification=[Sowing].Script.CultivarName = BattenSpring,Otane,Rongotea
        Simulation PalmerstonNorth1989Base
          Clock: Start=1989-06-01; End=1991-06-01
          Summary summaryfile
          Weather: FileName=PalmerstonNorth.met; Latitude=-40.35; Tav=13.9; Amp=25
          Zone paddock: Area=1; Slope=0; AspectAngle=0; Altitude=50
            Folder Manager folder
              Manager Sowing
                SowDate =
                CultivarName = Wakanui
                SowingDepth = 15
                RowSpacing = 150
                Population = 150
```csharp
using Models.Soils.Nutrients;
using System;
using Models.Core;
using Models.PMF;
using Models.Soils;
using Models.Soils.Nutrients;
using Models.Utilities;
using APSIM.Shared.Utilities;

namespace Models
{
    [Serializable]
    public class Script : Model
    {
        [Link] Clock Clock;
        [Link] Summary Summary;
        [Link] Soil Soil;
        [Link] Plant Wheat;
        Accumulator accumulatedRain;
        
        [Description("Sowing date (d-mmm)")]
        public string SowDate { get; set; }
        [Description("Cultivar to be sown")]
        public string CultivarName { get; set; }
        [Description("Sowing depth (mm)")]
        public double SowingDepth { get; set; }
        [Description("Row spacing (mm)")]
        public double RowSpacing { get; set; }
        [Description("Plant population (/m2)")]
        public double Population { get; set; }

        public bool IsSown {get;set;}

        [EventSubscribe("StartOfSimulation")]
        private void OnStartOfSimulation(object sender, EventArgs e)
        {
            IsSown = false;
        }

        [EventSubscribe("DoManagement")]
        private void OnDoManagement(object sender, EventArgs e)
        {
            if ((DateUtilities.WithinDates(SowDate, Clock.Today, SowDate))&&IsSown==false)
            {
                IsSown=true;
                Wheat.Sow(population: Population, cultivar: CultivarName, depth: SowingDepth, rowSpacing: RowSpacing);    
            }
        }
        
    }
}
```
              Operations HarvestEvents
                1991-02-04  [Wheat].Harvest();
                1991-02-04  [Wheat].EndCrop();
            Irrigation
            Soil: SoilType=LincolnSoil; LocalName=Lincoln; Site=Lincoln; NearestTown=Unknown; Region=NZ; NaturalVegetation=Unknown; Latitude=0; Longitude=0
              Physical
                Thickness  BD   AirDry  LL15  DUL   SAT
                100        1.3  0.05    0.08  0.31  0.44
                200        1.3  0.05    0.07  0.3   0.44
                200        1.3  0.05    0.07  0.28  0.44
                200        1.3  0.05    0.09  0.31  0.44
                200        1.3  0.05    0.11  0.3   0.44
                200        1.3  0.05    0.16  0.28  0.44
                200        1.3  0.05    0.15  0.3   0.44
                200        1.3  0.05    0.12  0.34  0.44
                1000       1.3  0.05    0.12  0.34  0.44
                SoilCrop WheatSoil: LL=[0.08, 0.07, 0.07, 0.09, 0.11, 0.16, 0.15, 0.12, 0.12]; KL=[0.06, 0.06, 0.06, 0.06, 0.03, 0.02, 0.02, 0.02, 0.02]; XF=[1, 1, 1, 1, 1, 1, 1, 1, 1]
              WaterBalance SoilWater: SummerDate=1-Nov; SummerU=7; SummerCona=3; WinterDate=1-Apr; WinterU=7; WinterCona=3; DiffusConst=40; DiffusSlope=16; Salb=0.2; CN2Bare=75; CNRed=20; CNCov=0.8; DischargeWidth=0; CatchmentArea=0; PSIDul=-100
                Thickness  SWCON  KLAT
                100        0.6    0
                200        0.6    0
                200        0.6    0
                200        0.6    0
                200        0.6    0
                200        0.6    0
                200        0.6    0
                200        0.6    0
              Organic: FOMCNRatio=15; CarbonUnits=Total
                Thickness  Carbon  SoilCNRatio  FBiom  FInert  FOM
                100        4       11           0.04   0.31    1031.07
                200        3       11           0.03   0.4     691.146
                200        2       11           0.02   0.5     463.289
                200        1       11           0.01   0.6     310.552
                200        1       11           0.01   0.7     208.169
                200        1       11           0.01   0.9     139.54
                200        0.9     11           0.01   0.99    93.5364
                200        0.9     11           0.01   0.99    62.6993
              Chemical: Thickness=[100, 200, 200, 200, 200, 200, 200, 200]; PH=[6, 6, 6, 6, 6, 6, 6, 6]; PHUnits=Water
              Water: Thickness=[100, 200, 200, 200, 200, 200, 200, 200]; InitialValues=[0.24, 0.27, 0.26, 0.23, 0.24, 0.23, 0.23, 0.18]; InitialPAWmm=190; RelativeTo=LL15; FilledFromTop=false
              CERESSoilTemperature Temperature
              Nutrient
              Solute NO3: Thickness=[100, 200, 200, 200, 200, 200, 200, 200]; InitialValuesUnits=ppm; WaterTableConcentration=0; D0=0; DepthConstant=0; MaxDepthSoluteAccessible=0; RunoffEffectivenessAtMovingSolute=0; MaxEffectiveRunoff=0
                InitialValues=[30.7692, 11.5385, 7.69231, 3.84615, 3.84615, 3.84615, 3.84615, 3.84615]
              Solute NH4: Thickness=[100, 200, 200, 200, 200, 200, 200, 200]; InitialValues=[1.3, 1, 1, 0.8, 0.8, 0.5, 0.5, 0.5]; InitialValuesUnits=ppm; WaterTableConcentration=0; D0=0; DepthConstant=0; MaxDepthSoluteAccessible=0; RunoffEffectivenessAtMovingSolute=0; MaxEffectiveRunoff=0
              Solute Urea: Thickness=[100, 200, 200, 200, 200, 200, 200, 200]; InitialValues=[0, 0, 0, 0, 0, 0, 0, 0]; InitialValuesUnits=kg/ha; WaterTableConcentration=0; D0=0; DepthConstant=0; MaxDepthSoluteAccessible=0; RunoffEffectivenessAtMovingSolute=0; MaxEffectiveRunoff=0
            SurfaceOrganicMatter Surface Organic Matter: InitialResidueName=wheat_stubble; InitialResidueType=whiteclover; InitialResidueMass=1000; InitialStandingFraction=0; InitialCPR=0; InitialCNR=25
            Fertiliser
            MicroClimate: a_interception=0; b_interception=1; c_interception=0; d_interception=0; SoilHeatFluxFraction=0.4; MinimumHeightDiffForNewLayer=0; NightInterceptionFraction=0.5; ReferenceHeight=2
            Plant Wheat
            Report DailyReport
            Report HarvestReport
            Report SowingReport
            Manager SetCropParams
          SoilArbitrator Soil Arbitrator
          Manager LocationInfo
            Country = New Zealand
            State = Manawatu-Wanganui Region
            Region =
            script: same as in Validation.SE Queensland.APS26.APS26NRate160WaterWet.LocationInfo
      Experiment Lincoln9192
        Memo
          This is a water response trial run in the rain out shelter at Plant and Food Research in Lincoln, New Zealand.  It is described in full by [Jamieson_WaterResponse_1995] but briefly.  A winter crop of 'Batten' wheat was sown at 300 plants/m^2^ on the 8th of June 1991 and range of irrigation amount and timing treatments were applied.  Six of these treatments have been included in this validation:

          01. Full irrigation where measured ET was replaced weekly
          03. Short Early Drought where irrigation was withheld from sowing until late October then full irrigation was applied
          05. Long Early Drought where irrigation was withheld from sowing until mid December then full irrigation was applied
          06. Long Late Drought where full irrigation was applied from sowing until mid September then withheld for the rest of the season
          07. Moderate Late Drought where full irrigation was applied from sowing until mid October then withheld for the rest of the season
          08. Short Late Drought where full irrigation was applied from sowing until Early November then withheld for the rest of the season
          11. Nil where no water was applied and the crop grew on soil stored water only.

          Irrigation was applied at weekly intervals through and assemply of low rate drip emitters on each plot.  Soil water content was measured weekly with a neutron probe and biomass was measured at 10 - 14 day intervals.  Samples throughtout the crop were from two 0.1m^2^ quatrants and the final harvest sample was from a 1 m^2^ quadrant.  Each treatment was replicated twice and there was considerable soil variation from plot to plot so each treatment was initianilised with unique soil parameters which best described the soil they were growing on.
        Factors
          Factor Irrig
            CompositeFactor 01
              Specifications:
                [IrrigationEvents]
                [Physical]
                [Water].Thickness=200,200,200,200,200,200,200,200
                [Water].InitialValues=0.27,0.3,0.28,0.25,0.24,0.27,0.27,0.21
              Operations IrrigationEvents
                1991-06-10  [Irrigation].Apply(7);
                1991-08-16  [Irrigation].Apply(7);
                1991-08-29  [Irrigation].Apply(20);
                1991-09-07  [Irrigation].Apply(12);
                1991-09-12  [Irrigation].Apply(22);
                1991-09-19  [Irrigation].Apply(4);
                1991-09-26  [Irrigation].Apply(7);
                1991-10-03  [Irrigation].Apply(27);
                1991-10-10  [Irrigation].Apply(18);
                1991-10-17  [Irrigation].Apply(30);
                1991-10-24  [Irrigation].Apply(42);
                1991-10-31  [Irrigation].Apply(33);
                1991-11-07  [Irrigation].Apply(24);
                1991-11-14  [Irrigation].Apply(28);
                1991-11-21  [Irrigation].Apply(37);
                1991-11-27  [Irrigation].Apply(51);
                1991-12-05  [Irrigation].Apply(36);
                1991-12-12  [Irrigation].Apply(38);
                1991-12-19  [Irrigation].Apply(35);
                1991-12-26  [Irrigation].Apply(47);
                1992-01-03  [Irrigation].Apply(40);
                1992-01-09  [Irrigation].Apply(41);
              Physical
                Thickness  BD   AirDry  LL15  DUL   SAT
                200        1.3  0.08    0.08  0.29  0.44
                200        1.3  0.07    0.07  0.3   0.4
                200        1.3  0.07    0.07  0.28  0.4
                200        1.3  0.09    0.09  0.26  0.38
                200        1.3  0.11    0.11  0.26  0.38
                200        1.3  0.16    0.16  0.28  0.38
                200        1.3  0.15    0.15  0.27  0.38
                200        1.3  0.12    0.12  0.22  0.38
                SoilCrop WheatSoil: LL=[0.08, 0.07, 0.07, 0.09, 0.11, 0.16, 0.15, 0.12]; KL=[0.05, 0.03, 0.02, 0.03, 0.03, 0.03, 0.01, 0.01]; XF=[1, 1, 1, 1, 1, 1, 1, 1]
            CompositeFactor 03
              Specifications:
                [IrrigationEvents]
                [Physical]
                [Water].Thickness=200,200,200,200,200,200,200,200
                [Water].InitialValues=0.279,0.2677,0.2491,0.2705,0.311,0.2536,0.2764,0.1422
              Operations IrrigationEvents
                1991-06-10  [Irrigation].Apply(7);
                1991-08-16  [Irrigation].Apply(7);
                1991-08-29  [Irrigation].Apply(20);
                1991-09-26  [Irrigation].Apply(7);
                1991-10-24  [Irrigation].Apply(42);
                1991-10-31  [Irrigation].Apply(33);
                1991-11-07  [Irrigation].Apply(24);
                1991-11-14  [Irrigation].Apply(28);
                1991-11-21  [Irrigation].Apply(37);
                1991-11-27  [Irrigation].Apply(51);
                1991-12-05  [Irrigation].Apply(36);
                1991-12-12  [Irrigation].Apply(38);
                1991-12-19  [Irrigation].Apply(35);
                1991-12-26  [Irrigation].Apply(47);
                1992-01-03  [Irrigation].Apply(40);
                1992-01-09  [Irrigation].Apply(41);
              Physical
                Thickness  BD   AirDry  LL15  DUL     SAT
                200        1.3  0.05    0.08  0.279   0.44
                200        1.3  0.05    0.12  0.2677  0.44
                200        1.3  0.05    0.12  0.26    0.44
                200        1.3  0.05    0.12  0.2705  0.44
                200        1.3  0.05    0.15  0.311   0.44
                200        1.3  0.05    0.16  0.2536  0.44
                200        1.3  0.05    0.15  0.2764  0.44
                200        1.3  0.05    0.08  0.1422  0.44
                SoilCrop WheatSoil: LL=[0.08, 0.12, 0.12, 0.12, 0.15, 0.16, 0.15, 0.08]; KL=[0.05, 0.03, 0.02, 0.03, 0.03, 0.03, 0.01, 0.01]; XF=[1, 1, 1, 1, 1, 1, 1, 1]
            CompositeFactor 05
              Specifications:
                [IrrigationEvents]
                [Physical]
                [Water].Thickness=200,200,200,200,200,200,200,200
                [Water].InitialValues=0.2655,0.27,0.209,0.3114,0.3079,0.3007,0.2871,0.3117
              Operations IrrigationEvents
                1991-06-10  [Irrigation].Apply(7);
                1991-08-16  [Irrigation].Apply(7);
                1991-08-29  [Irrigation].Apply(20);
                1991-09-26  [Irrigation].Apply(7);
                1991-12-19  [Irrigation].Apply(35);
                1991-12-26  [Irrigation].Apply(47);
                1992-01-03  [Irrigation].Apply(40);
              Physical
                Thickness  BD   AirDry  LL15  DUL     SAT
                200        1.3  0.06    0.06  0.31    0.44
                200        1.3  0.09    0.09  0.3     0.44
                200        1.3  0.07    0.07  0.28    0.44
                200        1.3  0.12    0.12  0.3114  0.44
                200        1.3  0.16    0.16  0.3079  0.44
                200        1.3  0.16    0.16  0.3007  0.44
                200        1.3  0.15    0.15  0.2871  0.44
                200        1.3  0.16    0.16  0.3117  0.44
                SoilCrop WheatSoil: LL=[0.06, 0.09, 0.07, 0.12, 0.16, 0.16, 0.15, 0.16]; KL=[0.05, 0.03, 0.02, 0.03, 0.03, 0.03, 0.01, 0.01]; XF=[1, 1, 1, 1, 1, 1, 1, 1]
            CompositeFactor 06
              Specifications:
                [IrrigationEvents]
                [Physical]
                [Water].Thickness=200,200,200,200,200,200,200,200
                [Water].InitialValues=0.2805,0.2796,0.27,0.296,0.231,0.2453,0.2042,0.156
              Operations IrrigationEvents
                1991-06-10  [Irrigation].Apply(7);
                1991-08-16  [Irrigation].Apply(7);
                1991-08-29  [Irrigation].Apply(20);
                1991-09-07  [Irrigation].Apply(12);
                1991-09-12  [Irrigation].Apply(22);
                1991-09-19  [Irrigation].Apply(14);
                1991-09-26  [Irrigation].Apply(7);
              Physical
                Thickness  BD   AirDry  LL15  DUL    SAT
                200        1.3  0.08    0.08  0.281  0.44
                200        1.3  0.08    0.08  0.28   0.44
                200        1.3  0.09    0.09  0.27   0.44
                200        1.3  0.12    0.12  0.296  0.44
                200        1.3  0.11    0.11  0.231  0.44
                200        1.3  0.16    0.16  0.245  0.44
                200        1.3  0.1     0.1   0.204  0.44
                200        1.3  0.08    0.08  0.156  0.44
                SoilCrop WheatSoil: LL=[0.08, 0.08, 0.09, 0.12, 0.11, 0.16, 0.1, 0.08]; KL=[0.05, 0.03, 0.02, 0.03, 0.03, 0.03, 0.01, 0.01]; XF=[1, 1, 1, 1, 1, 1, 1, 1]
            CompositeFactor 07
              Specifications:
                [IrrigationEvents]
                [Physical]
                [Water].Thickness=200,200,200,200,200,200,200,200
                [Water].InitialValues=0.278,0.2682,0.2536,0.2364,0.2635,0.277,0.3392,0.2
              Operations IrrigationEvents
                1991-06-10  [Irrigation].Apply(7);
                1991-08-16  [Irrigation].Apply(7);
                1991-08-29  [Irrigation].Apply(20);
                1991-09-07  [Irrigation].Apply(12);
                1991-09-12  [Irrigation].Apply(22);
                1991-09-19  [Irrigation].Apply(14);
                1991-09-26  [Irrigation].Apply(7);
                1991-10-03  [Irrigation].Apply(27);
                1991-10-10  [Irrigation].Apply(18);
                1991-10-17  [Irrigation].Apply(30);
              Physical
                Thickness  BD   AirDry  LL15  DUL     SAT
                200        1.3  0.08    0.08  0.31    0.44
                200        1.3  0.07    0.07  0.27    0.44
                200        1.3  0.06    0.06  0.2536  0.44
                200        1.3  0.09    0.09  0.2364  0.44
                200        1.3  0.15    0.15  0.2635  0.44
                200        1.3  0.16    0.16  0.277   0.44
                200        1.3  0.15    0.15  0.3392  0.44
                200        1.3  0.08    0.08  0.2     0.44
                SoilCrop WheatSoil: LL=[0.08, 0.07, 0.06, 0.09, 0.15, 0.16, 0.15, 0.08]; KL=[0.05, 0.03, 0.02, 0.03, 0.03, 0.03, 0.01, 0.01]; XF=[1, 1, 1, 1, 1, 1, 1, 1]
            CompositeFactor 08
              Specifications:
                [IrrigationEvents]
                [Physical]
                [Water].Thickness=200,200,200,200,200,200,200,200
                [Water].InitialValues=0.281,0.2785,0.2754,0.2698,0.252,0.2672,0.2623,0.1995
              Operations IrrigationEvents
                1991-06-10  [Irrigation].Apply(7);
                1991-08-16  [Irrigation].Apply(7);
                1991-08-29  [Irrigation].Apply(20);
                1991-09-07  [Irrigation].Apply(12);
                1991-09-12  [Irrigation].Apply(22);
                1991-09-19  [Irrigation].Apply(14);
                1991-09-26  [Irrigation].Apply(7);
                1991-10-03  [Irrigation].Apply(27);
                1991-10-10  [Irrigation].Apply(18);
                1991-10-17  [Irrigation].Apply(30);
                1991-10-24  [Irrigation].Apply(42);
                1991-10-31  [Irrigation].Apply(33);
                1991-11-07  [Irrigation].Apply(24);
              Physical
                Thickness  BD   AirDry  LL15  DUL     SAT
                200        1.3  0.08    0.08  0.31    0.44
                200        1.3  0.12    0.12  0.2785  0.44
                200        1.3  0.09    0.09  0.2754  0.44
                200        1.3  0.09    0.09  0.2698  0.44
                200        1.3  0.13    0.13  0.252   0.44
                200        1.3  0.16    0.16  0.2672  0.44
                200        1.3  0.15    0.15  0.2623  0.44
                200        1.3  0.1     0.1   0.1995  0.44
                SoilCrop WheatSoil: LL=[0.08, 0.12, 0.09, 0.09, 0.13, 0.16, 0.15, 0.1]; KL=[0.05, 0.03, 0.02, 0.03, 0.03, 0.03, 0.01, 0.01]; XF=[1, 1, 1, 1, 1, 1, 1, 1]
            CompositeFactor 11
              Specifications:
                [IrrigationEvents]
                [Physical]
                [Water].Thickness=200,200,200,200,200,200,200,200
                [Water].InitialValues=0.2375,0.2666,0.2634,0.2309,0.238,0.2339,0.2282,0.1847
              Operations IrrigationEvents
                1991-06-10  [Irrigation].Apply(7);
                1991-08-16  [Irrigation].Apply(7);
                1991-09-26  [Irrigation].Apply(7);
              Physical
                Thickness  BD   AirDry  LL15  DUL     SAT
                200        1.3  0.07    0.07  0.31    0.44
                200        1.3  0.11    0.11  0.2666  0.44
                200        1.3  0.12    0.12  0.2634  0.44
                200        1.3  0.09    0.09  0.2309  0.34
                200        1.3  0.15    0.15  0.238   0.24
                200        1.3  0.17    0.17  0.2339  0.34
                200        1.3  0.12    0.12  0.2282  0.3
                200        1.3  0.09    0.09  0.1847  0.28
                SoilCrop WheatSoil: LL=[0.07, 0.11, 0.12, 0.09, 0.15, 0.17, 0.12, 0.09]; KL=[0.05, 0.03, 0.02, 0.03, 0.03, 0.03, 0.01, 0.005]; XF=[1, 1, 1, 1, 1, 1, 1, 1]
        Simulation LincolnBase
          Clock: Start=1991-06-08; End=1992-02-28
          Summary summaryfile
          Weather: FileName=lincoln.met; Latitude=-43.624; Tav=11.4; Amp=11.5
          Zone paddock: Area=1; Slope=0; AspectAngle=0; Altitude=50
            Folder Manager folder
              Operations
                1991-06-08  [Wheat].Sow(population:250, cultivar:"BattenSpring", depth:40, rowSpacing:150);
              Operations IrrigationEvents
                1991-08-30  [Irrigation].Apply(0);
                1991-09-08  [Irrigation].Apply(0);
                1991-09-13  [Irrigation].Apply(0);
                1991-09-20  [Irrigation].Apply(0);
                1991-10-04  [Irrigation].Apply(0);
                1991-10-11  [Irrigation].Apply(18);
                1991-10-18  [Irrigation].Apply(30);
                1991-10-25  [Irrigation].Apply(42);
                1991-11-01  [Irrigation].Apply(33);
                1991-11-08  [Irrigation].Apply(24);
                1991-11-15  [Irrigation].Apply(28);
                1991-11-22  [Irrigation].Apply(37);
                1991-11-28  [Irrigation].Apply(51);
                1991-12-06  [Irrigation].Apply(36);
                1991-12-13  [Irrigation].Apply(38);
                1991-12-20  [Irrigation].Apply(35);
                1991-12-27  [Irrigation].Apply(47);
                1992-01-04  [Irrigation].Apply(40);
                1992-01-10  [Irrigation].Apply(41);
              Operations FertiliserEvents
                1991-06-10  [Fertiliser].Apply(30, Fertiliser.Types.NO3N, 0);
                1991-08-16  [Fertiliser].Apply(100, Fertiliser.Types.NO3N,0);
                1991-09-26  [Fertiliser].Apply(50, Fertiliser.Types.NO3N,0);
              Operations HarvestOperations
                1992-01-21  [Wheat].Harvest();
                1992-01-21  [Wheat].EndCrop();
            Irrigation
            Soil: SoilType=LincolnSoil; LocalName=Lincoln; Site=Lincoln; NearestTown=Unknown; Region=NZ; NaturalVegetation=Unknown; Latitude=0; Longitude=0
              Physical
                Thickness  BD   AirDry  LL15  DUL   SAT
                100        1.3  0.05    0.08  0.31  0.44
                200        1.3  0.05    0.07  0.3   0.44
                200        1.3  0.05    0.07  0.28  0.44
                200        1.3  0.05    0.09  0.31  0.44
                200        1.3  0.05    0.11  0.3   0.44
                200        1.3  0.05    0.16  0.28  0.44
                200        1.3  0.05    0.15  0.3   0.44
                200        1.3  0.05    0.12  0.34  0.44
                SoilCrop WheatSoil: LL=[0.08, 0.07, 0.07, 0.09, 0.11, 0.16, 0.15, 0.12]; KL=[0.06, 0.06, 0.06, 0.04, 0.03, 0.02, 0.02, 0.02]; XF=[1, 1, 1, 1, 1, 1, 1, 1]
              WaterBalance SoilWater: SummerDate=1-Nov; SummerU=7; SummerCona=3; WinterDate=1-Apr; WinterU=3; WinterCona=2; DiffusConst=0; DiffusSlope=0; Salb=0.2; CN2Bare=75; CNRed=20; CNCov=0.8; DischargeWidth=0; CatchmentArea=0; PSIDul=-100
                Thickness  SWCON  KLAT
                100        0.6    0
                200        0.6    0
                200        0.6    0
                200        0.6    0
                200        0.6    0
                200        0.6    0
                200        0.6    0
                200        0.6    0
              Organic: FOMCNRatio=30; CarbonUnits=Total
                Thickness  Carbon  SoilCNRatio  FBiom  FInert  FOM
                100        0.35    11           0.04   0.31    0
                200        0.27    11           0.03   0.31    0
                200        0.24    11           0.02   0.31    0
                200        0.16    11           0.01   0.31    0
                200        0.16    11           0.01   0.31    0
                200        0.3     11           0.01   0.25    0
                200        0.1     11           0.01   0.2     0
                200        0.1     11           0.01   0.2     0
              Chemical: Thickness=[100, 200, 200, 200, 200, 200, 200, 200]; PH=[8.5, 8.5, 8.6, 8.6, 8.6, 8.6, 8.6, 8.6]; PHUnits=Water
              Water: Thickness=[100, 200, 200, 200, 200, 200, 200, 200]; InitialValues=[0.27, 0.3, 0.28, 0.25, 0.24, 0.27, 0.27, 0.21]; InitialPAWmm=229; RelativeTo=LL15; FilledFromTop=false
              CERESSoilTemperature Temperature
              Nutrient
              Solute NO3: Thickness=[100, 200, 200, 200, 200, 200, 200, 200]; InitialValues=[24.9, 16, 9.8, 9.8, 2.1, 2.1, 2.1, 2.1]; InitialValuesUnits=ppm; WaterTableConcentration=0; D0=0; DepthConstant=0; MaxDepthSoluteAccessible=0; RunoffEffectivenessAtMovingSolute=0; MaxEffectiveRunoff=0
              Solute NH4: same as Validation.New Zealand.PalmerstonNorth1989.PalmerstonNorth1989Base.paddock.Soil.NH4
              Solute Urea: same as Validation.New Zealand.PalmerstonNorth1989.PalmerstonNorth1989Base.paddock.Soil.Urea
            SurfaceOrganicMatter Surface Organic Matter: InitialResidueName=wheat_stubble; InitialResidueType=wheat; InitialResidueMass=1000; InitialStandingFraction=0; InitialCPR=0; InitialCNR=80
            Fertiliser
            MicroClimate: a_interception=0; b_interception=1; c_interception=0; d_interception=0; SoilHeatFluxFraction=0.4; MinimumHeightDiffForNewLayer=0; NightInterceptionFraction=0.5; ReferenceHeight=2
            Plant Wheat
            Manager ResetSW
              reset_date = 09/02/1991 00:00:00
```csharp
using Models.Interfaces;
using APSIM.Shared.Utilities;
using Models.Surface;
using Models.Soils;
using Models.PMF.OilPalm;
using Models.PMF;
using Models.Core;
using System;
using Models.Soils.Nutrients;

namespace Models
{
    [Serializable]
    [System.Xml.Serialization.XmlInclude(typeof(Model))]
    public class Script : Model
    {
        [Link] private Clock Clock;
        [Link] private Soil Soil;
        [Link] private SurfaceOrganicMatter SurfaceOM;
        [Link]
        private ISoilWater waterBalance;
        [Description("Reset date")]
        public DateTime reset_date { get; set; }

        
        [EventSubscribe("DoManagement")]
        private void OnDoManagement(object sender, EventArgs e)
        {
            if (Clock.Today == reset_date)
                waterBalance.Reset();
        }
    }
}
```
            Manager ClimateControl
              StartDate = 1991-06-08
              EndDate = 1992-12-31
```csharp
using Models.Soils;
using System.Xml.Serialization;
using Models;
using Models.PMF;
using System.Text;
using System.Collections.Generic;
using APSIM.Shared.Utilities;
using Models.Core;
using System;
using Models.Climate;

namespace Models
{
    [Serializable] 
    [System.Xml.Serialization.XmlInclude(typeof(Model))]
    public class Script : Model
    {
        [Link] Weather Met;
        [Link] Clock Clock;
    
        [Description("Start Date")]
        public DateTime StartDate { get; set; }
        
        [Description("End Date")]
        public DateTime EndDate { get; set; }
 
    
        [EventSubscribe("PreparingNewWeatherData")]
        private void OnPreparingNewWeatherData(object sender, EventArgs e)
        {
            if ((Clock.Today.Date >= StartDate) && (Clock.Today.Date <= EndDate))
                Met.Rain = 0;        
        }
    }
}
```
            Report DailyReport
            Report HarvestReport
            Report SowingReport
            Manager SetCropParams
          SoilArbitrator Soil Arbitrator
          Manager LocationInfo
            Country = New Zealand
            State = Canterbury Region
            Region =
            script: same as in Validation.SE Queensland.APS26.APS26NRate160WaterWet.LocationInfo
      Experiment Lincoln1992
        Memo
          This trial has never been formally written up.  It was conducted at Plant and Foods A Block, Lincoln, New Zealand with 'Batten' Wheat grown on a Templeton silt loam (160mm AWC/m).  It was a 2 x 2 x 4 factorial with the following treatments:

          1. Sowing Date (5 May 1992 and 5 Aug 1992)
          2. Irrigation (Nil and 120 mm)
          3. Nitrogen (0, Low, Medium and High)

          The N applied to the Low, Medium and High N treatments was 100, 150 and 250 kg/ha, respectively, for the May sowing and 50, 100 and 150, respectively, for the August sowing.

          Could not find informaiton confirming sowing rate so assumed typical values of 300 plants per m/2  for the spring sowing 100 plants per m/2 for May sowing.
          Emergence was recorded as the 28th of May for the first planting.  The model was predicting this early so delayed sowing date to get emergence date correct..
        Factors
          Permutation
            Factor Sow
              CompositeFactor 5May
                Specifications:
                  [Operations]
                  [Fertilise].Script.SDSwitch = 1.0
                Operations
                  1992-05-15  [Wheat].Sow(population:100, cultivar:"BattenWinter", depth:40, rowSpacing:150);
              CompositeFactor 5Aug
                Specifications:
                  [Operations]
                  [Fertilise].Script.SDSwitch = 0.0
                Operations
                  1992-08-05  [Wheat].Sow(population:300, cultivar:"BattenWinter", depth:20, rowSpacing:150);
            Factor Irr: Specification=[IrrigationEvents]
              Operations Nil
              Operations Some
                1992-11-25  [Irrigation].Apply(60);
                1992-12-31  [Irrigation].Apply(60);
            Factor Nit
              CompositeFactor 0
                Specifications:
                  [Fertilise].Script.Amount1 = 0.0
                  [Fertilise].Script.Amount2 = 0.0
                  [Fertilise].Script.Amount3 = 0.0
                  [Fertilise].Script.Amount4 = 0.0
              CompositeFactor 1
                Specifications:
                  [Fertilise].Script.Amount1 = 50
                  [Fertilise].Script.Amount2 = 50
                  [Fertilise].Script.Amount3 = 0.0
                  [Fertilise].Script.Amount4 = 0.0
              CompositeFactor 2
                Specifications:
                  [Fertilise].Script.Amount1 = 50.0
                  [Fertilise].Script.Amount2 = 100.0
                  [Fertilise].Script.Amount3 = 0.0
                  [Fertilise].Script.Amount4 = 0.0
              CompositeFactor 3
                Specifications:
                  [Fertilise].Script.Amount1 = 50.0
                  [Fertilise].Script.Amount2 = 100.0
                  [Fertilise].Script.Amount3 = 50.0
                  [Fertilise].Script.Amount4 = 50.0
        Simulation SDtrialBase
          Clock: Start=1992-05-01; End=1993-05-01
          Summary summaryfile
          Weather: FileName=lincoln.met; Latitude=-43.624; Tav=11.4; Amp=11.5
          Zone paddock: Area=1; Slope=0; AspectAngle=0; Altitude=50
            Folder Manager folder
              Operations
              Operations IrrigationEvents
              Manager Fertilise
                FertDate1 = 05-Aug
                FertDate2 = 01-Oct
                FertDate3 = 20-Oct
                FertDate4 = 25-Nov
                Amount1 = 0
                Amount2 = 0
                Amount3 = 0
                Amount4 = 0
                SDSwitch = 0
```csharp
using Models.Soils;
using System;
using Models.Core;
using Models.PMF;
using APSIM.Shared.Utilities;
namespace Models
{
    [Serializable]
    public class Script : Model
    {
        [Link] Clock Clock;
        [Link] Fertiliser Fertiliser;
        
        [Description("Date to fertilise")]
        public string FertDate1 { get; set; }
        [Description("Date to fertilise")]
        public string FertDate2 { get; set; }
        [Description("Date to fertilise")]
        public string FertDate3 { get; set; }
        [Description("Date to fertilise")]
        public string FertDate4 { get; set; }
        
        [Description("Amount of fertiliser to be applied (kg/ha)")]
        public double Amount1 { get; set; }
        [Description("Amount of fertiliser to be applied (kg/ha)")]
        public double Amount2 { get; set; }
        [Description("Amount of fertiliser to be applied (kg/ha)")]
        public double Amount3 { get; set; }
        [Description("Amount of fertiliser to be applied (kg/ha)")]
        public double Amount4 { get; set; }
        
        [Description("Amount of fertiliser to be applied (kg/ha)")]
        public double SDSwitch { get; set; }
        
        [EventSubscribe("DoManagement")]
        private void OnDoManagement(object sender, EventArgs e)
        {
            if (DateUtilities.WithinDates(FertDate1, Clock.Today, FertDate1))
                Fertiliser.Apply(Amount: Amount1 * SDSwitch, Type: Fertiliser.Types.NO3N);
            if (DateUtilities.WithinDates(FertDate2, Clock.Today, FertDate2))
                Fertiliser.Apply(Amount: Amount2, Type: Fertiliser.Types.NO3N);
            if (DateUtilities.WithinDates(FertDate3, Clock.Today, FertDate3))
                Fertiliser.Apply(Amount: Amount3, Type: Fertiliser.Types.NO3N);
            if (DateUtilities.WithinDates(FertDate4, Clock.Today, FertDate4))
                Fertiliser.Apply(Amount: Amount4 * SDSwitch, Type: Fertiliser.Types.NO3N);
        }
    }
}
```
              Operations HarvestOperations
                1993-03-03  [Wheat].Harvest();
                1993-03-03  [Wheat].EndCrop();
            Irrigation
            Soil: SoilType=LincolnSoil; LocalName=Lincoln; Site=Lincoln; NearestTown=Unknown; Region=NZ; NaturalVegetation=Unknown; Latitude=0; Longitude=0
              Physical
                Thickness  BD   AirDry  LL15  DUL   SAT
                100        1.3  0.08    0.12  0.31  0.44
                200        1.3  0.12    0.12  0.3   0.44
                200        1.3  0.1     0.1   0.28  0.44
                200        1.3  0.09    0.09  0.31  0.44
                200        1.3  0.11    0.11  0.3   0.44
                200        1.3  0.16    0.16  0.28  0.44
                100        1.3  0.15    0.15  0.3   0.44
                200        1.3  0.12    0.12  0.34  0.44
                SoilCrop WheatSoil: LL=[0.12, 0.12, 0.1, 0.09, 0.11, 0.16, 0.15, 0.12]; KL=[0.06, 0.06, 0.06, 0.04, 0.03, 0.02, 0.02, 0.02]; XF=[1, 1, 1, 1, 1, 1, 1, 1]
              WaterBalance SoilWater: same as Validation.New Zealand.PalmerstonNorth1989.PalmerstonNorth1989Base.paddock.Soil.SoilWater
              Organic: FOMCNRatio=30; CarbonUnits=Total
                Thickness  Carbon  SoilCNRatio  FBiom  FInert  FOM
                100        2.4     11.5         0.025  0.3     171.845
                200        2.1     11.5         0.025  0.4     115.191
                200        1.6     11.5         0.015  0.75    77.2148
                200        1.03    11.5         0.01   0.9     51.7586
                200        0.47    11.5         0.01   0.96    34.6949
                200        0.47    11.5         0.01   0.96    23.2567
                200        0.47    11.5         0.01   0.96    15.5894
                200        0.47    11.5         0.01   0.96    10.4499
              Chemical: Thickness=[100, 200, 200, 200, 200, 200, 200, 200]; PH=[6.6, 6.2, 5.7, 5.5, 5.5, 5.5, 5.5, 5.5]; PHUnits=Water
              Water: Thickness=[100, 200, 200, 200, 200, 200, 100, 200]; InitialValues=[0.31, 0.3, 0.28, 0.31, 0.3, 0.28, 0.3, 0.34]; InitialPAWmm=256; RelativeTo=LL15; FilledFromTop=false
              CERESSoilTemperature Temperature
              Nutrient
              Solute NO3: Thickness=[100, 200, 200, 200, 200, 200, 200, 200]; InitialValuesUnits=ppm; WaterTableConcentration=0; D0=0; DepthConstant=0; MaxDepthSoluteAccessible=0; RunoffEffectivenessAtMovingSolute=0; MaxEffectiveRunoff=0
                InitialValues=[19.2308, 4.23077, 4.23077, 3.84615, 3.46154, 1.53846, 1.15385, 0.769231]
              Solute NH4: Thickness=[100, 200, 200, 200, 200, 200, 200, 200]; InitialValues=[0.39, 0.6, 0.6, 0.5, 0.5, 0.5, 0.5, 0.5]; InitialValuesUnits=ppm; WaterTableConcentration=0; D0=0; DepthConstant=0; MaxDepthSoluteAccessible=0; RunoffEffectivenessAtMovingSolute=0; MaxEffectiveRunoff=0
              Solute Urea: same as Validation.New Zealand.PalmerstonNorth1989.PalmerstonNorth1989Base.paddock.Soil.Urea
            SurfaceOrganicMatter Surface Organic Matter: InitialResidueName=wheat_stubble; InitialResidueType=wheat; InitialResidueMass=0; InitialStandingFraction=0; InitialCPR=0; InitialCNR=80
            Fertiliser
            MicroClimate: a_interception=0; b_interception=1; c_interception=0; d_interception=0; SoilHeatFluxFraction=0.4; MinimumHeightDiffForNewLayer=0; NightInterceptionFraction=0.5; ReferenceHeight=2
            Plant Wheat
            Report DailyReport
            Report HarvestReport
            Report SowingReport
            Manager SetCropParams
          SoilArbitrator Soil Arbitrator
          Manager LocationInfo: same as Validation.New Zealand.Lincoln9192.LincolnBase.LocationInfo
      Experiment Lincoln1994
        Memo: same as Validation.New Zealand.PalmerstonNorth1989.Memo
        Factors
          Permutation
            Factor Sow: Specification=[Sowing].Script.SowDate = 5-Apr,20-Jun,1-Sep,27-Oct,22-Dec
            Factor Cv: Specification=[Sowing].Script.CultivarName = BattenSpring,BattenWinter
        Simulation Lincoln1994Base
          Clock: Start=1994-04-01; End=1995-12-01
          Summary summaryfile
          Weather: FileName=lincoln.met; Latitude=-43.624; Tav=11.4; Amp=11.5
          Zone paddock: Area=1; Slope=0; AspectAngle=0; Altitude=50
            Folder Manager folder
              Manager Sowing
                SowDate =
                CultivarName = Wakanui
                SowingDepth = 50
                RowSpacing = 150
                Population = 150
                IsSown = False
```csharp
using Models.Soils.Nutrients;
using System;
using Models.Core;
using Models.PMF;
using Models.Soils;
using Models.Soils.Nutrients;
using Models.Utilities;
using APSIM.Shared.Utilities;

namespace Models
{
    [Serializable]
    public class Script : Model
    {
        [Link] Clock Clock;
        [Link] Summary Summary;
        [Link] Soil Soil;
        [Link] Plant Wheat;
        Accumulator accumulatedRain;
        
        [Description("Sowing date (d-mmm)")]
        public string SowDate { get; set; }
        [Description("Cultivar to be sown")]
        public string CultivarName { get; set; }
        [Description("Sowing depth (mm)")]
        public double SowingDepth { get; set; }
        [Description("Row spacing (mm)")]
        public double RowSpacing { get; set; }
        [Description("Plant population (/m2)")]
        public double Population { get; set; }

        public bool IsSown {get;set;}

        [EventSubscribe("StartOfSimulation")]
        private void OnStartOfSimulation(object sender, EventArgs e)
        {
            IsSown = false;
        }

        [EventSubscribe("DoManagement")]
        private void OnDoManagement(object sender, EventArgs e)
        {
            if ((DateUtilities.WithinDates(SowDate, Clock.Today, SowDate))&&IsSown==false)
            {
                IsSown=true;
                Wheat.Sow(population: Population, cultivar: CultivarName, depth: SowingDepth, rowSpacing: RowSpacing);    
                if(SowDate == "05-Apr")
                {
                    Wheat.Phenology.SetEmergenceDate("13-Apr");
                }
                if(SowDate == "20-Jun")
                {
                    Wheat.Phenology.SetEmergenceDate("22-Jul");
                }
                if(SowDate == "1-Sep")
                {
                    Wheat.Phenology.SetEmergenceDate("19-Sep");
                }
                if(SowDate == "27-Oct")
                {
                    Wheat.Phenology.SetEmergenceDate("5-Nov");
                }
                if(SowDate == "22-Dec")
                {
                    Wheat.Phenology.SetEmergenceDate("30-Dec");
                }
              
            }
        }
        
    }
}
```
              Operations HarvestEvents
                1995-12-01  [Wheat].Harvest();
                1995-12-01  [Wheat].EndCrop();
            Irrigation
            Soil: same as Validation.New Zealand.PalmerstonNorth1989.PalmerstonNorth1989Base.paddock.Soil
            SurfaceOrganicMatter Surface Organic Matter: InitialResidueName=wheat_stubble; InitialResidueType=whiteclover; InitialResidueMass=1000; InitialStandingFraction=0; InitialCPR=0; InitialCNR=25
            Fertiliser
            MicroClimate: a_interception=0; b_interception=1; c_interception=0; d_interception=0; SoilHeatFluxFraction=0.4; MinimumHeightDiffForNewLayer=0; NightInterceptionFraction=0.5; ReferenceHeight=2
            Plant Wheat
            Report DailyReport
            Report HarvestReport
            Report SowingReport
            Manager SetCropParams
          SoilArbitrator Soil Arbitrator
          Manager LocationInfo: same as Validation.New Zealand.Lincoln9192.LincolnBase.LocationInfo
      Experiment Lincoln2010
        Factors
          Permutation
            Factor Sow
              CompositeFactor 27Aug
                Specifications:
                  [Operations]
                  [Fertilise].Script.SDSwitch = 1.0
                Operations
                  2010-09-04  [Wheat].Sow(population:200, cultivar:"Conquest", depth:40, rowSpacing:150);
              CompositeFactor 27Sep
                Specifications:
                  [Operations]
                  [Fertilise].Script.SDSwitch = 0.0
                Operations
                  2010-09-27  [Wheat].Sow(population:200, cultivar:"Conquest", depth:40, rowSpacing:150);
            Factor Irr: Specification=[IrrigationEvents]
              Operations Full
                2010-11-02  [Irrigation].Apply(31);
                2010-11-15  [Irrigation].Apply(39);
                2010-11-23  [Irrigation].Apply(8);
                2010-11-24  [Irrigation].Apply(19);
                2010-12-01  [Irrigation].Apply(39);
                2010-12-08  [Irrigation].Apply(25);
                2010-12-15  [Irrigation].Apply(37);
                2010-12-22  [Irrigation].Apply(32);
                2010-12-29  [Irrigation].Apply(18);
                2011-01-12  [Irrigation].Apply(27);
              Operations Half
                2010-11-02  [Irrigation].Apply(16);
                2010-11-15  [Irrigation].Apply(20);
                2010-11-23  [Irrigation].Apply(8);
                2010-11-24  [Irrigation].Apply(10);
                2010-12-01  [Irrigation].Apply(19);
                2010-12-08  [Irrigation].Apply(12);
                2010-12-15  [Irrigation].Apply(18);
                2010-12-22  [Irrigation].Apply(16);
                2010-12-29  [Irrigation].Apply(9);
                2011-01-12  [Irrigation].Apply(13);
              Operations Half2
                2010-11-02  [Irrigation].Apply(0);
                2010-11-15  [Irrigation].Apply(36);
                2010-11-23  [Irrigation].Apply(8);
                2010-11-24  [Irrigation].Apply(0);
                2010-12-01  [Irrigation].Apply(29);
                2010-12-08  [Irrigation].Apply(0);
                2010-12-15  [Irrigation].Apply(30);
                2010-12-22  [Irrigation].Apply(0);
                2010-12-29  [Irrigation].Apply(25);
                2011-01-12  [Irrigation].Apply(0);
              Operations Nil
                2010-11-23  [Irrigation].Apply(8);
        Memo
          - Could not find informaiton confirming sowing rate.  Protocole said aim for 300 plants per m/2 which is usual for a spring sowing but very high for an Autumn sowing.  Assumed 100 plants per m/2 for May sowing and 300 for August.
          - Emergence was recorded as the 28th of May for the first planting.  The model was predicting this early so delayed sowing date to get emergence date correct..
        Simulation Baxters
          Clock: Start=2010-08-27; End=2011-03-30
          Summary summaryfile
          Weather: FileName=lincoln.met; Latitude=-43.624; Tav=11.4; Amp=11.5
          Zone paddock: Area=1; Slope=0; AspectAngle=0; Altitude=50
            Folder Manager folder
              Operations
              Operations IrrigationEvents
              Manager Fertilise: same as Validation.New Zealand.Lincoln1992.SDtrialBase.paddock.Manager folder.Fertilise
            Irrigation
            SurfaceOrganicMatter Surface Organic Matter: InitialResidueName=wheat_stubble; InitialResidueType=wheat; InitialResidueMass=0; InitialStandingFraction=0; InitialCPR=0; InitialCNR=80
            Fertiliser
            MicroClimate: a_interception=0; b_interception=1; c_interception=0; d_interception=0; SoilHeatFluxFraction=0.4; MinimumHeightDiffForNewLayer=0; NightInterceptionFraction=0.5; ReferenceHeight=2
            Plant Wheat
            Report DailyReport
            Report HarvestReport
            Soil: Latitude=0; Longitude=0
              Chemical: Thickness=[100, 200, 300, 300, 300, 300]; PH=[6.6, 6.2, 5.7, 5.5, 5.5, 5.5]; PHUnits=Water
              Physical
                Thickness  BD   AirDry  LL15  DUL   SAT
                200        1.2  0.05    0.1   0.32  0.46
                200        1.2  0.1     0.1   0.32  0.46
                200        1.2  0.07    0.07  0.13  0.4
                200        1.2  0.07    0.07  0.1   0.3
                200        1.2  0.08    0.08  0.11  0.3
                200        1.2  0.07    0.07  0.1   0.3
                200        1.2  0.07    0.07  0.1   0.3
                200        1.2  0.07    0.07  0.1   0.3
                SoilCrop WheatSoil: LL=[0.1, 0.1, 0.07, 0.07, 0.08, 0.07, 0.07, 0.07]; KL=[0.06, 0.06, 0.06, 0.06, 0.04, 0.025, 0.01, 0.005]; XF=[1, 1, 1, 1, 1, 1, 1, 1]
              WaterBalance SoilWater: SummerDate=1-Nov; SummerU=6; SummerCona=2; WinterDate=1-Apr; WinterU=9; WinterCona=4.4; DiffusConst=0; DiffusSlope=0; Salb=0.18; CN2Bare=68; CNRed=20; CNCov=0.8; DischargeWidth=0; CatchmentArea=0; PSIDul=-100
                Thickness  SWCON  KLAT
                200        0.7    0
                200        0.7    0
                200        0.95   0
                200        0.95   0
                200        0.95   0
                200        0.95   0
                200        0.95   0
                200        0.95   0
              Organic: FOMCNRatio=30; CarbonUnits=Total
                Thickness  Carbon  SoilCNRatio  FBiom  FInert  FOM
                100        1.82    11.5         0.025  0.3     1243.93
                200        1.47    11.5         0.025  0.4     833.832
                300        1.2     11.5         0.015  0.75    457.617
                300        1.03    11.5         0.01   0.9     251.145
                300        0.47    11.5         0.01   0.96    137.831
                300        0.47    11.5         0.01   0.96    75.6435
              Water: Thickness=[200, 200, 200, 200, 200, 200, 200, 200]; InitialValues=[0.29, 0.28, 0.16, 0.15, 0.1, 0.1, 0.11, 0.12]; InitialPAWmm=136; RelativeTo=LL15; FilledFromTop=false
              CERESSoilTemperature Temperature
              Nutrient
              Solute NO3: Thickness=[100, 200, 300, 300, 300, 300]; InitialValues=[180.8333, 12.5, 1.3889, 1.3889, 0, 0]; InitialValuesUnits=ppm; WaterTableConcentration=0; D0=0; DepthConstant=0; MaxDepthSoluteAccessible=0; RunoffEffectivenessAtMovingSolute=0; MaxEffectiveRunoff=0
              Solute NH4: Thickness=[100, 200, 300, 300, 300, 300]; InitialValues=[0, 0, 0, 0, 0, 0]; InitialValuesUnits=ppm; WaterTableConcentration=0; D0=0; DepthConstant=0; MaxDepthSoluteAccessible=0; RunoffEffectivenessAtMovingSolute=0; MaxEffectiveRunoff=0
              Solute Urea: Thickness=[100, 200, 300, 300, 300, 300]; InitialValues=[0, 0, 0, 0, 0, 0]; InitialValuesUnits=kg/ha; WaterTableConcentration=0; D0=0; DepthConstant=0; MaxDepthSoluteAccessible=0; RunoffEffectivenessAtMovingSolute=0; MaxEffectiveRunoff=0
            Operations HarvestOperations
              2011-02-11  [Wheat].Harvest();
              2011-02-11  [Wheat].EndCrop();
            Report SowingReport
            Manager SetCropParams
          SoilArbitrator Soil Arbitrator
          Manager LocationInfo: same as Validation.New Zealand.Lincoln9192.LincolnBase.LocationInfo
        Memo Memo1
          This is a water response trial run in the rain out shelter at Plant and Food Research in Lincoln, New Zealand.  It is described in full by [Chakwizira_wheat_2014] but briefly.  An Autumn crop of 'Wakanui' wheat was sown at 165 plants/m^2^ on the 28th of March 2013 and 6 irrigation timing treatments were applied:

          1. Full irrigation where measured ET was replaced weekly
          .
          2. Nill irrigation.
          3. Very Early Drought where irrigation was withheld from sowing until the beginning of stem extension.
          4. Early Drought where irrigation was withheld between Flag leaf and the beginning of grain fill.
          5. Middle Drought where irrigation was withheld between Flag leaf and 1 week into grain fill.
          6. Late Drought where irrigation was withheld from heading until harvest.

          Irrigation was applied at weekly intervals through and assemply of low rate drip emitters on each plot.  Soil water content was measured weekly with a neutron probe and biomass was measured on 5 occasions throughout the crop.  Samples throughtout the crop were from a 0.43m^2^ quatrant and the final harvest sample was from a 1 m^2^ quadrant.  Each treatment was replicated four times and there was considerable soil variation from plot to plot so each treatment was initianilised with unique soil parameters which best described the soil they were growing on.
      Experiment Lincoln2014
        Memo: same as Validation.New Zealand.Lincoln2010.Memo1
        Factors
          Factor Irrig
            CompositeFactor Full
              Specifications:
                [IrrigationEvents]
                [Physical]
                [Water].Thickness=200,200,200,200,200,200,200,200
                [Water].InitialValues=0.32,0.2782,0.276,0.2502,0.2507,0.2398,0.1892,0.1962
              Operations IrrigationEvents
                2013-05-14  [Irrigation].Apply(25);
                2013-05-29  [Irrigation].Apply(9.2);
                2013-06-11  [Irrigation].Apply(12);
                2013-09-16  [Irrigation].Apply(34.6);
                2013-09-25  [Irrigation].Apply(46.3);
                2013-10-01  [Irrigation].Apply(19.3);
                2013-10-08  [Irrigation].Apply(24.9);
                2013-10-15  [Irrigation].Apply(21);
                2013-10-22  [Irrigation].Apply(39);
                2013-10-29  [Irrigation].Apply(44,1);
                2013-11-05  [Irrigation].Apply(40,1);
                2013-11-12  [Irrigation].Apply(35,1);
                2013-11-19  [Irrigation].Apply(33,1);
                2013-11-26  [Irrigation].Apply(32,1);
                2013-12-03  [Irrigation].Apply(35,1);
                2013-12-10  [Irrigation].Apply(49,1);
                2013-12-17  [Irrigation].Apply(47,1);
                2013-12-24  [Irrigation].Apply(0);
                2013-12-31  [Irrigation].Apply(0);
                2013-09-10  [Irrigation].Apply(5);
              Physical
                Thickness  BD     AirDry  LL15  DUL   SAT
                200        1      0.05    0.1   0.32  0.42
                200        1.324  0.12    0.15  0.3   0.41
                200        1.35   0.1     0.1   0.28  0.37
                200        1.301  0.08    0.08  0.31  0.37
                200        1.301  0.06    0.07  0.27  0.33
                200        1.301  0.06    0.08  0.25  0.32
                200        1.301  0.1     0.1   0.21  0.3
                200        1.301  0.1     0.1   0.23  0.31
                200        1.3    0.1     0.1   0.23  0.31
                200        1.3    0.1     0.1   0.23  0.31
                SoilCrop WheatSoil
                  LL=[0.1, 0.12, 0.1, 0.08, 0.06, 0.08, 0.1, 0.1, 0.1, 0.1]
                  KL=[0.06, 0.03, 0.03, 0.03, 0.03, 0.03, 0.03, 0.02, 0.02, 0.02]
                  XF=[1, 1, 1, 1, 1, 1, 1, 1, 1, 1]
            CompositeFactor Nil
              Specifications:
                [IrrigationEvents]
                [Physical]
                [Water].Thickness=200,200,200,200,200,200,200,200,200,200
                [Water].InitialValues=0.32,0.2825,0.2638,0.2062,0.2425,0.2425,0.1882,0.1822,0.182,0.182
              Physical
                Thickness  BD     AirDry  LL15  DUL   SAT
                200        1      0.06    0.1   0.32  0.36
                200        1.324  0.11    0.11  0.29  0.36
                200        1.35   0.08    0.08  0.28  0.4
                200        1.301  0.05    0.05  0.25  0.33
                200        1.301  0.07    0.07  0.3   0.33
                200        1.301  0.1     0.1   0.3   0.32
                200        1.301  0.1     0.1   0.23  0.3
                200        1.301  0.08    0.08  0.22  0.31
                200        1.3    0.08    0.08  0.22  0.31
                200        1.3    0.08    0.08  0.22  0.31
                SoilCrop WheatSoil
                  LL=[0.1, 0.11, 0.09, 0.05, 0.07, 0.1, 0.1, 0.11, 0.11, 0.11]
                  KL=[0.06, 0.03, 0.03, 0.03, 0.03, 0.03, 0.03, 0.02, 0.02, 0.02]
                  XF=[1, 1, 1, 1, 1, 1, 1, 1, 1, 1]
              Operations IrrigationEvents
                2013-09-16  [Irrigation].Apply(4.6);
                2013-09-25  [Irrigation].Apply(3.5);
                2013-09-10  [Irrigation].Apply(5);
                2013-09-10  [Irrigation].Apply(5);
            CompositeFactor VeryEarly
              Specifications:
                [IrrigationEvents]
                [Physical]
                [Water].Thickness=200,200,200,200,200,200,200,200
                [Water].InitialValues=0.32,0.2865,0.276,0.2745,0.2912,0.2228,0.2037,0.1818
              Physical
                Thickness  BD     AirDry  LL15  DUL   SAT
                200        1      0.06    0.06  0.32  0.419
                200        1.324  0.12    0.12  0.29  0.405
                200        1.35   0.09    0.09  0.28  0.37
                200        1.301  0.08    0.08  0.27  0.37
                200        1.301  0.06    0.07  0.3   0.33
                200        1.301  0.06    0.08  0.25  0.32
                200        1.301  0.1     0.1   0.23  0.3
                200        1.301  0.1     0.1   0.21  0.31
                200        1.3    0.1     0.1   0.21  0.31
                200        1.3    0.1     0.1   0.21  0.31
                SoilCrop WheatSoil
                  LL=[0.06, 0.12, 0.09, 0.08, 0.07, 0.08, 0.1, 0.1, 0.1, 0.1]
                  KL=[0.06, 0.03, 0.03, 0.03, 0.03, 0.03, 0.03, 0.02, 0.02, 0.02]
                  XF=[1, 1, 1, 1, 1, 1, 1, 1, 1, 1]
              Operations IrrigationEvents
                2013-09-16  [Irrigation].Apply(4.6);
                2013-09-25  [Irrigation].Apply(3.5);
                2013-11-19  [Irrigation].Apply(33,1);
                2013-11-26  [Irrigation].Apply(32,1);
                2013-12-03  [Irrigation].Apply(35,18);
                2013-12-10  [Irrigation].Apply(49,1);
                2013-12-17  [Irrigation].Apply(47,1);
                2013-12-24  [Irrigation].Apply(49,1);
                2013-09-10  [Irrigation].Apply(5);
            CompositeFactor Early
              Specifications:
                [IrrigationEvents]
                [Physical]
                [Water].Thickness=200,200,200,200,200,200,200,200
                [Water].InitialValues=0.32,0.278,0.2695,0.2698,0.2572,0.2442,0.1508,0.1605
              Physical
                Thickness  BD     AirDry  LL15  DUL   SAT
                200        1      0.05    0.06  0.32  0.42
                200        1.324  0.1     0.1   0.3   0.405
                200        1.35   0.1     0.1   0.3   0.37
                200        1.301  0.08    0.08  0.3   0.37
                200        1.301  0.07    0.07  0.32  0.33
                200        1.301  0.08    0.08  0.3   0.32
                200        1.301  0.08    0.08  0.21  0.3
                200        1.301  0.08    0.08  0.21  0.31
                200        1.3    0.08    0.08  0.21  0.31
                200        1.3    0.08    0.08  0.21  0.31
                SoilCrop WheatSoil
                  LL=[0.06, 0.1, 0.1, 0.08, 0.07, 0.08, 0.08, 0.08, 0.08, 0.08]
                  KL=[0.06, 0.03, 0.03, 0.03, 0.03, 0.03, 0.03, 0.02, 0.02, 0.02]
                  XF=[1, 1, 1, 1, 1, 1, 1, 1, 1, 1]
              Operations IrrigationEvents
                2013-05-14  [Irrigation].Apply(25);
                2013-05-29  [Irrigation].Apply(9.2);
                2013-06-11  [Irrigation].Apply(12);
                2013-09-16  [Irrigation].Apply(34.6);
                2013-09-25  [Irrigation].Apply(46.5);
                2013-12-10  [Irrigation].Apply(49,1);
                2013-12-17  [Irrigation].Apply(47,1);
                2013-12-24  [Irrigation].Apply(49,1);
                2013-12-31  [Irrigation].Apply(20.3,1);
                2013-12-24  [Irrigation].Apply(49,1);
                2013-12-31  [Irrigation].Apply(20.3,1);
                2013-09-10  [Irrigation].Apply(5);
            CompositeFactor Middle
              Specifications:
                [IrrigationEvents]
                [Physical]
                [Water].Thickness=200,200,200,200,200,200,200,200
                [Water].InitialValues=0.32,0.2788,0.271,0.2795,0.2275,0.1905,0.2318,0.2385
              Physical
                Thickness  BD     AirDry  LL15  DUL   SAT
                200        1      0.06    0.06  0.32  0.419
                200        1.324  0.12    0.12  0.3   0.405
                200        1.35   0.09    0.09  0.29  0.37
                200        1.301  0.05    0.05  0.3   0.37
                200        1.301  0.05    0.05  0.25  0.33
                200        1.301  0.05    0.05  0.24  0.32
                200        1.301  0.12    0.12  0.26  0.3
                200        1.301  0.1     0.1   0.26  0.31
                200        1.3    0.1     0.1   0.26  0.31
                200        1.3    0.1     0.1   0.26  0.31
                SoilCrop WheatSoil
                  LL=[0.06, 0.12, 0.09, 0.05, 0.05, 0.05, 0.12, 0.1, 0.1, 0.1]
                  KL=[0.06, 0.03, 0.03, 0.03, 0.03, 0.03, 0.03, 0.02, 0.02, 0.02]
                  XF=[1, 1, 1, 1, 1, 1, 1, 1, 1, 1]
              Operations IrrigationEvents
                2013-05-14  [Irrigation].Apply(25);
                2013-05-29  [Irrigation].Apply(9.2);
                2013-06-11  [Irrigation].Apply(12);
                2013-09-16  [Irrigation].Apply(34.6);
                2013-09-25  [Irrigation].Apply(46.3);
                2013-10-01  [Irrigation].Apply(19.3);
                2013-12-17  [Irrigation].Apply(47,1);
                2013-12-24  [Irrigation].Apply(49,1);
                2013-12-31  [Irrigation].Apply(20.3,1);
                2013-09-10  [Irrigation].Apply(5);
            CompositeFactor Late
              Specifications:
                [IrrigationEvents]
                [Physical]
                [Water].Thickness=200,200,200,200,200,200,200,200
                [Water].InitialValues=0.32,0.2785,0.274,0.2708,0.2715,0.2312,0.199,0.228
              Physical
                Thickness  BD     AirDry  LL15  DUL   SAT
                200        1      0.05    0.05  0.32  0.419
                200        1.324  0.12    0.12  0.3   0.405
                200        1.35   0.1     0.1   0.29  0.37
                200        1.301  0.05    0.05  0.32  0.37
                200        1.301  0.06    0.06  0.3   0.33
                200        1.301  0.06    0.06  0.3   0.32
                200        1.301  0.1     0.1   0.27  0.3
                200        1.301  0.1     0.1   0.26  0.31
                200        1.3    0.1     0.1   0.26  0.31
                200        1.3    0.1     0.1   0.26  0.31
                SoilCrop WheatSoil
                  LL=[0.1, 0.12, 0.1, 0.08, 0.06, 0.08, 0.1, 0.1, 0.1, 0.1]
                  KL=[0.06, 0.03, 0.03, 0.03, 0.03, 0.03, 0.03, 0.02, 0.02, 0.02]
                  XF=[1, 1, 1, 1, 1, 1, 1, 1, 1, 1]
              Operations IrrigationEvents
                2013-05-14  [Irrigation].Apply(25);
                2013-05-29  [Irrigation].Apply(9.2);
                2013-06-11  [Irrigation].Apply(12);
                2013-09-16  [Irrigation].Apply(34.6);
                2013-09-25  [Irrigation].Apply(46.3);
                2013-10-01  [Irrigation].Apply(19.3);
                2013-10-08  [Irrigation].Apply(24.9);
                2013-10-15  [Irrigation].Apply(21);
                2013-10-22  [Irrigation].Apply(39);
                2013-10-29  [Irrigation].Apply(0);
        Simulation Rainshelter2013
          Clock: Start=2013-03-22; End=2014-04-01
          Summary summaryfile
          Weather: FileName=lincoln.met; Latitude=-43.624; Tav=11.4; Amp=11.5
          SoilArbitrator Soil Arbitrator
          Zone paddock: Area=1; Slope=0; AspectAngle=0; Altitude=50
            Soil TempletonSiltLoam: SoilType=NZ_sedementary; Region=Plains; State=Canterbury; Country=New Zealand; Latitude=0; Longitude=0
              DataSource=Generic profile descriptions provided by Trevor Webb and data for functional horizions based on SWAMP project results
              Comments=Bulk density values were measured on the fine earth fraction so values entered into apsim soil are adjusted down to account for stone content (assuming stones are inert from all soil process so their mass and volume is removed from model paramaters).  SAT, DUL, LL15 and Air dry have been adjusted down to account for stone content.  OC has not been adjusted so the model will get the correct carbon and N amounts using the adjusted BD.
              Chemical: Thickness=[180, 150, 400, 270, 500]; PH=[6, 6, 6, 6, 6]; PHUnits=Water
              Physical
                Thickness  BD     AirDry  LL15  DUL   SAT
                200        1      0.05    0.1   0.32  0.42
                200        1.324  0.12    0.15  0.35  0.41
                200        1.35   0.1     0.1   0.3   0.37
                200        1.301  0.08    0.08  0.3   0.37
                200        1.301  0.06    0.07  0.28  0.33
                200        1.301  0.06    0.08  0.25  0.32
                200        1.301  0.1     0.1   0.23  0.3
                200        1.301  0.1     0.1   0.24  0.31
                SoilCrop WheatSoil: LL=[0.1, 0.12, 0.1, 0.08, 0.06, 0.08, 0.1, 0.1]; KL=[0.06, 0.06, 0.1, 0.1, 0.05, 0.03, 0.02, 0.01]; XF=[1, 1, 1, 1, 1, 1, 1, 1]
              WaterBalance SoilWater: SummerDate=1-oct; SummerU=6; SummerCona=3; WinterDate=1-Apr; WinterU=2; WinterCona=1; DiffusConst=0; DiffusSlope=0; Salb=0.13; CN2Bare=0; CNRed=0; CNCov=0.8; PSIDul=-100; Thickness=[200, 200, 200, 200, 200, 200, 200, 200]; SWCON=[1, 1, 1, 1, 1, 1, 1, 1]
              Organic: FOMCNRatio=40; CarbonUnits=Total
                Thickness  Carbon  SoilCNRatio  FBiom   FInert  FOM
                180        2.6251  11           0.0333  0.4371  427.528
                150        1.2469  11           0.0187  0.6569  316.72
                400        0.316   11           0.0117  0.8496  142.312
                270        0.208   11           0.0102  0.945   82.9318
                500        0.2004  11           0.01    0.9827  30.5089
              Water: Thickness=[200, 200, 200, 200, 200, 200, 200, 200]; InitialValues=[0.35, 0.35, 0.25, 0.25, 0.25, 0.2, 0.18, 0.2]; InitialPAWmm=250; RelativeTo=LL15; FilledFromTop=false
              CERESSoilTemperature Temperature
              Nutrient
              Solute NO3: Thickness=[180, 150, 400, 270, 500]; InitialValues=[265, 40.2427, 5.01813, 2.41979, 1.9216]; InitialValuesUnits=ppm; WaterTableConcentration=0; D0=0; DepthConstant=0; MaxDepthSoluteAccessible=0; RunoffEffectivenessAtMovingSolute=0; MaxEffectiveRunoff=0
              Solute NH4: Thickness=[180, 150, 400, 270, 500]; InitialValues=[1.5, 0.854582, 0.442264, 0.38432, 0.38432]; InitialValuesUnits=ppm; WaterTableConcentration=0; D0=0; DepthConstant=0; MaxDepthSoluteAccessible=0; RunoffEffectivenessAtMovingSolute=0; MaxEffectiveRunoff=0
              Solute Urea: Thickness=[180, 150, 400, 270, 500]; InitialValues=[0, 0, 0, 0, 0]; InitialValuesUnits=kg/ha; WaterTableConcentration=0; D0=0; DepthConstant=0; MaxDepthSoluteAccessible=0; RunoffEffectivenessAtMovingSolute=0; MaxEffectiveRunoff=0
            Plant Wheat
            Folder Manager folder
              Operations SowingAndHarvest
                2013-03-25  [Wheat].Sow(population:165, cultivar:"Wakanui", depth:30, rowSpacing:130);
                2014-01-26  [Wheat].Harvest();
                2014-01-26  [Wheat].EndCrop();
              Operations IrrigationEvents
                2013-05-14  [Irrigation].Apply(25);
                2013-05-29  [Irrigation].Apply(9.2);
                2013-06-11  [Irrigation].Apply(12);
                2013-09-16  [Irrigation].Apply(34.6);
                2013-09-25  [Irrigation].Apply(43);
                2013-10-01  [Irrigation].Apply(19.3);
                2013-10-08  [Irrigation].Apply(24.9);
                2013-10-15  [Irrigation].Apply(21);
                2013-10-22  [Irrigation].Apply(39);
                2013-10-29  [Irrigation].Apply(44);
                2013-11-05  [Irrigation].Apply(40);
                2013-11-12  [Irrigation].Apply(35);
                2013-11-19  [Irrigation].Apply(33);
                2013-11-26  [Irrigation].Apply(32);
                2013-12-03  [Irrigation].Apply(35);
                2013-12-10  [Irrigation].Apply(49);
                2013-12-17  [Irrigation].Apply(47);
                2013-12-24  [Irrigation].Apply(0);
                2013-12-31  [Irrigation].Apply(0);
              Operations FertiliserEvents
                2013-09-26  [Fertiliser].Apply(100, Fertiliser.Types.UreaN, 10);
                2013-11-13  [Fertiliser].Apply(100, Fertiliser.Types.UreaN, 10);
              Operations Flood
                2013-06-18  [Irrigation].Apply(120);
                2013-04-12  [Irrigation].Apply(5);
            Irrigation
            Manager ClimateControl
              StartDate = 04/15/2013 00:00:00
              EndDate = 05/01/2014 00:00:00
              script: same as in Validation.New Zealand.Lincoln9192.LincolnBase.paddock.ClimateControl
            SurfaceOrganicMatter Surface Organic Matter: InitialResidueName=wheat_stubble; InitialResidueType=wheat; InitialResidueMass=500; InitialStandingFraction=0; InitialCPR=0; InitialCNR=80
            Fertiliser
            MicroClimate: a_interception=0; b_interception=1; c_interception=0; d_interception=0; SoilHeatFluxFraction=0.4; MinimumHeightDiffForNewLayer=0; NightInterceptionFraction=0.5; ReferenceHeight=2
            Report DailyReport
            Report HarvestReport
            Manager MaxLeafAreaCalc
              script: same as in Validation.SE Queensland.APS2.APS2Base.Field.MaxLeafAreaCalc
            Report MaxLeafAreaReport
            Report SowingReport
            Report SensibilityReport (disabled): EventNames=[Clock].DoReport
              VariableNames:
                [Clock].Today
                [Wheat].Leaf.Photosynthesis.RueReductionFactor
                [Wheat].Leaf.Photosynthesis.FCO2
                [Wheat].Leaf.Photosynthesis.FN
                [Wheat].Leaf.Photosynthesis.FT
                [Wheat].Leaf.Photosynthesis.FVPD
                [Wheat].Leaf.Photosynthesis.FW
                [Wheat].Arbitrator.DM.TotalPlantDemand
                [Wheat].Arbitrator.DM.TotalPlantSupply
                [Wheat].Arbitrator.DM.TotalPlantAllocation
                [Wheat].Arbitrator.N.TotalPlantDemand
                [Wheat].Arbitrator.N.TotalPlantSupply
                [Wheat].Arbitrator.N.TotalPlantAllocation
                [Wheat].Arbitrator.DM.MetabolicDemand[1] + [Wheat].Arbitrator.DM.StructuralDemand[1] + [Wheat].Arbitrator.DM.StorageDemand[1] as GrainDMDemand
                [Wheat].Arbitrator.DM.MetabolicDemand[2] + [Wheat].Arbitrator.DM.StructuralDemand[2] + [Wheat].Arbitrator.DM.StorageDemand[2] as RootDMDemand
                [Wheat].Arbitrator.DM.MetabolicDemand[3] + [Wheat].Arbitrator.DM.StructuralDemand[3] + [Wheat].Arbitrator.DM.StorageDemand[3] as LeafDMDemand
                [Wheat].Arbitrator.DM.MetabolicDemand[4] + [Wheat].Arbitrator.DM.StructuralDemand[4] + [Wheat].Arbitrator.DM.StorageDemand[4] as SpikeDMDemand
                [Wheat].Arbitrator.DM.MetabolicDemand[5] + [Wheat].Arbitrator.DM.StructuralDemand[5] + [Wheat].Arbitrator.DM.StorageDemand[5] as StemDMDemand
                [Wheat].Arbitrator.DM.MetabolicAllocation[1] + [Wheat].Arbitrator.DM.StructuralAllocation[1] + [Wheat].Arbitrator.DM.StorageAllocation[1] as GrainDMAllocation
                [Wheat].Arbitrator.DM.MetabolicAllocation[2] + [Wheat].Arbitrator.DM.StructuralAllocation[2] + [Wheat].Arbitrator.DM.StorageAllocation[2] as RootDMAllocation
                [Wheat].Arbitrator.DM.MetabolicAllocation[3] + [Wheat].Arbitrator.DM.StructuralAllocation[3] + [Wheat].Arbitrator.DM.StorageAllocation[3] as LeafDMAllocation
                [Wheat].Arbitrator.DM.MetabolicAllocation[4] + [Wheat].Arbitrator.DM.StructuralAllocation[4] + [Wheat].Arbitrator.DM.StorageAllocation[4] as SpikeDMAllocation
                [Wheat].Arbitrator.DM.MetabolicAllocation[5] + [Wheat].Arbitrator.DM.StructuralAllocation[5] + [Wheat].Arbitrator.DM.StorageAllocation[5] as StemDMAllocation
                [Wheat].Arbitrator.DM.FixationSupply[1] + [Wheat].Arbitrator.DM.RetranslocationSupply[1] + [Wheat].Arbitrator.DM.ReallocationSupply[1] as GrainDMSupply
                [Wheat].Arbitrator.DM.FixationSupply[2] + [Wheat].Arbitrator.DM.RetranslocationSupply[2] + [Wheat].Arbitrator.DM.ReallocationSupply[2] as RootDMSupply
                [Wheat].Arbitrator.DM.RetranslocationSupply[3] + [Wheat].Arbitrator.DM.ReallocationSupply[3] as LeafDMSupply
                [Wheat].Arbitrator.DM.FixationSupply[4] + [Wheat].Arbitrator.DM.RetranslocationSupply[4] + [Wheat].Arbitrator.DM.ReallocationSupply[4] as SpikeDMSupply
                [Wheat].Arbitrator.DM.FixationSupply[5] + [Wheat].Arbitrator.DM.RetranslocationSupply[5] + [Wheat].Arbitrator.DM.ReallocationSupply[5] as StemDMSupply
                [Wheat].Arbitrator.DM.FixationSupply[3] as LeafPhotosynthesis
                [Wheat].Leaf.Live.StructuralWt
                [Wheat].Leaf.Live.MetabolicWt
                [Wheat].Leaf.Live.StorageWt
                [Wheat].Leaf.Area.Calculation.Change.AreaSenesced
                [Wheat].Leaf.Canopy.SpecificArea
                [Wheat].Phenology.CurrentStageName
                [Wheat].Grain.Nconc
                [Wheat].Grain.MinNconc
                [Wheat].Grain.MaximumNConc
                [Wheat].Root.Nconc
                [Wheat].Root.MinNconc
                [Wheat].Root.CriticalNConc
                [Wheat].Root.MaximumNConc
                [Wheat].Leaf.Nconc
                [Wheat].Leaf.MinNconc
                [Wheat].Leaf.CriticalNConc
                [Wheat].Leaf.MaximumNConc
                [Wheat].Stem.Nconc
                [Wheat].Stem.MinNconc
                [Wheat].Stem.CriticalNConc
                [Wheat].Stem.MaximumNConc
                [Wheat].Spike.Nconc
                [Wheat].Spike.MinNconc
                [Wheat].Spike.CriticalNConc
                [Wheat].Spike.MaximumNConc
                [Wheat].Leaf.FN
                [Wheat].Leaf.Canopy.FW
                [Wheat].Stem.Live.Wt
                [Wheat].Stem.Dead.Wt
                [Wheat].Stem.Live.StorageWt
                [Wheat].Leaf.Canopy.GreenAreaIndex.StemPopulation
                [Wheat].Leaf.Area.Calculation.Change.AreaGrowth.DeltaArea
                [Wheat].Leaf.SenescenceRate
            Manager SetCropParams
            Report: EventNames=[Clock].EndOfDay
              VariableNames:
                [Clock].Today
                [Fertiliser].NitrogenApplied
                [Irrigation].IrrigationApplied
                [Phenology].Photoperiod
                [Soil].Nutrient.MineralN
                [Soil].SoilWater.LeachNO3
                [Soil].Water.MM
                [Soil].Water.Volumetric
                [SurfaceOrganicMatter].Wt
                [Weather].MeanT
                [Weather].Rain
                [Wheat].AboveGround.N
                [Wheat].AboveGround.Wt
                [Wheat].AboveGroundDead.N
                [Wheat].AboveGroundDead.NConc
                [Wheat].AboveGroundDead.Wt
                [Wheat].AboveGroundLive.C
                [Wheat].Arbitrator.Carbon.TotalFixationSupply
                [Wheat].Arbitrator.Carbon.TotalReAllocationSupply
                [Wheat].Arbitrator.Carbon.TotalReTranslocationSupply
                [Wheat].Arbitrator.CUnallocatedDueToNLimitation
                [Wheat].Arbitrator.Nitrogen.TotalReAllocationSupply
                [Wheat].Arbitrator.Nitrogen.TotalReTranslocationSupply
                [Wheat].Arbitrator.Nitrogen.TotalUptakeSupply
                [Wheat].Arbitrator.TotalCFixationSupply
                [Wheat].Arbitrator.UnallocatedC
                [Wheat].Arbitrator.UnallocatedN
                [Wheat].BelowGround.N
                [Wheat].Grain.Carbon.Demands.Total
                [Wheat].Grain.Live.C
                [Wheat].Grain.Live.C + [Wheat].Grain.Dead.C + [Wheat].Leaf.Live.C + [Wheat].Leaf.Dead.C + [Wheat].Root.Live.C + [Wheat].Root.Dead.C + [Wheat].Stem.Live.C + [Wheat].Stem.Dead.C as SumPlantC
                [Wheat].Grain.Live.N
                [Wheat].Grain.Live.NConc
                [Wheat].Grain.Live.Wt
                [Wheat].Grain.NConc
                [Wheat].Grain.Nitrogen.ConcentrationOrFraction.Metabolic
                [Wheat].Grain.Nitrogen.ConcentrationOrFraction.Storage
                [Wheat].Grain.Nitrogen.ConcentrationOrFraction.Structural
                [Wheat].Grain.Nitrogen.Demands.Total
                [Wheat].Grain.TotalCarbonDemand
                [Wheat].Grain.Wt
                [Wheat].Leaf.Allocated.Nitrogen.Metabolic
                [Wheat].Leaf.Allocated.Nitrogen.Storage
                [Wheat].Leaf.Allocated.Nitrogen.Structural
                [Wheat].Leaf.Allocated.Weight.Metabolic
                [Wheat].Leaf.Allocated.Weight.Storage
                [Wheat].Leaf.Allocated.Weight.Structural
                [Wheat].Leaf.Canopy.CoverDead
                [Wheat].Leaf.Canopy.CoverGreen
                [Wheat].Leaf.Canopy.CoverTotal
                [Wheat].Leaf.Canopy.FW
                [Wheat].Leaf.Canopy.FW
                [Wheat].Leaf.Canopy.Height
                [Wheat].Leaf.Canopy.LAI
                [Wheat].Leaf.Canopy.SpecificArea
                [Wheat].Leaf.Canopy.Transpiration
                [Wheat].Leaf.Carbon.Demands.Total
                [Wheat].Leaf.Carbon.Demands.Total
                [Wheat].Leaf.Carbon.Supplies.Fixation
                [Wheat].Leaf.Dead.N
                [Wheat].Leaf.Dead.NConc
                [Wheat].Leaf.Dead.Nitrogen.Metabolic
                [Wheat].Leaf.Dead.Nitrogen.Storage
                [Wheat].Leaf.Dead.Nitrogen.Structural
                [Wheat].Leaf.Dead.Wt
                [Wheat].Leaf.FN
                [Wheat].Leaf.HaunStage
                [Wheat].Leaf.Live.C
                [Wheat].Leaf.Live.N
                [Wheat].Leaf.Live.NConc
                [Wheat].Leaf.Live.Nitrogen.Metabolic
                [Wheat].Leaf.Live.Nitrogen.Storage
                [Wheat].Leaf.Live.Nitrogen.Structural
                [Wheat].Leaf.Live.Wt
                [Wheat].Leaf.Nitrogen.ConcentrationOrFraction.Metabolic
                [Wheat].Leaf.Nitrogen.ConcentrationOrFraction.Storage
                [Wheat].Leaf.Nitrogen.ConcentrationOrFraction.Structural
                [Wheat].Leaf.Nitrogen.Demand.Metabolic
                [Wheat].Leaf.Nitrogen.Demand.Storage
                [Wheat].Leaf.Nitrogen.Demand.Structural
                [Wheat].Leaf.Nitrogen.Demands.Total
                [Wheat].Leaf.Photosynthesis
                [Wheat].Leaf.Photosynthesis.FT
                [Wheat].Leaf.Photosynthesis.RadnInt
                [Wheat].Leaf.TotalCarbonDemand
                [Wheat].Phenology.CurrentPhase.Name
                [Wheat].Phenology.CurrentStageName
                [Wheat].Phenology.Photoperiod
                [Wheat].Phenology.Stage
                [Wheat].Phenology.ThermalTime
                [Wheat].Root.Carbon.Demands.Total
                [Wheat].Root.Dead.NConc
                [Wheat].Root.Live.C
                [Wheat].Root.Live.N
                [Wheat].Root.Live.NConc
                [Wheat].Root.Live.Wt
                [Wheat].Root.N
                [Wheat].Root.Nconc
                [Wheat].Root.Network.Depth
                [Wheat].Root.Network.WaterUptake
                [Wheat].Root.Nitrogen.ConcentrationOrFraction.Metabolic
                [Wheat].Root.Nitrogen.ConcentrationOrFraction.Storage
                [Wheat].Root.Nitrogen.ConcentrationOrFraction.Structural
                [Wheat].Root.Nitrogen.Demands.Total
                [Wheat].Root.TotalCarbonDemand
                [Wheat].SowingData.Cultivar
                [Wheat].Spike.Carbon.Demands.Total
                [Wheat].Spike.Dead.NConc
                [Wheat].Spike.Live.C
                [Wheat].Spike.Live.N
                [Wheat].Spike.Live.NConc
                [Wheat].Spike.Live.Wt
                [Wheat].Spike.NConc
                [Wheat].Spike.Nitrogen.ConcentrationOrFraction.Metabolic
                [Wheat].Spike.Nitrogen.ConcentrationOrFraction.Storage
                [Wheat].Spike.Nitrogen.ConcentrationOrFraction.Structural
                [Wheat].Spike.Nitrogen.Demands.Total
                [Wheat].Spike.TotalCarbonDemand
                [Wheat].Stem.Carbon.Demand.Metabolic
                [Wheat].Stem.Carbon.Demand.Storage
                [Wheat].Stem.Carbon.Demand.Structural
                [Wheat].Stem.Carbon.Demands.Total
                [Wheat].Stem.Carbon.DemandsAllocated.Storage
                [Wheat].Stem.Dead.NConc
                [Wheat].Stem.Live.C
                [Wheat].Stem.Live.Carbon.Metabolic
                [Wheat].Stem.Live.Carbon.Storage
                [Wheat].Stem.Live.Carbon.Structural
                [Wheat].Stem.Live.N
                [Wheat].Stem.Live.NConc
                [Wheat].Stem.Live.Nitrogen.Metabolic
                [Wheat].Stem.Live.Nitrogen.Storage
                [Wheat].Stem.Live.Nitrogen.Structural
                [Wheat].Stem.Live.Wt
                [Wheat].Stem.NConc
                [Wheat].Stem.Nitrogen.ConcentrationOrFraction.Metabolic
                [Wheat].Stem.Nitrogen.ConcentrationOrFraction.Storage
                [Wheat].Stem.Nitrogen.ConcentrationOrFraction.Structural
                [Wheat].Stem.Nitrogen.Demand.Metabolic
                [Wheat].Stem.Nitrogen.Demand.Storage
                [Wheat].Stem.Nitrogen.Demand.Structural
                [Wheat].Stem.Nitrogen.Demands.Total
                [Wheat].Stem.TotalCarbonDemand
                [Wheat].Total.C
                [Wheat].Total.Wt*0.4 as TotalC
                [Wheat].TotalDead.N
                [Wheat].TotalDead.Wt*0.4 as TotalDeadC
                [Wheat].TotalLive.N
                [Wheat].TotalLive.Wt*0.4 as TotalLiveC
                sum([Soil].NO3.kgha) as TotalSoilNitrogen
                sum([Soil].Nutrient.MineralN) as ProfileN
                sum([Soil].Water.MM[1:7]) as ProfileWater
          Manager LocationInfo: same as Validation.New Zealand.Lincoln9192.LincolnBase.LocationInfo
      Experiment Lincoln2015
        Memo
          ### Lincoln2012 (Rain-Shelter Trail)

          Testing of APSIM Maize under New Zealand conditions was undertaken using the data of [Teixeira_etal_2014].  This dataset includes the impact of three N (0 to 250 kg/ha N) and two water regimes (dryland and fully irrigated) using a rain-shelter structure.  Observations include biomass growth and nitrogen content of individual organs, soil water contents, leaf area index, phenology and yield components. Total biomass ranged from 8000 kg/ha for dryland nil N crops to up to 28000kg/ha for fully irrigated and N fertilised crops.  Dryland crops recovered 25 percent less N from applied fertilizer than irrigated crops.
        Factors
          Permutation
            Factor Nit
              CompositeFactor 0
                Specifications:
                  [StateFactors].Script.Nit = 0
                  [Fert]
                Operations 0
                  2015-10-09  [Irrigation].Apply(5);
                  2015-11-01  [Irrigation].Apply(5);
                  2015-11-01  [Fertiliser].Apply(35, Fertiliser.Types.UreaN, 20);
                  2015-11-19  [Irrigation].Apply(30);
                  Memo
                    Uniques fertigation event
              CompositeFactor 50
                Specifications:
                  [StateFactors].Script.Nit = 50
                  [Fert]
                Operations 50
                  2015-10-09  [Fertiliser].Apply(0, Fertiliser.Types.UreaN, 20);
                  2015-10-09  [Irrigation].Apply(5);
                  2015-11-01  [Fertiliser].Apply(35, Fertiliser.Types.UreaN, 20);
                  2015-11-01  [Irrigation].Apply(5);
                  2015-11-19  [Fertiliser].Apply(25, Fertiliser.Types.UreaN, 20);
                  2015-11-19  [Irrigation].Apply(30);
              CompositeFactor 250
                Specifications:
                  [StateFactors].Script.Nit = 250
                  [Fert]
                Operations 250
                  2015-10-09  [Fertiliser].Apply(50, Fertiliser.Types.UreaN, 20);
                  2015-10-09  [Irrigation].Apply(5);
                  2015-11-01  [Fertiliser].Apply(100, Fertiliser.Types.UreaN, 20);
                  2015-11-01  [Irrigation].Apply(5);
                  2015-11-19  [Fertiliser].Apply(100, Fertiliser.Types.UreaN, 20);
                  2015-11-19  [Irrigation].Apply(30);
            Factor Irr
              CompositeFactor Full
                Specifications:
                  [Irrig]
                  [StateFactors].Script.Irr = Full
                Operations Full
                  2015-09-30  [Irrigation].Apply(10);
                  2015-10-01  [Irrigation].Apply(5);
                  2015-10-09  [Irrigation].Apply(10);
                  2015-10-16  [Irrigation].Apply(15);
                  2015-10-22  [Irrigation].Apply(15);
                  2015-10-30  [Irrigation].Apply(30);
                  2015-11-06  [Irrigation].Apply(12.2);
                  2015-11-12  [Irrigation].Apply(13);
                  2015-11-12  [Irrigation].Apply(13);
                  2015-11-26  [Irrigation].Apply(39);
                  2015-12-03  [Irrigation].Apply(40);
                  2015-12-24  [Irrigation].Apply(35);
                  2015-12-31  [Irrigation].Apply(30);
                  2016-01-07  [Irrigation].Apply(30);
              CompositeFactor Nil
                Specifications:
                  [Irrig]
                  [StateFactors].Script.Irr = Nil
                Operations Nil
                  2015-09-30  [Irrigation].Apply(10);
                  2015-10-01  [Irrigation].Apply(5);
                  2015-10-09  [Irrigation].Apply(10);
                  2015-12-24  [Irrigation].Apply(25);
                  2016-02-03  [Irrigation].Apply(30);
                  2016-02-04  [Irrigation].Apply(40);
                  Memo
                    Have added an extra irrigation, on 3 Nov,

                    Data indcates water applied but no notes of it RFZ
        Simulation Lincoln2015
          Weather: FileName=lincoln.met; Latitude=-43.624; Tav=11.4; Amp=11.5
          Clock: Start=2015-09-07; End=2016-02-15
          Summary summaryfile
          SoilArbitrator Soil Arbitrator
          Zone RainShelter: Area=1; Slope=0; AspectAngle=0; Altitude=50
            Soil TempletonSiltLoam: SoilType=NZ_sedementary; Region=Plains; State=Canterbury; Country=New Zealand; Latitude=0; Longitude=0
              DataSource=Generic profile descriptions provided by Trevor Webb and data for functional horizions based on SWAMP project results
              Comments=Bulk density values were measured on the fine earth fraction so values entered into apsim soil are adjusted down to account for stone content (assuming stones are inert from all soil process so their mass and volume is removed from model paramaters).  SAT, DUL, LL15 and Air dry have been adjusted down to account for stone content.  OC has not been adjusted so the model will get the correct carbon and N amounts using the adjusted BD.
              Chemical: Thickness=[180, 150, 400, 270, 500, 300]; PH=[6, 6, 6, 6, 6, 6]; PHUnits=Water
              WaterBalance SoilWater: SummerDate=1-oct; SummerU=6; SummerCona=3; WinterDate=1-Apr; WinterU=2; WinterCona=3; DiffusConst=0; DiffusSlope=0; Salb=0.13; CN2Bare=77; CNRed=0; CNCov=0.8; PSIDul=-100; Thickness=[200, 200, 200, 200, 200, 200, 200, 200, 200]; SWCON=[0.5, 0.5, 0.5, 0.5, 0.5, 0.5, 0.5, 0.5, 0.5]
              Organic: FOMCNRatio=20; CarbonUnits=Total
                Thickness  Carbon  SoilCNRatio  FBiom   FInert  FOM
                180        3       11           0.03    0.5     731.975
                150        0.9     11           0.02    0.7     584.494
                400        0.316   11           0.0117  0.85    320.777
                270        0.208   11           0.0102  0.945   213.951
                500        0.2004  11           0.01    0.9827  101.063
                500        0.2     11           0.01    0.93    47.7389
              Water: Thickness=[150, 150, 300, 300, 300, 300, 300]; InitialValues=[0.18, 0.18, 0.26, 0.26, 0.23, 0.28, 0.29]; InitialPAWmm=181.5; RelativeTo=LL15; FilledFromTop=false
                Memo
                  Using the retest sample values.
              Physical
                Thickness  BD   AirDry  LL15  DUL   SAT
                150        1    0.05    0.05  0.28  0.42
                150        1.1  0.1     0.1   0.28  0.42
                300        1.4  0.17    0.17  0.28  0.42
                300        1.3  0.17    0.17  0.28  0.42
                300        1.4  0.16    0.16  0.28  0.42
                300        1.4  0.16    0.16  0.28  0.42
                300        1.4  0.16    0.16  0.28  0.42
                SoilCrop WheatSoil: LL=[0.12, 0.1, 0.17, 0.17, 0.23, 0.23, 0.22]; KL=[0.1, 0.08, 0.06, 0.04, 0.03, 0.005, 0]; XF=[1, 1, 1, 1, 1, 1, 1]
              CERESSoilTemperature Temperature
              Nutrient
              Solute NO3: Thickness=[180, 150, 400, 270, 500, 300]; InitialValues=[8.38, 0.744, 2.68775, 2.70704, 2.136, 1.3618]; InitialValuesUnits=ppm; WaterTableConcentration=0; D0=0; DepthConstant=0; MaxDepthSoluteAccessible=0; RunoffEffectivenessAtMovingSolute=0; MaxEffectiveRunoff=0
              Solute NH4: Thickness=[180, 150, 400, 270, 500, 300]; InitialValues=[0.12, 0.096, 0.06175, 1.33815, 1.568, 0.365455]; InitialValuesUnits=ppm; WaterTableConcentration=0; D0=0; DepthConstant=0; MaxDepthSoluteAccessible=0; RunoffEffectivenessAtMovingSolute=0; MaxEffectiveRunoff=0
              Solute Urea: Thickness=[180, 150, 400, 270, 500, 300]; InitialValues=[0, 0, 0, 0, 0, 0]; InitialValuesUnits=kg/ha; WaterTableConcentration=0; D0=0; DepthConstant=0; MaxDepthSoluteAccessible=0; RunoffEffectivenessAtMovingSolute=0; MaxEffectiveRunoff=0
            Plant Wheat
            MicroClimate: a_interception=0; b_interception=1; c_interception=0; d_interception=0; SoilHeatFluxFraction=0.4; MinimumHeightDiffForNewLayer=0; NightInterceptionFraction=0.5; ReferenceHeight=2
            Irrigation
            Fertiliser
            SurfaceOrganicMatter: InitialResidueName=wheat; InitialResidueType=wheat; InitialResidueMass=0; InitialStandingFraction=0; InitialCPR=0; InitialCNR=80
            Operations Irrig
            Operations Fert
            Operations Sow
              2015-09-10  [Wheat].Sow(population:200, cultivar:"Discovery", depth:80, rowSpacing:130);
            Manager ClimateControl
              StartDate = 10/01/2015 00:00:00
              EndDate = 02/28/2016 00:00:00
              script: same as in Validation.New Zealand.Lincoln9192.LincolnBase.paddock.ClimateControl
            Manager StateFactors
```csharp
using Models.Interfaces;
using APSIM.Shared.Utilities;
using System.Xml.Serialization;
using Models;
using Models.PMF;
using Models.Soils;
using System.Text;
using System.Collections.Generic;
using Models.Core;
using System;
using Models.Soils.Nutrients;

namespace Models
{
    [Serializable] 
    public class Script : Model
    {
        [Link] private Clock Clock;
        [Link] private Irrigation Irrigation;
        [Link] private Soil ThisSoil;
        [Link] private Zone MyZone;
        [Link]
        private IPhysical soilPhysical;
        [Link]
        private ISoilWater waterBalance;
        public string Irr { get; set; }
        public double Nit { get; set; }
        
          
        private void SetSoilLayers()
        {
        
            int i = 0;
            if ((Irr == "Nil") && (Nit == 0))
            {
                if (soilPhysical.Thickness.Length != 7)
                {
                    throw new Exception("Soil layer exception");
                }
                soilPhysical.DUL[0] = 0.31;
                soilPhysical.DUL[1] = 0.34;
                soilPhysical.DUL[2] = 0.32;
                soilPhysical.DUL[3] = 0.23;
                soilPhysical.DUL[4] = 0.29;
                soilPhysical.DUL[5] = 0.29;
                soilPhysical.DUL[6] = 0.29;
                
                double[] nSW = { 0.18, 0.18, 0.26, 0.23, 0.29, 0.29, 0.27 };
                waterBalance.Reset();
                waterBalance.SW = nSW; 
            }   
            if ((Irr == "Nil") && (Nit == 50))
            {
                if (soilPhysical.Thickness.Length != 7)
                {
                    throw new Exception("Soil layer exception");
                }
                soilPhysical.DUL[0] = 0.30;
                soilPhysical.DUL[1] = 0.31;
                soilPhysical.DUL[2] = 0.29;
                soilPhysical.DUL[3] = 0.30;
                soilPhysical.DUL[4] = 0.31;
                soilPhysical.DUL[5] = 0.34;
                soilPhysical.DUL[6] = 0.30;
                
                double[] nSW = { 0.18, 0.18, 0.30, 0.25, 0.29, 0.34, 0.30 };
                waterBalance.Reset();
                waterBalance.SW = nSW; 
            }   
            if ((Irr == "Nil") && (Nit == 250))
            {
                if (soilPhysical.Thickness.Length != 7)
                {
                    throw new Exception("Soil layer exception");
                }
                soilPhysical.DUL[0] = 0.28;
                soilPhysical.DUL[1] = 0.24;
                soilPhysical.DUL[2] = 0.30;
                soilPhysical.DUL[3] = 0.27;
                soilPhysical.DUL[4] = 0.28;
                soilPhysical.DUL[5] = 0.36;
                soilPhysical.DUL[6] = 0.27;
                
                double[] nSW = { 0.18, 0.18, 0.3, 0.27, 0.28, 0.35, 0.27 };
                waterBalance.Reset();
                waterBalance.SW = nSW; 
            }   
            if ((Irr == "Full") && (Nit == 0))
            {
                if (soilPhysical.Thickness.Length != 7)
                {
                    throw new Exception("Soil layer exception");
                }
                soilPhysical.DUL[0] = 0.31;
                soilPhysical.DUL[1] = 0.34;
                soilPhysical.DUL[2] = 0.32;
                soilPhysical.DUL[3] = 0.23;
                soilPhysical.DUL[4] = 0.30;
                soilPhysical.DUL[5] = 0.33;
                soilPhysical.DUL[6] = 0.25;
                
                double[] nSW = { 0.18, 0.18, 0.26, 0.20, 0.30, 0.33, 0.25 };
                waterBalance.Reset();
                waterBalance.SW = nSW; 
            }   
            if ((Irr == "Full") && (Nit == 50))
            {
                if (soilPhysical.Thickness.Length != 7)
                {
                    throw new Exception("Soil layer exception");
                }
                soilPhysical.DUL[0] = 0.31;
                soilPhysical.DUL[1] = 0.28;
                soilPhysical.DUL[2] = 0.30;
                soilPhysical.DUL[3] = 0.29;
                soilPhysical.DUL[4] = 0.31;
                soilPhysical.DUL[5] = 0.33;
                soilPhysical.DUL[6] = 0.30;

                double[] nSW = { 0.18, 0.18, 0.28, 0.27, 0.28, 0.33, 0.30 };
                
                waterBalance.Reset();
                
                waterBalance.SW = nSW; 

            }
            if ((Irr == "Full") && (Nit == 250))
            {
                if (soilPhysical.Thickness.Length != 7)
                {
                    throw new Exception("Soil layer exception");
                }
                soilPhysical.DUL[0] = 0.26;
                soilPhysical.DUL[1] = 0.24;
                soilPhysical.DUL[2] = 0.26;
                soilPhysical.DUL[3] = 0.23;
                soilPhysical.DUL[4] = 0.27;
                soilPhysical.DUL[5] = 0.35;
                soilPhysical.DUL[6] = 0.22;
                
                double[] nSW = { 0.18, 0.18, 0.24, 0.23, 0.27, 0.35, 0.22 };
                waterBalance.Reset();
                waterBalance.SW = nSW; 
            }
        }

        [EventSubscribe("StartOfSimulation")]
        private void OnSimulationCommencing(object sender, EventArgs e)
        {
            SetSoilLayers();
        }
        
        [EventSubscribe("DoManagement")]
        private void OnDoManagement(object sender, EventArgs e)
        {
            //Specify irrigations that were only applied to some of the N treatments
            if (Irr == "Full")
            {
                if (Nit == 250)
                {
                    if ((DateUtilities.CompareDates("10-Dec", Clock.Today) == 0))
                        Irrigation.Apply(40);
                    if ((DateUtilities.CompareDates("17-Dec", Clock.Today) == 0))
                        Irrigation.Apply(39.7);
                    if ((DateUtilities.CompareDates("14-Jan", Clock.Today) == 0))
                        Irrigation.Apply(30);
                    if ((DateUtilities.CompareDates("21-Jan", Clock.Today) == 0))
                        Irrigation.Apply(20.1);
                }
                if (Nit == 50)
                {
                    if ((DateUtilities.CompareDates("10-Dec", Clock.Today) == 0))
                        Irrigation.Apply(40);
                    if ((DateUtilities.CompareDates("14-Jan", Clock.Today) == 0))
                        Irrigation.Apply(30);
                }
            }
            
        }
    }
}
```
            Report DailyReport
            Report HarvestReport
            Manager HarvestOnly
```csharp
using Newtonsoft.Json;
using Models.Soils.Nutrients;
using System;
using Models.Core;
using System.Collections.Generic;
using System.Text;
using Models.Soils;
using Models.PMF;
using Models;
using System.Xml.Serialization;
using APSIM.Shared.Utilities;
using Models.PMF.Phen;

using Models.PMF.Interfaces;

namespace Models
{
    [Serializable] 
    public class Script : Model
    {
        [Link] private Plant Wheat;
        [Link(Type = LinkType.Path, Path = "[Wheat].Phenology")]
        private Phenology phenology;


        [JsonIgnore] private bool Harvested {get; set;}
                
        [EventSubscribe("StartOfSimulation")]
        private void OnSimulationCommencing(object sender, EventArgs e)
        {
        
        Harvested = false;
        }

        [EventSubscribe("DoManagement")]
        private void OnDoManagement(object sender, EventArgs e)
        {
            if ((phenology.CurrentPhase.Name == "GrainRipening") & (Harvested == false))
            {
                //Harvest with manager specified removal fractions
                var Grain = Wheat.FindChild<IHasDamageableBiomass>("Grain");
                var Leaf = Wheat.FindChild<IHasDamageableBiomass>("Leaf");
                var Stem = Wheat.FindChild<IHasDamageableBiomass>("Stem");
                var Spike = Wheat.FindChild<IHasDamageableBiomass>("Spike");
                var Root = Wheat.FindChild<IHasDamageableBiomass>("Root");
                Grain.RemoveBiomass(liveToRemove: 0, deadToRemove: 0.0, liveToResidue: 0, deadToResidue: 0.0);
                Leaf.RemoveBiomass(liveToRemove: 0, deadToRemove: 0.0, liveToResidue: 0, deadToResidue: 0.0);
                Stem.RemoveBiomass(liveToRemove: 0, deadToRemove: 0.0, liveToResidue: 0, deadToResidue: 0.0);
                Spike.RemoveBiomass(liveToRemove: 0, deadToRemove: 0.0, liveToResidue: 0, deadToResidue: 0.0);
                Root.RemoveBiomass(liveToRemove: 0, deadToRemove: 0.0, liveToResidue: 0, deadToResidue: 0.0);
                Harvested = true;
            }
        }
    }
}
```
            Report SowingReport
            Manager SetCropParams
          Manager LocationInfo: same as Validation.New Zealand.Lincoln9192.LincolnBase.LocationInfo
      Experiment Leeston2013
        Memo: same as Validation.New Zealand.PalmerstonNorth1989.Memo
        Factors
          Permutation
            Factor Sow: Specification=[Sowing].Script.SowDate = 20-Feb,26-Mar,16-Apr
            Factor Popn: Specification=[Sowing].Script.Population = 50,100,150,200,250
        Simulation Leeston2013Base
          Clock: Start=2013-02-01; End=2014-02-15
          Summary summaryfile
          Weather: FileName=Leeston.met; Latitude=-43.7626; Tav=11.4; Amp=11.5
          Zone paddock: Area=1; Slope=0; AspectAngle=0; Altitude=50
            Folder Manager folder
              Operations IrrigationEvents
              Operations FertiliserEvents
                2013-10-17  [Fertiliser].Apply(92, Fertiliser.Types.UreaN, 10);
                2013-10-30  [Fertiliser].Apply(32, Fertiliser.Types.UreaN, 10);
              Manager Sowing
                SowDate =
                Population = 150
                CultivarName = Wakanui
                SowingDepth = 50
                RowSpacing = 150
```csharp
using Models.Soils.Nutrients;
using System;
using Models.Core;
using Models.PMF;
using Models.Soils;
using Models.Soils.Nutrients;
using Models.Utilities;
using APSIM.Shared.Utilities;

namespace Models
{
    [Serializable]
    public class Script : Model
    {
        [Link] Clock Clock;
        [Link] Summary Summary;
        [Link] Soil Soil;
        [Link] Plant Wheat;
        Accumulator accumulatedRain;
        
        [Description("Sowing date (d-mmm)")]
        public string SowDate { get; set; }
        [Description("Cultivar to be sown")]
        public string CultivarName { get; set; }
        [Description("Sowing depth (mm)")]
        public double SowingDepth { get; set; }
        [Description("Row spacing (mm)")]
        public double RowSpacing { get; set; }
        [Description("Plant population (/m2)")]
        public double Population { get; set; }
        


        [EventSubscribe("DoManagement")]
        private void OnDoManagement(object sender, EventArgs e)
        {
            if (DateUtilities.WithinDates(SowDate, Clock.Today, SowDate))
            {
                Wheat.Sow(population: Population, cultivar: CultivarName, depth: SowingDepth, rowSpacing: RowSpacing);    
                if(SowDate == "20-Feb")
                {
                    Wheat.Phenology.SetEmergenceDate("27-Feb");
                }
                if(SowDate == "26-Mar")
                {
                    Wheat.Phenology.SetEmergenceDate("3-Apr");
                }
                if(SowDate == "16-Apr")
                {
                    Wheat.Phenology.SetEmergenceDate("28-Apr");
                }
            }
        
        }
        
    }
}
```
              Operations HarvestEvents
                2014-02-04  [Wheat].Harvest();
                2014-02-04  [Wheat].EndCrop();
            Irrigation
            Soil: same as Validation.New Zealand.PalmerstonNorth1989.PalmerstonNorth1989Base.paddock.Soil
            SurfaceOrganicMatter Surface Organic Matter: InitialResidueName=wheat_stubble; InitialResidueType=whiteclover; InitialResidueMass=1000; InitialStandingFraction=0; InitialCPR=0; InitialCNR=25
            Fertiliser
            MicroClimate: a_interception=0; b_interception=1; c_interception=0; d_interception=0; SoilHeatFluxFraction=0.4; MinimumHeightDiffForNewLayer=0; NightInterceptionFraction=0.5; ReferenceHeight=2
            Plant Wheat
            Report DailyReport
            Report HarvestReport
            Manager MaxLeafSize
              script: same as in Validation.SE Queensland.APS2.APS2Base.Field.MaxLeafAreaCalc
            Report MaxLeafSizeReport
            Report SowingReport
            Manager SetCropParams
          SoilArbitrator Soil Arbitrator
          Manager LocationInfo: same as Validation.New Zealand.Lincoln9192.LincolnBase.LocationInfo
      Experiment Leeston2014
        Memo: same as Validation.New Zealand.PalmerstonNorth1989.Memo
        Factors
          Permutation
            Factor Sow: Specification=[Sowing].Script.SowDate = 20-Feb,10-Mar,26-Mar,23-Apr
            Factor Popn: Specification=[Sowing].Script.Population = 50,200
        Simulation Wakanui2014Base
          Clock: Start=2014-02-01; End=2015-02-15
          Summary summaryfile
          Weather: FileName=Leeston.met; Latitude=-43.7626; Tav=11.4; Amp=11.5
          Zone paddock: Area=1; Slope=0; AspectAngle=0; Altitude=50
            Folder Manager folder
              Operations IrrigationEvents
                2014-11-05  [Irrigation].Apply(50.0);
                2014-11-18  [Irrigation].Apply(50.0);
                2014-12-05  [Irrigation].Apply(50.0);
                2014-12-18  [Irrigation].Apply(50.0);
              Operations FertiliserEvents
                2014-09-10  [Fertiliser].Apply(101, Fertiliser.Types.UreaN, 10);
                2014-10-10  [Fertiliser].Apply(87, Fertiliser.Types.UreaN, 10);
              Manager Sowing
                SowDate =
                Population = 150
                CultivarName = Wakanui
                SowingDepth = 50
                RowSpacing = 150
```csharp
using Models.Soils.Nutrients;
using System;
using Models.Core;
using Models.PMF;
using Models.Soils;
using Models.Soils.Nutrients;
using Models.Utilities;
using APSIM.Shared.Utilities;

namespace Models
{
    [Serializable]
    public class Script : Model
    {
        [Link] Clock Clock;
        [Link] Summary Summary;
        [Link] Soil Soil;
        [Link] Plant Wheat;
        Accumulator accumulatedRain;
        
        [Description("Sowing date (d-mmm)")]
        public string SowDate { get; set; }
        [Display(Type = DisplayType.CultivarName)]
        [Description("Cultivar to be sown")]
        public string CultivarName { get; set; }
        [Description("Sowing depth (mm)")]
        public double SowingDepth { get; set; }
        [Description("Row spacing (mm)")]
        public double RowSpacing { get; set; }
        [Description("Plant population (/m2)")]
        public double Population { get; set; }
        


        [EventSubscribe("DoManagement")]
        private void OnDoManagement(object sender, EventArgs e)
        {
            if (DateUtilities.WithinDates(SowDate, Clock.Today, SowDate))
            {
                Wheat.Sow(population: Population, cultivar: CultivarName, depth: SowingDepth, rowSpacing: RowSpacing);    
                if(SowDate == "20-Feb")
                {
                    Wheat.Phenology.SetEmergenceDate("26-Feb");
                }
                if(SowDate == "10-Mar")
                {
                    Wheat.Phenology.SetEmergenceDate("17-Mar");
                }
                if(SowDate == "26-Mar")
                {
                    Wheat.Phenology.SetEmergenceDate("6-Apr");
                }
                if(SowDate == "23-Apr")
                {
                    Wheat.Phenology.SetEmergenceDate("8-May");
                }
            }
        
        }
        
    }
}
```
              Operations HarvestEvents
                2015-02-04  [Wheat].Harvest();
                2015-02-04  [Wheat].EndCrop();
            Irrigation
            Soil: SoilType=LincolnSoil; LocalName=Lincoln; Site=Lincoln; NearestTown=Unknown; Region=NZ; NaturalVegetation=Unknown; Latitude=0; Longitude=0
              Physical
                Thickness  BD   AirDry  LL15  DUL   SAT
                100        1.3  0.05    0.08  0.31  0.44
                200        1.3  0.05    0.07  0.3   0.44
                200        1.3  0.05    0.07  0.28  0.44
                200        1.3  0.05    0.09  0.31  0.44
                200        1.3  0.05    0.11  0.3   0.44
                200        1.3  0.05    0.16  0.28  0.44
                200        1.3  0.05    0.15  0.3   0.44
                200        1.3  0.05    0.12  0.34  0.44
                SoilCrop WheatSoil: LL=[0.08, 0.07, 0.07, 0.09, 0.11, 0.16, 0.15, 0.12]; KL=[0.06, 0.06, 0.06, 0.06, 0.03, 0.02, 0.02, 0.02]; XF=[1, 1, 1, 1, 1, 1, 1, 1]
              WaterBalance SoilWater: same as Validation.New Zealand.PalmerstonNorth1989.PalmerstonNorth1989Base.paddock.Soil.SoilWater
              Organic: same as Validation.New Zealand.PalmerstonNorth1989.PalmerstonNorth1989Base.paddock.Soil.Organic
              Chemical: Thickness=[100, 200, 200, 200, 200, 200, 200, 200]; PH=[6, 6, 6, 6, 6, 6, 6, 6]; PHUnits=Water
              Water: Thickness=[100, 200, 200, 200, 200, 200, 200, 200]; InitialValues=[0.24, 0.27, 0.26, 0.23, 0.24, 0.23, 0.23, 0.18]; InitialPAWmm=190; RelativeTo=LL15; FilledFromTop=false
              CERESSoilTemperature Temperature
              Nutrient
              Solute NO3: same as Validation.New Zealand.PalmerstonNorth1989.PalmerstonNorth1989Base.paddock.Soil.NO3
              Solute NH4: same as Validation.New Zealand.PalmerstonNorth1989.PalmerstonNorth1989Base.paddock.Soil.NH4
              Solute Urea: same as Validation.New Zealand.PalmerstonNorth1989.PalmerstonNorth1989Base.paddock.Soil.Urea
            SurfaceOrganicMatter Surface Organic Matter: InitialResidueName=wheat_stubble; InitialResidueType=wheat; InitialResidueMass=1000; InitialStandingFraction=0; InitialCPR=0; InitialCNR=80
            Fertiliser
            MicroClimate: a_interception=0; b_interception=1; c_interception=0; d_interception=0; SoilHeatFluxFraction=0.4; MinimumHeightDiffForNewLayer=0; NightInterceptionFraction=0.5; ReferenceHeight=2
            Plant Wheat
            Report DailyReport
            Report HarvestReport
            Manager MaxLeafAreaCalc
              script: same as in Validation.SE Queensland.APS2.APS2Base.Field.MaxLeafAreaCalc
            Report MaxLeafAreaReport
            Report SowingReport
            Report SensibilityReport (disabled): EventNames=[Clock].DoReport
              VariableNames:
                [Clock].Today
                [Wheat].Leaf.Photosynthesis.RueReductionFactor
                [Wheat].Leaf.Photosynthesis.FCO2
                [Wheat].Leaf.Photosynthesis.FN
                [Wheat].Leaf.Photosynthesis.FT
                [Wheat].Leaf.Photosynthesis.FVPD
                [Wheat].Leaf.Photosynthesis.FW
                [Wheat].Arbitrator.DM.TotalPlantDemand
                [Wheat].Arbitrator.DM.TotalPlantSupply
                [Wheat].Arbitrator.DM.TotalPlantAllocation
                [Wheat].Arbitrator.N.TotalPlantDemand
                [Wheat].Arbitrator.N.TotalPlantSupply
                [Wheat].Arbitrator.N.TotalPlantAllocation
                [Wheat].Arbitrator.DM.MetabolicDemand[1] + [Wheat].Arbitrator.DM.StructuralDemand[1] + [Wheat].Arbitrator.DM.StorageDemand[1] as GrainDMDemand
                [Wheat].Arbitrator.DM.MetabolicDemand[2] + [Wheat].Arbitrator.DM.StructuralDemand[2] + [Wheat].Arbitrator.DM.StorageDemand[2] as RootDMDemand
                [Wheat].Arbitrator.DM.MetabolicDemand[3] + [Wheat].Arbitrator.DM.StructuralDemand[3] + [Wheat].Arbitrator.DM.StorageDemand[3] as LeafDMDemand
                [Wheat].Arbitrator.DM.MetabolicDemand[4] + [Wheat].Arbitrator.DM.StructuralDemand[4] + [Wheat].Arbitrator.DM.StorageDemand[4] as SpikeDMDemand
                [Wheat].Arbitrator.DM.MetabolicDemand[5] + [Wheat].Arbitrator.DM.StructuralDemand[5] + [Wheat].Arbitrator.DM.StorageDemand[5] as StemDMDemand
                [Wheat].Arbitrator.DM.MetabolicAllocation[1] + [Wheat].Arbitrator.DM.StructuralAllocation[1] + [Wheat].Arbitrator.DM.StorageAllocation[1] as GrainDMAllocation
                [Wheat].Arbitrator.DM.MetabolicAllocation[2] + [Wheat].Arbitrator.DM.StructuralAllocation[2] + [Wheat].Arbitrator.DM.StorageAllocation[2] as RootDMAllocation
                [Wheat].Arbitrator.DM.MetabolicAllocation[3] + [Wheat].Arbitrator.DM.StructuralAllocation[3] + [Wheat].Arbitrator.DM.StorageAllocation[3] as LeafDMAllocation
                [Wheat].Arbitrator.DM.MetabolicAllocation[4] + [Wheat].Arbitrator.DM.StructuralAllocation[4] + [Wheat].Arbitrator.DM.StorageAllocation[4] as SpikeDMAllocation
                [Wheat].Arbitrator.DM.MetabolicAllocation[5] + [Wheat].Arbitrator.DM.StructuralAllocation[5] + [Wheat].Arbitrator.DM.StorageAllocation[5] as StemDMAllocation
                [Wheat].Arbitrator.DM.FixationSupply[1] + [Wheat].Arbitrator.DM.RetranslocationSupply[1] + [Wheat].Arbitrator.DM.ReallocationSupply[1] as GrainDMSupply
                [Wheat].Arbitrator.DM.FixationSupply[2] + [Wheat].Arbitrator.DM.RetranslocationSupply[2] + [Wheat].Arbitrator.DM.ReallocationSupply[2] as RootDMSupply
                [Wheat].Arbitrator.DM.FixationSupply[3] + [Wheat].Arbitrator.DM.RetranslocationSupply[3] + [Wheat].Arbitrator.DM.ReallocationSupply[3] as LeafDMSupply
                [Wheat].Arbitrator.DM.FixationSupply[4] + [Wheat].Arbitrator.DM.RetranslocationSupply[4] + [Wheat].Arbitrator.DM.ReallocationSupply[4] as SpikeDMSupply
                [Wheat].Arbitrator.DM.FixationSupply[5] + [Wheat].Arbitrator.DM.RetranslocationSupply[5] + [Wheat].Arbitrator.DM.ReallocationSupply[5] as StemDMSupply
                [Wheat].Grain.Nconc
                [Wheat].Grain.MinNconc
                [Wheat].Grain.MaximumNConc
                [Wheat].Root.Nconc
                [Wheat].Root.MinNconc
                [Wheat].Root.CriticalNConc
                [Wheat].Root.MaximumNConc
                [Wheat].Leaf.Nconc
                [Wheat].Leaf.MinNconc
                [Wheat].Leaf.CriticalNConc
                [Wheat].Leaf.MaximumNConc
                [Wheat].Stem.Nconc
                [Wheat].Stem.MinNconc
                [Wheat].Stem.CriticalNConc
                [Wheat].Stem.MaximumNConc
                [Wheat].Spike.Nconc
                [Wheat].Spike.MinNconc
                [Wheat].Spike.CriticalNConc
                [Wheat].Spike.MaximumNConc
                [Wheat].Leaf.FN
                [Wheat].Leaf.Canopy.FW
            Manager SetCropParams
          SoilArbitrator Soil Arbitrator
          Manager LocationInfo: same as Validation.New Zealand.Lincoln9192.LincolnBase.LocationInfo
      Experiment Wakanui2015
        Memo: same as Validation.New Zealand.PalmerstonNorth1989.Memo
        Factors
          Permutation
            Factor Sow: Specification=[Sowing].Script.SowDate = 20-Feb,10-Mar,20-Mar,09-Apr
            Factor Cm: Specification=[Sowing].Script.PGRTreatment = Normal
        Simulation Wakanui2015Base
          Clock: Start=2015-02-01; End=2016-02-15
          Summary summaryfile
          Weather: FileName=Wakanui.met; Latitude=-43.9732; Tav=11.4; Amp=11.5
          Zone paddock: Area=1; Slope=0; AspectAngle=0; Altitude=50
            Folder Manager folder
              Operations IrrigationEvents
                2015-10-19  [Irrigation].Apply(40.0);
                2015-11-08  [Irrigation].Apply(40.0);
                2015-11-26  [Irrigation].Apply(40.0);
                2015-12-12  [Irrigation].Apply(45.0);
                2015-12-28  [Irrigation].Apply(45.0);
              Operations FertiliserEvents
                2015-09-18  [Fertiliser].Apply(26, Fertiliser.Types.UreaN, 10);
                2015-09-26  [Fertiliser].Apply(51, Fertiliser.Types.UreaN, 10);
                2015-10-10  [Fertiliser].Apply(92, Fertiliser.Types.UreaN, 10);
                2015-10-29  [Fertiliser].Apply(115, Fertiliser.Types.UreaN, 10);
              Manager Sowing
                SowDate = 24-Jul
                PGRTreatment = 0
                CultivarName = Wakanui
                SowingDepth = 50
                RowSpacing = 150
```csharp
using Models.Soils.Nutrients;
using System;
using Models.Core;
using Models.PMF;
using Models.Soils;
using Models.Soils.Nutrients;
using Models.Utilities;
using APSIM.Shared.Utilities;

namespace Models
{
    [Serializable]
    public class Script : Model
    {
        [Link] Clock Clock;
        [Link] Summary Summary;
        [Link] Soil Soil;
        [Link] Plant Wheat;
        Accumulator accumulatedRain;
        
        [Description("Sowing date (d-mmm)")]
        public string SowDate { get; set; }
        [Description("Cultivar to be sown")]
        public string CultivarName { get; set; }
        [Description("Sowing depth (mm)")]
        public double SowingDepth { get; set; }
        [Description("Row spacing (mm)")]
        public double RowSpacing { get; set; }
        [Description("PGR treatment applied")]
        public string PGRTreatment { get; set; }
        


        [EventSubscribe("DoManagement")]
        private void OnDoManagement(object sender, EventArgs e)
        {
            if (DateUtilities.WithinDates(SowDate, Clock.Today, SowDate))
            {
                Wheat.Sow(population: 150, cultivar: CultivarName, depth: SowingDepth, rowSpacing: RowSpacing);    
                if(SowDate == "20-Feb")
                {
                    Wheat.Phenology.SetEmergenceDate("27-Feb");
                }
                if(SowDate == "10-Mar")
                {
                    Wheat.Phenology.SetEmergenceDate("17-Mar");
                }
                if(SowDate == "20-Mar")
                {
                    Wheat.Phenology.SetEmergenceDate("29-Mar");
                }
                if(SowDate == "09-Apr")
                {
                    Wheat.Phenology.SetEmergenceDate("22-Apr");
                }
            }
        
        }
        
    }
}
```
              Operations HarvestEvents
                2016-02-12  [Wheat].Harvest();
                2016-02-12  [Wheat].EndCrop();
            Irrigation
            Soil: SoilType=LincolnSoil; LocalName=Lincoln; Site=Lincoln; NearestTown=Unknown; Region=NZ; NaturalVegetation=Unknown; Latitude=0; Longitude=0
              Physical: same as Validation.New Zealand.Leeston2014.Wakanui2014Base.paddock.Soil.Physical
              WaterBalance SoilWater: same as Validation.New Zealand.PalmerstonNorth1989.PalmerstonNorth1989Base.paddock.Soil.SoilWater
              Organic: FOMCNRatio=15; CarbonUnits=Total
                Thickness  Carbon  SoilCNRatio  FBiom  FInert  FOM
                100        4       11           0.04   0.31    1031.068
                200        3       11           0.03   0.4     691.146
                200        2       11           0.02   0.5     463.289
                200        1       11           0.01   0.6     310.552
                200        1       11           0.01   0.7     208.169
                200        1       11           0.01   0.9     139.54
                200        0.9     11           0.01   0.99    93.536
                200        0.9     11           0.01   0.99    62.699
              Chemical: Thickness=[100, 200, 200, 200, 200, 200, 200, 200]; PH=[6, 6, 6, 6, 6, 6, 6, 6]; PHUnits=Water
              Water: Thickness=[100, 200, 200, 200, 200, 200, 200, 200]; InitialValues=[0.24, 0.27, 0.26, 0.23, 0.24, 0.23, 0.23, 0.18]; InitialPAWmm=190; RelativeTo=LL15; FilledFromTop=false
              CERESSoilTemperature Temperature
              Nutrient
              Solute NO3: Thickness=[100, 200, 200, 200, 200, 200, 200, 200]; InitialValues=[30.769, 3.846, 7.692, 3.846, 3.846, 3.846, 3.846, 3.846]; InitialValuesUnits=ppm; WaterTableConcentration=0; D0=0; DepthConstant=0; MaxDepthSoluteAccessible=0; RunoffEffectivenessAtMovingSolute=0; MaxEffectiveRunoff=0
              Solute NH4: same as Validation.New Zealand.PalmerstonNorth1989.PalmerstonNorth1989Base.paddock.Soil.NH4
              Solute Urea: same as Validation.New Zealand.PalmerstonNorth1989.PalmerstonNorth1989Base.paddock.Soil.Urea
            SurfaceOrganicMatter Surface Organic Matter: InitialResidueName=wheat_stubble; InitialResidueType=whiteclover; InitialResidueMass=1000; InitialStandingFraction=0; InitialCPR=0; InitialCNR=40
            Fertiliser
            MicroClimate: a_interception=0; b_interception=1; c_interception=0; d_interception=0; SoilHeatFluxFraction=0.4; MinimumHeightDiffForNewLayer=0; NightInterceptionFraction=0.5; ReferenceHeight=2
            Plant Wheat
            Report DailyReport
            Report HarvestReport
            Manager MaxLeafSize
              script: same as in Validation.SE Queensland.APS2.APS2Base.Field.MaxLeafAreaCalc
            Report MaxLeafSizeReport
            Report SowingReport
            Report SensibilityReport (disabled): same as Validation.New Zealand.Lincoln2014.Rainshelter2013.paddock.SensibilityReport
            Manager SetCropParams
          SoilArbitrator Soil Arbitrator
          Manager LocationInfo: same as Validation.New Zealand.Lincoln9192.LincolnBase.LocationInfo
      Experiment Wakanui2016
        Memo: same as Validation.New Zealand.PalmerstonNorth1989.Memo
        Factors
          Permutation
            Factor Sow: Specification=[Sowing].Script.SowDate = 24-Feb,08-Mar,29-Mar,14-Apr
            Factor Cm: Specification=[Defoliation].Script.Defoliated = Normal
        Simulation Wakanui2016Base
          Clock: Start=2016-02-01; End=2017-02-15
          Summary summaryfile
          Weather: FileName=Wakanui.met; Latitude=-43.9732; Tav=11.4; Amp=11.5
          Zone paddock: Area=1; Slope=0; AspectAngle=0; Altitude=50
            Folder Manager folder
              Operations IrrigationEvents
                2016-11-20  [Irrigation].Apply(25.0);
                2016-12-10  [Irrigation].Apply(25.0);
              Operations FertiliserEvents
                2016-09-11  [Fertiliser].Apply(92, Fertiliser.Types.UreaN, 10);
                2016-10-28  [Fertiliser].Apply(97, Fertiliser.Types.UreaN, 10);
                2016-11-02  [Fertiliser].Apply(69, Fertiliser.Types.UreaN, 10);
              Manager Sowing
                SowDate =
                CultivarName = Wakanui
                SowingDepth = 50
                RowSpacing = 150
                Population = 150
```csharp
using Models.Soils.Nutrients;
using System;
using Models.Core;
using Models.PMF;
using Models.Soils;
using Models.Soils.Nutrients;
using Models.Utilities;
using APSIM.Shared.Utilities;

namespace Models
{
    [Serializable]
    public class Script : Model
    {
        [Link] Clock Clock;
        [Link] Summary Summary;
        [Link] Soil Soil;
        [Link] Plant Wheat;
        Accumulator accumulatedRain;
        
        [Description("Sowing date (d-mmm)")]
        public string SowDate { get; set; }
        [Description("Cultivar to be sown")]
        public string CultivarName { get; set; }
        [Description("Sowing depth (mm)")]
        public double SowingDepth { get; set; }
        [Description("Row spacing (mm)")]
        public double RowSpacing { get; set; }
        [Description("Plant population (/m2)")]
        public double Population { get; set; }
        


        [EventSubscribe("DoManagement")]
        private void OnDoManagement(object sender, EventArgs e)
        {
            if (DateUtilities.WithinDates(SowDate, Clock.Today, SowDate))
            {
                Wheat.Sow(population: Population, cultivar: CultivarName, depth: SowingDepth, rowSpacing: RowSpacing);    
                if(SowDate == "24-Feb")
                {
                    Wheat.Phenology.SetEmergenceDate("2-Mar");
                }
                if(SowDate == "08-Mar")
                {
                    Wheat.Phenology.SetEmergenceDate("17-Mar");
                }
                if(SowDate == "29-Mar")
                {
                    Wheat.Phenology.SetEmergenceDate("11-Apr");
                }
                if(SowDate == "14-Apr")
                {
                    Wheat.Phenology.SetEmergenceDate("26-Apr");
                }
            }
        
        }
        
    }
}
```
              Operations HarvestEvents
                2017-02-12  [Wheat].Harvest();
                2017-02-12  [Wheat].EndCrop();
              Manager Defoliation
                NibblingDate = 10/31/2002 00:00:00
                ProportionNibbled = 0.5
                Defoliated = False
```csharp
using Models.PMF.Interfaces;
using Newtonsoft.Json;
using System;
using System.Collections.Generic;
using Models.Core;
using Models.PMF;
using Models.PMF.Interfaces;
using System.Xml.Serialization;
using Models.Soils;

namespace Models
{
    [Serializable] 
    [System.Xml.Serialization.XmlInclude(typeof(Model))]
    public class Script : Model
    {
        [Link] Plant Wheat;
        [Link] Clock Clock;

        [Description("Date that mouse damage event occurs")]
        public DateTime NibblingDate { get; set; }
        [Description("Proportion of the crop removed by mice")]
        public double ProportionNibbled { get; set; }
        [Description("Switch if crop is defoliated")]
        public string Defoliated {get; set;}
        

        
        [EventSubscribe("StartOfSimulation")]
        private void OnSimulationCommencing(object sender, EventArgs e)
        {
            
        }
        
        [EventSubscribe("DoManagement")]
        private void OnDoManagement(object sender, EventArgs e)
        {
            //Set up  array of remove fractions to send with Cut method.  Each member in the array corresponds to an organ in the same order they are set up in.

            if (Clock.Today.Date == NibblingDate)
            {
                //Harvest with manager specified removal fractions
                Wheat.structure?.DoThin(ProportionNibbled);
                var Grain = Wheat.FindChild<IHasDamageableBiomass>("Grain");
                var Leaf = Wheat.FindChild<IHasDamageableBiomass>("Leaf");
                var Stem = Wheat.FindChild<IHasDamageableBiomass>("Stem");
                var Spike = Wheat.FindChild<IHasDamageableBiomass>("Spike");
                var Root = Wheat.FindChild<IHasDamageableBiomass>("Root");
                Grain.RemoveBiomass(liveToRemove: 0, deadToRemove: 0.0, liveToResidue: ProportionNibbled, deadToResidue: 0.0);
                Leaf.RemoveBiomass(liveToRemove: 0, deadToRemove: 0.0, liveToResidue: ProportionNibbled, deadToResidue: 0.0);
                Stem.RemoveBiomass(liveToRemove: 0, deadToRemove: 0.0, liveToResidue: ProportionNibbled, deadToResidue: 0.0);
                Spike.RemoveBiomass(liveToRemove: 0, deadToRemove: 0.0, liveToResidue: ProportionNibbled, deadToResidue: 0.0);
                Root.RemoveBiomass(liveToRemove: 0, deadToRemove: 0.0, liveToResidue: 0, deadToResidue: 0.0);

            }
        }
    }
}
```
            Irrigation
            Soil: same as Validation.New Zealand.Leeston2014.Wakanui2014Base.paddock.Soil
            SurfaceOrganicMatter Surface Organic Matter: InitialResidueName=wheat_stubble; InitialResidueType=wheat; InitialResidueMass=1000; InitialStandingFraction=0; InitialCPR=0; InitialCNR=80
            Fertiliser
            MicroClimate: a_interception=0; b_interception=1; c_interception=0; d_interception=0; SoilHeatFluxFraction=0.4; MinimumHeightDiffForNewLayer=0; NightInterceptionFraction=0.5; ReferenceHeight=2
            Plant Wheat
            Report DailyReport
            Report HarvestReport
            Manager MaxLeafSize
              script: same as in Validation.SE Queensland.APS2.APS2Base.Field.MaxLeafAreaCalc
            Report MaxLeafSizeReport
            Report SowingReport
            Manager SetCropParams
          SoilArbitrator Soil Arbitrator
          Manager LocationInfo: same as Validation.New Zealand.Lincoln9192.LincolnBase.LocationInfo
      Experiment Wakanui2017
        Memo: same as Validation.New Zealand.PalmerstonNorth1989.Memo
        Factors
          Permutation
            Factor Sow: Specification=[Sowing].Script.SowDate = 09-Mar,30-Mar,19-Apr
            Factor Cm: Specification=[Defoliation].Script.Defoliated = Normal
        Simulation Wakanui2017Base
          Clock: Start=2017-02-01; End=2018-02-15
          Summary summaryfile
          Weather: FileName=Wakanui.met; Latitude=-43.9732; Tav=11.4; Amp=11.5
          Zone paddock: Area=1; Slope=0; AspectAngle=0; Altitude=50
            Folder Manager folder
              Operations IrrigationEvents
                2017-11-11  [Irrigation].Apply(40.0);
                2017-12-02  [Irrigation].Apply(40.0);
                2017-12-24  [Irrigation].Apply(45.0);
              Operations FertiliserEvents
                2017-09-13  [Fertiliser].Apply(100, Fertiliser.Types.UreaN, 10);
                2017-10-13  [Fertiliser].Apply(100, Fertiliser.Types.UreaN, 10);
                2017-11-02  [Fertiliser].Apply(70, Fertiliser.Types.UreaN, 10);
              Manager Sowing
                SowDate =
                CultivarName = Wakanui
                SowingDepth = 50
                RowSpacing = 150
                Population = 150
```csharp
using Models.Soils.Nutrients;
using System;
using Models.Core;
using Models.PMF;
using Models.Soils;
using Models.Soils.Nutrients;
using Models.Utilities;
using APSIM.Shared.Utilities;

namespace Models
{
    [Serializable]
    public class Script : Model
    {
        [Link] Clock Clock;
        [Link] Summary Summary;
        [Link] Soil Soil;
        [Link] Plant Wheat;
        Accumulator accumulatedRain;
        
        [Description("Sowing date (d-mmm)")]
        public string SowDate { get; set; }
        [Description("Cultivar to be sown")]
        public string CultivarName { get; set; }
        [Description("Sowing depth (mm)")]
        public double SowingDepth { get; set; }
        [Description("Row spacing (mm)")]
        public double RowSpacing { get; set; }
        [Description("Plant population (/m2)")]
        public double Population { get; set; }
        


        [EventSubscribe("DoManagement")]
        private void OnDoManagement(object sender, EventArgs e)
        {
            if (DateUtilities.WithinDates(SowDate, Clock.Today, SowDate))
            {
                Wheat.Sow(population: Population, cultivar: CultivarName, depth: SowingDepth, rowSpacing: RowSpacing);    
            }
                if(SowDate == "09-Mar")
                {
                    Wheat.Phenology.SetEmergenceDate("16-Mar");
                }
                if(SowDate == "30-Mar")
                {
                    Wheat.Phenology.SetEmergenceDate("11-Apr");
                }
                if(SowDate == "19-Apr")
                {
                    Wheat.Phenology.SetEmergenceDate("30-Apr");
                }
        }
        
    }
}
```
              Operations HarvestEvents
                2018-02-04  [Wheat].Harvest();
                2018-02-04  [Wheat].EndCrop();
              Manager Defoliation: same as Validation.New Zealand.Wakanui2016.Wakanui2016Base.paddock.Manager folder.Defoliation
            Irrigation
            Soil: same as Validation.New Zealand.Leeston2014.Wakanui2014Base.paddock.Soil
            SurfaceOrganicMatter Surface Organic Matter: InitialResidueName=wheat_stubble; InitialResidueType=wheat; InitialResidueMass=1000; InitialStandingFraction=0; InitialCPR=0; InitialCNR=80
            Fertiliser
            MicroClimate: a_interception=0; b_interception=1; c_interception=0; d_interception=0; SoilHeatFluxFraction=0.4; MinimumHeightDiffForNewLayer=0; NightInterceptionFraction=0.5; ReferenceHeight=2
            Plant Wheat
            Report DailyReport
            Report HarvestReport
            Manager MaxLeafSize
              script: same as in Validation.SE Queensland.APS2.APS2Base.Field.MaxLeafAreaCalc
            Report MaxLeafSizeReport
            Report SowingReport
            Manager SetCropParams
          SoilArbitrator Soil Arbitrator
          Manager LocationInfo: same as Validation.New Zealand.Lincoln9192.LincolnBase.LocationInfo
      Experiment Lincoln2021
        Factors
          Permutation
            Factor SD
              CompositeFactor 18Feb
                Specifications:
                  [Sowing].Script.SowDate = 18-Feb
                  [Sowing].Script.EmergeDate = 7-Mar
              CompositeFactor 15Mar
                Specifications:
                  [Sowing].Script.SowDate = 15-Mar
                  [Sowing].Script.EmergeDate = 5-Apr
              CompositeFactor 15Apr
                Specifications:
                  [Sowing].Script.SowDate = 15-Apr
                  [Sowing].Script.EmergeDate = 5-May
              CompositeFactor 27May
                Specifications:
                  [Sowing].Script.SowDate = 27-May
                  [Sowing].Script.EmergeDate = 2-Jul
            Factor CV: Specification=[Sowing].Script.CultivarName=Kerrin, Zyatt, Graham, CRW247
        Simulation Wheat
          Clock: Start=2021-01-01; End=2022-03-12
          Summary SummaryFile
          Weather: FileName=LincolnUni.met; Latitude=-43.65; Tav=8.3566; Amp=5.29156
          SoilArbitrator
          Zone Field: Area=1; Slope=0; AspectAngle=0; Altitude=50
            Soil TempletonSiltLoam: same as Validation.New Zealand.Lincoln2014.Rainshelter2013.paddock.TempletonSiltLoam
            Fertiliser
            SurfaceOrganicMatter: InitialResidueName=wheat_stubble; InitialResidueType=wheat; InitialResidueMass=500; InitialStandingFraction=0; InitialCPR=0; InitialCNR=100
            Plant Wheat
            MicroClimate: a_interception=0; b_interception=1; c_interception=0; d_interception=0; SoilHeatFluxFraction=0.4; MinimumHeightDiffForNewLayer=0; NightInterceptionFraction=0.5; ReferenceHeight=2
            Manager Sowing
              SowDate = 24-Jul
              CultivarName = Amethyst
              SowingDepth = 50
              RowSpacing = 150
              Population = 220
              EmergeDate =
```csharp
using APSIM.Shared.Utilities;
using Models.Utilities;
using Models.Soils;
using Models.PMF;
using Models.Core;
using System;

namespace Models
{
    [Serializable]
    public class Script : Model
    {
        [Link] Clock Clock;
        [Link] Fertiliser Fertiliser;
        [Link] Summary Summary;
        [Link] Soil Soil;
        
        [Link] Plant wheat;

        [Description("Sowing date (d-mmm)")]
        public string SowDate { get; set; }

        [Display(Type = DisplayType.CultivarName)]
        [Description("Cultivar to be sown")]
        public string CultivarName { get; set; }

        [Description("Sowing depth (mm)")]
        public double SowingDepth { get; set; }

        [Description("Row spacing (mm)")]
        public double RowSpacing { get; set; }

        [Description("Plant population (/m2)")]
        public double Population { get; set; }
        
        [Description("Emergence Date (d-MMM)")]
        public string EmergeDate {get; set;}

        [EventSubscribe("DoManagement")]
        private void OnDoManagement(object sender, EventArgs e)
        {
            if (DateUtilities.WithinDates(SowDate, Clock.Today, SowDate))
            {
                wheat.Sow(population: Population, cultivar: CultivarName, depth: SowingDepth, rowSpacing: RowSpacing);    
                wheat.Phenology.SetEmergenceDate(EmergeDate);
            }
        }
    }
}
```
            Manager SowingFertiliser
              Amount = 0
              CropName = wheat
              script: same as in Validation.SE Queensland.Gatton2014.14SOWbase.Field.SowingFertiliser
            Manager Harvest
```csharp
using Models.Soils.Nutrients;
using System;
using Models.Core;
using Models.PMF;
using Models.Soils;
using Models.Soils.Nutrients;
using Models.Utilities;
using APSIM.Shared.Utilities;

namespace Models
{
    [Serializable]
    public class Script : Model
    {
        [Link] Plant Wheat;

        [EventSubscribe("DoManagement")]
        private void OnDoManagement(object sender, EventArgs e)
        {
            if (Wheat.IsReadyForHarvesting)
            {
               Wheat.Harvest();
               Wheat.EndCrop();    
            }
        
        }
        
    }
}
```
            Manager Fertilise on Z25
              Stage = 25
              FertiliserType = UreaN
              Amount = 50
```csharp
using Models.Soils;
using System;
using Models.Core;
using Models.PMF;
namespace Models
{
    [Serializable] 
    public class Script : Model
    {
        [Link] Clock Clock;
        [Link] Fertiliser Fertiliser;
        [Link] Summary Summary;
        [Link] Plant Wheat;
 
        private bool hasFertilised = false;

        [Description("Fertilise once crop reaches stage:")]
        public double Stage { get; set; }

        [Description("Type of fertiliser to apply? ")] 
        public Fertiliser.Types FertiliserType { get; set; }

        [Description("Amount of fertiliser to be applied (kg/ha)")] 
        public double Amount { get; set; }
     
        [EventSubscribe("DoManagement")] 
        private void OnDoManagement(object sender, EventArgs e)
        { 
            double zadok = (double)Wheat.FindByPath("Phenology.Zadok.Stage").Value; 
 
            if (zadok >= Stage && !hasFertilised)
            { 
                Summary.WriteMessage(this, "Fertilising!!", MessageType.Diagnostic); 
                Fertiliser.Apply(Amount: Amount, Type: FertiliserType);
                hasFertilised = true; 
            } 
        }

        [EventSubscribe("Sowing")]
        private void OnSowing(object sender, EventArgs e)
        {
            hasFertilised = false;
        }
    }
}
```
            Manager Fertilise on Z30
              Stage = 30
              FertiliserType = UreaN
              Amount = 100
              script: same as in Validation.New Zealand.Lincoln2021.Wheat.Field.Fertilise on Z25
            Report DailyReport: EventNames=[Clock].EndOfDay
              VariableNames:
                [Clock].Today as Date
                [Wheat].Phenology.Zadok.Stage as ZadokStage
                [Wheat].LAI as LAI
                [Leaf].AppearedCohortNo as LeafNumber
                [Wheat].Phenology.CurrentStageName as Stage
                [Wheat].AboveGround.Wt*10 as Biomass
                //[Wheat].AboveGround.N
                [Wheat].Leaf.Wt*10 as Leaf
                [Wheat].Stem.Wt*10 as Stem
                [Wheat].Spike.Wt*10 as Head
                [Wheat].Spike.HeadNumber as HeadNumber
                [Wheat].Grain.Total.Wt*10 as Yield
                //[Wheat].Grain.Protein
                [Wheat].Grain.Number as Grain.Number
                [Wheat].Grain.Size as Grain.Size
                //[Wheat].Grain.Total.Wt
                //[Wheat].Grain.Total.N
                //[Wheat].Total.Wt
                [Wheat].Leaf.StemPopulation as StemPopulation
                //Sum([Soil].SoilWater.PAWmm[1:10]) as PAW_1m
                //[Soil].Physical.DULmm as DUL
                //[Soil].Physical.LL15mm as LL
                Sum([Soil].Water.Volumetric[1:10]) as SW
                //Sum([Soil].Water.MM[1:10]) as SWmm
                Sum([Soil].SoilWater.PAW[1:10]) as PAW_1m
                Sum([Soil].Physical.DUL[1:10]) as DUL
                Sum([Soil].Physical.LL15[1:10]) as LL
                [Irrigation].IrrigationApplied
                [Weather].Rain
                [Wheat].Leaf.Fn
                [Wheat].Leaf.Fw
                Sum([Soil].Nutrient.MineralN[1:10]) as MinN
                [Wheat].Phenology.HaunStage as Haun
                //[Wheat].Phenology.Stage as Stage
                [Wheat].Leaf.Canopy.SpecificArea as SLA
            Report HarvestReport: EventNames=[Wheat].Harvesting
              VariableNames:
                [Clock].Today as Date
                //[Wheat].Phenology.Zadok.Stage
                [Wheat].LAI as LAI
                [Leaf].AppearedCohortNo as LeafNumber
                [Wheat].Phenology.CurrentStageName as Stage
                [Wheat].AboveGround.Wt*10 as Biomass
                //[Wheat].AboveGround.N
                [Wheat].Leaf.Wt*10 as Leaf
                [Wheat].Stem.Wt*10 as Stem
                [Wheat].Spike.Wt*10 as Head
                [Wheat].Spike.HeadNumber as HeadNumber
                [Wheat].Grain.Total.Wt*10 as Yield
                //[Wheat].Grain.Protein
                [Wheat].Grain.Number as Grain.Number
                [Wheat].Grain.Size*1000 as TGW
                //[Wheat].Grain.Total.Wt
                //[Wheat].Grain.Total.N
                //[Wheat].Total.Wt
                [Wheat].Leaf.StemPopulation as StemPopulation
                [Wheat].Leaf.Canopy.SpecificArea as SLA
            Operations
              2021-03-01  [Irrigation].Apply (10);
              2021-03-04  [Irrigation].Apply (20);
              2021-03-09  [Irrigation].Apply (40);
              2021-03-11  [Irrigation].Apply (40);
              2021-03-17  [Irrigation].Apply (15);
              2021-03-22  [Irrigation].Apply (25);
              2021-03-30  [Irrigation].Apply (10);
              2021-10-21  [Irrigation].Apply (14);
              2021-11-01  [Irrigation].Apply (21);
              2021-11-06  [Irrigation].Apply (4);
              2021-11-07  [Irrigation].Apply (31.5);
              2021-11-12  [Irrigation].Apply (21);
              2021-11-16  [Irrigation].Apply (35);
              2021-11-18  [Irrigation].Apply (42);
              2021-11-19  [Irrigation].Apply (24.5);
              2021-11-20  [Irrigation].Apply (24.5);
              2021-11-24  [Irrigation].Apply (52);
              2021-11-25  [Irrigation].Apply (45.5);
              2021-11-29  [Irrigation].Apply (21);
            Irrigation
            Manager SetCropParams
            Manager NDVIModel
              DrySoilNDVI = 0.12
              WetSoilNDVI = 0.2
              GreenCropNDVI = 0.9
              DeadCropNDVI = 0.1
```csharp
using System;
using Models.Core;
using Models.Interfaces;
using Models.PMF;
using APSIM.Shared.Utilities;
using Models.WaterModel;

namespace Models
{
    [Serializable]
    public class Script : Model
    {
        [Link] IClock Clock;
        [Link] ISummary Summary;
        [Link] ICanopy WheatCanopy;
        [Link] EvaporationModel EvapModel;
        
        [Description("Dry soil NDVI")]
        public double DrySoilNDVI { get; set; }
        
        [Description("Wet soil NDVI")]
        public double WetSoilNDVI { get; set; }

        [Description("Green Crop NDVI")]
        public double GreenCropNDVI { get; set; }
        
        [Description("Dead Crop NDVI")]
        public double DeadCropNDVI { get; set; }
                
        public double NDVI { get; set; }

        [EventSubscribe("DoManagement")]
        private void DoDailyCalculations(object sender, EventArgs e)
        {
            double SoilNDVI = WetSoilNDVI;
            if (EvapModel.t > 1)
               SoilNDVI = DrySoilNDVI;

            NDVI = GreenCropNDVI * WheatCanopy.CoverGreen;
            NDVI += DeadCropNDVI * (WheatCanopy.CoverTotal - WheatCanopy.CoverGreen);
            NDVI += SoilNDVI * (1 - WheatCanopy.CoverTotal);            
            
        }
    }
}
```
            Report: EventNames=[Clock].EndOfDay
              VariableNames:
                [Clock].Today
                [NDVIModel].Script.NDVI
                [Wheat].AboveGround.Wt
                [Wheat].AboveGround.N
                [Wheat].AboveGroundDead.Wt
                [Wheat].AboveGroundDead.N
                [Wheat].AboveGroundDead.NConc
                [Wheat].BelowGround.N
                [Wheat].TotalDead.N
                [Wheat].TotalLive.N
                [Wheat].Total.C
                [Wheat].Total.Wt*0.4 as TotalC
                [Wheat].TotalLive.Wt*0.4 as TotalLiveC
                [Wheat].TotalDead.Wt*0.4 as TotalDeadC
                [Wheat].Arbitrator.Nitrogen.TotalUptakeSupply
                [Wheat].Arbitrator.Nitrogen.TotalReAllocationSupply
                [Wheat].Arbitrator.Nitrogen.TotalReTranslocationSupply
                [Wheat].Arbitrator.UnallocatedN
                [Wheat].Arbitrator.Carbon.TotalFixationSupply
                [Wheat].Arbitrator.Carbon.TotalReAllocationSupply
                [Wheat].Arbitrator.Carbon.TotalReTranslocationSupply
                [Wheat].Arbitrator.UnallocatedC
                [Wheat].Grain.Nitrogen.Demands.Total
                [Wheat].Leaf.Nitrogen.Demands.Total
                [Wheat].Stem.Nitrogen.Demands.Total
                [Wheat].Spike.Nitrogen.Demands.Total
                [Wheat].Root.Nitrogen.Demands.Total
                [Wheat].Grain.Carbon.Demands.Total
                [Wheat].Leaf.Carbon.Demands.Total
                [Wheat].Stem.Carbon.Demands.Total
                [Wheat].Spike.Carbon.Demands.Total
                [Wheat].Root.Carbon.Demands.Total
                [Wheat].Leaf.Carbon.Supplies.Fixation
                [Wheat].Leaf.Photosynthesis
                [Wheat].Leaf.Photosynthesis.FT
                [Fertiliser].NitrogenApplied
                [Wheat].Leaf.Canopy.CoverDead
                [Wheat].Leaf.Canopy.CoverGreen
                [Wheat].Leaf.Canopy.CoverTotal
                [Wheat].Leaf.Canopy.FW
                [Wheat].Leaf.Canopy.Height
                [Wheat].Leaf.Canopy.LAI
                [Wheat].Leaf.Canopy.Transpiration
                [Wheat].Leaf.Carbon.Demands.Total
                [Wheat].Leaf.Photosynthesis.RadnInt
                [Wheat].Leaf.Nitrogen.ConcentrationOrFraction.Metabolic
                [Wheat].Leaf.Dead.N
                [Wheat].Leaf.Dead.NConc
                [Wheat].Leaf.Dead.Nitrogen.Metabolic
                [Wheat].Leaf.Dead.Nitrogen.Storage
                [Wheat].Leaf.Dead.Nitrogen.Structural
                [Wheat].Leaf.Dead.Wt
                //[Wheat].Leaf.DeltaLAI
                [Wheat].Leaf.FN
                [Wheat].Leaf.Canopy.FW
                [Wheat].Leaf.Live.N
                [Wheat].Leaf.Live.NConc
                [Wheat].Leaf.Live.Wt
                [Wheat].Leaf.Nitrogen.ConcentrationOrFraction.Storage
                [Wheat].Leaf.Nitrogen.ConcentrationOrFraction.Structural
                [Wheat].Leaf.Live.Nitrogen.Structural
                [Wheat].Leaf.Live.Nitrogen.Metabolic
                [Wheat].Leaf.Live.Nitrogen.Storage
                [Wheat].Leaf.Nitrogen.Demand.Structural
                [Wheat].Leaf.Nitrogen.Demand.Metabolic
                [Wheat].Leaf.Nitrogen.Demand.Storage
                [Wheat].Leaf.Allocated.Nitrogen.Structural
                [Wheat].Leaf.Allocated.Nitrogen.Metabolic
                [Wheat].Leaf.Allocated.Nitrogen.Storage
                [Wheat].Leaf.Allocated.Weight.Structural
                [Wheat].Leaf.Allocated.Weight.Metabolic
                [Wheat].Leaf.Allocated.Weight.Storage
                [Wheat].Leaf.HaunStage
                [Wheat].Leaf.Canopy.SpecificArea
                [Wheat].Stem.Nitrogen.ConcentrationOrFraction.Metabolic
                [Wheat].Stem.Dead.NConc
                [Wheat].Stem.Live.N
                [Wheat].Stem.Live.NConc
                [Wheat].Stem.Live.Wt
                [Wheat].Stem.Nitrogen.ConcentrationOrFraction.Storage
                [Wheat].Stem.Nitrogen.ConcentrationOrFraction.Structural
                [Wheat].Stem.NConc
                [Wheat].Spike.Nitrogen.ConcentrationOrFraction.Metabolic
                [Wheat].Spike.Dead.NConc
                [Wheat].Spike.Live.N
                [Wheat].Spike.Live.NConc
                [Wheat].Spike.Live.Wt
                [Wheat].Spike.Nitrogen.ConcentrationOrFraction.Storage
                [Wheat].Spike.Nitrogen.ConcentrationOrFraction.Structural
                [Wheat].Spike.NConc
                //[Wheat].Phenology.AccumulatedThermalTime
                [Wheat].Phenology.CurrentPhase.Name
                [Wheat].Phenology.CurrentStageName
                [Wheat].Phenology.FinalLeafNumber
                [Wheat].Phenology.Photoperiod
                [Wheat].Phenology.Stage
                [Wheat].Phenology.ThermalTime
                [Wheat].Root.Nitrogen.ConcentrationOrFraction.Metabolic
                [Wheat].Root.Live.N
                [Wheat].Root.Live.NConc
                [Wheat].Root.Live.Wt
                [Wheat].Root.Dead.NConc
                [Wheat].Root.Nitrogen.ConcentrationOrFraction.Storage
                [Wheat].Root.Nitrogen.ConcentrationOrFraction.Structural
                [Wheat].Root.N
                [Wheat].Root.Nconc
                [Wheat].Root.Network.Depth
                [Wheat].Root.Network.WaterUptake
                [Wheat].Root.Network.Zones[1].LayerLive.Wt
                //[Wheat].SCS
                [Wheat].SowingData.Cultivar
                [Wheat].Grain.Nitrogen.ConcentrationOrFraction.Metabolic
                [Wheat].Grain.Live.N
                [Wheat].Grain.Live.NConc
                [Wheat].Grain.Live.Wt
                [Wheat].Grain.Nitrogen.ConcentrationOrFraction.Storage
                [Wheat].Grain.Nitrogen.ConcentrationOrFraction.Structural
                [Wheat].Grain.NConc
                [Wheat].Grain.Wt
                //[Wheat].Total.N
                //[Wheat].Total.NConc
                //[Wheat].Total.Wt
                //[Wheat].TotalDead.N
                //[Wheat].TotalDead.NConc
                //[Wheat].TotalDead.Wt
                [Irrigation].IrrigationApplied
                [Phenology].Photoperiod
                [Soil].SoilWater.LeachNO3
                [Soil].Water.Volumetric
                [Soil].Water.MM
                [SurfaceOrganicMatter].Wt
                [Weather].MeanT
                [Weather].Rain
                sum([Soil].Nutrient.MineralN) as ProfileN
                sum([Soil].NO3.kgha) as TotalSoilNitrogen
                sum([Soil].Water.MM[1:7]) as ProfileWater
                [Soil].Nutrient.MineralN
                [Wheat].Grain.Live.C + [Wheat].Grain.Dead.C + [Wheat].Leaf.Live.C + [Wheat].Leaf.Dead.C + [Wheat].Root.Live.C + [Wheat].Root.Dead.C + [Wheat].Stem.Live.C + [Wheat].Stem.Dead.C as SumPlantC
            ForcePhenology
              CoefficientFile=C:\GitHubRepos\ApsimX\Prototypes\WheatSimpleLeaf\PhenologyOverwrites.csv
            Report MaxLeafAreaReport
            Manager MaxLeafAreaCalc
              script: same as in Validation.SE Queensland.APS2.APS2Base.Field.MaxLeafAreaCalc
          Manager LocationInfo: same as Validation.New Zealand.Lincoln9192.LincolnBase.LocationInfo
      Experiment Lincoln2023
        DisabledSimNames=[Lincoln23TOS19-AprCvCesario, Lincoln23TOS27-MarCvCesario, Lincoln23TOS19-AprCvStockade, Lincoln23TOS27-MarCvStockade, Lincoln23SD19-AprCvCesario, Lincoln23SD27-MarCvCesario, Lincoln23SD19-AprCvStockade, Lincoln23SD27-MarCvStockade, Lincoln2023SD19-AprCvCesario, Lincoln2023SD27-MarCvCesario, Lincoln2023SD19-AprCvStockade, Lincoln2023SD27-MarCvStockade]
        Factors
          Permutation
            Factor SD
              CompositeFactor 27Mar
                Specifications:
                  [Sowing].Script.SowDate = 27-Mar
                  [Sowing].Script.EmergeDate = 15-Apr
              CompositeFactor 19Apr
                Specifications:
                  [Sowing].Script.SowDate = 19-Apr
                  [Sowing].Script.EmergeDate = 7-May
              CompositeFactor 18May
                Specifications:
                  [Sowing].Script.SowDate = 18-May
                  [Sowing].Script.EmergeDate = 10-Jun
            Factor CV
              Specification=[Sowing].Script.CultivarName = Stockade, Cesario, Kerrin, Sorrial, Graham, Voltron
        Simulation Lincoln23Base
          Weather: FileName=Lincoln_23.met; Latitude=-43.65; Tav=11.5456; Amp=10.721
          Clock: Start=2023-03-20; End=2024-02-05
          Summary
          SoilArbitrator
          MicroClimate: a_interception=0; b_interception=1; c_interception=0; d_interception=0; SoilHeatFluxFraction=0.4; MinimumHeightDiffForNewLayer=0; NightInterceptionFraction=0.5; ReferenceHeight=2
          Manager LocationInfo
            Country = New Zealand
            State = Canterbury Region
            Region = Canterbury Region
            script: same as in Validation.SE Queensland.APS26.APS26NRate160WaterWet.LocationInfo
          Zone Field: Area=1; Slope=0; AspectAngle=0; Altitude=50
            Soil: Site=I12; NearestTown=Lincoln; Region=Canterbury; Country=New Zealand; Comments=I12 Lincoln University
              Physical
                Thickness  BD    AirDry  LL15   DUL   SAT
                100        1.26  0.05    0.075  0.35  0.38
                100        1.26  0.06    0.078  0.35  0.38
                100        1.26  0.07    0.07   0.32  0.39
                100        1.44  0.07    0.07   0.29  0.32
                100        1.44  0.069   0.07   0.27  0.3
                100        1.44  0.07    0.07   0.31  0.32
                100        1.57  0.07    0.07   0.33  0.34
                100        1.57  0.07    0.07   0.35  0.35
                100        1.57  0.07    0.07   0.34  0.35
                100        1.58  0.07    0.07   0.34  0.35
                100        1.58  0.07    0.07   0.34  0.35
                100        1.58  0.07    0.07   0.34  0.35
                100        1.58  0.08    0.08   0.34  0.35
                100        1.59  0.078   0.08   0.33  0.35
                100        1.59  0.08    0.08   0.33  0.35
                100        1.59  0.087   0.09   0.32  0.34
                100        1.59  0.09    0.09   0.3   0.33
                100        1.59  0.09    0.09   0.3   0.33
                100        1.59  0.09    0.09   0.3   0.33
                100        1.59  0.08    0.08   0.31  0.33
                100        1.59  0.09    0.09   0.31  0.33
                100        1.59  0.09    0.09   0.32  0.34
                100        1.59  0.09    0.09   0.35  0.38
                SoilCrop WheatSoil
                  LL=[0.075, 0.078, 0.07, 0.07, 0.07, 0.07, 0.07, 0.07, 0.07, 0.07, 0.07, 0.07, 0.08, 0.08, 0.08, 0.09, 0.09, 0.09, 0.09, 0.08, 0.09, 0.09, 0.09]
                  KL=[0.06, 0.06, 0.06, 0.06, 0.06, 0.06, 0.04, 0.03, 0.03, 0.02, 0.02, 0.02, 0.02, 0.02, 0.02, 0.01, 0.01, 0.01, 0.01, 0.01, 0, 0, 0]
                  XF=[1, 1, 1, 1, 1, 1, 1, 1, 1, 1, 1, 1, 1, 1, 1, 0.5, 0.5, 0, 0, 0, 0, 0, 0]
              WaterBalance SoilWater: SummerDate=1-Nov; SummerU=5; SummerCona=5; WinterDate=1-Apr; WinterU=5; WinterCona=5; DiffusConst=40; DiffusSlope=16; Salb=0.12; CN2Bare=73; CNRed=20; CNCov=0.8; PSIDul=-100
              Organic: FOMCNRatio=40; CarbonUnits=Total
                Thickness  Carbon  SoilCNRatio  FBiom  FInert  FOM
                150        1.2     12           0.04   0.4     347.129
                150        0.96    12           0.02   0.6     270.344
                300        0.6     12           0.02   0.8     163.972
                300        0.3     12           0.02   1       99.4541
                300        0.18    12           0.01   1       60.322
                300        0.12    12           0.01   1       36.5871
                300        0.12    12           0.01   1       22.1912
              Chemical: Thickness=[150, 150, 150, 150, 600, 300, 300]; PH=[6, 6, 6, 6, 6, 6, 6]; PHUnits=Water
              Water: InitialPAWmm=563.7; RelativeTo=LL15; FilledFromTop=false
                Thickness=[100, 100, 100, 100, 100, 100, 100, 100, 100, 100, 100, 100, 100, 100, 100, 100, 100, 100, 100, 100, 100, 100, 100]
                InitialValues=[0.35, 0.35, 0.32, 0.29, 0.27, 0.31, 0.33, 0.35, 0.34, 0.34, 0.34, 0.34, 0.34, 0.33, 0.33, 0.32, 0.3, 0.3, 0.3, 0.31, 0.31, 0.32, 0.35]
              CERESSoilTemperature Temperature
              Nutrient
              Solute NO3: Thickness=[150, 150, 150, 150, 600, 300, 300]; InitialValues=[21.1, 50.9, 62.8, 42.3, 1, 1, 1]; InitialValuesUnits=ppm; WaterTableConcentration=0; D0=0; DepthConstant=0; MaxDepthSoluteAccessible=0; RunoffEffectivenessAtMovingSolute=0; MaxEffectiveRunoff=0
              Solute NH4: Thickness=[150, 150, 150, 150, 600, 300, 300]; InitialValues=[3, 0.2, 0.6, 0.4, 0.1, 0.1, 0.1]; InitialValuesUnits=ppm; WaterTableConcentration=0; D0=0; DepthConstant=0; MaxDepthSoluteAccessible=0; RunoffEffectivenessAtMovingSolute=0; MaxEffectiveRunoff=0
              Solute Urea: Thickness=[150, 150, 150, 150, 600, 300, 300]; InitialValues=[0, 0, 0, 0, 0, 0, 0]; InitialValuesUnits=kg/ha; WaterTableConcentration=0; D0=0; DepthConstant=0; MaxDepthSoluteAccessible=0; RunoffEffectivenessAtMovingSolute=0; MaxEffectiveRunoff=0
            Report DailyReport: EventNames=[Wheat].Harvesting
            Report HarvestReport: EventNames=[Clock].DoReport
              VariableNames:
                [Clock].Today
                [Wheat].Phenology.Stage
                [Wheat].Phenology.Zadok.Stage
                [Wheat].Phenology.FloweringDAS
                [Wheat].Phenology.FlagLeafDAS
                [Wheat].Phenology.TerminalSpikeletDAS
            Fertiliser
            SurfaceOrganicMatter: InitialResidueName=wheat_stubble; InitialResidueType=wheat; InitialResidueMass=500; InitialStandingFraction=0; InitialCPR=0; InitialCNR=100
            Plant Wheat
              Cultivar Stockade
                Command:
                  [Phenology].Phyllochron.BasePhyllochron.FixedValue = 90
                  [Phenology].PhyllochronPpSensitivity.FixedValue = 0.212225680614483
                  [Phenology].CAMP.FLNparams.MinLN = 8
                  [Phenology].CAMP.FLNparams.PpLN = 3.0
                  [Phenology].CAMP.FLNparams.VrnLN = 6.0
                  [Phenology].CAMP.FLNparams.VxPLN = 1.0
                  [Phenology].CAMP.EnvData.VrnTreatTemp = 5.8
                  [Phenology].CAMP.EnvData.VrnTreatDuration = 60
                  [Phenology].HeadEmergenceLongDayBase.FixedValue = 170
                  [Phenology].HeadEmergencePpSensitivity.FixedValue = 0.0
              Cultivar Cesario
                Command:
                  [Phenology].Phyllochron.BasePhyllochron.FixedValue = 95
                  [Phenology].PhyllochronPpSensitivity.FixedValue = 0.212225680614483
                  [Phenology].CAMP.FLNparams.MinLN = 8.5
                  [Phenology].CAMP.FLNparams.PpLN = 3.0
                  [Phenology].CAMP.FLNparams.VrnLN = 5.0
                  [Phenology].CAMP.FLNparams.VxPLN = 1.0
                  [Phenology].CAMP.EnvData.VrnTreatTemp = 5.8
                  [Phenology].CAMP.EnvData.VrnTreatDuration = 60
                  [Phenology].HeadEmergenceLongDayBase.FixedValue = 170
                  [Phenology].HeadEmergencePpSensitivity.FixedValue = 0.0
              Cultivar Zanzibar
                Command:
                  [Phenology].Phyllochron.BasePhyllochron.FixedValue = 93.7220123291132
                  [Phenology].PhyllochronPpSensitivity.FixedValue = 0.212225680614483
                  [Phenology].CAMP.FLNparams.MinLN = 8.5
                  [Phenology].CAMP.FLNparams.PpLN = 3.0
                  [Phenology].CAMP.FLNparams.VrnLN = 7.0
                  [Phenology].CAMP.FLNparams.VxPLN = 1.0
                  [Phenology].CAMP.EnvData.VrnTreatTemp = 5.8
                  [Phenology].CAMP.EnvData.VrnTreatDuration = 60
                  [Phenology].HeadEmergenceLongDayBase.FixedValue = 170
                  [Phenology].HeadEmergencePpSensitivity.FixedValue = 0.0
              Cultivar Voltron
                Command:
                  //[Phenology].MinimumLeafNumber.FixedValue = 8
                  //[Phenology].CAMP.FLNparams.MinLN = 8
                  //[Phenology].VrnSensitivity.FixedValue = 10
                  //[Phenology].PpSensitivity.FixedValue = 0
                  //[Phenology].HeadEmergenceLongDayBase.FixedValue = 4
                  //[Leaf].ExtinctionCoeff.VegetativePhase.FixedValue = 0.7
                  //[Grain].NumberFunction.GrainNumber.GrainsPerGramOfStem.FixedValue = 22
                  [Phenology].HeadEmergenceLongDayBase.FixedValue = 50
                  [Phenology].Phyllochron.BasePhyllochron.FixedValue = 100.0
                  [Leaf].ExtinctionCoeff.VegetativePhase.FixedValue = 0.75
                  [Grain].NumberFunction.GrainNumber.GrainsPerGramOfStem.FixedValue = 26
                  [Grain].MaximumPotentialGrainSize.FixedValue = 0.045
                  [Leaf].CohortParameters.MaxArea.AreaLargestLeaves.FixedValue = 3000
                  [Phenology].PhyllochronPpSensitivity.FixedValue = 0.33
                  [Phenology].CAMP.FLNparams.MinLN = 10
                  [Phenology].CAMP.FLNparams.PpLN = 12
                  [Phenology].CAMP.FLNparams.VrnLN = 12
                  [Phenology].CAMP.FLNparams.VxPLN = 4
                  [Phenology].HeadEmergencePpSensitivity.FixedValue = 8
                  [Phenology].CAMP.EnvData.VrnTreatTemp = 6
                  [Phenology].CAMP.EnvData.VrnTreatDuration = 60
              Cultivar Graham
                Command:
                  //[Phenology].MinimumLeafNumber.FixedValue = 8
                  //[Phenology].CAMP.FLNparams.MinLN = 8
                  //[Phenology].VrnSensitivity.FixedValue = 10
                  //[Phenology].PpSensitivity.FixedValue = 0
                  //[Phenology].HeadEmergenceLongDayBase.FixedValue = 4
                  //[Leaf].ExtinctionCoeff.VegetativePhase.FixedValue = 0.7
                  //[Grain].NumberFunction.GrainNumber.GrainsPerGramOfStem.FixedValue = 22
                  [Phenology].HeadEmergenceLongDayBase.FixedValue = 50
                  [Phenology].Phyllochron.BasePhyllochron.FixedValue = 100.0
                  [Leaf].ExtinctionCoeff.VegetativePhase.FixedValue = 0.75
                  [Grain].NumberFunction.GrainNumber.GrainsPerGramOfStem.FixedValue = 26
                  [Grain].MaximumPotentialGrainSize.FixedValue = 0.045
                  [Leaf].CohortParameters.MaxArea.AreaLargestLeaves.FixedValue = 3000
                  [Phenology].PhyllochronPpSensitivity.FixedValue = 0.33
                  [Phenology].CAMP.FLNparams.MinLN = 10
                  [Phenology].CAMP.FLNparams.PpLN = 12
                  [Phenology].CAMP.FLNparams.VrnLN = 12
                  [Phenology].CAMP.FLNparams.VxPLN = 4
                  [Phenology].HeadEmergencePpSensitivity.FixedValue = 8
                  [Phenology].CAMP.EnvData.VrnTreatTemp = 6
                  [Phenology].CAMP.EnvData.VrnTreatDuration = 60
              Cultivar Kerrin
                Command:
                  //[Phenology].CAMP.FLNparams.MinLN = 7
                  //[Phenology].VrnSensitivity.FixedValue = 7
                  //[Phenology].PpSensitivity.FixedValue = 3
                  //[Phenology].HeadEmergenceLongDayBase.FixedValue = 4
                  //[Leaf].ExtinctionCoeff.VegetativePhase.FixedValue = 0.5
                  //[Grain].NumberFunction.GrainNumber.GrainsPerGramOfStem.FixedValue = 22
                  [Phenology].HeadEmergenceLongDayBase.FixedValue = 50
                  [Phenology].Phyllochron.BasePhyllochron.FixedValue = 100.0
                  [Leaf].ExtinctionCoeff.VegetativePhase.FixedValue = 0.75
                  [Grain].NumberFunction.GrainNumber.GrainsPerGramOfStem.FixedValue = 26
                  [Grain].MaximumPotentialGrainSize.FixedValue = 0.045
                  [Leaf].CohortParameters.MaxArea.AreaLargestLeaves.FixedValue = 3000
                  [Phenology].PhyllochronPpSensitivity.FixedValue = 0.33
                  [Phenology].CAMP.FLNparams.MinLN = 10
                  [Phenology].CAMP.FLNparams.PpLN = 12
                  [Phenology].CAMP.FLNparams.VrnLN = 12
                  [Phenology].CAMP.FLNparams.VxPLN = 4
                  [Phenology].HeadEmergencePpSensitivity.FixedValue = 8
                  [Phenology].CAMP.EnvData.VrnTreatTemp = 6
                  [Phenology].CAMP.EnvData.VrnTreatDuration = 60
              Cultivar Sorrial
                Command:
                  [Phenology].HeadEmergenceLongDayBase.FixedValue = 50
                  [Phenology].Phyllochron.BasePhyllochron.FixedValue = 100.0
                  [Leaf].ExtinctionCoeff.VegetativePhase.FixedValue = 0.75
                  [Grain].NumberFunction.GrainNumber.GrainsPerGramOfStem.FixedValue = 26
                  [Grain].MaximumPotentialGrainSize.FixedValue = 0.045
                  [Leaf].CohortParameters.MaxArea.AreaLargestLeaves.FixedValue = 3000
                  [Phenology].PhyllochronPpSensitivity.FixedValue = 0.33
                  [Phenology].CAMP.FLNparams.MinLN = 10
                  [Phenology].CAMP.FLNparams.PpLN = 12
                  [Phenology].CAMP.FLNparams.VrnLN = 12
                  [Phenology].CAMP.FLNparams.VxPLN = 4
                  [Phenology].HeadEmergencePpSensitivity.FixedValue = 8
                  [Phenology].CAMP.EnvData.VrnTreatTemp = 6
                  [Phenology].CAMP.EnvData.VrnTreatDuration = 60
            Manager Sowing
              SowDate = 24-Jul
              CultivarName = Amethyst
              SowingDepth = 50
              RowSpacing = 150
              Population = 150
              EmergeDate =
              script: same as in Validation.New Zealand.Lincoln2021.Wheat.Field.Sowing
            Manager SowingFertiliser
              Amount = 200
              CropName = wheat
              script: same as in Validation.SE Queensland.Gatton2014.14SOWbase.Field.SowingFertiliser
            Manager Harvesting
```csharp
using APSIM.Shared.Utilities;
using Models.Utilities;
using Models.Soils;
using Models.PMF;
using Models.Core;
using System;

namespace Models
{
    [Serializable]
    public class Script : Model
    {
        [Link] Plant Wheat;
        [Link] private Clock Clock;
        [Link] private Simulation sim;

        [EventSubscribe("DoManagement")]
        private void OnDoManagement(object sender, EventArgs e)
        {
            if (Wheat.IsReadyForHarvesting)
            {
               Wheat.Harvest();
               Wheat.EndCrop();  
               sim.Set("Clock.EndDate", Clock.Today.AddDays(1));  
            }
        
        }
        
    }
}
```
            Operations Management
            Irrigation
            Manager NDVIModel: same as Validation.New Zealand.Lincoln2021.Wheat.Field.NDVIModel
            Report: same as Validation.New Zealand.Lincoln2021.Wheat.Field.Report
            Report MaxLeafAreaReport
            Manager MaxLeafAreaCalc
              script: same as in Validation.SE Queensland.APS2.APS2Base.Field.MaxLeafAreaCalc
      Folder CPTPhenology
        Memo
          A range of soon to be released cultivars have their phenology assesed each year at Plant and Food Research in Lincoln, New Zealand.  Each cultivar is planted on 4 sowing dates representing Autumn, Winter, Early Spring and Late Spring sowings. (approx April, June, Aug, Nov).  Each cultivar is observed for 3 years but a number of standards are included each year or for more than 3 years bacause of the value of the data they provided.
        Experiment CPTCultOtane
          Factors
            Factor Sow
              Specification=[Clock].StartDate = 2000-03-03,2000-05-15,2001-04-09,2001-06-15,2001-08-09,2002-05-15,2002-09-09,2003-05-21,2003-09-02,2004-05-28,2004-09-06,2005-04-04,2005-05-27,2005-09-05,2005-12-05,2006-05-10,2006-12-14,2007-04-24,2007-06-28,2007-09-13,2007-11-29,2008-04-11,2008-06-06,2008-09-11,2008-12-05,2009-03-20,2009-06-05,2009-08-24,2009-12-07,2010-03-30,2010-07-06,2010-10-04,2010-11-30,2011-03-30,2011-05-11,2011-09-09,2011-12-09,2012-04-05,2012-06-28,2012-09-25
          Simulation LincolnCPTOtane
            Clock: Start=1991-06-08; End=2013-07-01
            Summary summaryfile
            Weather: FileName=lincoln.met; Latitude=-43.624; Tav=11.4; Amp=11.5
            Zone paddock: Area=1; Slope=0; AspectAngle=0; Altitude=50
              Irrigation
              Soil: SoilType=LincolnSoil; LocalName=Lincoln; Site=Lincoln; NearestTown=Unknown; Region=NZ; NaturalVegetation=Unknown; Latitude=0; Longitude=0
                Physical
                  Thickness  BD   AirDry  LL15  DUL   SAT
                  100        1.3  0.05    0.08  0.31  0.44
                  200        1.3  0.05    0.07  0.3   0.44
                  200        1.3  0.05    0.07  0.28  0.44
                  200        1.3  0.05    0.09  0.31  0.44
                  200        1.3  0.05    0.11  0.3   0.44
                  200        1.3  0.05    0.16  0.28  0.44
                  200        1.3  0.05    0.15  0.3   0.44
                  200        1.3  0.05    0.12  0.34  0.44
                  SoilCrop WheatSoil: LL=[0.08, 0.07, 0.07, 0.09, 0.11, 0.16, 0.15, 0.12]; KL=[0.06, 0.06, 0.06, 0.04, 0.03, 0.02, 0.02, 0.02]; XF=[1, 1, 1, 1, 0.6, 0.4, 0.4, 0.4]
                WaterBalance SoilWater: same as Validation.New Zealand.PalmerstonNorth1989.PalmerstonNorth1989Base.paddock.Soil.SoilWater
                Organic: FOMCNRatio=0; CarbonUnits=Total
                  Thickness  Carbon  SoilCNRatio  FBiom  FInert  FOM
                  100        0.35    0            0.04   0.31    0
                  200        0.27    0            0.03   0.31    0
                  200        0.24    0            0.02   0.31    0
                  200        0.16    0            0.01   0.31    0
                  200        0.16    0            0.01   0.31    0
                  200        0.3     0            0.01   0.25    0
                  200        0.1     0            0.01   0.2     0
                  200        0.1     0            0.01   0.2     0
                Chemical: Thickness=[100, 200, 200, 200, 200, 200, 200, 200]; PH=[8.5, 8.5, 8.6, 8.6, 8.6, 8.6, 8.6, 8.6]; PHUnits=Water
                Water: Thickness=[100, 200, 200, 200, 200, 200, 200, 200]; InitialValues=[0.27, 0.3, 0.28, 0.25, 0.24, 0.27, 0.27, 0.21]; InitialPAWmm=229; RelativeTo=LL15; FilledFromTop=false
                CERESSoilTemperature Temperature
                Nutrient
                Solute NO3: same as Validation.New Zealand.Lincoln9192.LincolnBase.paddock.Soil.NO3
                Solute NH4: same as Validation.New Zealand.PalmerstonNorth1989.PalmerstonNorth1989Base.paddock.Soil.NH4
                Solute Urea: same as Validation.New Zealand.PalmerstonNorth1989.PalmerstonNorth1989Base.paddock.Soil.Urea
              SurfaceOrganicMatter Surface Organic Matter: InitialResidueName=wheat_stubble; InitialResidueType=wheat; InitialResidueMass=1000; InitialStandingFraction=0; InitialCPR=0; InitialCNR=80
              Fertiliser
              MicroClimate: a_interception=0; b_interception=1; c_interception=0; d_interception=0; SoilHeatFluxFraction=0.4; MinimumHeightDiffForNewLayer=0; NightInterceptionFraction=0.5; ReferenceHeight=2
              Plant Wheat
              Report HarvestReport
              Manager SowAndHarvest
                Cultivar = Otane
```csharp
using Models.Soils;
using Models.PMF.Phen;
using System;
using Models.Core;
using Models.PMF;
using APSIM.Shared.Utilities;
using System.Xml.Serialization;
using Newtonsoft.Json;
        
namespace Models
{
    [Serializable] 
    [System.Xml.Serialization.XmlInclude(typeof(Model))]
    public class Script : Model
    {
        [Link] private Plant Wheat;
        [Link] private Clock Clock;
        [Link] private Simulation sim;
        [Link] private Summary Summary;
        [Link(Type = LinkType.Path, Path = "[Wheat].Phenology")]
        private Phenology phenology;
        
        [Description("Cultivar")]
        public string Cultivar { get; set; }
        
        [JsonIgnore] public bool Sown { get; set; }
        [JsonIgnore] public bool Harvested { get; set; }
        [JsonIgnore] public bool EndSet { get; set; }
        
        [EventSubscribe("StartOfSimulation")]
        private void OnSimulationCommencing(object sender, EventArgs e)
        {
            Sown = false;
            Harvested = false;
            EndSet = false;
        }
        
        [EventSubscribe("DoManagement")]
        private void OnDoManagement(object sender, EventArgs e)
        {
            if (Sown == false)
            {
                Wheat.Sow(population: 200, cultivar: Cultivar, depth: 15, rowSpacing: 150, budNumber: 1);
                Sown = true;
            }
            
            if (phenology.CurrentPhase.Name == "ReadyForHarvesting")
            {
                Wheat.Harvest();
                Wheat.EndCrop();
                Harvested = true;
                Summary.WriteMessage(this, "Flowering reached so setting end date to stop simulation", MessageType.Diagnostic);
            }
            
            if ((Harvested == true) && (EndSet == false))
            {
                sim.Set("Clock.EndDate", Clock.Today.AddDays(1));
                EndSet = true;
            }
        }
    }
}
```
              Report DailyReport
              Report SowingReport
              Manager SetCropParams
            SoilArbitrator Soil Arbitrator
            Manager LocationInfo: same as Validation.New Zealand.Lincoln9192.LincolnBase.LocationInfo
        Experiment CPTCultAmarok
          Factors
            Factor Sow
              Specification=[Clock].StartDate = 2001-04-09,2001-06-15,2002-03-07,2002-05-15,2003-03-14,2003-05-21,2004-03-23,2004-05-28,2005-04-04,2005-05-27,2005-12-05,2006-03-13,2006-05-10,2007-04-24,2007-06-28,2008-04-11,2008-06-06,2009-03-20,2009-06-05,2009-08-24,2010-03-30,2010-07-06,2011-03-30,2011-05-11,2012-04-05,2012-06-28
          Simulation LincolnCPTAmarok
            Clock: Start=1991-06-08; End=2013-07-01
            Summary summaryfile
            Weather: FileName=lincoln.met; Latitude=-43.624; Tav=11.4; Amp=11.5
            Zone paddock: Area=1; Slope=0; AspectAngle=0; Altitude=50
              Irrigation
              Soil: same as Validation.New Zealand.CPTPhenology.CPTCultOtane.LincolnCPTOtane.paddock.Soil
              SurfaceOrganicMatter Surface Organic Matter: InitialResidueName=wheat_stubble; InitialResidueType=wheat; InitialResidueMass=1000; InitialStandingFraction=0; InitialCPR=0; InitialCNR=80
              Fertiliser
              MicroClimate: a_interception=0; b_interception=1; c_interception=0; d_interception=0; SoilHeatFluxFraction=0.4; MinimumHeightDiffForNewLayer=0; NightInterceptionFraction=0.5; ReferenceHeight=2
              Plant Wheat
              Report HarvestReport
              Manager SowAndHarvest
                Cultivar = Amarok
                script: same as in Validation.New Zealand.CPTPhenology.CPTCultOtane.LincolnCPTOtane.paddock.SowAndHarvest
              Report SowingReport
              Manager SetCropParams
            SoilArbitrator Soil Arbitrator
            Manager LocationInfo: same as Validation.New Zealand.Lincoln9192.LincolnBase.LocationInfo
        Experiment CPTCultClaire
          Factors
            Factor Sow
              Specification=[Clock].StartDate = 2000-03-03,2000-05-15,2001-04-09,2001-06-15,2001-08-09,2002-03-07,2002-05-15,2002-09-09,2003-03-14,2003-05-21,2003-09-02,2004-03-23,2004-05-28,2004-09-06,2005-04-04,2005-05-27,2005-09-05,2005-12-05,2006-03-13,2006-05-10,2006-12-14,2007-04-24,2007-06-28,2007-09-13,2007-11-29,2008-04-11,2008-06-06,2008-09-11,2008-12-05,2009-03-20,2009-06-05,2009-08-24,2009-12-07,2010-03-30,2010-07-06,2010-10-04,2010-11-30,2011-03-30,2011-05-11,2011-09-09,2011-12-09,2012-04-05,2012-06-28
          Simulation LincolnCPTClaire
            Clock: Start=1991-06-08; End=2013-07-01
            Summary summaryfile
            Weather: FileName=lincoln.met; Latitude=-43.624; Tav=11.4; Amp=11.5
            Zone paddock: Area=1; Slope=0; AspectAngle=0; Altitude=50
              Irrigation
              Soil: same as Validation.New Zealand.CPTPhenology.CPTCultOtane.LincolnCPTOtane.paddock.Soil
              SurfaceOrganicMatter Surface Organic Matter: InitialResidueName=wheat_stubble; InitialResidueType=wheat; InitialResidueMass=1000; InitialStandingFraction=0; InitialCPR=0; InitialCNR=80
              Fertiliser
              MicroClimate: a_interception=0; b_interception=1; c_interception=0; d_interception=0; SoilHeatFluxFraction=0.4; MinimumHeightDiffForNewLayer=0; NightInterceptionFraction=0.5; ReferenceHeight=2
              Plant Wheat
              Report HarvestReport
              Manager SowAndHarvest
                Cultivar = Claire
                script: same as in Validation.New Zealand.CPTPhenology.CPTCultOtane.LincolnCPTOtane.paddock.SowAndHarvest
              Report DailyReport
              Report SowingReport
              Manager SetCropParams
            SoilArbitrator Soil Arbitrator
            Manager LocationInfo: same as Validation.New Zealand.Lincoln9192.LincolnBase.LocationInfo
        Experiment CPTCultWakanui
          Factors
            Factor Sow
              Specification=[Clock].StartDate = 2005-04-04,2005-05-27,2006-03-13,2006-05-10,2008-04-11,2008-06-06
          Simulation LincolnCPTWakanui
            Clock: Start=1991-06-08; End=2013-07-01
            Summary summaryfile
            Weather: FileName=lincoln.met; Latitude=-43.624; Tav=11.4; Amp=11.5
            Zone paddock: Area=1; Slope=0; AspectAngle=0; Altitude=50
              Irrigation
              Soil: same as Validation.New Zealand.CPTPhenology.CPTCultOtane.LincolnCPTOtane.paddock.Soil
              SurfaceOrganicMatter Surface Organic Matter: InitialResidueName=wheat_stubble; InitialResidueType=wheat; InitialResidueMass=1000; InitialStandingFraction=0; InitialCPR=0; InitialCNR=80
              Fertiliser
              MicroClimate: a_interception=0; b_interception=1; c_interception=0; d_interception=0; SoilHeatFluxFraction=0.4; MinimumHeightDiffForNewLayer=0; NightInterceptionFraction=0.5; ReferenceHeight=2
              Plant Wheat
              Report HarvestReport
              Manager SowAndHarvest
                Cultivar = Wakanui
                script: same as in Validation.New Zealand.CPTPhenology.CPTCultOtane.LincolnCPTOtane.paddock.SowAndHarvest
              Report SowingReport
              Manager SetCropParams
            SoilArbitrator Soil Arbitrator
            Manager LocationInfo: same as Validation.New Zealand.Lincoln9192.LincolnBase.LocationInfo
        Experiment CPTCultBattenSpring
          Factors
            Factor Sow
              Specification=[Clock].StartDate = 2009-03-20,2009-06-05,2009-08-24,2010-03-30,2010-07-06,2010-10-04,2010-11-30,2011-03-30,2011-05-11,2011-09-09,2012-04-05,2012-06-28,2012-09-25
          Simulation LincolnCPTBattenSpring
            Clock: Start=1991-06-08; End=2013-07-01
            Summary summaryfile
            Weather: FileName=lincoln.met; Latitude=-43.624; Tav=11.4; Amp=11.5
            Zone paddock: Area=1; Slope=0; AspectAngle=0; Altitude=50
              Irrigation
              Soil: same as Validation.New Zealand.CPTPhenology.CPTCultOtane.LincolnCPTOtane.paddock.Soil
              SurfaceOrganicMatter Surface Organic Matter: InitialResidueName=wheat_stubble; InitialResidueType=wheat; InitialResidueMass=1000; InitialStandingFraction=0; InitialCPR=0; InitialCNR=80
              Fertiliser
              MicroClimate: a_interception=0; b_interception=1; c_interception=0; d_interception=0; SoilHeatFluxFraction=0.4; MinimumHeightDiffForNewLayer=0; NightInterceptionFraction=0.5; ReferenceHeight=2
              Plant Wheat
              Report HarvestReport
              Manager SowAndHarvest
                Cultivar = BattenSpring
                script: same as in Validation.New Zealand.CPTPhenology.CPTCultOtane.LincolnCPTOtane.paddock.SowAndHarvest
              Report SowingReport
              Manager SetCropParams
            SoilArbitrator Soil Arbitrator
            Manager LocationInfo: same as Validation.New Zealand.Lincoln9192.LincolnBase.LocationInfo
        Experiment CPTCultBattenWinter
          Factors
            Factor Sow
              Specification=[Clock].StartDate = 2009-03-20,2009-06-05,2009-08-24,2010-03-30,2010-07-06,2010-11-30,2011-03-30,2011-05-11,2011-09-09,2012-04-05,2012-06-28,2012-09-25
          Simulation LincolnCPTBattenWinter
            Clock: Start=1991-06-08; End=2013-07-01
            Summary summaryfile
            Weather: FileName=lincoln.met; Latitude=-43.624; Tav=11.4; Amp=11.5
            Zone paddock: Area=1; Slope=0; AspectAngle=0; Altitude=50
              Irrigation
              Soil: same as Validation.New Zealand.CPTPhenology.CPTCultOtane.LincolnCPTOtane.paddock.Soil
              SurfaceOrganicMatter Surface Organic Matter: InitialResidueName=wheat_stubble; InitialResidueType=wheat; InitialResidueMass=1000; InitialStandingFraction=0; InitialCPR=0; InitialCNR=80
              Fertiliser
              MicroClimate: a_interception=0; b_interception=1; c_interception=0; d_interception=0; SoilHeatFluxFraction=0.4; MinimumHeightDiffForNewLayer=0; NightInterceptionFraction=0.5; ReferenceHeight=2
              Plant Wheat
              Report HarvestReport
              Manager SowAndHarvest
                Cultivar = BattenWinter
                script: same as in Validation.New Zealand.CPTPhenology.CPTCultOtane.LincolnCPTOtane.paddock.SowAndHarvest
              Report SowingReport
              Manager SetCropParams
            SoilArbitrator Soil Arbitrator
            Manager LocationInfo: same as Validation.New Zealand.Lincoln9192.LincolnBase.LocationInfo
        Experiment CPTCultYitpi
          Factors
            Permutation
              Factor Sow
                Specification=[Clock].StartDate = 2009-03-20,2009-06-05,2009-08-24,2010-03-30,2010-07-06,2010-10-04,2010-11-30,2011-03-30,2011-05-11,2011-09-09,2012-04-05,2012-06-28,2012-09-25
              Factor Cv: Specification=[SowAndHarvest].Script.Cultivar = Yitpi
          Simulation LincolnCPTYitpi
            Clock: Start=1991-06-08; End=2013-07-01
            Summary summaryfile
            Weather: FileName=lincoln.met; Latitude=-43.624; Tav=11.4; Amp=11.5
            Zone paddock: Area=1; Slope=0; AspectAngle=0; Altitude=50
              Irrigation
              Soil: same as Validation.New Zealand.CPTPhenology.CPTCultOtane.LincolnCPTOtane.paddock.Soil
              SurfaceOrganicMatter Surface Organic Matter: InitialResidueName=wheat_stubble; InitialResidueType=wheat; InitialResidueMass=1000; InitialStandingFraction=0; InitialCPR=0; InitialCNR=80
              Fertiliser
              MicroClimate: a_interception=0; b_interception=1; c_interception=0; d_interception=0; SoilHeatFluxFraction=0.4; MinimumHeightDiffForNewLayer=0; NightInterceptionFraction=0.5; ReferenceHeight=2
              Plant Wheat
              Report HarvestReport
              Manager SowAndHarvest
                Cultivar = Yitpi
                Sown = False
                Harvested = False
                EndSet = False
                script: same as in Validation.New Zealand.CPTPhenology.CPTCultOtane.LincolnCPTOtane.paddock.SowAndHarvest
              Report SowingReport
              Manager SetCropParams
            SoilArbitrator Soil Arbitrator
            Manager LocationInfo: same as Validation.New Zealand.Lincoln9192.LincolnBase.LocationInfo
        Experiment CPTCultSunco
          Factors
            Factor Sow
              Specification=[Clock].StartDate = 2009-03-20,2009-06-05,2009-08-24,2010-03-30,2010-07-06,2010-10-04,2010-11-30,2011-03-30,2011-05-11,2011-09-09,2012-04-05,2012-06-28,2012-09-25
          Simulation LincolnCPTSunco
            Clock: Start=1991-06-08; End=2013-07-01
            Summary summaryfile
            Weather: FileName=lincoln.met; Latitude=-43.624; Tav=11.4; Amp=11.5
            Zone paddock: Area=1; Slope=0; AspectAngle=0; Altitude=50
              Irrigation
              Soil: same as Validation.New Zealand.CPTPhenology.CPTCultOtane.LincolnCPTOtane.paddock.Soil
              SurfaceOrganicMatter Surface Organic Matter: InitialResidueName=wheat_stubble; InitialResidueType=wheat; InitialResidueMass=1000; InitialStandingFraction=0; InitialCPR=0; InitialCNR=80
              Fertiliser
              MicroClimate: a_interception=0; b_interception=1; c_interception=0; d_interception=0; SoilHeatFluxFraction=0.4; MinimumHeightDiffForNewLayer=0; NightInterceptionFraction=0.5; ReferenceHeight=2
              Plant Wheat
              Report HarvestReport
              Manager SowAndHarvest
                Cultivar = Sunco
                script: same as in Validation.New Zealand.CPTPhenology.CPTCultOtane.LincolnCPTOtane.paddock.SowAndHarvest
              Report SowingReport
              Manager SetCropParams
            SoilArbitrator Soil Arbitrator
            Manager LocationInfo: same as Validation.New Zealand.Lincoln9192.LincolnBase.LocationInfo
        Experiment CPTCultMcCubbin
          Factors
            Factor Sow
              Specification=[Clock].StartDate = 2009-03-20,2009-06-05,2009-08-24,2010-03-30,2010-07-06,2010-10-04,2010-11-30,2011-03-30,2011-05-11,2011-09-09,2012-04-05,2012-06-28,2012-09-25
          Simulation LincolnCPTMcCubbin
            Clock: Start=1991-06-08; End=2013-07-01
            Summary summaryfile
            Weather: FileName=lincoln.met; Latitude=-43.624; Tav=11.4; Amp=11.5
            Zone paddock: Area=1; Slope=0; AspectAngle=0; Altitude=50
              Irrigation
              Soil: same as Validation.New Zealand.CPTPhenology.CPTCultOtane.LincolnCPTOtane.paddock.Soil
              SurfaceOrganicMatter Surface Organic Matter: InitialResidueName=wheat_stubble; InitialResidueType=wheat; InitialResidueMass=1000; InitialStandingFraction=0; InitialCPR=0; InitialCNR=80
              Fertiliser
              MicroClimate: a_interception=0; b_interception=1; c_interception=0; d_interception=0; SoilHeatFluxFraction=0.4; MinimumHeightDiffForNewLayer=0; NightInterceptionFraction=0.5; ReferenceHeight=2
              Plant Wheat
              Report HarvestReport
              Manager SowAndHarvest
                Cultivar = McCubbin
                script: same as in Validation.New Zealand.CPTPhenology.CPTCultOtane.LincolnCPTOtane.paddock.SowAndHarvest
              Report SowingReport
              Manager SetCropParams
            SoilArbitrator Soil Arbitrator
            Manager LocationInfo: same as Validation.New Zealand.Lincoln9192.LincolnBase.LocationInfo
        Experiment CPTCultMacKellar
          Factors
            Factor Sow
              Specification=[Clock].StartDate = 2009-03-20,2009-06-05,2009-08-24,2010-03-30,2010-07-06,2010-10-04,2010-11-30,2011-03-30,2011-05-11,2011-09-09,2012-04-05,2012-06-28,2012-09-25
          Simulation LincolnCPTMacKellar
            Clock: Start=1991-06-08; End=2013-07-01
            Summary summaryfile
            Weather: FileName=lincoln.met; Latitude=-43.624; Tav=11.4; Amp=11.5
            Zone paddock: Area=1; Slope=0; AspectAngle=0; Altitude=50
              Irrigation
              Soil: same as Validation.New Zealand.CPTPhenology.CPTCultOtane.LincolnCPTOtane.paddock.Soil
              SurfaceOrganicMatter Surface Organic Matter: InitialResidueName=wheat_stubble; InitialResidueType=wheat; InitialResidueMass=1000; InitialStandingFraction=0; InitialCPR=0; InitialCNR=80
              Fertiliser
              MicroClimate: a_interception=0; b_interception=1; c_interception=0; d_interception=0; SoilHeatFluxFraction=0.4; MinimumHeightDiffForNewLayer=0; NightInterceptionFraction=0.5; ReferenceHeight=2
              Plant Wheat
              Report HarvestReport
              Manager SowAndHarvest
                Cultivar = MacKellar
                script: same as in Validation.New Zealand.CPTPhenology.CPTCultOtane.LincolnCPTOtane.paddock.SowAndHarvest
              Report SowingReport
              Manager SetCropParams
            SoilArbitrator Soil Arbitrator
            Manager LocationInfo: same as Validation.New Zealand.Lincoln9192.LincolnBase.LocationInfo
        Experiment CPTCultJanz
          Factors
            Permutation
              Factor Sow
                Specification=[Clock].StartDate = 2009-03-20,2009-06-05,2009-08-24,2010-03-30,2010-07-06,2010-10-04,2010-11-30,2011-03-30,2011-05-11,2011-09-09,2012-04-05,2012-06-28,2012-09-25
              Factor Cv: Specification=[SowAndHarvest].Script.Cultivar = Janz
          Simulation LincolnCPTJanz
            Clock: Start=1991-06-08; End=2013-07-01
            Summary summaryfile
            Weather: FileName=lincoln.met; Latitude=-43.624; Tav=11.4; Amp=11.5
            Zone paddock: Area=1; Slope=0; AspectAngle=0; Altitude=50
              Irrigation
              Soil: same as Validation.New Zealand.CPTPhenology.CPTCultOtane.LincolnCPTOtane.paddock.Soil
              SurfaceOrganicMatter Surface Organic Matter: InitialResidueName=wheat_stubble; InitialResidueType=wheat; InitialResidueMass=1000; InitialStandingFraction=0; InitialCPR=0; InitialCNR=80
              Fertiliser
              MicroClimate: a_interception=0; b_interception=1; c_interception=0; d_interception=0; SoilHeatFluxFraction=0.4; MinimumHeightDiffForNewLayer=0; NightInterceptionFraction=0.5; ReferenceHeight=2
              Plant Wheat
              Report HarvestReport
              Manager SowAndHarvest
                Cultivar = Janz
                Sown = False
                Harvested = False
                EndSet = False
                script: same as in Validation.New Zealand.CPTPhenology.CPTCultOtane.LincolnCPTOtane.paddock.SowAndHarvest
              Report SowingReport
              Manager SetCropParams
            SoilArbitrator Soil Arbitrator
            Manager LocationInfo: same as Validation.New Zealand.Lincoln9192.LincolnBase.LocationInfo
        Experiment CPTCultLang
          Factors
            Factor Sow
              Specification=[Clock].StartDate = 2009-03-20,2009-06-05,2009-08-24,2010-03-30,2010-07-06,2010-10-04,2010-11-30,2011-03-30,2011-05-11,2011-09-09,2012-04-05,2012-06-28,2012-09-25
          Simulation LincolnCPTLang
            Clock: Start=1991-06-08; End=2013-07-01
            Summary summaryfile
            Weather: FileName=lincoln.met; Latitude=-43.624; Tav=11.4; Amp=11.5
            Zone paddock: Area=1; Slope=0; AspectAngle=0; Altitude=50
              Irrigation
              Soil: same as Validation.New Zealand.CPTPhenology.CPTCultOtane.LincolnCPTOtane.paddock.Soil
              SurfaceOrganicMatter Surface Organic Matter: InitialResidueName=wheat_stubble; InitialResidueType=wheat; InitialResidueMass=1000; InitialStandingFraction=0; InitialCPR=0; InitialCNR=80
              Fertiliser
              MicroClimate: a_interception=0; b_interception=1; c_interception=0; d_interception=0; SoilHeatFluxFraction=0.4; MinimumHeightDiffForNewLayer=0; NightInterceptionFraction=0.5; ReferenceHeight=2
              Plant Wheat
              Report HarvestReport
              Manager SowAndHarvest
                Cultivar = Lang
                script: same as in Validation.New Zealand.CPTPhenology.CPTCultOtane.LincolnCPTOtane.paddock.SowAndHarvest
              Report SowingReport
              Manager SetCropParams
            SoilArbitrator Soil Arbitrator
            Manager LocationInfo: same as Validation.New Zealand.Lincoln9192.LincolnBase.LocationInfo
        Experiment CPTCultH45
          Factors
            Factor Sow
              Specification=[Clock].StartDate = 2009-03-20,2009-06-05,2009-08-24,2010-03-30,2010-07-06,2010-10-04,2010-11-30,2011-03-30,2011-05-11,2011-09-09,2012-04-05,2012-06-28,2012-09-25
          Simulation LincolnCPTH45
            Clock: Start=1991-06-08; End=2013-07-01
            Summary summaryfile
            Weather: FileName=lincoln.met; Latitude=-43.624; Tav=11.4; Amp=11.5
            Zone paddock: Area=1; Slope=0; AspectAngle=0; Altitude=50
              Irrigation
              Soil: same as Validation.New Zealand.CPTPhenology.CPTCultOtane.LincolnCPTOtane.paddock.Soil
              SurfaceOrganicMatter Surface Organic Matter: InitialResidueName=wheat_stubble; InitialResidueType=wheat; InitialResidueMass=1000; InitialStandingFraction=0; InitialCPR=0; InitialCNR=80
              Fertiliser
              MicroClimate: a_interception=0; b_interception=1; c_interception=0; d_interception=0; SoilHeatFluxFraction=0.4; MinimumHeightDiffForNewLayer=0; NightInterceptionFraction=0.5; ReferenceHeight=2
              Plant Wheat
              Report HarvestReport
              Manager SowAndHarvest
                Cultivar = H45
                script: same as in Validation.New Zealand.CPTPhenology.CPTCultOtane.LincolnCPTOtane.paddock.SowAndHarvest
              Report SowingReport
              Manager SetCropParams
            SoilArbitrator Soil Arbitrator
            Manager LocationInfo: same as Validation.New Zealand.Lincoln9192.LincolnBase.LocationInfo
      PredictedObserved NZObsPred: PredictedTableName=HarvestReport; ObservedTableName=Observed; FieldNameUsedForMatch=SimulationName; FieldName2UsedForMatch=Wheat.Phenology.CurrentStageName; AllColumns=false
    Folder Southern Australia
      Folder van Herwaarden et al  1998
        Experiment Wagga1991
          Factors
            Factor N: Specification=[NSchedule]
              Operations 0
                1991-05-26  [Fertiliser].Apply(Amount: 0, Type: Fertiliser.Types.Urea);
              Operations 40
                1991-05-26  [Fertiliser].Apply(Amount: 40, Type: Fertiliser.Types.Urea);
              Operations 80
                1991-05-26  [Fertiliser].Apply(Amount: 80, Type: Fertiliser.Types.Urea);
              Operations 120
                1991-05-26  [Fertiliser].Apply(Amount: 120, Type: Fertiliser.Types.Urea);
              Operations 160
                1991-05-26  [Fertiliser].Apply(Amount: 160, Type: Fertiliser.Types.Urea);
              Operations 200
                1991-05-26  [Fertiliser].Apply(Amount: 200, Type: Fertiliser.Types.Urea);
          Simulation Wagga91Base
            Clock: Start=1991-05-24; End=1991-12-12
            Summary summaryfile
            Weather: FileName=Wagga1991.met; Latitude=-35.13; Tav=16.11; Amp=18.14
            SoilArbitrator Soil Arbitrator
            Zone paddock: Area=1; Slope=0; AspectAngle=0; Altitude=50
              Irrigation
              Fertiliser
              SurfaceOrganicMatter: InitialResidueName=canola; InitialResidueType=canola; InitialResidueMass=1000; InitialStandingFraction=0; InitialCPR=0; InitialCNR=80
              Plant Wheat
              Operations CropSchedule
                1991-05-26  [Wheat].Sow(population:138, cultivar:"Matong", depth:30, rowSpacing:200);
              Operations NSchedule
              MicroClimate: a_interception=0; b_interception=1; c_interception=0; d_interception=0; SoilHeatFluxFraction=0.4; MinimumHeightDiffForNewLayer=0; NightInterceptionFraction=0.5; ReferenceHeight=2
              Soil: ASCOrder=Kandasol; ASCSubOrder=Red; SoilType=?; Site=Generic; NearestTown=Wagga Wagga; Region=Riverina; State=New South Wales; Country=Australia; ApsoilNumber=498-GENERIC; Latitude=-35.1155; Longitude=147.3695; LocationAccuracy=Regional Soil Type; DataSource=Generic soil; Comments=Generic soil developed for CSU.
                Physical
                  Thickness  BD    AirDry  LL15  DUL   SAT
                  100        1.48  0.055   0.11  0.29  0.35
                  150        1.5   0.104   0.13  0.27  0.34
                  150        1.45  0.15    0.15  0.25  0.32
                  150        1.37  0.15    0.15  0.28  0.36
                  150        1.43  0.15    0.15  0.29  0.35
                  300        1.55  0.15    0.15  0.31  0.34
                  300        1.67  0.15    0.15  0.31  0.34
                  300        1.62  0.15    0.15  0.32  0.35
                  SoilCrop WheatSoil: LL=[0.11, 0.13, 0.15, 0.17, 0.19, 0.22, 0.23, 0.25]; KL=[0.06, 0.06, 0.06, 0.06, 0.06, 0.06, 0.06, 0.06]; XF=[1, 1, 1, 0.9, 0.9, 0.9, 0.9, 0.8]
                WaterBalance SoilWater: SummerDate=1-Nov; SummerU=6; SummerCona=3.5; WinterDate=1-Apr; WinterU=2; WinterCona=2; DiffusConst=44; DiffusSlope=16; Salb=0.13; CN2Bare=75; CNRed=20; CNCov=0.8; PSIDul=-100; Thickness=[100, 150, 150, 150, 150, 300, 300, 300]; SWCON=[0.5, 0.4, 0.3, 0.3, 0.2, 0.1, 0.1, 0.1]
                Organic: FOMCNRatio=45; CarbonUnits=Total
                  Thickness  Carbon  SoilCNRatio  FBiom  FInert  FOM
                  100        1       12.5         0.03   0.4     437.343
                  150        0.5     12.5         0.02   0.6     330.124
                  150        0.5     12.5         0.02   0.7     249.19
                  150        0.5     12.5         0.02   0.8     188.099
                  150        0.5     12.5         0.01   0.9     141.984
                  300        0.5     12.5         0.01   0.9     80.9003
                  300        0.5     12.5         0.01   1       46.0956
                  300        0.5     12.5         0.01   1       26.2645
                Chemical: Thickness=[100, 150, 150, 150, 150, 300, 300, 300]; PH=[6, 6, 6, 6, 6, 6, 6, 6]; PHUnits=Water
                Water: Thickness=[100, 150, 150, 150, 150, 300, 300, 300]; InitialValues=[0.29, 0.27, 0.25, 0.28, 0.29, 0.30995, 0.15, 0.15]; InitialPAWmm=142.485; RelativeTo=LL15; FilledFromTop=true
                CERESSoilTemperature Temperature
                Nutrient
                Solute NO3: Thickness=[100, 150, 150, 150, 150, 300, 300, 300]; InitialValuesUnits=ppm; WaterTableConcentration=0; D0=0; DepthConstant=0; MaxDepthSoluteAccessible=0; RunoffEffectivenessAtMovingSolute=0; MaxEffectiveRunoff=0
                  InitialValues=[7.17235, 7.17235, 7.17235, 7.17235, 7.17235, 7.17235, 7.17235, 5.1149]
                Solute NH4: Thickness=[100, 150, 150, 150, 150, 300, 300, 300]; InitialValues=[0, 0, 0, 0, 0, 0, 0, 0.0666667]; InitialValuesUnits=ppm; WaterTableConcentration=0; D0=0; DepthConstant=0; MaxDepthSoluteAccessible=0; RunoffEffectivenessAtMovingSolute=0; MaxEffectiveRunoff=0
                Solute Urea: Thickness=[100, 150, 150, 150, 150, 300, 300, 300]; InitialValues=[0, 0, 0, 0, 0, 0, 0, 0]; InitialValuesUnits=kg/ha; WaterTableConcentration=0; D0=0; DepthConstant=0; MaxDepthSoluteAccessible=0; RunoffEffectivenessAtMovingSolute=0; MaxEffectiveRunoff=0
              Report DailyReport
              Report HarvestReport
              Manager Harvesting: same as Validation.SE Queensland.APS26.APS26NRate160WaterWet.paddock.Harvesting
              Report SowingReport
              Manager SetCropParams
            Manager LocationInfo
              Country = Australia
              State = New South Wales
              Region = NSW VIC Slopes
              script: same as in Validation.SE Queensland.APS26.APS26NRate160WaterWet.LocationInfo
        Experiment Ginninderra1991
          Factors
            Permutation
              Factor N: Specification=[NSchedule]
                Operations 0
                  1991-06-21  [Fertiliser].Apply(Amount: 0, Type: Fertiliser.Types.UreaN);
                Operations 40
                  1991-06-21  [Fertiliser].Apply(Amount: 40, Type: Fertiliser.Types.UreaN);
                Operations 80
                  1991-06-21  [Fertiliser].Apply(Amount: 80, Type: Fertiliser.Types.UreaN);
                Operations 120
                  1991-06-21  [Fertiliser].Apply(Amount: 120, Type: Fertiliser.Types.UreaN);
                Operations 160
                  1991-06-21  [Fertiliser].Apply(Amount: 160, Type: Fertiliser.Types.UreaN);
                Operations 200
                  1991-06-21  [Fertiliser].Apply(Amount: 200, Type: Fertiliser.Types.UreaN);
                Operations 240
                  1991-06-21  [Fertiliser].Apply(Amount: 240, Type: Fertiliser.Types.UreaN);
              Factor Cv: Specification=[CropSchedule]
                Operations Janz
                  1991-06-21  [Wheat].Sow(population:180, cultivar:"Janz", depth:30, rowSpacing:200);
                  1991-11-10  [Irrigation].Apply(amount:27);
                  1991-11-20  [Irrigation].Apply(amount:28);
                  1991-12-21  [Wheat].Harvest();
                  1991-12-21  [Wheat].EndCrop();
          Simulation Ginninderra91Base
            Clock: Start=1991-06-20; End=1991-12-31
            Summary summaryfile
            Weather: FileName=Ginninderra.met; Latitude=-35.2; Tav=13.47; Amp=16.17
            SoilArbitrator Soil Arbitrator
            Zone paddock: Area=1; Slope=0; AspectAngle=0; Altitude=50
              Irrigation
              Fertiliser
              SurfaceOrganicMatter: InitialResidueName=canola; InitialResidueType=canola; InitialResidueMass=1000; InitialStandingFraction=0; InitialCPR=0; InitialCNR=80
              Plant Wheat
              Operations CropSchedule: same as Validation.Southern Australia.van Herwaarden et al  1998.Ginninderra1991.Factors.Permutation.Cv.Janz
              Operations NSchedule
              MicroClimate: a_interception=0; b_interception=1; c_interception=0; d_interception=0; SoilHeatFluxFraction=0.4; MinimumHeightDiffForNewLayer=0; NightInterceptionFraction=0.5; ReferenceHeight=2
              Soil: SoilType=unknown; LocalName=Ginninderra; Site=Ginninderra; NearestTown=Ginninderra; Region=ACT; NaturalVegetation=Unknown; Latitude=0; Longitude=0
                Water: InitialPAWmm=243.7; RelativeTo=LL15; FilledFromTop=true
                  Thickness=[100, 100, 100, 100, 100, 100, 100, 100, 100, 100, 100, 100, 100, 100, 100, 100, 100, 100, 100, 100]
                  InitialValues=[0.3, 0.32, 0.32, 0.33, 0.35, 0.37, 0.36, 0.35, 0.34, 0.33, 0.34, 0.35, 0.36, 0.37, 0.37, 0.355, 0.35, 0.33, 0.33, 0.33]
                Physical
                  Thickness  BD    AirDry  LL15   DUL    SAT
                  100        1.45  0.04    0.073  0.3    0.414
                  100        1.5   0.04    0.075  0.32   0.394
                  100        1.55  0.06    0.074  0.32   0.375
                  100        1.5   0.1     0.12   0.33   0.394
                  100        1.52  0.1     0.16   0.35   0.386
                  100        1.55  0.1     0.25   0.37   0.375
                  100        1.57  0.1     0.25   0.36   0.367
                  100        1.6   0.1     0.24   0.35   0.355
                  100        1.62  0.1     0.259  0.34   0.347
                  100        1.65  0.1     0.281  0.33   0.335
                  100        1.62  0.1     0.295  0.34   0.347
                  100        1.6   0.1     0.272  0.35   0.355
                  100        1.58  0.1     0.269  0.36   0.363
                  100        1.55  0.1     0.264  0.37   0.375
                  100        1.55  0.1     0.256  0.37   0.375
                  100        1.55  0.1     0.256  0.355  0.375
                  100        1.55  0.1     0.256  0.35   0.375
                  100        1.55  0.1     0.256  0.33   0.375
                  100        1.55  0.1     0.256  0.33   0.375
                  100        1.55  0.1     0.256  0.33   0.375
                  SoilCrop wheatSoil
                    LL=[0.073, 0.075, 0.074, 0.12, 0.16, 0.25, 0.25, 0.24, 0.259, 0.281, 0.295, 0.272, 0.269, 0.264, 0.256, 0.256, 0.256, 0.256, 0.256, 0.256]
                    KL=[0.08, 0.08, 0.08, 0.08, 0.08, 0.08, 0.08, 0.08, 0.08, 0.07, 0.07, 0.06, 0.06, 0.05, 0.05, 0.04, 0.04, 0.03, 0.02, 0.01]
                    XF=[1, 1, 1, 1, 1, 1, 1, 1, 1, 1, 1, 1, 1, 1, 1, 0, 0, 0, 0, 0]
                WaterBalance SoilWater: SummerDate=1-Nov; SummerU=2; SummerCona=2; WinterDate=1-Apr; WinterU=2; WinterCona=2; DiffusConst=88; DiffusSlope=35.4; Salb=0.13; CN2Bare=72; CNRed=20; CNCov=0.8; DischargeWidth=0; CatchmentArea=0; PSIDul=-100
                  Thickness  SWCON  KLAT
                  100        0.4    0
                  100        0.4    0
                  100        0.4    0
                  100        0.4    0
                  100        0.4    0
                  100        0.4    0
                  100        0.4    0
                  100        0.4    0
                  100        0.4    0
                  100        0.4    0
                  100        0.4    0
                  100        0.4    0
                  100        0.4    0
                  100        0.4    0
                  100        0.4    0
                  100        0.4    0
                  100        0.4    0
                  100        0.4    0
                  100        0.4    0
                  100        0.4    0
                Organic: FOMCNRatio=40; CarbonUnits=Total
                  Thickness  Carbon  SoilCNRatio  FBiom  FInert  FOM
                  100        0.83    14.5         0.04   0.36    293.181
                  100        0.35    14.5         0.03   0.35    252.343
                  100        0.33    14.5         0.03   0.45    217.194
                  100        0.22    14.5         0.02   0.45    186.94
                  100        0.22    14.5         0.02   0.59    160.901
                  100        0.22    14.5         0.02   0.6     138.489
                  100        0.19    14.5         0.02   0.84    119.198
                  100        0.17    14.5         0.02   0.8     102.595
                  100        0.15    14.5         0.01   0.8     88.3043
                  100        0.12    14.5         0.01   0.99    76.0042
                  100        0.11    14.5         0.01   0.99    65.4174
                  100        0.1     14.5         0.01   0.99    56.3053
                  100        0.1     14.5         0.01   0.99    48.4624
                  100        0.1     14.5         0.01   0.99    41.712
                  100        0.1     14.5         0.01   0.99    35.9019
                  100        0.1     14.5         0.01   0.99    30.901
                  100        0.1     14.5         0.01   0.99    26.5967
                  100        0.1     14.5         0.01   0.99    22.892
                  100        0.1     14.5         0.01   0.99    19.7034
                  100        0.1     14.5         0.01   0.99    16.9588
                Chemical: PHUnits=Water
                  Thickness=[100, 100, 100, 100, 100, 100, 100, 100, 100, 100, 100, 100, 100, 100, 100, 100, 100, 100, 100, 100]
                  PH=[5.8, 5.9, 6.6, 6.8, 7, 7.1, 7.2, 7.3, 7.4, 7.4, 7.6, 7.8, 8, 8.2, 8.3, 8.4, 8.4, 8.5, 8.5, 8.5]
                CERESSoilTemperature Temperature
                Nutrient
                Solute NO3: InitialValuesUnits=ppm; WaterTableConcentration=0; D0=0; DepthConstant=0; MaxDepthSoluteAccessible=0; RunoffEffectivenessAtMovingSolute=0; MaxEffectiveRunoff=0
                  Thickness=[100, 100, 100, 100, 100, 100, 100, 100, 100, 100, 100, 100, 100, 100, 100, 100, 100, 100, 100, 100]
                  InitialValues=[12.8949, 12.8949, 12.8949, 12.8949, 12.8949, 12.8949, 12.8949, 12.8949, 12.8949, 12.8949, 6.32911, 6.32911, 6.32911, 6.32911, 6.32911, 1.29032, 1.29032, 1.29032, 1.29032, 1.29032]
                Solute NH4: InitialValuesUnits=ppm; WaterTableConcentration=0; D0=0; DepthConstant=0; MaxDepthSoluteAccessible=0; RunoffEffectivenessAtMovingSolute=0; MaxEffectiveRunoff=0
                  Thickness=[100, 100, 100, 100, 100, 100, 100, 100, 100, 100, 100, 100, 100, 100, 100, 100, 100, 100, 100, 100]
                  InitialValues=[0.0644745, 0.0644745, 0.0644745, 0.0644745, 0.0644745, 0.0644745, 0.0644745, 0.0644745, 0.0644745, 0.0644745, 0.0126582, 0.0126582, 0.0126582, 0.0126582, 0.0126582, 0.0129032, 0.0129032, 0.0129032, 0.0129032, 0.0129032]
                Solute Urea: InitialValuesUnits=kg/ha; WaterTableConcentration=0; D0=0; DepthConstant=0; MaxDepthSoluteAccessible=0; RunoffEffectivenessAtMovingSolute=0; MaxEffectiveRunoff=0
                  Thickness=[100, 100, 100, 100, 100, 100, 100, 100, 100, 100, 100, 100, 100, 100, 100, 100, 100, 100, 100, 100]
                  InitialValues=[0, 0, 0, 0, 0, 0, 0, 0, 0, 0, 0, 0, 0, 0, 0, 0, 0, 0, 0, 0]
              Report DailyReport
              Report HarvestReport
              Report SowingReport
              Manager SetCropParams
            Manager LocationInfo
              Country = Australia
              State = Australian Capital Territory
              Region =
              script: same as in Validation.SE Queensland.APS26.APS26NRate160WaterWet.LocationInfo
      Folder Wagga1314
        Memo
          The dataset of [Zeleke2016] includes plantings of two wheat varieties (Gregory, Livingston) under two water regimes (dry and irrigated) for 2013 and 2014 at the Wagga Wagga Agricultural Research Institute. Yields ranged from 1.63 t/ha to 6.01 t/ha.
        Experiment Wagga2013
          Factors
            Permutation
              Factor Cv: Specification=[CropSchedule]
                Operations Gregory
                  2013-06-24  [Wheat].Sow(population:120, cultivar:"Gregory", depth:30, rowSpacing:200);
                  2013-06-24  [Fertiliser].Apply(Amount: 100, Type: Fertiliser.Types.UreaN);
                Operations Livingston
                  2013-06-24  [Wheat].Sow(population:120, cultivar:"Livingston", depth:30, rowSpacing:200);
                  2013-06-24  [Fertiliser].Apply(Amount: 100, Type: Fertiliser.Types.UreaN);
              Factor Water: Specification=[IrrigationSchedule]
                Operations Wet
                  2013-09-10  [Irrigation].Apply(amount:26);
                  2013-09-11  [Irrigation].Apply(amount:26);
                  2013-09-26  [Irrigation].Apply(amount:26);
                  2013-10-01  [Irrigation].Apply(amount:26);
                  2013-10-04  [Irrigation].Apply(amount:26);
                  2013-10-09  [Irrigation].Apply(amount:26);
                  2013-10-10  [Irrigation].Apply(amount:26);
                  2013-10-14  [Irrigation].Apply(amount:26);
                  2013-10-15  [Irrigation].Apply(amount:26);
                  2013-10-16  [Irrigation].Apply(amount:26);
                Operations Dry
          Simulation Ketema2013
            Clock: Start=2013-06-24; End=2013-12-30
            Summary summaryfile
            Weather: FileName=Wagga1314.met; Latitude=-35.05; Tav=16.89; Amp=17.34
            SoilArbitrator Soil Arbitrator
            Zone paddock: Area=1; Slope=0; AspectAngle=0; Altitude=50
              Irrigation
              Fertiliser
              SurfaceOrganicMatter: InitialResidueName=canola; InitialResidueType=canola; InitialResidueMass=1000; InitialStandingFraction=0; InitialCPR=0; InitialCNR=80
              Plant Wheat
              Operations CropSchedule
              Operations IrrigationSchedule
              MicroClimate: a_interception=0; b_interception=1; c_interception=0; d_interception=0; SoilHeatFluxFraction=0.4; MinimumHeightDiffForNewLayer=0; NightInterceptionFraction=0.5; ReferenceHeight=2
              Soil: ASCOrder=Kandasol; ASCSubOrder=Red; SoilType=?; Site=Generic; NearestTown=Wagga Wagga; Region=Riverina; State=New South Wales; Country=Australia; ApsoilNumber=498-GENERIC; Latitude=-35.1155; Longitude=147.3695; LocationAccuracy=Regional Soil Type; DataSource=Generic soil; Comments=Generic soil developed for CSU.
                Physical
                  Thickness  BD    AirDry  LL15  DUL   SAT
                  100        1.48  0.055   0.11  0.29  0.35
                  150        1.5   0.104   0.13  0.27  0.34
                  150        1.45  0.15    0.15  0.25  0.32
                  150        1.37  0.15    0.15  0.28  0.36
                  150        1.43  0.15    0.15  0.29  0.35
                  300        1.55  0.15    0.15  0.31  0.34
                  300        1.67  0.15    0.15  0.31  0.34
                  300        1.62  0.15    0.15  0.32  0.35
                  SoilCrop WheatSoil: LL=[0.11, 0.13, 0.15, 0.17, 0.19, 0.22, 0.26, 0.28]; KL=[0.06, 0.06, 0.04, 0.04, 0.04, 0.04, 0.02, 0.02]; XF=[1, 1, 1, 0.9, 0.9, 0.9, 0.9, 0.8]
                WaterBalance SoilWater: SummerDate=1-Nov; SummerU=6; SummerCona=3.5; WinterDate=1-Apr; WinterU=2; WinterCona=2; DiffusConst=44; DiffusSlope=16; Salb=0.13; CN2Bare=84; CNRed=20; CNCov=0.8; PSIDul=-100; Thickness=[100, 150, 150, 150, 150, 300, 300, 300]; SWCON=[0.5, 0.4, 0.3, 0.3, 0.2, 0.1, 0.1, 0.1]
                Organic: same as Validation.Southern Australia.van Herwaarden et al  1998.Wagga1991.Wagga91Base.paddock.Soil.Organic
                Chemical: Thickness=[100, 150, 150, 150, 150, 300, 300, 300]; PH=[6, 6, 6, 6, 6, 6, 6, 6]; PHUnits=Water
                Water: Thickness=[100, 150, 150, 150, 150, 300, 300, 300]; InitialValues=[0.272, 0.256, 0.24, 0.267, 0.276, 0.294, 0.294, 0.303]; InitialPAWmm=217.35; RelativeTo=LL15; FilledFromTop=false
                CERESSoilTemperature Temperature
                Nutrient
                Solute NO3: Thickness=[100, 150, 150, 150, 150, 300, 300, 300]; InitialValues=[0.542, 0.542, 0.542, 0.542, 0.542, 0.542, 0.694667, 1]; InitialValuesUnits=ppm; WaterTableConcentration=0; D0=0; DepthConstant=0; MaxDepthSoluteAccessible=0; RunoffEffectivenessAtMovingSolute=0; MaxEffectiveRunoff=0
                Solute NH4: Thickness=[100, 150, 150, 150, 150, 300, 300, 300]; InitialValues=[0, 0, 0, 0, 0, 0, 0.0666667, 0.2]; InitialValuesUnits=ppm; WaterTableConcentration=0; D0=0; DepthConstant=0; MaxDepthSoluteAccessible=0; RunoffEffectivenessAtMovingSolute=0; MaxEffectiveRunoff=0
                Solute Urea: same as Validation.Southern Australia.van Herwaarden et al  1998.Wagga1991.Wagga91Base.paddock.Soil.Urea
              Report DailyReport
              Report HarvestReport
              Manager Harvesting: same as Validation.SE Queensland.APS26.APS26NRate160WaterWet.paddock.Harvesting
              Report SowingReport
              Manager SetCropParams
            Manager LocationInfo: same as Validation.Southern Australia.van Herwaarden et al  1998.Wagga1991.Wagga91Base.LocationInfo
        Experiment Wagga2014
          Factors
            Permutation
              Factor Cv: Specification=[CropSchedule]
                Operations Gregory
                  2014-04-30  [Wheat].Sow(population:120, cultivar:"Gregory", depth:30, rowSpacing:200);
                  2014-04-30  [Fertiliser].Apply(Amount: 100, Type: Fertiliser.Types.UreaN);
                  2014-07-01  [Fertiliser].Apply(Amount: 50, Type: Fertiliser.Types.UreaN);
                Operations Livingston
                  2014-04-30  [Wheat].Sow(population:120, cultivar:"Livingston", depth:30, rowSpacing:200);
                  2014-04-30  [Fertiliser].Apply(Amount: 100, Type: Fertiliser.Types.UreaN);
                  2014-07-01  [Fertiliser].Apply(Amount: 50, Type: Fertiliser.Types.UreaN);
              Factor Water: Specification=[IrrigationSchedule]
                Operations Wet
                  2014-05-16  [Irrigation].Apply(amount:26);
                  2014-08-11  [Irrigation].Apply(amount:26);
                  2014-08-12  [Irrigation].Apply(amount:26);
                  2014-08-18  [Irrigation].Apply(amount:26);
                  2014-08-25  [Irrigation].Apply(amount:26);
                  2014-09-01  [Irrigation].Apply(amount:21);
                  2014-09-05  [Irrigation].Apply(amount:26);
                  2014-09-22  [Irrigation].Apply(amount:26);
                  2014-10-10  [Irrigation].Apply(amount:26);
                Operations Dry
          Simulation Ketema2014
            Clock: Start=2014-04-30; End=2014-12-30
            Summary summaryfile
            Weather: FileName=Wagga1314.met; Latitude=-35.05; Tav=16.89; Amp=17.34
            SoilArbitrator Soil Arbitrator
            Zone paddock: Area=1; Slope=0; AspectAngle=0; Altitude=50
              Irrigation
              Fertiliser
              SurfaceOrganicMatter: InitialResidueName=wheat; InitialResidueType=wheat; InitialResidueMass=1000; InitialStandingFraction=0; InitialCPR=0; InitialCNR=80
              Plant Wheat
              Operations CropSchedule
              Operations IrrigationSchedule
              MicroClimate: a_interception=0; b_interception=1; c_interception=0; d_interception=0; SoilHeatFluxFraction=0.4; MinimumHeightDiffForNewLayer=0; NightInterceptionFraction=0.5; ReferenceHeight=2
              Soil: same as Validation.Southern Australia.Wagga1314.Wagga2013.Ketema2013.paddock.Soil
              Report HarvestReport
              Report DailyReport
              Manager Harvesting: same as Validation.SE Queensland.APS26.APS26NRate160WaterWet.paddock.Harvesting
              Report SowingReport
              Manager SetCropParams
            Manager LocationInfo: same as Validation.Southern Australia.van Herwaarden et al  1998.Wagga1991.Wagga91Base.LocationInfo
      Folder YarrabahCreek
        Memo
          This trial was conducted on a Vertosol soil on the Liverpool Plains, central-eastern Australia in 2001.  Hybrid Mercury was sown on 19th of June and biomass, leaf area, phenology, soil water (Neutron Moisture Meter) and water use (Bowen Ratio method) were monitored.  More information can be found in [Young2008].
        Simulation YarrabahCreek
          Clock: Start=2001-06-19; End=2001-12-05
          Summary summaryfile
          Weather: FileName=Ycreek.met; Latitude=-31.716; Tav=15; Amp=15
          SoilArbitrator Soil Arbitrator
          Zone Field: Area=1; Slope=0; AspectAngle=0; Altitude=50
            Irrigation
            Fertiliser
            Operations CropManagement
              2001-06-19  [Wheat].Sow(population:70, cultivar:"Mercury", depth:30, rowSpacing:250);
              2001-06-19  [Fertiliser].Apply(Amount: 120, Type: Fertiliser.Types.UreaN);
              2001-12-05  [Wheat].Harvest();
            Soil: SoilType=APS6Soil; LocalName=APS6Site; Site=APS6Site; NearestTown=Unknown; Region=Lawes; NaturalVegetation=Unknown; Latitude=0; Longitude=0
              Physical
                Thickness  BD   AirDry  LL15  DUL   SAT
                100        1    0.1     0.27  0.47  0.51
                200        1.1  0.1     0.27  0.49  0.51
                200        1.1  0.1     0.3   0.55  0.57
                200        1.1  0.1     0.32  0.55  0.55
                200        1.1  0.1     0.34  0.53  0.54
                200        1.2  0.1     0.38  0.53  0.54
                200        1.2  0.1     0.42  0.53  0.54
                200        1.2  0.1     0.42  0.5   0.51
                200        1.2  0.1     0.42  0.48  0.51
                200        1.2  0.1     0.42  0.48  0.51
                SoilCrop WheatSoil: LL=[0.27, 0.27, 0.3, 0.32, 0.34, 0.38, 0.42, 0.42, 0.42, 0.42]; KL=[0.12, 0.12, 0.08, 0.06, 0.06, 0.06, 0.06, 0.06, 0, 0]; XF=[1, 1, 1, 1, 1, 1, 1, 1, 0, 0]
              WaterBalance SoilWater: SummerDate=1-Nov; SummerU=9; SummerCona=5; WinterDate=1-Apr; WinterU=9; WinterCona=5; DiffusConst=40; DiffusSlope=16; Salb=0.13; CN2Bare=78; CNRed=20; CNCov=0.8; DischargeWidth=0; CatchmentArea=0; PSIDul=-100
                Thickness  SWCON  KLAT
                150        0.2    0
                150        0.2    0
                300        0.2    0
                300        0.2    0
                300        0.2    0
                300        0.2    0
                300        0.2    0
              Organic: FOMCNRatio=60; CarbonUnits=Total
                Thickness  Carbon  SoilCNRatio  FBiom  FInert  FOM
                100        1.83    14.5         0.03   0.45    2.82811
                200        1.35    14.5         0.03   0.45    2.06229
                200        1.19    14.5         0.02   0.6     1.50385
                200        1.11    14.5         0.015  0.7     1.09663
                200        0.97    14.5         0.01   0.85    0.799675
                200        0.8     14.5         0.01   0.9     0.583133
                200        0.64    14.5         0.01   0.99    0.425228
                200        0.5     14.5         0.01   0.99    0.310082
                200        0.38    14.5         0.01   0.99    0.226116
                200        0.27    14.5         0.01   0.99    0.164887
              Chemical: Thickness=[150, 150, 300, 300, 300, 300, 300]; PH=[7.5, 8, 8, 8, 8, 8, 8]; PHUnits=Water
              Water: Thickness=[100, 200, 200, 200, 200, 200, 200, 200, 200, 200]; InitialPAWmm=262.2; RelativeTo=LL15; FilledFromTop=false
                InitialValues=[0.42, 0.46, 0.54, 0.55, 0.53, 0.51, 0.54, 0.5, 0.466, 0.43]
              CERESSoilTemperature Temperature
              Nutrient
              Solute NO3: Thickness=[150, 150, 300, 300, 300, 300, 300]; InitialValues=[19.4545, 10, 5.30303, 2.54902, 2.54902, 2.54902, 2.54902]; InitialValuesUnits=ppm; WaterTableConcentration=0; D0=0; DepthConstant=0; MaxDepthSoluteAccessible=0; RunoffEffectivenessAtMovingSolute=0; MaxEffectiveRunoff=0
              Solute NH4: same as Validation.SE Queensland.Gatton2014.14SOWbase.Field.Soil.NH4
              Solute Urea: same as Validation.SE Queensland.APS6.APS6Base.paddock.APS6Field.Urea
            SurfaceOrganicMatter: InitialResidueName=wheat_stubble; InitialResidueType=wheat; InitialResidueMass=2000; InitialStandingFraction=0; InitialCPR=0; InitialCNR=100
            Plant Wheat
            MicroClimate: a_interception=0; b_interception=1; c_interception=0; d_interception=0; SoilHeatFluxFraction=0.4; MinimumHeightDiffForNewLayer=0; NightInterceptionFraction=0.5; ReferenceHeight=2
            Report DailyReport
            Report HarvestReport
            Report SowingReport
            Manager SetCropParams
          Manager LocationInfo: same as Validation.SE Queensland.AddingValueToNVT.Goondiwindi2011.Goondiwindi2011Base.LocationInfo
      Experiment Mouse
        Factors
          Permutation
            Factor Removal
              Specification=[MouseActivity].Script.ProportionNibbled = 0.00, 0.05,0.10,0.25,0.50
            Factor Date
              Specification=[MouseActivity].Script.NibblingDate = 2002-09-10, 2002-10-11, 2002-10-31, 2002-12-13
        Simulation MouseBase
          Clock: Start=2002-07-10; End=2002-12-31
          Summary summaryfile
          Weather: FileName=hall2002.met; Latitude=-35.15; Tav=13.82; Amp=15.22
          SoilArbitrator Soil Arbitrator
          Zone paddock: Area=1; Slope=0; AspectAngle=0; Altitude=50
            Irrigation
            Soil: SoilType=unknown; LocalName=Ginninderra; Site=Ginninderra; NearestTown=Ginninderra; Region=ACT; NaturalVegetation=Unknown; Latitude=0; Longitude=0
              Water: InitialPAWmm=206.4; RelativeTo=LL15; FilledFromTop=true
                Thickness=[100, 100, 100, 100, 100, 100, 100, 100, 100, 100, 100, 100, 100, 100, 100, 100, 100, 100, 100, 100]
                InitialValues=[0.21, 0.234, 0.22, 0.29, 0.293, 0.37, 0.36, 0.35, 0.34, 0.33, 0.34, 0.35, 0.36, 0.37, 0.37, 0.355, 0.35, 0.33, 0.33, 0.33]
              Physical
                Thickness  BD    AirDry  LL15   DUL    SAT
                100        1.45  0.04    0.073  0.21   0.414
                100        1.5   0.04    0.075  0.234  0.394
                100        1.55  0.06    0.074  0.22   0.375
                100        1.5   0.1     0.12   0.29   0.394
                100        1.52  0.1     0.16   0.293  0.386
                100        1.55  0.1     0.25   0.37   0.375
                100        1.57  0.1     0.25   0.36   0.367
                100        1.6   0.1     0.24   0.35   0.355
                100        1.62  0.1     0.259  0.34   0.347
                100        1.65  0.1     0.281  0.33   0.335
                100        1.62  0.1     0.295  0.34   0.347
                100        1.6   0.1     0.272  0.35   0.355
                100        1.58  0.1     0.269  0.36   0.363
                100        1.55  0.1     0.264  0.37   0.375
                100        1.55  0.1     0.256  0.37   0.375
                100        1.55  0.1     0.256  0.355  0.375
                100        1.55  0.1     0.256  0.35   0.375
                100        1.55  0.1     0.256  0.33   0.375
                100        1.55  0.1     0.256  0.33   0.375
                100        1.55  0.1     0.256  0.33   0.375
                SoilCrop wheatSoil
                  LL=[0.073, 0.075, 0.074, 0.12, 0.16, 0.25, 0.25, 0.24, 0.259, 0.281, 0.295, 0.272, 0.269, 0.264, 0.256, 0.256, 0.256, 0.256, 0.256, 0.256]
                  KL=[0.08, 0.08, 0.08, 0.08, 0.08, 0.08, 0.08, 0.08, 0.08, 0.07, 0.07, 0.06, 0.06, 0.05, 0.05, 0.04, 0.04, 0.03, 0.02, 0.01]
                  XF=[1, 1, 1, 1, 1, 1, 1, 1, 1, 1, 1, 1, 1, 1, 1, 1, 1, 1, 0, 0]
              WaterBalance SoilWater: same as Validation.Southern Australia.van Herwaarden et al  1998.Ginninderra1991.Ginninderra91Base.paddock.Soil.SoilWater
              Organic: same as Validation.Southern Australia.van Herwaarden et al  1998.Ginninderra1991.Ginninderra91Base.paddock.Soil.Organic
              Chemical: same as Validation.Southern Australia.van Herwaarden et al  1998.Ginninderra1991.Ginninderra91Base.paddock.Soil.Chemical
              CERESSoilTemperature Temperature
              Nutrient
              Solute NO3: InitialValuesUnits=ppm; WaterTableConcentration=0; D0=0; DepthConstant=0; MaxDepthSoluteAccessible=0; RunoffEffectivenessAtMovingSolute=0; MaxEffectiveRunoff=0
                Thickness=[100, 100, 100, 100, 100, 100, 100, 100, 100, 100, 100, 100, 100, 100, 100, 100, 100, 100, 100, 100]
                InitialValues=[10, 15, 10, 8, 5, 2, 1, 1, 1, 1, 1, 1, 1, 1, 0, 0, 0, 0, 0, 0]
              Solute NH4: InitialValuesUnits=ppm; WaterTableConcentration=0; D0=0; DepthConstant=0; MaxDepthSoluteAccessible=0; RunoffEffectivenessAtMovingSolute=0; MaxEffectiveRunoff=0
                Thickness=[100, 100, 100, 100, 100, 100, 100, 100, 100, 100, 100, 100, 100, 100, 100, 100, 100, 100, 100, 100]
                InitialValues=[1, 1, 1, 1, 1, 1, 1, 1, 1, 1, 1, 1, 1, 1, 0, 0, 0, 0, 0, 0]
              Solute Urea: same as Validation.Southern Australia.van Herwaarden et al  1998.Ginninderra1991.Ginninderra91Base.paddock.Soil.Urea
            SurfaceOrganicMatter: InitialResidueName=canola_stubble; InitialResidueType=canola; InitialResidueMass=1000; InitialStandingFraction=0; InitialCPR=0; InitialCNR=20
            Fertiliser
            Plant Wheat
            Operations IrrigationSchedule
              2002-11-08  [Irrigation].Apply(amount:35);
              2002-11-22  [Irrigation].Apply(amount:35);
            MicroClimate: a_interception=0; b_interception=1; c_interception=0; d_interception=0; SoilHeatFluxFraction=0.4; MinimumHeightDiffForNewLayer=0; NightInterceptionFraction=0.5; ReferenceHeight=2
            Operations SowingSchedule
              2002-08-15  [Wheat].Sow(population:100, cultivar:"H45", depth:30, rowSpacing:250);
            Manager SowingFertiliser
              Amount = 100
              script: same as in Validation.Western Australia.Cunderdin97.Cunderdin97Base.paddock.SowingFertiliser
            Manager MouseActivity
              NibblingDate = 10/31/2002 00:00:00
              ProportionNibbled = 0.5
```csharp
using Models.PMF.Interfaces;
using Newtonsoft.Json;
using System;
using System.Collections.Generic;
using Models.Core;
using Models.PMF;
using System.Xml.Serialization;
using Models.Soils;

namespace Models
{
    [Serializable] 
    [System.Xml.Serialization.XmlInclude(typeof(Model))]
    public class Script : Model
    {
        [Link] Plant Wheat;
        [Link] Clock Clock;

        [Description("Date that mouse damage event occurs")]
        public DateTime NibblingDate { get; set; }
        [Description("Proportion of the crop removed by mice")]
        public double ProportionNibbled { get; set; }
        

        
        [EventSubscribe("StartOfSimulation")]
        private void OnSimulationCommencing(object sender, EventArgs e)
        {
            
        }
        
        [EventSubscribe("DoManagement")]
        private void OnDoManagement(object sender, EventArgs e)
        {
            //Set up  array of remove fractions to send with Cut method.  Each member in the array corresponds to an organ in the same order they are set up in.

            if (Clock.Today.Date == NibblingDate)
            {
                //Harvest with manager specified removal fractions
                Wheat.structure?.DoThin(ProportionNibbled);
                var Grain = Wheat.FindChild<IHasDamageableBiomass>("Grain");
                var Leaf = Wheat.FindChild<IHasDamageableBiomass>("Leaf");
                var Stem = Wheat.FindChild<IHasDamageableBiomass>("Stem");
                var Spike = Wheat.FindChild<IHasDamageableBiomass>("Spike");
                var Root = Wheat.FindChild<IHasDamageableBiomass>("Root");
                Grain.RemoveBiomass(liveToRemove: 0, deadToRemove: 0.0, liveToResidue: ProportionNibbled, deadToResidue: 0.0);
                Leaf.RemoveBiomass(liveToRemove: 0, deadToRemove: 0.0, liveToResidue: ProportionNibbled, deadToResidue: 0.0);
                Stem.RemoveBiomass(liveToRemove: 0, deadToRemove: 0.0, liveToResidue: ProportionNibbled, deadToResidue: 0.0);
                Spike.RemoveBiomass(liveToRemove: 0, deadToRemove: 0.0, liveToResidue: ProportionNibbled, deadToResidue: 0.0);
                Root.RemoveBiomass(liveToRemove: 0, deadToRemove: 0.0, liveToResidue: 0, deadToResidue: 0.0);

            }
        }
    }
}
```
            Report DailyReport
            Report HarvestReport
            Manager Harvesting: same as Validation.SE Queensland.APS26.APS26NRate160WaterWet.paddock.Harvesting
            Report SowingReport
            Manager SetCropParams
          Manager LocationInfo
            Country = Australia
            State = New South Wales
            Region =
            script: same as in Validation.SE Queensland.APS26.APS26NRate160WaterWet.LocationInfo
      Experiment Walpeup2011
        Memo
          INSERT TEXT HERE
        Factors
          Permutation
            Factor Cv: Specification=[Sowing].Script.CultivarName = Janz, Yitpi, Gregory, Axe
            Factor TOS: Specification=[Sowing].Script.SowDate = 29-Apr, 31-May, 1-Jul
        Simulation Walpeup2011Base
          Clock: Start=2011-04-01; End=2011-12-30
          Summary summaryfile
          Weather: FileName=Walpeup2011.met; Latitude=-35.12; Tav=18.15; Amp=15.35
          SoilArbitrator Soil Arbitrator
          Zone Field: Area=1; Slope=0; AspectAngle=0; Altitude=50
            Irrigation
            Fertiliser
            Soil APS6Field: same as Validation.SE Queensland.Gatton94.Gatton94Base.Field.APS6Field
            SurfaceOrganicMatter: InitialResidueName=wheat_stubble; InitialResidueType=wheat; InitialResidueMass=500; InitialStandingFraction=0; InitialCPR=0; InitialCNR=100
            Plant Wheat
            MicroClimate: a_interception=0; b_interception=1; c_interception=0; d_interception=0; SoilHeatFluxFraction=0.4; MinimumHeightDiffForNewLayer=0; NightInterceptionFraction=0.5; ReferenceHeight=2
            Report DailyReport
            Report HarvestReport
            Manager Sowing
              SowDate =
              CultivarName = Hartog
              SowingDepth = 40
              RowSpacing = 250
              Population = 100
```csharp
using Models.Soils.Nutrients;
using System;
using Models.Core;
using Models.PMF;
using Models.Soils;
using Models.Soils.Nutrients;
using Models.Utilities;
using APSIM.Shared.Utilities;

namespace Models
{
    [Serializable]
    public class Script : Model
    {
        [Link] Clock Clock;
        [Link] Fertiliser Fertiliser;
        [Link] Summary Summary;
        [Link] Plant Wheat;
        [Link] Soil Soil;
        Accumulator accumulatedRain;
        
        [Description("Sowing date (d-mmm)")]
        public string SowDate { get; set; }
        [Description("Cultivar to be sown")]
        public string CultivarName { get; set; }
        [Description("Sowing depth (mm)")]
        public double SowingDepth { get; set; }
        [Description("Row spacing (mm)")]
        public double RowSpacing { get; set; }
        [Description("Plant population (/m2)")]
        public double Population { get; set; }
        
        


        [EventSubscribe("DoManagement")]
        private void OnDoManagement(object sender, EventArgs e)
        {
        
            
            if (DateUtilities.WithinDates(SowDate, Clock.Today, SowDate))
            {
                Wheat.Sow(population: Population, cultivar: CultivarName, depth: SowingDepth, rowSpacing: RowSpacing);    
                if(SowDate == "29-Apr")
                {
                    Wheat.Phenology.SetEmergenceDate("7-May");
                }
                if(SowDate == "31-May")
                {
                    Wheat.Phenology.SetEmergenceDate("14-Jun");
                }
                if(SowDate == "1-Jul")
                {
                    Wheat.Phenology.SetEmergenceDate("16-Jul");
                }
            }
        
        }
        
    }
}
```
            Manager Harvesting: same as Validation.SE Queensland.APS26.APS26NRate160WaterWet.paddock.Harvesting
            Manager AutoIrrigate: same as Validation.SE Queensland.Gatton94.Gatton94Base.Field.AutoIrrigate
            Operations ApplyFertiliser: same as Validation.SE Queensland.Gatton94.Gatton94Base.Field.ApplyFertiliser
            Report SowingReport
            Manager SetCropParams
          Manager LocationInfo
            Country = Australia
            State = Victoria
            Region = SA VIC Mallee
            script: same as in Validation.SE Queensland.APS26.APS26NRate160WaterWet.LocationInfo
      Experiment Walpeup2012
        Memo
          INSERT TEXT HERE
        Factors
          Permutation
            Factor Cv: Specification=[Sowing].Script.CultivarName = Janz, Yitpi, Gregory, Axe
            Factor TOS: Specification=[Sowing].Script.SowDate = 22-Jun, 18-Jul
        Simulation Walpeup2012Base
          Clock: Start=2012-04-01; End=2012-12-30
          Summary summaryfile
          Weather: FileName=Walpeup2012.met; Latitude=-35.12; Tav=18.15; Amp=15.35
          SoilArbitrator Soil Arbitrator
          Zone Field: Area=1; Slope=0; AspectAngle=0; Altitude=50
            Irrigation
            Fertiliser
            Soil APS6Field: same as Validation.SE Queensland.Gatton94.Gatton94Base.Field.APS6Field
            SurfaceOrganicMatter: InitialResidueName=wheat_stubble; InitialResidueType=wheat; InitialResidueMass=500; InitialStandingFraction=0; InitialCPR=0; InitialCNR=100
            Plant Wheat
            MicroClimate: a_interception=0; b_interception=1; c_interception=0; d_interception=0; SoilHeatFluxFraction=0.4; MinimumHeightDiffForNewLayer=0; NightInterceptionFraction=0.5; ReferenceHeight=2
            Report DailyReport
            Report HarvestReport
            Manager Sowing
              SowDate =
              CultivarName = Hartog
              SowingDepth = 40
              RowSpacing = 250
              Population = 100
```csharp
using Models.Soils.Nutrients;
using System;
using Models.Core;
using Models.PMF;
using Models.Soils;
using Models.Soils.Nutrients;
using Models.Utilities;
using APSIM.Shared.Utilities;

namespace Models
{
    [Serializable]
    public class Script : Model
    {
        [Link] Clock Clock;
        [Link] Fertiliser Fertiliser;
        [Link] Summary Summary;
        [Link] Plant Wheat;
        [Link] Soil Soil;
        Accumulator accumulatedRain;
        
        [Description("Sowing date (d-mmm)")]
        public string SowDate { get; set; }
        [Description("Cultivar to be sown")]
        public string CultivarName { get; set; }
        [Description("Sowing depth (mm)")]
        public double SowingDepth { get; set; }
        [Description("Row spacing (mm)")]
        public double RowSpacing { get; set; }
        [Description("Plant population (/m2)")]
        public double Population { get; set; }
        
        


        [EventSubscribe("DoManagement")]
        private void OnDoManagement(object sender, EventArgs e)
        {
        
            
            if (DateUtilities.WithinDates(SowDate, Clock.Today, SowDate))
            {
                Wheat.Sow(population: Population, cultivar: CultivarName, depth: SowingDepth, rowSpacing: RowSpacing);    
                if(SowDate == "22-Jun")
                {
                    Wheat.Phenology.SetEmergenceDate("5-Jul");
                }
                if(SowDate == "18-Jul")
                {
                    Wheat.Phenology.SetEmergenceDate("3-Aug");
                }
            }
        
        }
        
    }
}
```
            Manager Harvesting: same as Validation.SE Queensland.APS26.APS26NRate160WaterWet.paddock.Harvesting
            Manager AutoIrrigate: same as Validation.SE Queensland.Gatton94.Gatton94Base.Field.AutoIrrigate
            Operations ApplyFertiliser: same as Validation.SE Queensland.Gatton94.Gatton94Base.Field.ApplyFertiliser
            Report SowingReport
            Manager SetCropParams
          Manager LocationInfo: same as Validation.Southern Australia.Walpeup2011.Walpeup2011Base.LocationInfo
      Experiment Minnipa2012
        Memo
          INSERT TEXT HERE
        Factors
          Permutation
            Factor Cv: Specification=[Sowing].Script.CultivarName = Janz, Axe, Gregory
            Factor TOS: Specification=[Sowing].Script.SowDate = 25-May, 8-Jun, 25-Jun
        Simulation Minnipa2012Base
          Clock: Start=2012-04-01; End=2012-12-30
          Summary summaryfile
          Weather: FileName=Minnipa2012.met; Latitude=-32.84; Tav=18.09; Amp=14.81
          SoilArbitrator Soil Arbitrator
          Zone Field: Area=1; Slope=0; AspectAngle=0; Altitude=50
            Irrigation
            Fertiliser
            Soil APS6Field: same as Validation.SE Queensland.Gatton94.Gatton94Base.Field.APS6Field
            SurfaceOrganicMatter: InitialResidueName=wheat_stubble; InitialResidueType=wheat; InitialResidueMass=500; InitialStandingFraction=0; InitialCPR=0; InitialCNR=100
            Plant Wheat
            MicroClimate: a_interception=0; b_interception=1; c_interception=0; d_interception=0; SoilHeatFluxFraction=0.4; MinimumHeightDiffForNewLayer=0; NightInterceptionFraction=0.5; ReferenceHeight=2
            Report DailyReport
            Report HarvestReport
            Manager Sowing
              SowDate =
              CultivarName = Hartog
              SowingDepth = 40
              RowSpacing = 250
              Population = 100
```csharp
using Models.Soils.Nutrients;
using System;
using Models.Core;
using Models.PMF;
using Models.Soils;
using Models.Soils.Nutrients;
using Models.Utilities;
using APSIM.Shared.Utilities;

namespace Models
{
    [Serializable]
    public class Script : Model
    {
        [Link] Clock Clock;
        [Link] Fertiliser Fertiliser;
        [Link] Summary Summary;
        [Link] Plant Wheat;
        [Link] Soil Soil;
        Accumulator accumulatedRain;
        
        [Description("Sowing date (d-mmm)")]
        public string SowDate { get; set; }
        [Description("Cultivar to be sown")]
        public string CultivarName { get; set; }
        [Description("Sowing depth (mm)")]
        public double SowingDepth { get; set; }
        [Description("Row spacing (mm)")]
        public double RowSpacing { get; set; }
        [Description("Plant population (/m2)")]
        public double Population { get; set; }
        
        


        [EventSubscribe("DoManagement")]
        private void OnDoManagement(object sender, EventArgs e)
        {
        
            
            if (DateUtilities.WithinDates(SowDate, Clock.Today, SowDate))
            {
                Wheat.Sow(population: Population, cultivar: CultivarName, depth: SowingDepth, rowSpacing: RowSpacing);    
                if(SowDate == "25-May")
                {
                    Wheat.Phenology.SetEmergenceDate("5-Jun");
                }
                if(SowDate == "8-Jun")
                {
                    Wheat.Phenology.SetEmergenceDate("21-Jun");
                }
                if(SowDate == "25-Jun")
                {
                    Wheat.Phenology.SetEmergenceDate("10-Jul");
                }
            }
        
        }
        
    }
}
```
            Manager Harvesting: same as Validation.SE Queensland.APS26.APS26NRate160WaterWet.paddock.Harvesting
            Manager AutoIrrigate: same as Validation.SE Queensland.Gatton94.Gatton94Base.Field.AutoIrrigate
            Operations ApplyFertiliser: same as Validation.SE Queensland.Gatton94.Gatton94Base.Field.ApplyFertiliser
            Report SowingReport
            Manager SetCropParams
          Manager LocationInfo
            Country = Australia
            State = South Australia
            Region = SA VIC Mallee
            script: same as in Validation.SE Queensland.APS26.APS26NRate160WaterWet.LocationInfo
      Experiment Temora2012
        Memo
          INSERT TEXT HERE
        Factors
          Permutation
            Factor Cv: Specification=[Sowing].Script.CultivarName = Janz, Axe, Gregory
            Factor TOS: Specification=[Sowing].Script.SowDate = 5-May, 23-May, 25-Jun
        Simulation Temora2012Base
          Clock: Start=2012-04-01; End=2012-12-30
          Summary summaryfile
          Weather: FileName=Temora2012.met; Latitude=-34.41; Tav=17.51; Amp=15.44
          SoilArbitrator Soil Arbitrator
          Zone Field: Area=1; Slope=0; AspectAngle=0; Altitude=50
            Irrigation
            Fertiliser
            Soil APS6Field: same as Validation.SE Queensland.Gatton94.Gatton94Base.Field.APS6Field
            SurfaceOrganicMatter: InitialResidueName=wheat_stubble; InitialResidueType=wheat; InitialResidueMass=500; InitialStandingFraction=0; InitialCPR=0; InitialCNR=100
            Plant Wheat
            MicroClimate: a_interception=0; b_interception=1; c_interception=0; d_interception=0; SoilHeatFluxFraction=0.4; MinimumHeightDiffForNewLayer=0; NightInterceptionFraction=0.5; ReferenceHeight=2
            Report DailyReport
            Report HarvestReport
            Manager Sowing
              SowDate = 25-May
              CultivarName = Hartog
              SowingDepth = 40
              RowSpacing = 250
              Population = 100
```csharp
using Models.Soils.Nutrients;
using System;
using Models.Core;
using Models.PMF;
using Models.Soils;
using Models.Soils.Nutrients;
using Models.Utilities;
using APSIM.Shared.Utilities;

namespace Models
{
    [Serializable]
    public class Script : Model
    {
        [Link] Clock Clock;
        [Link] Fertiliser Fertiliser;
        [Link] Summary Summary;
        [Link] Plant Wheat;
        [Link] Soil Soil;
        Accumulator accumulatedRain;
        
        [Description("Sowing date (d-mmm)")]
        public string SowDate { get; set; }
        [Description("Cultivar to be sown")]
        public string CultivarName { get; set; }
        [Description("Sowing depth (mm)")]
        public double SowingDepth { get; set; }
        [Description("Row spacing (mm)")]
        public double RowSpacing { get; set; }
        [Description("Plant population (/m2)")]
        public double Population { get; set; }
        
        


        [EventSubscribe("DoManagement")]
        private void OnDoManagement(object sender, EventArgs e)
        {
        
            
            if (DateUtilities.WithinDates(SowDate, Clock.Today, SowDate))
            {
                Wheat.Sow(population: Population, cultivar: CultivarName, depth: SowingDepth, rowSpacing: RowSpacing);    
                if(SowDate == "5-May")
                {
                    Wheat.Phenology.SetEmergenceDate("13-May");
                }
                if(SowDate == "23-May")
                {
                    Wheat.Phenology.SetEmergenceDate("3-Jun");
                }
                if(SowDate == "25-Jun")
                {
                    Wheat.Phenology.SetEmergenceDate("10-Jul");
                }
            }
        
        }
        
    }
}
```
            Manager Harvesting: same as Validation.SE Queensland.APS26.APS26NRate160WaterWet.paddock.Harvesting
            Manager AutoIrrigate: same as Validation.SE Queensland.Gatton94.Gatton94Base.Field.AutoIrrigate
            Operations ApplyFertiliser: same as Validation.SE Queensland.Gatton94.Gatton94Base.Field.ApplyFertiliser
            Report SowingReport
            Manager SetCropParams
          Manager LocationInfo: same as Validation.Southern Australia.van Herwaarden et al  1998.Wagga1991.Wagga91Base.LocationInfo
      Experiment Birchip2011
        Factors: same as Validation.SE Queensland.Gatton2011.Factors
        Simulation Birchip2011Base
          Clock: Start=2011-05-05; End=2012-01-15
          Summary summaryfile
          Weather: FileName=Birchip2011.met; Latitude=-35.8; Tav=16.31; Amp=14.01
          SoilArbitrator Soil Arbitrator
          Zone Field: Area=1; Slope=0; AspectAngle=0; Altitude=50
            Irrigation
            Fertiliser
            Manager SowingRule
              TOS = 1
              Cultivar = Hartog
```csharp
using Models.Soils;
using System;
using Models.Core;
using Models.PMF;
namespace Models
{
           
    [Serializable] 
    [System.Xml.Serialization.XmlInclude(typeof(Model))]
    public class Script : Model
    {
    
        [Link] Plant Wheat;
        [Link] Clock Clock;
            
        [Description("Time of Sowing")]
        public int TOS { get; set; }

        [Description("Cultivar")]
        public String Cultivar { get; set; }
        
        [EventSubscribe("DoManagement")]
        private void OnDoManagement(object sender, EventArgs e)
        {
            if ((Clock.Today.DayOfYear == 133) && (TOS == 1)) 
            {
                Wheat.Sow(population: 100, cultivar: Cultivar, depth: 30, rowSpacing: 250);
                Wheat.Phenology.SetEmergenceDate("28-May");
            }
            if ((Clock.Today.DayOfYear == 179) && (TOS == 2))
            {
                Wheat.Sow(population: 100, cultivar: Cultivar, depth: 30, rowSpacing: 250);
                Wheat.Phenology.SetEmergenceDate("15-Jul");
            }

        }


    }
}
```
            Operations
              2011-05-13  [Fertiliser].Apply(Amount: 55, Type: Fertiliser.Types.UreaN);
              2011-05-13  [Irrigation].Apply(amount:11);
              2011-06-30  [Fertiliser].Apply(Amount: 43, Type: Fertiliser.Types.UreaN);
              2011-08-08  [Fertiliser].Apply(Amount: 90, Type: Fertiliser.Types.UreaN);
            SurfaceOrganicMatter: InitialResidueName=wheat_stubble; InitialResidueType=wheat; InitialResidueMass=500; InitialStandingFraction=0; InitialCPR=0; InitialCNR=100
            Plant Wheat
            MicroClimate: a_interception=0; b_interception=1; c_interception=0; d_interception=0; SoilHeatFluxFraction=0.4; MinimumHeightDiffForNewLayer=0; NightInterceptionFraction=0.5; ReferenceHeight=2
            Report DailyReport
            Soil: SoilType=Clay Loam; Site=Jil Jil; NearestTown=Jil Jil; Region=Mallee; State=Victoria; Country=Australia; ApsoilNumber=728; Latitude=-35.8822; Longitude=142.9923; LocationAccuracy=+/- 1000m; Comments=Medium SSC; GPS at paddock scale only; BCG systems trial
              DataSource=Based on Soil Characterisation undertaken by Birchip Cropping Group during 2005
              Physical
                Thickness  BD     AirDry  LL15  DUL   SAT
                100        1.33   0.085   0.17  0.36  0.43
                150        1.36   0.168   0.21  0.37  0.44
                150        1.39   0.2     0.2   0.4   0.45
                150        1.415  0.2     0.2   0.41  0.45
                150        1.437  0.2     0.2   0.41  0.45
                300        1.428  0.2     0.2   0.44  0.46
                300        1.41   0.2     0.2   0.46  0.467
                SoilCrop wheatSoil: LL=[0.17, 0.21, 0.25, 0.26, 0.28, 0.34, 0.46]; KL=[0.06, 0.06, 0.04, 0.04, 0.04, 0.04, 0.02]; XF=[1, 1, 0.28, 0.22, 0.17, 0.16, 0]
                SoilCrop barleySoil: LL=[0.17, 0.21, 0.25, 0.26, 0.26, 0.44, 0.46]; KL=[0.07, 0.07, 0.07, 0.07, 0.05, 0.05, 0.03]; XF=[1, 0.5, 0.3, 0.2, 0.2, 0, 0]
              WaterBalance SoilWater: SummerDate=1-Nov; SummerU=6; SummerCona=3.5; WinterDate=1-Apr; WinterU=2; WinterCona=2; DiffusConst=40; DiffusSlope=16; Salb=0.13; CN2Bare=73; CNRed=20; CNCov=0.8; PSIDul=-100; Thickness=[100, 150, 150, 150, 150, 300, 300]; SWCON=[0.4, 0.4, 0.3, 0.3, 0.3, 0.3, 0.3]
              Organic: FOMCNRatio=40; CarbonUnits=Total
                Thickness  Carbon  SoilCNRatio  FBiom  FInert  FOM
                100        1.3     12           0.05   0.3     333.304
                150        1       12           0.02   0.5     235.78
                150        0.3     12           0.02   0.5     166.792
                150        0.2     12           0.02   0.8     117.989
                150        0.05    12           0.01   0.6     83.4659
                300        0.01    12           0.01   0.7     41.768
                300        0.01    12           0.01   0.8     20.9015
              Chemical: Thickness=[100, 150, 150, 150, 150, 300, 300]; PH=[8.6, 9.4, 9.6, 9.7, 9.7, 9.7, 9.3]; PHUnits=Water
              Water: Thickness=[100, 150, 150, 150, 150, 300, 300]; InitialValues=[0.36, 0.37, 0.4, 0.41, 0.41, 0.44, 0.46]; InitialPAWmm=286; RelativeTo=LL15; FilledFromTop=true
              CERESSoilTemperature Temperature
              Nutrient
              Solute NO3: Thickness=[100, 150, 150, 150, 150, 300, 300]; InitialValues=[1, 1, 1, 1, 1, 1, 1]; InitialValuesUnits=ppm; WaterTableConcentration=0; D0=0; DepthConstant=0; MaxDepthSoluteAccessible=0; RunoffEffectivenessAtMovingSolute=0; MaxEffectiveRunoff=0
              Solute NH4: Thickness=[100, 150, 150, 150, 150, 300, 300]; InitialValues=[0, 0, 0, 0, 0, 0, 0]; InitialValuesUnits=ppm; WaterTableConcentration=0; D0=0; DepthConstant=0; MaxDepthSoluteAccessible=0; RunoffEffectivenessAtMovingSolute=0; MaxEffectiveRunoff=0
              Solute Urea: Thickness=[100, 150, 150, 150, 150, 300, 300]; InitialValues=[0, 0, 0, 0, 0, 0, 0]; InitialValuesUnits=kg/ha; WaterTableConcentration=0; D0=0; DepthConstant=0; MaxDepthSoluteAccessible=0; RunoffEffectivenessAtMovingSolute=0; MaxEffectiveRunoff=0
            Report HarvestReport
            Report SowingReport
            Operations HarvestingRule
              2012-01-15  [Wheat].Harvest()
            Manager SetCropParams
          Manager LocationInfo: same as Validation.Southern Australia.Walpeup2011.Walpeup2011Base.LocationInfo
      Experiment Tarlee2011
        Factors: same as Validation.SE Queensland.Gatton2011.Factors
        Simulation Tarlee2011Base
          Clock: Start=2011-05-05; End=2011-12-28
          Summary summaryfile
          Weather: FileName=Tarlee2011.met; Latitude=-34.28; Tav=17.05; Amp=13.93
          SoilArbitrator Soil Arbitrator
          Zone Field: Area=1; Slope=0; AspectAngle=0; Altitude=50
            Irrigation
            Fertiliser
            Manager SowingRule
              TOS = 1
              Cultivar = Hartog
```csharp
using Models.Soils;
using System;
using Models.Core;
using Models.PMF;
namespace Models
{
           
    [Serializable] 
    [System.Xml.Serialization.XmlInclude(typeof(Model))]
    public class Script : Model
    {
    
        [Link] Plant Wheat;
        [Link] Clock Clock;
            
        [Description("Time of Sowing")]
        public int TOS { get; set; }

        [Description("Cultivar")]
        public String Cultivar { get; set; }
        
        [EventSubscribe("DoManagement")]
        private void OnDoManagement(object sender, EventArgs e)
        {
            if ((Clock.Today.DayOfYear == 140) && (TOS == 1)) 
            {
                Wheat.Sow(population: 100, cultivar: Cultivar, depth: 30, rowSpacing: 250);
                 Wheat.Phenology.SetEmergenceDate("3-Jun");
            }
            if ((Clock.Today.DayOfYear == 196) && (TOS == 2))
            {
                Wheat.Sow(population: 100, cultivar: Cultivar, depth: 30, rowSpacing: 250);
                 Wheat.Phenology.SetEmergenceDate("2-Aug");
            }
        }


    }
}
```
            Operations: same as Validation.Southern Australia.Birchip2011.Birchip2011Base.Field.Operations
            SurfaceOrganicMatter: InitialResidueName=wheat_stubble; InitialResidueType=wheat; InitialResidueMass=500; InitialStandingFraction=0; InitialCPR=0; InitialCNR=100
            Plant Wheat
            MicroClimate: a_interception=0; b_interception=1; c_interception=0; d_interception=0; SoilHeatFluxFraction=0.4; MinimumHeightDiffForNewLayer=0; NightInterceptionFraction=0.5; ReferenceHeight=2
            Report DailyReport
            Soil: SoilType=Sandy Loam; Site=Tarlee; NearestTown=Tarlee; Region=Mid North; State=South Australia; Country=Australia; ApsoilNumber=610; Latitude=-34.276; Longitude=138.759; LocationAccuracy=+/- 20m
              DataSource=Characterisation 2008 by University of Adelaide, CSIRO Sustainable Ecosystems and Allan Mayfield Consulting, Clare, SA
              Comments=LB Code:TAR; Strongly duplex low-moderate clay soil. Surface CEC low, moderate below. Texture change at about 7cm. Little chemical impediment to root growth, but high ESP below about 60cm may result in slaking or dispersion and high bulk density. DM Descr
              Physical
                Thickness  BD    AirDry  LL15   DUL    SAT
                100        1.54  0.055   0.11   0.223  0.389
                200        1.41  0.167   0.209  0.388  0.438
                300        1.53  0.22    0.22   0.342  0.393
                300        1.57  0.22    0.22   0.293  0.378
                350        1.6   0.22    0.22   0.264  0.366
                SoilCrop wheatSoil: LL=[0.11, 0.209, 0.24, 0.225, 0.222]; KL=[0.06, 0.06, 0.06, 0.04, 0.04]; XF=[1, 1, 1, 1, 1]
              WaterBalance SoilWater: SummerDate=1-Nov; SummerU=6; SummerCona=3.5; WinterDate=1-Apr; WinterU=2; WinterCona=2; DiffusConst=88; DiffusSlope=35; Salb=0.13; CN2Bare=73; CNRed=20; CNCov=0.8; PSIDul=-100; Thickness=[100, 200, 300, 300, 350]; SWCON=[0.5, 0.5, 0.5, 0.5, 0.5]
              Organic: FOMCNRatio=40; CarbonUnits=Total
                Thickness  Carbon  SoilCNRatio  FBiom  FInert  FOM
                100        1.16    12           0.04   0.4     469.511
                200        0.75    12           0.02   0.5     290.526
                300        0.36    12           0.02   0.7     141.414
                300        0.12    12           0.02   1       68.8336
                350        0.12    12           0.01   1       29.7162
              Chemical: Thickness=[100, 200, 300, 300, 350]; PH=[7, 7.9, 8.9, 9.2, 9.2]; PHUnits=Water
              Water: Thickness=[100, 200, 300, 300, 350]; InitialValues=[0.223, 0.388, 0.342, 0.293, 0.264]; InitialPAWmm=121; RelativeTo=LL15; FilledFromTop=true
              CERESSoilTemperature Temperature
              Nutrient
              Solute NO3: Thickness=[100, 200, 300, 300, 350]; InitialValues=[0, 1, 1, 1, 1]; InitialValuesUnits=ppm; WaterTableConcentration=0; D0=0; DepthConstant=0; MaxDepthSoluteAccessible=0; RunoffEffectivenessAtMovingSolute=0; MaxEffectiveRunoff=0
              Solute NH4: Thickness=[100, 200, 300, 300, 350]; InitialValues=[0, 0.2, 0.2, 0.2, 0.2]; InitialValuesUnits=ppm; WaterTableConcentration=0; D0=0; DepthConstant=0; MaxDepthSoluteAccessible=0; RunoffEffectivenessAtMovingSolute=0; MaxEffectiveRunoff=0
              Solute Urea: Thickness=[100, 200, 300, 300, 350]; InitialValues=[0, 0, 0, 0, 0]; InitialValuesUnits=kg/ha; WaterTableConcentration=0; D0=0; DepthConstant=0; MaxDepthSoluteAccessible=0; RunoffEffectivenessAtMovingSolute=0; MaxEffectiveRunoff=0
            Report HarvestReport
            Report SowingReport
            Manager SetCropParams
          Manager LocationInfo
            Country = Australia
            State = South Australia
            Region = SA Midnorth-Lower Yorke, Eyre
            script: same as in Validation.SE Queensland.APS26.APS26NRate160WaterWet.LocationInfo
      Experiment Tamworth1992
        Memo
          This dataset includes observed flowering date for five cultivars (Batavia, Hartog, Sunbri, Sunco, Suneca) for a range planting dates at Tamworth.
        Factors
          Permutation
            Factor Cv
              Specification=[Sowing].Script.CultivarName = Batavia, Hartog, Sunbri, Sunco, Suneca
            Factor TOS
              Specification=[Sowing].Script.SowDate = 19-Apr, 26-Apr, 3-May, 10-May, 17-May, 24-May, 31-May, 7-Jun, 14-Jun, 21-Jun, 28-Jun, 5-Jul, 12-Jul, 19-Jul, 26-Jul
        Simulation Tamworth1992Base
          Clock: Start=1992-04-01; End=1992-12-31
          Summary summaryfile
          Weather: FileName=Tamworth1992.met; Latitude=-31.16; Tav=16.28; Amp=14.85
          SoilArbitrator Soil Arbitrator
          Zone Field: same as Validation.SE Queensland.Gatton94.Gatton94Base.Field
          Manager LocationInfo: same as Validation.SE Queensland.AddingValueToNVT.Goondiwindi2011.Goondiwindi2011Base.LocationInfo
      PredictedObserved SAObsPred: PredictedTableName=HarvestReport; ObservedTableName=Observed; FieldNameUsedForMatch=SimulationName; FieldName2UsedForMatch=Wheat.Phenology.CurrentStageName; AllColumns=false
      Folder Griffith
        Memo
          This dataset from [Stapper1990] includes observed phenological data for range of cultivars, three of which have been used here (Yecora, Egret, Hartog).  Planting dates from 1983 and 1984 provide a range of climatic conditions.
        Experiment Griffith1983
          Factors
            Permutation
              Factor Cv: Specification=[Sowing].Script.CultivarName = Yecora, Egret
              Factor TOS
                Specification=[Sowing].Script.SowDate = 15-Apr, 12-May, 17-Jun, 11-Aug, 23-Sep
          Simulation Griffith1983Base
            Clock: Start=1983-04-01; End=1984-01-31
            Summary summaryfile
            Weather: FileName=Griffith1983.met; Latitude=-34.32; Tav=16.09; Amp=16.85
            SoilArbitrator Soil Arbitrator
            Zone Field: Area=1; Slope=0; AspectAngle=0; Altitude=50
              Irrigation
              Fertiliser
              Soil APS6Field: same as Validation.SE Queensland.Gatton94.Gatton94Base.Field.APS6Field
              SurfaceOrganicMatter: InitialResidueName=wheat_stubble; InitialResidueType=wheat; InitialResidueMass=500; InitialStandingFraction=0; InitialCPR=0; InitialCNR=100
              Plant Wheat
              MicroClimate: a_interception=0; b_interception=1; c_interception=0; d_interception=0; SoilHeatFluxFraction=0.4; MinimumHeightDiffForNewLayer=0; NightInterceptionFraction=0.5; ReferenceHeight=2
              Report DailyReport
              Report HarvestReport
              Manager Sowing
                CultivarName = Hartog
                SowDate = 25-May
                SowingDepth = 40
                RowSpacing = 250
                Population = 100
                script: same as in Validation.SE Queensland.Gatton94.Gatton94Base.Field.Sowing
              Manager Harvesting: same as Validation.SE Queensland.APS26.APS26NRate160WaterWet.paddock.Harvesting
              Manager AutoIrrigate: same as Validation.SE Queensland.Gatton94.Gatton94Base.Field.AutoIrrigate
              Operations ApplyFertiliser: same as Validation.SE Queensland.Gatton94.Gatton94Base.Field.ApplyFertiliser
              Report SowingReport
              Manager SetCropParams
            Manager LocationInfo
              Country = Australia
              State = New South Wales
              Region = NSW Central Zone
              script: same as in Validation.SE Queensland.APS26.APS26NRate160WaterWet.LocationInfo
        Experiment Griffith1984
          Factors
            Permutation
              Factor Cv: Specification=[Sowing].Script.CultivarName = Hartog, Yecora, Egret
              Factor TOS: Specification=[Sowing].Script.SowDate = 18-May, 3-Jul
          Simulation Griffith1984Base
            Clock: Start=1984-04-01; End=1984-12-31
            Summary summaryfile
            Weather: FileName=Griffith1983.met; Latitude=-34.32; Tav=16.09; Amp=16.85
            SoilArbitrator Soil Arbitrator
            Zone Field: same as Validation.Southern Australia.Griffith.Griffith1983.Griffith1983Base.Field
            Manager LocationInfo: same as Validation.Southern Australia.Griffith.Griffith1983.Griffith1983Base.LocationInfo
    Folder Europe
      Folder Belgium
        Memo
          This trial was conducted at Lonzee near Gembuloux in Belgium and is described in detail by [Dufranne_Belgium_2011] and [Moureaux_BelgumWheat_2008].  The trial  was run to measure carbon flux from wheat crops using eddy covariance but sufficient crop information was collected to make it suitable as a model validataion dataset also.  Crops of wheat (cultivars 'Dekan', 'Rosario', 'Ararat' for the three respective sowing dates) were sown on 14/10/2004, 13/10/2004 and 13/11/2004.  Standard management practices for winter wheat in this area were followed.  Dates for the timing of key phenological events were used to determine the developmental coefficients for each of the cultivars.
        Simulation Lonzee04
          Clock: Start=2004-10-14; End=2005-08-31
          Summary summaryfile
          Weather: FileName=BrusselsSouth.met; Latitude=50.55; Tav=10.3; Amp=26
          SoilArbitrator Soil Arbitrator
          Zone Field: Area=1; Slope=0; AspectAngle=0; Altitude=50
            Irrigation
            Fertiliser
            Operations CropManagement
              2004-10-14  [Wheat].Sow(population:100, cultivar:"Dekan", depth:30, rowSpacing:250);
              2005-03-22  [Fertiliser].Apply(Amount: 45, Type: Fertiliser.Types.NO3N);
              2005-04-12  [Fertiliser].Apply(Amount: 35, Type: Fertiliser.Types.NO3N);
              2005-05-12  [Fertiliser].Apply(Amount: 40.5, Type: Fertiliser.Types.NO3N);
              2005-05-30  [Fertiliser].Apply(Amount: 80, Type: Fertiliser.Types.NO3N);
              2005-08-04  [Wheat].Harvest();
              2005-08-04  [Wheat].EndCrop();
            SurfaceOrganicMatter: InitialResidueName=wheat_stubble; InitialResidueType=wheat; InitialResidueMass=3000; InitialStandingFraction=0; InitialCPR=0; InitialCNR=30
            Plant Wheat
            MicroClimate: a_interception=0; b_interception=0; c_interception=0; d_interception=0; SoilHeatFluxFraction=0.4; MinimumHeightDiffForNewLayer=0; NightInterceptionFraction=0.5; ReferenceHeight=2
            Soil: SoilType=APS26Soil; LocalName=APS26Site; Site=APS26Site; NearestTown=Unknown; Region=Lawes; NaturalVegetation=Unknown; Latitude=0; Longitude=0
              Physical
                Thickness  BD   AirDry  LL15  DUL   SAT
                100        1.4  0.04    0.15  0.38  0.45
                100        1.4  0.04    0.15  0.38  0.45
                100        1.4  0.06    0.15  0.38  0.45
                100        1.4  0.06    0.15  0.38  0.45
                100        1.4  0.06    0.15  0.38  0.45
                100        1.4  0.06    0.15  0.38  0.45
                100        1.4  0.06    0.15  0.38  0.45
                100        1.4  0.1     0.15  0.38  0.45
                100        1.4  0.1     0.15  0.38  0.45
                100        1.4  0.1     0.15  0.38  0.45
                100        1.4  0.1     0.15  0.38  0.45
                100        1.4  0.1     0.15  0.38  0.45
                100        1.4  0.1     0.15  0.38  0.45
                100        1.4  0.1     0.15  0.38  0.45
                100        1.4  0.1     0.15  0.38  0.45
                SoilCrop WheatSoil
                  LL=[0.15, 0.15, 0.15, 0.15, 0.15, 0.15, 0.15, 0.15, 0.15, 0.15, 0.15, 0.15, 0.15, 0.15, 0.15]
                  KL=[0.1, 0.08, 0.06, 0.06, 0.06, 0.06, 0.06, 0.06, 0.06, 0.06, 0.06, 0.06, 0.06, 0.06, 0.06]
                  XF=[1, 1, 1, 1, 1, 1, 1, 1, 1, 1, 1, 1, 1, 1, 1]
              WaterBalance SoilWater: SummerDate=1-Nov; SummerU=4; SummerCona=2; WinterDate=1-Apr; WinterU=2; WinterCona=2; DiffusConst=40; DiffusSlope=16; Salb=0.13; CN2Bare=72; CNRed=20; CNCov=0.8; DischargeWidth=0; CatchmentArea=0; PSIDul=-100
                Thickness  SWCON  KLAT
                150        0.4    0
                150        0.4    0
                150        0.4    0
                150        0.4    0
                300        0.4    0
                300        0.4    0
                300        0.4    0
                300        0.4    0
                300        0.4    0
                300        0.4    0
              Organic: FOMCNRatio=40; CarbonUnits=Total
                Thickness  Carbon  SoilCNRatio  FBiom  FInert  FOM
                100        2       14.5         0.06   0.16    381.534
                100        1.5     14.5         0.04   0.2     312.374
                100        1       14.5         0.03   0.3     255.75
                100        0.5     14.5         0.02   0.7     209.39
                100        0.3     14.5         0.02   0.9     171.434
                100        0.2     14.5         0.02   0.99    140.358
                100        0.2     14.5         0.02   0.99    114.916
                100        0.1     14.5         0.02   0.99    94.0851
                100        0.1     14.5         0.01   0.99    77.0304
                100        0.1     14.5         0.01   0.99    63.0671
                100        0.1     14.5         0.01   0.99    51.635
                100        0.1     14.5         0.01   0.99    42.2752
                100        0.1     14.5         0.01   0.99    34.612
                100        0.1     14.5         0.01   0.99    28.3379
                100        0.1     14.5         0.01   0.99    23.2011
              Chemical: PHUnits=Water
                Thickness=[100, 100, 100, 100, 100, 100, 100, 100, 100, 100, 100, 100, 100, 100, 100]
                PH=[5.8, 5.9, 6.6, 6.8, 7, 7.1, 7.2, 7.3, 7.4, 7.4, 7.6, 7.8, 8, 8.2, 8.3]
              Water: Thickness=[100, 1400]; InitialValues=[0.27, 0.38]; InitialPAWmm=334; RelativeTo=LL15; FilledFromTop=false
              CERESSoilTemperature Temperature
              Nutrient
              Solute NO3: InitialValues=[30, 20, 20, 20, 10, 10, 5, 5, 1, 1, 1, 1, 1, 1, 0]; InitialValuesUnits=ppm; WaterTableConcentration=0; D0=0; DepthConstant=0; MaxDepthSoluteAccessible=0; RunoffEffectivenessAtMovingSolute=0; MaxEffectiveRunoff=0
                Thickness=[100, 100, 100, 100, 100, 100, 100, 100, 100, 100, 100, 100, 100, 100, 100]
              Solute NH4: InitialValues=[1, 1, 1, 1, 1, 1, 1, 1, 1, 1, 1, 1, 1, 1, 0]; InitialValuesUnits=ppm; WaterTableConcentration=0; D0=0; DepthConstant=0; MaxDepthSoluteAccessible=0; RunoffEffectivenessAtMovingSolute=0; MaxEffectiveRunoff=0
                Thickness=[100, 100, 100, 100, 100, 100, 100, 100, 100, 100, 100, 100, 100, 100, 100]
              Solute Urea: InitialValues=[0, 0, 0, 0, 0, 0, 0, 0, 0, 0, 0, 0, 0, 0, 0]; InitialValuesUnits=kg/ha; WaterTableConcentration=0; D0=0; DepthConstant=0; MaxDepthSoluteAccessible=0; RunoffEffectivenessAtMovingSolute=0; MaxEffectiveRunoff=0
                Thickness=[100, 100, 100, 100, 100, 100, 100, 100, 100, 100, 100, 100, 100, 100, 100]
            Report HarvestReport
            Report DailyReport
            Report SowingReport
            Manager SetCropParams
          Manager LocationInfo: same as Validation.Turkey.Konya09.Konya09.LocationInfo
        Simulation Lonzee06
          Clock: Start=2006-10-13; End=2007-08-31
          Summary summaryfile
          Weather: FileName=BrusselsSouth.met; Latitude=50.55; Tav=10.3; Amp=26
          SoilArbitrator Soil Arbitrator
          Zone Field: Area=1; Slope=0; AspectAngle=0; Altitude=50
            Irrigation
            Fertiliser
            Operations CropManagement
              2006-10-13  [Wheat].Sow(population:100, cultivar:"Rosario", depth:30, rowSpacing:250);
              2007-03-17  [Fertiliser].Apply(Amount: 40, Type: Fertiliser.Types.NO3N);
              2007-04-12  [Fertiliser].Apply(Amount: 60, Type: Fertiliser.Types.NO3N);
              2007-05-08  [Fertiliser].Apply(Amount: 94.5, Type: Fertiliser.Types.NO3N);
              2007-08-06  [Wheat].Harvest();
              2007-08-06  [Wheat].EndCrop();
            SurfaceOrganicMatter: InitialResidueName=wheat_stubble; InitialResidueType=wheat; InitialResidueMass=3000; InitialStandingFraction=0; InitialCPR=0; InitialCNR=30
            Plant Wheat
            MicroClimate: a_interception=0; b_interception=0; c_interception=0; d_interception=0; SoilHeatFluxFraction=0.4; MinimumHeightDiffForNewLayer=0; NightInterceptionFraction=0.5; ReferenceHeight=2
            Soil: same as Validation.Europe.Belgium.Lonzee04.Field.Soil
            Report HarvestReport
            Report DailyReport
            Report SowingReport
            Manager SetCropParams
          Manager LocationInfo: same as Validation.Turkey.Konya09.Konya09.LocationInfo
        Simulation Lonzee08
          Clock: Start=2008-11-13; End=2009-08-31
          Summary summaryfile
          Weather: FileName=BrusselsSouth.met; Latitude=50.55; Tav=10.3; Amp=26
          SoilArbitrator Soil Arbitrator
          Zone Field: Area=1; Slope=0; AspectAngle=0; Altitude=50
            Irrigation
            Fertiliser
            Operations CropManagement
              2008-11-13  [Wheat].Sow(population:100, cultivar:"Ararat", depth:30, rowSpacing:250);
              2009-03-18  [Fertiliser].Apply(Amount: 80, Type: Fertiliser.Types.NO3N);
              2009-04-24  [Fertiliser].Apply(Amount: 40, Type: Fertiliser.Types.NO3N);
              2009-05-28  [Fertiliser].Apply(Amount: 90, Type: Fertiliser.Types.NO3N);
              2009-08-08  [Wheat].Harvest();
              2009-08-08  [Wheat].EndCrop();
            SurfaceOrganicMatter: InitialResidueName=wheat_stubble; InitialResidueType=wheat; InitialResidueMass=3000; InitialStandingFraction=0; InitialCPR=0; InitialCNR=30
            Plant Wheat
            MicroClimate: a_interception=0; b_interception=0; c_interception=0; d_interception=0; SoilHeatFluxFraction=0.4; MinimumHeightDiffForNewLayer=0; NightInterceptionFraction=0.5; ReferenceHeight=2
            Soil: same as Validation.Europe.Belgium.Lonzee04.Field.Soil
            Report DailyReport
            Report HarvestReport
            Report SowingReport
            Manager SetCropParams
          Manager LocationInfo: same as Validation.Turkey.Konya09.Konya09.LocationInfo
    Folder NorthAmerica
      Folder Arizona
        Memo
          These FACE trials were conducted to investigate the effects of atmospheric CO2 concentrations and water stress on wheat growth and development [Hanksar_1996_FACE].  It was conducted at Maricopa, Arazona using Free Air Carbon Enrichment to create elevated CO2 treatments:

          1. Normal CO2  (370 ppm) (that is no longer normal)
          2. High CO2 (550 ppm)

          Irrigation treatmetnts were also applied with:

          1. High Irrigation (~600 mm)
          2. Low irrigation (~265 mm)

          Crop development, Biomass production and soil moisture were monitored throughout the crops duration.
        Experiment ArizonaFACE92
          Memo
            This trial was conducted to investigate the effects of atmospheric CO2 concentrations and water stress on wheat growth and development [Hanksar_1996_FACE].  It was conducted at Maricopa, Arazona using Free Air Carbon Enrichment to create elevated CO2 treatments:

            1. Normal CO2  (370 ppm) (that is no longer normal)
            2. High CO2 (550 ppm)

            Irrigation treatmetnts were also applied with:

            1. High Irrigation (~600 mm)
            2. Low irrigation (~265 mm)

            Crop development, Biomass production and soil moisture were monitored throughout the crops duration.
          Factors
            Permutation
              Factor CO2: Specification=[SetCO2]
                Manager Normal
                  CO2 = 350
```csharp
using Models.Soils;
using System.Xml.Serialization;
using Models;
using Models.PMF;
using System.Text;
using System.Collections.Generic;
using APSIM.Shared.Utilities;
using Models.Core;
using System;
using Models.Climate;

namespace Models
{
    [Serializable] 
    [System.Xml.Serialization.XmlInclude(typeof(Model))]
    public class Script : Model
    {
        [Link] Weather Met;
        [Link] Clock Clock;
    
        [Description("CO2 conc")]
        public double CO2 { get; set; }
    
        
        [EventSubscribe("PreparingNewWeatherData")]
        private void OnPreparingNewWeatherData(object sender, EventArgs e)
        {
            Met.CO2 = CO2;        
        }
    }
}
```
                Manager High
                  CO2 = 550
                  script: same as in Validation.NorthAmerica.Arizona.ArizonaFACE92.Factors.Permutation.CO2.Normal
              Factor Irr: Specification=[IrrigationSchedule]
                Operations Wet
                  1992-12-18  [Irrigation].Apply(amount:300);
                  1993-01-30  [Irrigation].Apply(amount:30);
                  1993-01-31  [Irrigation].Apply(amount:7);
                  1993-03-01  [Irrigation].Apply(amount:12);
                  1993-03-09  [Irrigation].Apply(amount:60);
                  1993-03-18  [Irrigation].Apply(amount:34);
                  1993-03-25  [Irrigation].Apply(amount:50);
                  1993-04-05  [Irrigation].Apply(amount:54);
                  1993-04-06  [Irrigation].Apply(amount:4);
                  1993-04-12  [Irrigation].Apply(amount:47);
                  1993-04-17  [Irrigation].Apply(amount:38);
                  1993-04-18  [Irrigation].Apply(amount:6);
                  1993-04-21  [Irrigation].Apply(amount:36);
                  1993-04-26  [Irrigation].Apply(amount:48);
                  1993-04-27  [Irrigation].Apply(amount:6);
                  1993-04-30  [Irrigation].Apply(amount:42);
                  1993-05-05  [Irrigation].Apply(amount:41);
                  1993-05-10  [Irrigation].Apply(amount:41);
                  1993-05-11  [Irrigation].Apply(amount:4);
                  1993-05-14  [Irrigation].Apply(amount:41);
                Operations Dry
                  1992-12-18  [Irrigation].Apply(amount:300);
                  1993-01-30  [Irrigation].Apply(amount:30);
                  1993-01-31  [Irrigation].Apply(amount:7);
                  1993-03-18  [Irrigation].Apply(amount:17);
                  1993-03-25  [Irrigation].Apply(amount:15);
                  1993-04-05  [Irrigation].Apply(amount:27);
                  1993-04-06  [Irrigation].Apply(amount:4);
                  1993-04-12  [Irrigation].Apply(amount:18);
                  1993-04-17  [Irrigation].Apply(amount:16);
                  1993-04-18  [Irrigation].Apply(amount:6);
                  1993-04-21  [Irrigation].Apply(amount:18);
                  1993-04-26  [Irrigation].Apply(amount:24);
                  1993-04-27  [Irrigation].Apply(amount:6);
                  1993-04-30  [Irrigation].Apply(amount:21);
                  1993-05-05  [Irrigation].Apply(amount:20);
                  1993-05-10  [Irrigation].Apply(amount:20);
                  1993-05-11  [Irrigation].Apply(amount:4);
                  1993-05-14  [Irrigation].Apply(amount:20);
          Simulation FACE92
            Clock: Start=1992-12-14; End=1993-05-30
            Summary summaryfile
            Weather: FileName=Maricopa9293.met; Latitude=33.05; Tav=21.8; Amp=22.2
            SoilArbitrator Soil Arbitrator
            Zone Field: Area=1; Slope=0; AspectAngle=0; Altitude=50
              Irrigation
              Fertiliser
              Soil: Latitude=0; Longitude=0
                Physical
                  Thickness  BD    AirDry  LL15  DUL   SAT
                  50         1.31  0.03    0.15  0.3   0.42
                  100        1.27  0.03    0.15  0.3   0.42
                  150        1.27  0.15    0.15  0.3   0.42
                  200        1.3   0.15    0.15  0.3   0.42
                  100        1.47  0.15    0.15  0.3   0.39
                  100        1.47  0.15    0.15  0.3   0.39
                  200        1.57  0.15    0.15  0.3   0.36
                  200        1.57  0.16    0.16  0.28  0.35
                  100        1.57  0.16    0.16  0.28  0.35
                  100        1.57  0.16    0.16  0.28  0.35
                  200        1.57  0.14    0.14  0.25  0.34
                  200        1.57  0.14    0.14  0.25  0.34
                  200        1.57  0.13    0.13  0.24  0.33
                  200        1.57  0.13    0.13  0.24  0.33
                  SoilCrop WheatSoil
                    LL=[0.15, 0.15, 0.15, 0.15, 0.15, 0.15, 0.15, 0.16, 0.16, 0.16, 0.14, 0.14, 0.13, 0.13]
                    KL=[0.06, 0.06, 0.06, 0.06, 0.06, 0.06, 0.06, 0.06, 0.06, 0.06, 0.06, 0.06, 0.06, 0.06]
                    XF=[1, 1, 1, 1, 1, 1, 1, 1, 1, 1, 1, 1, 1, 1]
                WaterBalance SoilWater: SummerDate=1-Nov; SummerU=6; SummerCona=2; WinterDate=1-Apr; WinterU=6; WinterCona=2; DiffusConst=88; DiffusSlope=35.4; Salb=0.13; CN2Bare=60; CNRed=20; CNCov=0.8; DischargeWidth=0; CatchmentArea=0; PSIDul=-100
                  Thickness  SWCON  KLAT
                  50         0.34   0
                  100        0.34   0
                  150        0.34   0
                  200        0.34   0
                  100        0.34   0
                  100        0.34   0
                  200        0.3    0
                  200        0.25   0
                  100        0.25   0
                  100        0.25   0
                  200        0.2    0
                  200        0.2    0
                  200        0.18   0
                  200        0.18   0
                Organic: FOMCNRatio=20; CarbonUnits=Total
                  Thickness  Carbon  SoilCNRatio  FBiom  FInert  FOM
                  50         0.41    15           0.04   0.31    290.15
                  100        0.35    15           0.04   0.31    251.525
                  150        0.27    15           0.03   0.31    203.01
                  200        0.24    15           0.02   0.31    152.558
                  100        0.16    15           0.01   0.31    132.249
                  100        0.16    15           0.01   0.31    114.644
                  200        0.3     15           0.01   0.25    86.152
                  200        0.1     15           0.01   0.2     64.7413
                  100        0.1     15           0.01   0.2     56.1228
                  100        0.1     15           0.01   0.2     48.6516
                  200        0.1     15           0.01   0.2     36.5606
                  200        0.1     15           0.01   0.2     27.4744
                  200        0.1     15           0.01   0.17    20.6464
                  200        0.1     15           0.01   0.17    15.5153
                Chemical: PHUnits=Water
                  Thickness=[50, 100, 150, 200, 100, 100, 200, 200, 100, 100, 200, 200, 200, 200]
                  PH=[8.5, 8.5, 8.5, 8.6, 8.6, 8.6, 8.6, 8.6, 8.6, 8.6, 8.6, 8.6, 8.6, 8.6]
                Water: InitialPAWmm=115.5; RelativeTo=LL15; FilledFromTop=false
                  Thickness=[50, 100, 150, 200, 100, 100, 200, 200, 100, 100, 200, 200, 200, 200]
                  InitialValues=[0.223, 0.223, 0.223, 0.228, 0.202, 0.202, 0.198, 0.192, 0.185, 0.185, 0.189, 0.19, 0.198, 0.196]
                CERESSoilTemperature Temperature
                Nutrient
                Solute NO3: InitialValuesUnits=ppm; WaterTableConcentration=0; D0=0; DepthConstant=0; MaxDepthSoluteAccessible=0; RunoffEffectivenessAtMovingSolute=0; MaxEffectiveRunoff=0
                  Thickness=[50, 100, 150, 200, 100, 100, 200, 200, 100, 100, 200, 200, 200, 200]
                  InitialValues=[24.9, 24.9, 16, 9.8, 9.8, 2.1, 2.1, 2.1, 2.1, 0.2, 0.2, 0.2, 0.2, 0.2]
                Solute NH4: InitialValuesUnits=ppm; WaterTableConcentration=0; D0=0; DepthConstant=0; MaxDepthSoluteAccessible=0; RunoffEffectivenessAtMovingSolute=0; MaxEffectiveRunoff=0
                  Thickness=[50, 100, 150, 200, 100, 100, 200, 200, 100, 100, 200, 200, 200, 200]
                  InitialValues=[0.8, 0.8, 0.6, 0.4, 0.4, 0.2, 0.2, 0.2, 0.2, 0.2, 0.2, 0.2, 0.2, 0.2]
                Solute Urea: InitialValues=[0, 0, 0, 0, 0, 0, 0, 0, 0, 0, 0, 0, 0, 0]; InitialValuesUnits=kg/ha; WaterTableConcentration=0; D0=0; DepthConstant=0; MaxDepthSoluteAccessible=0; RunoffEffectivenessAtMovingSolute=0; MaxEffectiveRunoff=0
                  Thickness=[50, 100, 150, 200, 100, 100, 200, 200, 100, 100, 200, 200, 200, 200]
              Operations Sowing
                1992-12-15  [Wheat].Sow(population: 140, cultivar: "YacoraFACE", depth: 30, rowSpacing: 250);
                1992-12-16  [Fertiliser].Apply(Amount: 40, Type: Fertiliser.Types.NO3N);
                1992-12-17  [Fertiliser].Apply(Amount: 20, Type: Fertiliser.Types.NO3N);
                1993-01-30  [Fertiliser].Apply(Amount: 13, Type: Fertiliser.Types.NO3N);
                1993-01-31  [Fertiliser].Apply(Amount: 10, Type: Fertiliser.Types.NO3N);
                1993-02-01  [Fertiliser].Apply(Amount: 92, Type: Fertiliser.Types.NO3N);
                1993-03-18  [Fertiliser].Apply(Amount: 66, Type: Fertiliser.Types.NO3N);
                1993-03-19  [Fertiliser].Apply(Amount: 10, Type: Fertiliser.Types.NO3N);
                1993-04-05  [Fertiliser].Apply(Amount: 81, Type: Fertiliser.Types.NO3N);
                1993-05-20  [Wheat].Harvest();
                1993-05-20  [Wheat].EndCrop();
              SurfaceOrganicMatter: InitialResidueName=wheat_stubble; InitialResidueType=wheat; InitialResidueMass=500; InitialStandingFraction=0; InitialCPR=0; InitialCNR=100
              Plant Wheat
              MicroClimate: a_interception=0; b_interception=1; c_interception=0; d_interception=0; SoilHeatFluxFraction=0.4; MinimumHeightDiffForNewLayer=0; NightInterceptionFraction=0.5; ReferenceHeight=2
              Operations IrrigationSchedule
              Report HarvestReport
              Report DailyReport
              Manager SetCO2
                CO2 = 0
```csharp
using Models.Soils;
using System.Xml.Serialization;
using Models;
using Models.PMF;
using System.Text;
using System.Collections.Generic;
using APSIM.Shared.Utilities;
using Models.Core;
using System;
using Models.Climate;

namespace Models
{
    [Serializable] 
    [System.Xml.Serialization.XmlInclude(typeof(Model))]
    public class Script : Model
    {
        [Link] Weather Met;
        [Link] Clock Clock;
        [Link] Zone zone;
    
        [Description("CO2 conc")]
        public double CO2 { get; set; }
    
        
        [EventSubscribe("PreparingNewWeatherData")]
        private void OnPreparingNewWeatherData(object sender, EventArgs e)
        {
            zone.Set("Weather.CO2", CO2);
        }
    }
}
```
              Report SowingReport
              Manager SetCropParams
            Manager LocationInfo: same as Validation.Turkey.Konya09.Konya09.LocationInfo
        Experiment ArizonaFACE93
          Factors
            Permutation
              Factor CO2: same as Validation.NorthAmerica.Arizona.ArizonaFACE92.Factors.Permutation.CO2
              Factor Irr: Specification=[IrrigationSchedule]
                Operations Wet
                  1993-12-13  [Irrigation].Apply(amount:13);
                  1993-12-17  [Irrigation].Apply(amount:17);
                  1994-01-21  [Irrigation].Apply(amount:30);
                  1994-02-03  [Irrigation].Apply(amount:30);
                  1994-02-23  [Irrigation].Apply(amount:35);
                  1994-03-04  [Irrigation].Apply(amount:30);
                  1994-03-16  [Irrigation].Apply(amount:36);
                  1994-03-21  [Irrigation].Apply(amount:25);
                  1994-03-28  [Irrigation].Apply(amount:30);
                  1994-04-04  [Irrigation].Apply(amount:30);
                  1994-04-08  [Irrigation].Apply(amount:50);
                  1994-04-14  [Irrigation].Apply(amount:50);
                  1994-04-19  [Irrigation].Apply(amount:50);
                  1994-04-25  [Irrigation].Apply(amount:50);
                  1994-04-30  [Irrigation].Apply(amount:7);
                  1994-05-04  [Irrigation].Apply(amount:60);
                  1994-05-10  [Irrigation].Apply(amount:48);
                  1994-05-16  [Irrigation].Apply(amount:38);
                Operations Dry
                  1993-12-13  [Irrigation].Apply(amount:13);
                  1993-12-17  [Irrigation].Apply(amount:17);
                  1994-02-03  [Irrigation].Apply(amount:30);
                  1994-03-16  [Irrigation].Apply(amount:30);
                  1994-03-28  [Irrigation].Apply(amount:30);
                  1994-04-08  [Irrigation].Apply(amount:50);
                  1994-04-19  [Irrigation].Apply(amount:50);
                  1994-04-30  [Irrigation].Apply(amount:7);
                  1994-05-04  [Irrigation].Apply(amount:60);
          Simulation FACE93
            Clock: Start=1993-12-20; End=1994-05-31
            Summary summaryfile
            Weather: FileName=Maricopa9394.met; Latitude=33.05; Tav=21.8; Amp=22.2
            SoilArbitrator Soil Arbitrator
            Zone Field: Area=1; Slope=0; AspectAngle=0; Altitude=50
              Irrigation
              Fertiliser
              Soil: Latitude=0; Longitude=0
                Physical: same as Validation.NorthAmerica.Arizona.ArizonaFACE92.FACE92.Field.Soil.Physical
                WaterBalance SoilWater: SummerDate=1-Nov; SummerU=12; SummerCona=4; WinterDate=1-Apr; WinterU=6; WinterCona=2; DiffusConst=88; DiffusSlope=35.4; Salb=0.13; CN2Bare=60; CNRed=20; CNCov=0.8; DischargeWidth=0; CatchmentArea=0; PSIDul=-100
                  Thickness  SWCON  KLAT
                  50         0.34   0
                  100        0.34   0
                  150        0.34   0
                  200        0.34   0
                  100        0.34   0
                  100        0.34   0
                  200        0.3    0
                  200        0.25   0
                  100        0.25   0
                  100        0.25   0
                  200        0.2    0
                  200        0.2    0
                  200        0.18   0
                  200        0.18   0
                Organic: same as Validation.NorthAmerica.Arizona.ArizonaFACE92.FACE92.Field.Soil.Organic
                Chemical: same as Validation.NorthAmerica.Arizona.ArizonaFACE92.FACE92.Field.Soil.Chemical
                Water: InitialPAWmm=164.8; RelativeTo=LL15; FilledFromTop=false
                  Thickness=[50, 100, 150, 200, 100, 100, 200, 200, 100, 100, 200, 200, 200, 200]
                  InitialValues=[0.302, 0.302, 0.302, 0.286, 0.217, 0.217, 0.186, 0.2, 0.199, 0.199, 0.197, 0.204, 0.208, 0.209]
                CERESSoilTemperature Temperature
                Nutrient
                Solute NO3: InitialValuesUnits=ppm; WaterTableConcentration=0; D0=0; DepthConstant=0; MaxDepthSoluteAccessible=0; RunoffEffectivenessAtMovingSolute=0; MaxEffectiveRunoff=0
                  Thickness=[50, 100, 150, 200, 100, 100, 200, 200, 100, 100, 200, 200, 200, 200]
                  InitialValues=[4.2, 4.2, 12, 10.6, 10.6, 3.4, 3.4, 3.4, 3.4, 3.4, 3.4, 3.4, 3.4, 3.4]
                Solute NH4: InitialValuesUnits=ppm; WaterTableConcentration=0; D0=0; DepthConstant=0; MaxDepthSoluteAccessible=0; RunoffEffectivenessAtMovingSolute=0; MaxEffectiveRunoff=0
                  Thickness=[50, 100, 150, 200, 100, 100, 200, 200, 100, 100, 200, 200, 200, 200]
                  InitialValues=[0.7, 0.7, 0.6, 0.3, 0.3, 0.2, 0.2, 0.2, 0.2, 0.2, 0.2, 0.2, 0.2, 0.2]
                Solute Urea: same as Validation.NorthAmerica.Arizona.ArizonaFACE92.FACE92.Field.Soil.Urea
              Operations Sowing
                1993-12-21  [Wheat].Sow(population: 186, cultivar: "YacoraFACE", depth: 30, rowSpacing: 250);
                1993-12-07  [Fertiliser].Apply(Amount: 54, Type: Fertiliser.Types.NO3N);
                1993-12-08  [Fertiliser].Apply(Amount: 10, Type: Fertiliser.Types.NO3N);
                1994-02-04  [Fertiliser].Apply(Amount: 92, Type: Fertiliser.Types.NO3N);
                1994-02-05  [Fertiliser].Apply(Amount: 10, Type: Fertiliser.Types.NO3N);
                1994-03-16  [Fertiliser].Apply(Amount: 69, Type: Fertiliser.Types.NO3N);
                1994-03-17  [Fertiliser].Apply(Amount: 10, Type: Fertiliser.Types.NO3N);
                1994-04-08  [Fertiliser].Apply(Amount: 46, Type: Fertiliser.Types.NO3N);
                1994-05-31  [Wheat].Harvest();
                1994-05-31  [Wheat].EndCrop();
              SurfaceOrganicMatter: InitialResidueName=wheat_stubble; InitialResidueType=wheat; InitialResidueMass=500; InitialStandingFraction=0; InitialCPR=0; InitialCNR=100
              Plant Wheat
              MicroClimate: a_interception=0; b_interception=1; c_interception=0; d_interception=0; SoilHeatFluxFraction=0.4; MinimumHeightDiffForNewLayer=0; NightInterceptionFraction=0.5; ReferenceHeight=2
              Operations IrrigationSchedule
              Operations Dummy
              Report DailyReport
              Report HarvestReport
              Manager ClimateControl
                StartDate = 2013-04-01
                EndDate = 2014-05-01
                script: same as in Validation.New Zealand.Lincoln9192.LincolnBase.paddock.ClimateControl
              Manager SetCO2: same as Validation.NorthAmerica.Arizona.ArizonaFACE92.FACE92.Field.SetCO2
              Report SowingReport
              Manager SetCropParams
            Manager LocationInfo: same as Validation.Turkey.Konya09.Konya09.LocationInfo
    Folder China
      Folder ChinaFlux
        Simulation Yucheng02
          Clock: Start=2002-10-01; End=2003-06-15
          Summary summaryfile
          Weather: FileName=Yucheng.met; Latitude=36.68; Tav=14.6; Amp=28.2
          SoilArbitrator Soil Arbitrator
          Zone Field: Area=1; Slope=0; AspectAngle=0; Altitude=50
            Irrigation
            Fertiliser
            Operations CropManagement
              2002-10-15  [Wheat].Sow(population:100, cultivar:"Keyu13", depth:30, rowSpacing:250);
              2002-10-15  [Fertiliser].Apply(Amount: 182.5, Type: Fertiliser.Types.NO3N);
            SurfaceOrganicMatter: InitialResidueName=wheat_stubble; InitialResidueType=wheat; InitialResidueMass=2000; InitialStandingFraction=0; InitialCPR=0; InitialCNR=100
            Plant Wheat
            MicroClimate: a_interception=0; b_interception=0; c_interception=0; d_interception=0; SoilHeatFluxFraction=0.4; MinimumHeightDiffForNewLayer=0; NightInterceptionFraction=0.5; ReferenceHeight=2
            Soil: SoilType=APS26Soil; LocalName=APS26Site; Site=APS26Site; NearestTown=Unknown; Region=Lawes; NaturalVegetation=Unknown; Latitude=0; Longitude=0
              Physical
                Thickness  BD    AirDry  LL15  DUL   SAT
                100        1.37  0.04    0.06  0.28  0.4
                100        1.5   0.04    0.08  0.32  0.4
                100        1.46  0.06    0.1   0.32  0.448
                100        1.42  0.06    0.15  0.3   0.45
                100        1.42  0.06    0.2   0.3   0.45
                100        1.41  0.06    0.25  0.32  0.46
                100        1.4   0.06    0.28  0.35  0.45
                100        1.41  0.1     0.28  0.35  0.45
                100        1.4   0.1     0.3   0.37  0.45
                100        1.46  0.1     0.28  0.41  0.449
                100        1.4   0.1     0.26  0.41  0.47
                100        1.49  0.1     0.32  0.4   0.43
                100        1.5   0.1     0.35  0.4   0.43
                100        1.46  0.1     0.37  0.4   0.44
                100        1.45  0.1     0.37  0.4   0.45
                SoilCrop WheatSoil
                  LL=[0.06, 0.08, 0.1, 0.15, 0.2, 0.25, 0.28, 0.28, 0.3, 0.28, 0.26, 0.32, 0.35, 0.37, 0.37]
                  KL=[0.06, 0.06, 0.06, 0.06, 0.06, 0.06, 0.06, 0.06, 0.06, 0.06, 0.06, 0.06, 0.06, 0.06, 0.06]
                  XF=[1, 1, 1, 1, 1, 0.8, 0.6, 0.4, 0.4, 0.4, 0.4, 0.4, 0.4, 0.4, 0.4]
              WaterBalance SoilWater: SummerDate=1-Nov; SummerU=4; SummerCona=2; WinterDate=1-Apr; WinterU=1; WinterCona=1; DiffusConst=40; DiffusSlope=16; Salb=0.13; CN2Bare=72; CNRed=20; CNCov=0.8; DischargeWidth=0; CatchmentArea=0; PSIDul=-100
                Thickness  SWCON  KLAT
                150        0.4    0
                150        0.4    0
                150        0.4    0
                150        0.4    0
                300        0.4    0
                300        0.4    0
                300        0.4    0
                300        0.4    0
                300        0.4    0
                300        0.4    0
              Organic: FOMCNRatio=40; CarbonUnits=Total
                Thickness  Carbon  SoilCNRatio  FBiom  FInert  FOM
                100        0.83    14.5         0.04   0.36    381.534
                100        0.35    14.5         0.03   0.35    312.374
                100        0.33    14.5         0.03   0.45    255.75
                100        0.22    14.5         0.02   0.45    209.39
                100        0.22    14.5         0.02   0.59    171.434
                100        0.22    14.5         0.02   0.6     140.358
                100        0.19    14.5         0.02   0.84    114.916
                100        0.17    14.5         0.02   0.8     94.0851
                100        0.15    14.5         0.01   0.8     77.0304
                100        0.12    14.5         0.01   0.99    63.0671
                100        0.11    14.5         0.01   0.99    51.635
                100        0.1     14.5         0.01   0.99    42.2752
                100        0.1     14.5         0.01   0.99    34.612
                100        0.1     14.5         0.01   0.99    28.3379
                100        0.1     14.5         0.01   0.99    23.2011
              Chemical: same as Validation.Europe.Belgium.Lonzee04.Field.Soil.Chemical
              Water: InitialPAWmm=108; RelativeTo=LL15; FilledFromTop=false
                Thickness=[100, 100, 100, 100, 100, 100, 100, 100, 100, 100, 100, 100, 100, 100, 100]
                InitialValues=[0.27, 0.28, 0.23, 0.24, 0.26, 0.3, 0.3, 0.32, 0.35, 0.32, 0.32, 0.37, 0.39, 0.39, 0.39]
              CERESSoilTemperature Temperature
              Nutrient
              Solute NO3: InitialValues=[10, 15, 10, 8, 5, 2, 1, 1, 1, 1, 1, 1, 1, 1, 0]; InitialValuesUnits=ppm; WaterTableConcentration=0; D0=0; DepthConstant=0; MaxDepthSoluteAccessible=0; RunoffEffectivenessAtMovingSolute=0; MaxEffectiveRunoff=0
                Thickness=[100, 100, 100, 100, 100, 100, 100, 100, 100, 100, 100, 100, 100, 100, 100]
              Solute NH4: same as Validation.Europe.Belgium.Lonzee04.Field.Soil.NH4
              Solute Urea: same as Validation.Europe.Belgium.Lonzee04.Field.Soil.Urea
            Report DailyReport
            Report HarvestReport
            Manager Harvesting: same as Validation.SE Queensland.APS26.APS26NRate160WaterWet.paddock.Harvesting
            Report SowingReport
            Manager SetCropParams
          Manager LocationInfo: same as Validation.Turkey.Konya09.Konya09.LocationInfo
        Simulation Yucheng03
          Clock: Start=2003-10-20; End=2004-06-15
          Summary summaryfile
          Weather: FileName=Yucheng.met; Latitude=36.68; Tav=14.6; Amp=28.2
          SoilArbitrator Soil Arbitrator
          Zone Field: Area=1; Slope=0; AspectAngle=0; Altitude=50
            Irrigation
            Fertiliser
            Operations CropManagement
              2003-10-23  [Wheat].Sow(population:100, cultivar:"Keyu13", depth:30, rowSpacing:250);
              2003-10-23  [Fertiliser].Apply(Amount: 215.3, Type: Fertiliser.Types.NO3N);
            SurfaceOrganicMatter: InitialResidueName=wheat_stubble; InitialResidueType=wheat; InitialResidueMass=2000; InitialStandingFraction=0; InitialCPR=0; InitialCNR=100
            Plant Wheat
            MicroClimate: a_interception=0; b_interception=0; c_interception=0; d_interception=0; SoilHeatFluxFraction=0.4; MinimumHeightDiffForNewLayer=0; NightInterceptionFraction=0.5; ReferenceHeight=2
            Soil: SoilType=APS26Soil; LocalName=APS26Site; Site=APS26Site; NearestTown=Unknown; Region=Lawes; NaturalVegetation=Unknown; Latitude=0; Longitude=0
              Physical: same as Validation.China.ChinaFlux.Yucheng02.Field.Soil.Physical
              WaterBalance SoilWater: same as Validation.China.ChinaFlux.Yucheng02.Field.Soil.SoilWater
              Organic: same as Validation.China.ChinaFlux.Yucheng02.Field.Soil.Organic
              Chemical: same as Validation.Europe.Belgium.Lonzee04.Field.Soil.Chemical
              Water: InitialPAWmm=168; RelativeTo=LL15; FilledFromTop=false
                Thickness=[100, 100, 100, 100, 100, 100, 100, 100, 100, 100, 100, 100, 100, 100, 100]
                InitialValues=[0.2, 0.28, 0.3, 0.3, 0.31, 0.33, 0.35, 0.37, 0.4, 0.42, 0.42, 0.42, 0.41, 0.41, 0.41]
              CERESSoilTemperature Temperature
              Nutrient
              Solute NO3: same as Validation.China.ChinaFlux.Yucheng02.Field.Soil.NO3
              Solute NH4: same as Validation.Europe.Belgium.Lonzee04.Field.Soil.NH4
              Solute Urea: same as Validation.Europe.Belgium.Lonzee04.Field.Soil.Urea
            Report DailyReport
            Report HarvestReport
            Manager Harvesting: same as Validation.SE Queensland.APS26.APS26NRate160WaterWet.paddock.Harvesting
            Report SowingReport
            Manager SetCropParams
          Manager LocationInfo: same as Validation.Turkey.Konya09.Konya09.LocationInfo
        Simulation Yucheng04
          Clock: Start=2004-10-13; End=2005-07-15
          Summary summaryfile
          Weather: FileName=Yucheng.met; Latitude=36.68; Tav=14.6; Amp=28.2
          SoilArbitrator Soil Arbitrator
          Zone Field: Area=1; Slope=0; AspectAngle=0; Altitude=50
            Irrigation
            Fertiliser
            Operations CropManagement
              2004-10-14  [Wheat].Sow(population:100, cultivar:"Keyu13", depth:30, rowSpacing:250);
              2004-10-14  [Fertiliser].Apply(Amount: 195.5, Type: Fertiliser.Types.NO3N);
            SurfaceOrganicMatter: InitialResidueName=wheat_stubble; InitialResidueType=wheat; InitialResidueMass=2000; InitialStandingFraction=0; InitialCPR=0; InitialCNR=100
            Plant Wheat
            MicroClimate: a_interception=0; b_interception=0; c_interception=0; d_interception=0; SoilHeatFluxFraction=0.4; MinimumHeightDiffForNewLayer=0; NightInterceptionFraction=0.5; ReferenceHeight=2
            Soil: SoilType=APS26Soil; LocalName=APS26Site; Site=APS26Site; NearestTown=Unknown; Region=Lawes; NaturalVegetation=Unknown; Latitude=0; Longitude=0
              Physical: same as Validation.China.ChinaFlux.Yucheng02.Field.Soil.Physical
              WaterBalance SoilWater: same as Validation.China.ChinaFlux.Yucheng02.Field.Soil.SoilWater
              Organic: same as Validation.China.ChinaFlux.Yucheng02.Field.Soil.Organic
              Chemical: same as Validation.Europe.Belgium.Lonzee04.Field.Soil.Chemical
              Water: InitialPAWmm=133; RelativeTo=LL15; FilledFromTop=false
                Thickness=[100, 100, 100, 100, 100, 100, 100, 100, 100, 100, 100, 100, 100, 100, 100]
                InitialValues=[0.17, 0.26, 0.27, 0.27, 0.28, 0.31, 0.34, 0.35, 0.37, 0.4, 0.4, 0.39, 0.39, 0.39, 0.39]
              CERESSoilTemperature Temperature
              Nutrient
              Solute NO3: same as Validation.China.ChinaFlux.Yucheng02.Field.Soil.NO3
              Solute NH4: same as Validation.Europe.Belgium.Lonzee04.Field.Soil.NH4
              Solute Urea: same as Validation.Europe.Belgium.Lonzee04.Field.Soil.Urea
            Report DailyReport
            Report HarvestReport
            Manager Harvesting: same as Validation.SE Queensland.APS26.APS26NRate160WaterWet.paddock.Harvesting
            Report SowingReport
            Manager SetCropParams
          Manager LocationInfo: same as Validation.Turkey.Konya09.Konya09.LocationInfo
    Folder Iran
      Simulation Gorgan05
        Clock: Start=2005-12-16; End=2006-06-15
        Summary summaryfile
        Weather: FileName=Gorgan.met; Latitude=36.846; Tav=18.0805; Amp=22.0309
        SoilArbitrator Soil Arbitrator
        Zone Field: Area=1; Slope=0; AspectAngle=0; Altitude=50
          Irrigation
          Fertiliser
          Operations CropManagement
            2005-12-16  [Wheat].Sow(population:100, cultivar:"Gorgan", depth:30, rowSpacing:250);
            2005-12-16  [Fertiliser].Apply(Amount: 200, Type: Fertiliser.Types.NO3N);
          SurfaceOrganicMatter: InitialResidueName=wheat_stubble; InitialResidueType=wheat; InitialResidueMass=2000; InitialStandingFraction=0; InitialCPR=0; InitialCNR=100
          Plant Wheat
          MicroClimate: a_interception=0; b_interception=0; c_interception=0; d_interception=0; SoilHeatFluxFraction=0.4; MinimumHeightDiffForNewLayer=0; NightInterceptionFraction=0.5; ReferenceHeight=2
          Soil: SoilType=APS26Soil; LocalName=APS26Site; Site=APS26Site; NearestTown=Unknown; Region=Lawes; NaturalVegetation=Unknown; Latitude=0; Longitude=0
            Physical: same as Validation.China.ChinaFlux.Yucheng02.Field.Soil.Physical
            WaterBalance SoilWater: same as Validation.Europe.Belgium.Lonzee04.Field.Soil.SoilWater
            Organic: same as Validation.China.ChinaFlux.Yucheng02.Field.Soil.Organic
            Chemical: same as Validation.Europe.Belgium.Lonzee04.Field.Soil.Chemical
            Water: InitialPAWmm=108; RelativeTo=LL15; FilledFromTop=false
              Thickness=[100, 100, 100, 100, 100, 100, 100, 100, 100, 100, 100, 100, 100, 100, 100]
              InitialValues=[0.27, 0.28, 0.23, 0.24, 0.26, 0.3, 0.3, 0.32, 0.35, 0.32, 0.32, 0.37, 0.39, 0.39, 0.39]
            CERESSoilTemperature Temperature
            Nutrient
            Solute NO3: same as Validation.China.ChinaFlux.Yucheng02.Field.Soil.NO3
            Solute NH4: same as Validation.Europe.Belgium.Lonzee04.Field.Soil.NH4
            Solute Urea: same as Validation.Europe.Belgium.Lonzee04.Field.Soil.Urea
          Report DailyReport
          Report HarvestReport
          Manager Harvesting: same as Validation.SE Queensland.APS26.APS26NRate160WaterWet.paddock.Harvesting
          Report SowingReport
          Manager SetCropParams
        Manager LocationInfo: same as Validation.Turkey.Konya09.Konya09.LocationInfo
    Folder Africa
      Memo
        This trial was run in the Jamma district of the Amhara region of the Ethiopia country of the Africa contenentand is described in full by [Getu_AfricaWheat_2012].  'HAR 1685' Wheat was sown in 20 cm row spacing.  Different N fertiliser treatments were applied:

        1. 0NUSG  = 0kg N/ha
        2. 23NUSG = 23 kg N/ha as Urea Super Granules (a slow release urea product)
        3. 46NUSG = 46 kg N/ha as Urea Super Granules
        4. 69NUSG = 69  kg N/ha as Urea Super Granules
        5. 46NUC = 46 kg N/ha as Uncoated Urea
      Experiment Jamma
        Memo
          ;From

          Soil Characterization and Evaluation of Slow Release Urea Fertilizer Rates on Yield Traits and Grain Yields of Wheat and Teff on Vertisols of Jamma District of South Wollo Zone, Amhara Region b0

          By

          Abebe Getu (BSc), Hawassa University, Ethiopia
        Factors
          Factor NRate: Specification=[NRate]
            Operations 0NUSG
              2011-08-01  [Fertiliser].Apply(0, Fertiliser.Types.UreaN, 10);
              2011-09-01  [Fertiliser].Apply(0, Fertiliser.Types.UreaN, 10);
            Operations 23NUSG
              2011-08-01  [Fertiliser].Apply(11.5, Fertiliser.Types.UreaN, 10);
              2011-09-01  [Fertiliser].Apply(11.5, Fertiliser.Types.UreaN, 10);
            Operations 46NUSG
              2011-08-01  [Fertiliser].Apply(23, Fertiliser.Types.UreaN, 10);
              2011-09-01  [Fertiliser].Apply(23, Fertiliser.Types.UreaN, 10);
            Operations 69NUSG
              2011-08-01  [Fertiliser].Apply(34.5, Fertiliser.Types.UreaN, 10);
              2011-09-01  [Fertiliser].Apply(34.5, Fertiliser.Types.UreaN, 10);
            Operations 46NUC: same as Validation.Africa.Jamma.Factors.NRate.46NUSG
        Simulation Jamma
          Weather: FileName=Jamma.met; Latitude=10.45; Tav=15.8; Amp=3.8
          Clock: Start=2011-07-25; End=2011-12-15
          Summary summaryfile
          SoilArbitrator Soil Arbitrator
          Zone Field: Area=1; Slope=0; AspectAngle=0; Altitude=50
            MicroClimate: a_interception=0; b_interception=1; c_interception=0; d_interception=0; SoilHeatFluxFraction=0.4; MinimumHeightDiffForNewLayer=0; NightInterceptionFraction=0.5; ReferenceHeight=2
            Irrigation
            Fertiliser
            SurfaceOrganicMatter: InitialResidueName=maize; InitialResidueType=maize; InitialResidueMass=500; InitialStandingFraction=0; InitialCPR=0; InitialCNR=65
            Operations Sowing
              2011-07-25  [Wheat].Sow(population:23, cultivar:"HAR1685", depth:50, rowSpacing:250);
            Operations NRate
              1985-11-08  [Fertiliser].Apply(50, Fertiliser.Types.NH4NO3N, 10);
              1985-11-29  [Fertiliser].Apply(30, Fertiliser.Types.NH4NO3N, 10);
            Soil: Latitude=0; Longitude=0
              Physical
                Thickness  BD    AirDry  LL15  DUL   SAT
                150        1.03  0.1     0.35  0.55  0.6
                150        1.03  0.1     0.35  0.55  0.6
                300        1.03  0.26    0.35  0.55  0.6
                300        1.03  0.32    0.35  0.55  0.6
                300        1.03  0.32    0.35  0.55  0.6
                300        1.03  0.32    0.35  0.55  0.6
                SoilCrop WheatSoil: LL=[0.35, 0.35, 0.35, 0.4, 0.45, 0.5]; KL=[0.04, 0.03, 0.03, 0.02, 0.02, 0.02]; XF=[1, 1, 1, 1, 1, 1]
              WaterBalance SoilWater: SummerDate=1-Nov; SummerU=5; SummerCona=5; WinterDate=1-Apr; WinterU=5; WinterCona=5; DiffusConst=40; DiffusSlope=16; Salb=0.13; CN2Bare=78; CNRed=20; CNCov=0.8; PSIDul=-100; Thickness=[100, 100, 100, 200, 200, 200, 200, 200, 200]; SWCON=[0.5, 0.5, 0.5, 0.5, 0.5, 0.5, 0.5, 0.5, 0.5]
              Organic: FOMCNRatio=40; CarbonUnits=Total
                Thickness  Carbon  SoilCNRatio  FBiom  FInert  FOM
                300        1.54    14           0.02   0.54    327.386
                600        0.98    14           0.01   0.84    98.6069
                400        0.84    14           0.01   0.99    44.3069
                200        0.42    14           0.01   0.99    29.6998
              Chemical: Thickness=[150, 150, 300, 900]; PH=[6.7, 6.7, 6.7, 6.7]; PHUnits=Water
              Water: Thickness=[150, 150, 300, 300, 600]; InitialValues=[0.55, 0.55, 0.35, 0.35, 0.35]; InitialPAWmm=60; RelativeTo=LL15; FilledFromTop=false
              CERESSoilTemperature Temperature
              Nutrient
              Solute NO3: Thickness=[150, 150, 300, 900]; InitialValues=[20, 10, 5, 0.5]; InitialValuesUnits=ppm; WaterTableConcentration=0; D0=0; DepthConstant=0; MaxDepthSoluteAccessible=0; RunoffEffectivenessAtMovingSolute=0; MaxEffectiveRunoff=0
              Solute NH4: Thickness=[150, 150, 300, 900]; InitialValues=[0.6, 0.1, 0.1, 0.1]; InitialValuesUnits=ppm; WaterTableConcentration=0; D0=0; DepthConstant=0; MaxDepthSoluteAccessible=0; RunoffEffectivenessAtMovingSolute=0; MaxEffectiveRunoff=0
              Solute Urea: Thickness=[150, 150, 300, 900]; InitialValues=[0, 0, 0, 0]; InitialValuesUnits=kg/ha; WaterTableConcentration=0; D0=0; DepthConstant=0; MaxDepthSoluteAccessible=0; RunoffEffectivenessAtMovingSolute=0; MaxEffectiveRunoff=0
            Plant Wheat
            Report DailyReport
            Report HarvestReport
            Manager Harvesting: same as Validation.SE Queensland.APS26.APS26NRate160WaterWet.paddock.Harvesting
            Report SowingReport
            Manager SetCropParams
          Manager LocationInfo: same as Validation.Turkey.Konya09.Konya09.LocationInfo
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