Simulations: Version=189
  Folder Replacements
    Report DailyReport: EventNames=[Clock].DoReport
      VariableNames:
        [Clock].Today
        [Soil].Water.Volumetric
        sum([Soil].Water.MM) as ProfileWater
        [Oats].AboveGround.N
        [Oats].AboveGround.NConc
        [Oats].AboveGround.Wt
        [Oats].AboveGroundLive.N
        [Oats].AboveGroundLive.Wt
        [Oats].AboveGroundDead.N
        [Oats].AboveGroundDead.Wt
        [Oats].Ear.N
        [Oats].Ear.NConc
        [Oats].Ear.Wt
        [Oats].Grain.N
        [Oats].Grain.NConc
        [Oats].Grain.Number
        [Oats].Grain.Size
        [Oats].Grain.Wt
        [Oats].Leaf.AppearedCohortNo
        [Oats].Leaf.CoverGreen
        [Oats].Leaf.CoverTotal
        [Oats].Leaf.Dead.N
        [Oats].Leaf.Dead.Wt
        [Oats].Leaf.DeadCohortNo
        [Oats].Leaf.SenescingCohortNo
        [Oats].Leaf.ExpandedCohortNo
        [Oats].Leaf.Fn
        [Oats].Leaf.Fw
        [Oats].Leaf.Height
        [Oats].Leaf.LAI
        [Oats].Leaf.Live.N
        [Oats].Leaf.Live.NConc
        [Oats].AboveGroundLive.NConc
        [Oats].Leaf.Live.Wt
        [Oats].Leaf.SpecificArea
        [Oats].Phenology.CurrentPhase.Name
        [Oats].Phenology.CurrentStageName
        [Oats].Phenology.Stage
        [Oats].Phenology.Zadok.Stage
        [Oats].Panicle.Wt
        [Oats].Stem.N
        [Oats].Stem.NConc
        [Oats].Stem.Live.NConc
        [Oats].Stem.Wt
        [Oats].Leaf.Wt
        [Oats].SowingData.Cultivar
        [Oats].Structure.Height
        [Oats].Structure.LeafTipsAppeared
        [Oats].Structure.BranchNumber
        [Oats].Structure.TotalStemPopn
        ([Oats].Leaf.Transpiration + [Soil].SoilWater.Es + [MicroClimate].PrecipitationInterception) as ET
        [Clock].Today.Year
        [Oats].Leaf.Senesced.Wt
        [Oats].Leaf.GreenCohortNo
        [Soil].SoilWater.LeachNO3 as LeachedNO3
        sum([Soil].Nutrient.MineralN) as TotalMineralN
        [Weather].Rain
        [Irrigation].IrrigationApplied
        [Fertiliser].NitrogenApplied
        [SurfaceOrganicMatter].Wt
        [SurfaceOrganicMatter].C
        [SurfaceOrganicMatter].N
        sum([Soil].Nutrient.FOM.N) as TotalFOMN
        sum([Soil].Nutrient.Humic.N) as TotalHumicN
        sum([Soil].Nutrient.Microbial.N) as TotalMicrobialN
        [Soil].Nutrient.MineralisedN
        sum([Soil].Nutrient.MineralisedN) as MineralisedSoilN
        sum([SurfaceOrganicMatter].SurfaceResidue.Decomposition.MineralisedN) as MineralisedSurfOMN
        [Soil].OutputWaterLayers.SW
    Report HarvestReport: EventNames=[Oats].Harvesting
      VariableNames:
        [Oats].Structure.LeafTipsAppeared
        [Oats].Structure.FinalLeafNumber
        [Oats].Phenology.FlagLeafDAS
        [Oats].Phenology.FloweringDAS
        [Oats].Phenology.MaturityDAS
        [Oats].Phenology.CurrentPhase.Name
        [Oats].Phenology.CurrentStageName
    Report EnviroReport: EventNames=[Clock].DoReport
      VariableNames:
        [Clock].Today
        [Weather].MeanT
        [Weather].Radn
        [Weather].Rain as Rainfall
        [Irrigation].IrrigationApplied
        [Oats].Leaf.Fw
        ([Oats].Leaf.Transpiration + [Soil].SoilWater.Es + [MicroClimate].PrecipitationInterception) as ET
        [MicroClimate].PrecipitationInterception as Interception
        [Oats].Leaf.Transpiration as Transpiration
        [Soil].SoilWater.Es as Evaporation
        [Soil].SoilWater.Drainage as Drainage
        [Soil].SoilWater.Runoff as Runoff
        sum([Soil].Water.MM) as TotalSoilWater
        sum([Soil].Nutrient.MineralisedN) as MineralisedN
        [Fertiliser].NitrogenApplied as FertiliserN
        sum([Soil].Nutrient.Natm) as DenitrifiedN
        ([Soil].SoilWater.LeachUrea+[Soil].SoilWater.LeachNH4+[Soil].SoilWater.LeachNO3) as NLeached
        [SurfaceOrganicMatter].N as TotalSurfOMN
        sum([Soil].Nutrient.FOM.N) as TotalFOMN
        sum([Soil].Nutrient.Microbial.N) as TotalMicrobialN
        sum([Soil].Nutrient.Humic.N) as TotalHumicN
        (sum([Soil].NH4.kgha) + sum([Soil].NO3.kgha)) as TotalSoilN
        sum([Soil].Urea.kgha) as TotalUrea
        sum([Soil].NH4.kgha) as TotalNH4
        sum([Soil].NO3.kgha) as TotalNO3
        sum([Soil].Nutrient.DenitrifiedN) as Denitrification
        [Soil].SoilWater.FlowNO3
        ([Soil].SoilWater.Flux[5] + [Soil].SoilWater.Flow[5]) as Drainage70cm
        ([Soil].SoilWater.FlowNH4[5] + [Soil].SoilWater.FlowNO3[5]) as Leaching70cm
        sum of ([Soil].SoilWater.Flux[5] + [Soil].SoilWater.Flow[5]) from [Clock].StartOfSimulation to [Clock].Today as cumDrainage70cm
        sum of ([Soil].SoilWater.FlowNH4[5] + [Soil].SoilWater.FlowNO3[5]) from [Clock].StartOfSimulation to [Clock].Today as cumLeaching70cm
    Report DailyReportWater_n_MineralN
      VariableNames:
        [Clock].Today
        ([Soil].OutputNutrientLayers.NO3[1] + [Soil].OutputNutrientLayers.NH4[1]) as SoilN_0_15
        ([Soil].OutputNutrientLayers.NO3[2] + [Soil].OutputNutrientLayers.NH4[2]) as SoilN_15_30
        ([Soil].OutputNutrientLayers.NO3[3] + [Soil].OutputNutrientLayers.NH4[3]) as SoilN_30_60
        ([Soil].OutputNutrientLayers.NO3[4] + [Soil].OutputNutrientLayers.NH4[4]) as SoilN_60_90
        ([Soil].OutputNutrientLayers.NO3[5] + [Soil].OutputNutrientLayers.NH4[5]) as SoilN_90_120
        (SoilN_0_15 + SoilN_15_30 ) as SoilN_0_30
        (SoilN_0_15 + SoilN_15_30 + SoilN_30_60) as SoilN_0_60
        (SoilN_0_15 + SoilN_15_30 + SoilN_30_60 + SoilN_60_90) as SoilN_0_90
        (SoilN_0_90 + SoilN_90_120) as SoilN_0_120
        [Soil].Nutrient.MineralN
        [Soil].Nutrient.MineralisedN
        [Soil].OutputWaterLayers.SW
        [Soil].OutputWaterLayers.NO3[4] as LeachedN_70cm
      EventNames:
        [Clock].DoReport
      Memo
        Measurements

        Soil samples will be collected from each plot:

        0-15, 15-30 and 30-60 cm depths (or to stones).

        Composite sample of 10 cores 1 m apart following a 10 m transect across the plot. The intensive regime is to account for urine patch variability, and ensure we intercept a proportionally accurate number of urine patches across the plot.

        Soil mineral N (nitrate and ammonium) measured at every depth.

        Basic mineral analysis for 0-15 cm depth (combined sample from all reps).

        Following emergence, plant counts will be performed to assess achieved plant population

        Crop canopy development will be monitored at regular intervals using a hand-held Greenseeker (reflectance measurements).

        Biomass will be measured at three key crop stages of the ‘control treatment’ (all treatments simultaneously measured at each sampling occasion):

        GS21 (tillering), September

        GS32 (2nd node), October

        GS45 (booting) = final harvest, November

        For each biomass harvest, 3x 0.5 m2 quadrats (1.5 m2 in total) in each plot will be cut at ground level and total fresh biomass weighed. A ≈300g subsample will be taken, weighed after drying at 60°C until constant weight (dry matter content), and then ground and analysed for total N content using a LECO CNS analyser in order to determine crop N uptake.

        At final harvest, a separate subsample will also be taken and sent to Hills Laboratories to measure feed quality.

        Climate data (rainfall, air and soil temperature, radiation) will be recorded via a local NIWA or on-site weather station for each site.
    Plant Oats: PlantType=Oats
      Memo Introduction
        _Allan Peake, Hamish Brown, Rob Zyskowski, Edmar I. Teixeira, Neil Huth_

        The APSIM oats model has been developed using the Plant Modelling Framework (PMF) of [brown_plant_2014]. This new framework provides a library of plant organ and process submodels that can be coupled, at runtime, to construct a model in much the same way that models can be coupled to construct a simulation. This means that dynamic composition of lower level process and organ classes (e.g. photosynthesis, leaf) into larger constructions (e.g. maize, wheat, sorghum) can be achieved by the model developer without additional coding.

        The oats model consists of:

        * a phenology model to simulate development through sequential growth phases
        * a structure model to simulate plant morphology
        * a collection of organs to simulate the various plant parts
        * an arbitrator to allocate resources (N, biomass) to the various plant organs

        This work builds upon an earlier APSIM Oats model that was constructed in 2007 and then published at the Australian Agronomy Conference in 2008 using data from Gatton, Tarlee and Pinery ([unkovich_development_2008]). However numerous changes have been made in the APSIM NextGen version, so simulations run under APSIM 7.10 and previous versions will give different predictions when run with APSIM NextGen.

        The Oats model is broadly based on APSIM Wheat models such as NWheat ([Asseng200225], [KeatingNWheat]), NWheatS ([Asseng1998163]), Cropmod-Wheat ([Wang2002GenericCropModel]), and the earlier versions developed within the Plant Modelling Framework ([brown_plant_2014]).
      OrganArbitrator Arbitrator
        BiomassTypeArbitrator DMArbitration
          Folder PotentialPartitioningMethods
            ReallocationMethod
            AllocateFixationMethod
            RetranslocationMethod
            SendPotentialDMAllocationsMethod
          Folder AllocationMethods
            NutrientConstrainedAllocationMethod
            DryMatterAllocationsMethod
          RelativeAllocation ArbitrationMethod
        BiomassTypeArbitrator NArbitration
          Folder PotentialPartitioningMethods
            ReallocationMethod
          Folder ActualPartitioningMethods
            AllocateFixationMethod
            RetranslocationMethod
          Folder AllocationMethods
            NitrogenAllocationsMethod
          RelativeAllocation ArbitrationMethod
          AllocateUptakesMethod
        WaterUptakeMethod
        NitrogenUptakeMethod
      Phenology
        Memo
          Oat crops exhibit a range of developmental responses to environment and these are strongly influences by genotype characteristics.
          Temperature effects development increasing development rates and decreasing phase durations as temperatures increase.  These effects are captured by thermal time.  However, Oat crops also exhibit vernalisation and photoperiod sensitivities in their Vegetative phase and further photoperiod sensitivity in the EarlyReproductive phase.  Photoperiod responses are seen as a reduction in the length of a phase for a photoperiod sensitive genotype in response to a longer photoperiod.  Vernalisation responses are more complicated as they are driven by temperature but interact with photoperiod.  For vernalisation sensitive varieties (Winter types) exposure to cool temperatures or short photoperiods during the Vegetative phase will reduce the thermal time duration of the vegetative phase.

          As used in the APSIM wheat model, we draw on the Kirby Framework to capture these vernalisation and photoperiod responses.  This framework assumes that the timing of anthesis is a result of the timing of flag leaf and an additional thermal time passage from there to anthesis.  It also assumes the timing of flag leaf is a result of the Final Leaf Number which sets a target, and leaf appearance rate, which sets the rate of progress toward this target.  Leaf appearance rate is a function of Thermal time and a genotype specific Phyllochron which changes with Haun stage as described by [Jamieson_LeafAppearance_1995].

          Final Leaf Number (FLN) is modelled as the sum of three numbers:

          FLN = MinLeafNumber + VernalLeaves + PhotoLeaves

          Where MinLeafNumber is the number of leaves that a wheat crop will produce when vernalisation is satisified early in the crops duration (before 2nd true leaf) and it is grown in a long photoperiod.  VernalLeaves are the number of leaves that are added due to vernalisation effects.  For insensitive varieties this will always be zero but this is potentially a larger number for sensitivie varieties and the number progresively decreases as the crop encounters more vernalisation.  PhotoLeaves are the number of leaves that are added to the minimum leaf number as a result of short day exposure.  For insensitive varieties this will be zero but is potential larger for more sensitivie varieties and decreases as day length increases.  More detailed explinations of the components of phenology are provided below.
        DivideFunction MeanTemp
          AddFunction TempSum
            VariableReference MaxT: VariableName=[Weather].MaxT
            VariableReference MinT: VariableName=[Weather].MinT
          Constant Two: FixedValue=2
        SubDailyInterpolation ThermalTime: agregationMethod=0
          XYPairs Response: X=[0, 30, 40]; Y=[0, 30, 0]
          Memo
            Thermal time determines the rate of developmental progress through many of the crops phases and is used by organs to determing potential growth rates.
          ThreeHourAirTemperature InterpolationMethod
        MultiplyFunction DailyVernalisation
          Memo
            Vernalisation responses are based on those described by [Brown_Anthesis_2013].   Vernalisation is assumed to be related to the expression of the Vrn1 Gene.  Its experssion is accumulated daily and daily upregulation as a function of development (DeltaHaunStage) and a TempResponseProfile that declines exponentially from a maximum at 1^o^C to zero at 0^o^C and at 20^o^C.
          VariableReference DeltaHaunStage: VariableName=[Structure].DeltaHaunStage
          SubDailyInterpolation TempResponseProfile: agregationMethod=0
            XYPairs Response
              X=[0, 1, 2, 3, 4, 5, 6, 7, 8, 9, 10, 11, 12, 13, 14, 15, 16, 17, 18, 19, 20, 30, 32]
              Y=[0, 1.205, 1.037, 0.893, 0.768, 0.661, 0.569, 0.49, 0.422, 0.363, 0.312, 0.269, 0.231, 0.199, 0.171, 0.148, 0.127, 0.109, 0.094, 0.081, 0, 0, -0.5]
            ThreeHourAirTemperature InterpolationMethod
        PhotoperiodFunction Photoperiod: Twilight=-6; DayLength=0
        PhaseLookup PerceivedPhotoPeriod
          PhaseLookupValue ApexBelowGround: Start=Germination; End=Emergence
            Constant Photoperiod: FixedValue=0; Units=h
          PhaseLookupValue ApexAboveGround: Start=Emergence; End=HarvestRipe
            VariableReference Photoperiod: VariableName=[Phenology].Photoperiod
        MinimumFunction Vrn1
          Memo
            Vrn1 accumulation begins when Vrn4 experssion is down-regulated to zero and stops, assuming vernalisation saturation, at a value of 1
          Constant Saturation: FixedValue=1; Units=Relative Experssion
          AccumulateFunction CurrentExpression: StartStageName=Germination; EndStageName=TerminalSpikelet; FractionRemovedOnCut=0; FractionRemovedOnHarvest=0; FractionRemovedOnGraze=0; FractionRemovedOnPrune=0
            LessThanFunction Vernalisation
              VariableReference If_Vrn4: VariableName=[Phenology].Vrn4
              VariableReference IsLessThanLag: VariableName=[Phenology].VernLag
              Constant Return_Zero: FixedValue=0
              VariableReference elseReturn_Vernalisation: VariableName=[Phenology].DailyVernalisation
        MinimumFunction Vrn4
          VariableReference MaxExpression: VariableName=[Phenology].VernLag
          AccumulateFunction CurrentExpression: StartStageName=Germination; EndStageName=TerminalSpikelet; FractionRemovedOnCut=0; FractionRemovedOnHarvest=0; FractionRemovedOnGraze=0; FractionRemovedOnPrune=0
            VariableReference VernalisationConditioning: VariableName=[Phenology].DailyVernalisation
        Constant MinimumLeafNumber: FixedValue=7; Units=Leaves
          Memo
            Number of leaves the plant will produce when fully vernalised early and grown in long photoperiod
        Constant VrnSensitivity: FixedValue=0; Units=Leaves
          Memo
            The difference between Inherent earlyness leaf number and the number of leaves produced when the plant is unvernalised and grown in long photoperiod
        Constant VernLag: FixedValue=1; Units=Unitless
          Memo
            The amount of vernalising temperature required before vernalisation response will be evident.  Value of relative to the amount offl vernalisation temperature required from the end of the lag until vernalisation saturation.  A value of 0 means there is no lag, a value of 1 means the lag is the same (in vernal time) as the vernalisation requirement and a value of 2 means the lag is twice as long as the vernalisation response phase
        Constant PpSensitivity: FixedValue=3; Units=Leaves
          Memo
            The reduction in leaf number going from 8 to 16 h Pp
        Constant EarlyReproductivePpSensitivity: FixedValue=3
          Memo
            The phyllochrons duration for the plant to go from flag leaf ligual appearance at 16 h Pp compared to the phyllochron duration for the same phase at 8 h Pp.
        Constant EarlyReproductiveLongDayBase: FixedValue=3
          Memo
            The phyllochrons duration for the plant to go from flag leaf ligual appearance at 16 h Pp.
        GerminatingPhase Germinating: Start=Sowing; End=Germination; IsEmerged=false
          Constant MinSoilTemperature: FixedValue=0
        EmergingPhase Emerging: Start=Germination; End=Emergence; IsEmerged=false; TTForTimeStep=0
          VariableReference ThermalTime: VariableName=[Phenology].ThermalTime
          AddFunction Target
            Constant ShootLag: FixedValue=40
            MultiplyFunction DepthxRate
              VariableReference SowingDepth: VariableName=[Plant].SowingData.Depth
              Constant ShootRate: FixedValue=4
        GenericPhase Vegetative: Start=Emergence; End=TerminalSpikelet; IsEmerged=true
          Memo
            The duration of the vegetative phase is set by a target Haun Stage for the occurence of Terminal Spikelet and the rate of leaf appearance.
          VariableReference Progression: VariableName=[Phenology].ThermalTime
          MultiplyFunction Target
            VariableReference Phyllochron: VariableName=[Structure].MeanPhyllochron
            VariableReference HSTS: VariableName=[Structure].HaunStageTerminalSpikelet
          Memo Memo1
            HaunStageTerminalSpiklet decreases as vernalisation is accumulated and as photoperiod extends, capturing the effect of these responses on the duration of the Vegetative phase
        LeafAppearancePhase StemElongation: Start=TerminalSpikelet; End=FlagLeaf; IsEmerged=true
          Memo
            The Final leaf number is fixed at Terminal Spikelet and leaves contune to appear at a rate set by thermal time and phyllochron until flag leaf liguale appears and this phase is completed.
          VariableReference ThermalTime: VariableName=[Phenology].ThermalTime
          VariableReference FinalLeafNumber: VariableName=[Structure].FinalLeafNumber
          ExpressionFunction LeafNumber
            Expression=[Leaf].ExpandedCohortNo + [Leaf].NextExpandingLeafProportion
          VariableReference FullyExpandedLeafNo: VariableName=[Leaf].ExpandedCohortNo
          VariableReference InitialisedLeafNumber: VariableName=[Leaf].InitialisedCohortNo
        GenericPhase EarlyReproductive: Start=FlagLeaf; End=Flowering; IsEmerged=true
          VariableReference Progression: VariableName=[Phenology].ThermalTime
          MultiplyFunction Target
            VariableReference Phyllochron: VariableName=[Structure].Phyllochron.BasePhyllochron
            AddFunction Phyllochrons
              VariableReference LongDayBase: VariableName=[Phenology].EarlyReproductiveLongDayBase
              MultiplyFunction IncreaseDueToShortPhotoPeriod
                LinearInterpolationFunction PhotoPeriodResponse
                  XYPairs: X=[11, 16]; Y=[1, 0]
                  VariableReference XValue: VariableName=[Phenology].Photoperiod
                VariableReference PpSensitivity: VariableName=[Phenology].EarlyReproductivePpSensitivity
        GenericPhase GrainDevelopment: Start=Flowering; End=StartGrainFill; IsEmerged=true
          Constant Target: FixedValue=20
          VariableReference Progression: VariableName=[Phenology].ThermalTime
        GenericPhase GrainFilling: Start=StartGrainFill; End=EndGrainFill; IsEmerged=true
          Constant Target: FixedValue=650
          VariableReference Progression: VariableName=[Phenology].ThermalTime
        GenericPhase Maturing: Start=EndGrainFill; End=Maturity; IsEmerged=true
          Constant Target: FixedValue=30
          VariableReference Progression: VariableName=[Phenology].ThermalTime
        GenericPhase Ripening: Start=Maturity; End=HarvestRipe; IsEmerged=true
          Constant Target: FixedValue=100
          VariableReference Progression: VariableName=[Phenology].ThermalTime
        EndPhase ReadyForHarvesting: Start=HarvestRipe; End=Unused; IsEmerged=true
          VariableReference ThermalTime: VariableName=[Phenology].ThermalTime
        ZadokPMF Zadok
        OnEventFunction FlagLeafDAS: SetEvent=FlagLeaf; ReSetEvent=never
          Memo
            A function is used to provide the date of flag leaf (fully emerged) as days after sowing(DAS).
          Constant PreEventValue: FixedValue=0
          VariableReference PostEventValue: VariableName=[Plant].DaysAfterSowing
        OnEventFunction FloweringDAS: SetEvent=Flowering; ReSetEvent=never
          Memo
            A function is used to provide flowering date as days after sowing(DAS).
          Constant PreEventValue: FixedValue=0
          VariableReference PostEventValue: VariableName=[Plant].DaysAfterSowing
        OnEventFunction MaturityDAS: SetEvent=Maturity; ReSetEvent=never
          Memo
            A function is used to provide maturity date as days after sowing(DAS).
          Constant PreEventValue: FixedValue=0
          VariableReference PostEventValue: VariableName=[Plant].DaysAfterSowing
      Structure: CohortInitialisationStage=Germination; LeafInitialisationStage=Emergence
        VariableReference ThermalTime: VariableName=[Phenology].ThermalTime
        MultiplyFunction Phyllochron
          Memo Rational
            This is the thermal time between the emergence of leaf tips.  The model used here is based on [Jamieson_SIRIUS_1998] where leaf appearace could be described by a base phyllochron determined between leaves 2 and 7 and a phyllochron that was 70% of base phyllochron for leaves < 2 and 130% of base phyllochron for leaves > 7
          LinearInterpolationFunction LeafStageFactor
            XYPairs: X=[0, 2, 3, 6, 8, 11, 12]; Y=[0.75, 0.75, 1, 1, 1.4, 1.4, 1.4]
              Memo
                Changing 4th line from 7:1 to 6:1.
                Leaf appearance rate calibrated using data from Gatton 2007 for Taipan and Coolibah
            VariableReference XValue: VariableName=[Leaf].AppearedCohortNo
          Constant BasePhyllochron: FixedValue=90; Units=oC.d
          LinearInterpolationFunction PhotoPeriodEffect
            XYPairs: X=[8, 12, 14]; Y=[1.6, 1, 1]
            VariableReference XValue: VariableName=[Phenology].Photoperiod
        MultiplyFunction BranchingRate
          Memo
            Potential branching rate is determined by the commonly observed pattern of tillering in wheat, in which each tiller emerges with the third leaf on its parent axis (e.g. first tiller emerges at the same time as the third leaf on the main stem, the first secondary tiller appears with the third leaf on tiller 1).  This is described as a simple function of main stem leaf number. This function is varied occasionally between Oat cultivars due to the wide range of plant habits.
          PhaseLookup PotentialBranchingRate
            PhaseLookupValue Vegetative: Start=Emergence; End=TerminalSpikelet
              LinearInterpolationFunction PotentialBranchingRate
                XYPairs: X=[1, 2, 3, 4, 5, 6, 7, 8]; Y=[0, 0, 1, 2, 4, 7, 12, 20]
                VariableReference XValue: VariableName=[Structure].LeafTipsAppeared
            PhaseLookupValue Reproductive: Start=TerminalSpikelet; End=HarvestRipe
              Constant Zero: FixedValue=0
          MinimumFunction StressFactors
            LinearInterpolationFunction NitrogenEffect
              Memo
                Inadequate Nitrogen supply is assumed to affect tillering prior to any effect on photosynthesis or leaf size.
              XYPairs: X=[0.5, 1]; Y=[0, 1]
              VariableReference XValue: VariableName=[Arbitrator].FN
            LinearInterpolationFunction CoverEffect
              Memo
                Tillering is said to cease once a threshold fraction of incoming radiation has been achieved.  This captures shading effects on tillering described by [evers2006cessation].
              XYPairs: X=[0, 0.1, 0.5]; Y=[1, 1, 0]
              VariableReference XValue: VariableName=[Leaf].CoverTotal
            LinearInterpolationFunction WaterStressEffect
              XYPairs: X=[0, 1]; Y=[0, 1]
              VariableReference XValue: VariableName=[Root].WaterTensionFactor
        PhaseLookup BranchMortality
          PhaseLookupValue MortalityPhase: Start=TerminalSpikelet; End=Flowering
            MultiplyFunction Mortality
              LinearInterpolationFunction MortalityPerDegDay
                XYPairs: X=[0, 0.005]; Y=[0.002, 0]
                VariableReference XValue: VariableName=[Structure].MeanTillerGrowthRate
              VariableReference ThermalTime: VariableName=[Phenology].ThermalTime
        HeightFunction HeightModel
          LinearInterpolationFunction PotentialHeight
            XYPairs: X=[3, 3.8, 5, 6]; Y=[20, 300, 1100, 1200]
            VariableReference XValue: VariableName=[Phenology].Stage
          LinearInterpolationFunction WaterStress
            XYPairs: X=[0.3, 1]; Y=[0, 1]
            VariableReference XValue: VariableName=[Oats].Leaf.Fw
        MovingAverageFunction MeanTillerGrowthRate: NumberOfDays=5; StageToStartMovingAverage=Emergence
          Memo
            This is calculated to represent the supply of asslimilate to individual tillers over the past 5 days to use as an index to determine tiller mortality.  When tiller numbers are high or total crop assimilate supply is small there will not be enough assimilate to maintain all of the tillers so the model will senesce some.
          DivideFunction TillerGrowthRate
            VariableReference DailyGrowth: VariableName=[Arbitrator].DM.TotalFixationSupply
            VariableReference ThermalTime: VariableName=[Phenology].ThermalTime
            VariableReference StemPopulation: VariableName=[Structure].TotalStemPopn
        MovingAverageFunction MeanPhyllochron: NumberOfDays=300; StageToStartMovingAverage=Emergence
          VariableReference Phyllochron: VariableName=[Structure].Phyllochron
        HoldFunction FinalLeafNumber: WhenToHold=TerminalSpikelet
          AddFunction FinalNodeNumber
            VariableReference MinLeafNumber: VariableName=[Phenology].MinimumLeafNumber
            MultiplyFunction VernalLeaves
              VariableReference UnVernalisedLeaves: VariableName=[Phenology].VrnSensitivity
              SubtractFunction VernalisationReductionFactor
                Constant One: FixedValue=1
                VariableReference RelativeVrn1Expression: VariableName=[Phenology].Vrn1
            MultiplyFunction PhotoPLeaves
              VariableReference ShortPpLeaves: VariableName=[Phenology].PpSensitivity
              LinearInterpolationFunction PhotoPeriodReductionFactor
                XYPairs: X=[10, 16]; Y=[1, 0]
                VariableReference XValue: VariableName=[Phenology].Photoperiod
        ExpressionFunction HaunStageTerminalSpikelet: Expression=([Structure].FinalLeafNumber - 2.85)/1.1
          Memo
            The Haun stage at which Terminal Spikelet occurs is determined from final leaf number using the approach described in [Brown_Anthesis_2013].
        AddFunction HaunStage
          VariableReference AppearedLeaves: VariableName=[Leaf].ExpandedCohortNo
          VariableReference ProportionOfExpandingLeaf: VariableName=[Leaf].NextExpandingLeafProportion
        Constant StemSenescenceAge: FixedValue=0
      ReproductiveOrgan Grain: GrowthRespiration=0; MaintenanceRespiration=0; RipeStage=Ripe
        Biomass Live
        Biomass Dead
        Memo
          As with Barley, Oats grain is typically harvested by farmers still in its husk (i.e. the palea and lemma remain attached to the kernel/caryopsis), while the kernel proper is typically smaller than a wheat grain grown under similar conditions. For simplicity (and in the absence of an extensive grain-oats data set) the Oats model uses the same grain size model as wheat, with the assumption that the weight of the oats kernel includes the weight of the husk (which is not included within kernel weight in the wheat model).

          Grain number prediction is also derived directly from the wheat model, estimated as a constant number of grains (default=26) per unit of stem+spike dry matter at anthesis. This approach has known limitations and investigation is underway to improve this function in the future.
        HoldFunction NumberFunction: WhenToHold=Flowering
          MultiplyFunction GrainNumber
            Constant GrainsPerGramOfStem: FixedValue=26; Units=grains
            VariableReference StemMass: VariableName=[StemPlusPanicle].Wt
        Constant InitialGrainProportion: FixedValue=0.05
          Constant InitialGrainProportion: FixedValue=0.05
        Constant MaximumPotentialGrainSize: FixedValue=0.032; Units=g
        PhaseLookup DMDemandFunction
          PhaseLookupValue InitialPhase: Start=Flowering; End=StartGrainFill
            FillingRateFunction
              VariableReference NumberFunction: VariableName=[Grain].NumberFunction
              VariableReference FillingDuration: VariableName=[Phenology].GrainDevelopment.Target
              VariableReference ThermalTime: VariableName=[Phenology].ThermalTime
              MultiplyFunction PotentialSizeIncrement
                VariableReference InitialProportion: VariableName=[Grain].InitialGrainProportion
                VariableReference MaximumSize: VariableName=[Grain].MaximumPotentialGrainSize
          PhaseLookupValue LinearPhase: Start=StartGrainFill; End=EndGrainFill
            FillingRateFunction
              VariableReference NumberFunction: VariableName=[Grain].NumberFunction
              VariableReference FillingDuration: VariableName=[Phenology].GrainFilling.Target
              VariableReference ThermalTime: VariableName=[Phenology].ThermalTime
              MultiplyFunction PotentialSizeIncrement
                SubtractFunction ProportionLinearPhase
                  Constant One: FixedValue=1
                  VariableReference InitialProportion: VariableName=[Grain].InitialGrainProportion
                VariableReference MaximumSize: VariableName=[Grain].MaximumPotentialGrainSize
        Constant MinimumNConc: FixedValue=0.0123
        Constant MaxNConcDailyGrowth: FixedValue=0.03
        Constant MaximumNConc: FixedValue=0.03
        PhaseLookup NFillingRate
          PhaseLookupValue GrainFilling: Start=FlagLeaf; End=EndGrainFill
            FillingRateFunction
              VariableReference NumberFunction: VariableName=[Grain].NumberFunction
              AddFunction FillingDuration
                VariableReference FloweringToGrainFilling: VariableName=[Phenology].GrainDevelopment.Target
                VariableReference GrainFilling: VariableName=[Phenology].GrainFilling.Target
              VariableReference ThermalTime: VariableName=[Phenology].ThermalTime
              MultiplyFunction PotentialSizeIncrement
                VariableReference MaximumSize: VariableName=[Grain].MaximumPotentialGrainSize
                VariableReference MaximumNConc: VariableName=[Grain].MaximumNConc
        Constant WaterContent: FixedValue=0.12
        AccumulateFunction AccumThermalTime: StartStageName=FlagLeaf; EndStageName=Maturity; FractionRemovedOnCut=0; FractionRemovedOnHarvest=0; FractionRemovedOnGraze=0; FractionRemovedOnPrune=0
          VariableReference DailyThermalTimeValue: VariableName=[Phenology].ThermalTime
        ExpressionFunction Protein
          Expression=([Grain].Live.N + [Grain].Dead.N)/([Grain].Live.Wt + [Grain].Dead.Wt) * 100 * 5.71
        BiomassRemoval BiomassRemovalDefaults: HarvestFractionLiveToRemove=1; HarvestFractionDeadToRemove=1; HarvestFractionLiveToResidue=0; HarvestFractionDeadToResidue=0
        Constant DMConversionEfficiency: FixedValue=1
        Constant RemobilisationCost: FixedValue=0
        Constant CarbonConcentration: FixedValue=0.4
        NutrientPoolFunctions DMDemandPriorityFactors
          Constant Structural: FixedValue=1
          Constant Metabolic: FixedValue=1
          Constant Storage: FixedValue=1
        NutrientPoolFunctions NDemandPriorityFactors: same as Replacements.Oats.Grain.DMDemandPriorityFactors
      Leaf: MaxCover=1; Albedo=0.25; Gsmax350=0.011; R50=150; KDead=0.1; MaximumMainStemLeafNumber=30
        zero: CurrentExpandingLeaf, StartFractionExpanded, FractionNextleafExpanded, DeadNodesYesterday, GrowthRespiration, LAI, Depth, Width, PotentialEP, WaterDemand, TipsAtEmergence, CohortsAtInitialisation, FractionDied
        ExpressionFunction CO2internal: Expression=(163 - [IWeather].MeanT)/(5 - 0.1*[IWeather].MeanT)
        DivideFunction StomatalConductanceCO2Modifier
          VariableReference FCO2: VariableName=[Leaf].Photosynthesis.FCO2
          ExpressionFunction RelativeCO2Gradient
            Expression=([IWeather].CO2 - [Leaf].CO2internal)/(350 - [Leaf].CO2internal)
        LeafCohort InitialLeaves1: Rank=1; Area=200
          zero: NReallocationFactor, DMReallocationFactor, NRetranslocationFactor, DMRetranslocationFactor, ShadeInducedSenRate, SenescedFrac, DeltaPotentialArea, DeltaStressConstrainedArea, DeltaCarbonConstrainedArea, PotentialStructuralDMAllocation, PotentialMetabolicDMAllocation, MetabolicNReallocated, MetabolicWtReallocated, StorageNReallocated, StorageWtReallocated, MetabolicNRetranslocated, StorageNRetrasnlocated, DMRetranslocated, MetabolicNAllocation, StructuralDMAllocation, MetabolicDMAllocation
        LeafCohort InitialLeaves[2]: Rank=2
          zero: NReallocationFactor, DMReallocationFactor, NRetranslocationFactor, DMRetranslocationFactor, ShadeInducedSenRate, SenescedFrac, DeltaPotentialArea, DeltaStressConstrainedArea, DeltaCarbonConstrainedArea, PotentialStructuralDMAllocation, PotentialMetabolicDMAllocation, MetabolicNReallocated, MetabolicWtReallocated, StorageNReallocated, StorageWtReallocated, MetabolicNRetranslocated, StorageNRetrasnlocated, DMRetranslocated, MetabolicNAllocation, StructuralDMAllocation, MetabolicDMAllocation, Area
        LeafCohortParameters CohortParameters: ExpansionStressValue=0; CellDivisionStressValue=0; LagAccelerationValue=0; SenescenceAccelerationValue=0; ShadeInducedSenescenceRateValue=0; SenessingLeafRelativeSizeValue=0
          Constant NReallocationFactor: FixedValue=1
          Constant MaintenanceRespirationFunction: FixedValue=0
          Constant NRetranslocationFactor: FixedValue=0.03
          Constant DMReallocationFactor: FixedValue=1
          Constant DMRetranslocationFactor: FixedValue=0.8
          MinimumFunction CellDivisionStress
            LinearInterpolationFunction WaterStressFactor
              XYPairs: X=[0.5, 1]; Y=[0.1, 1]
              VariableReference XValue: VariableName=[Oats].Leaf.Fw
            LinearInterpolationFunction NitrogenStressFactor
              XYPairs: X=[0, 0.5, 1]; Y=[0.1, 0.1, 1]
              VariableReference XValue: VariableName=[Oats].Leaf.Fn
          MinimumFunction ExpansionStress
            LinearInterpolationFunction WaterStress
              XYPairs: X=[0.1, 1, 1.3]; Y=[0, 1, 1]
              VariableReference XValue: VariableName=[Root].WaterTensionFactor
            LinearInterpolationFunction TemperatureEffect
              XYPairs: X=[0, 12, 14]; Y=[0, 1, 1]
              VariableReference XValue: VariableName=[Phenology].MeanTemp
            LinearInterpolationFunction NitrogenStressFactor
              XYPairs: X=[0, 0.5, 1]; Y=[0.1, 0.1, 1]
              VariableReference XValue: VariableName=[Oats].Leaf.Fn
          MultiplyFunction MaxArea
            Constant AreaLargestLeaves: FixedValue=4000; Units=mm^2
              Memo
                Default as per NZ Lincoln data set. Amended between varieties due to large variation in Oats plant type.
            LinearInterpolationFunction AgeFactor
              XYPairs: X=[3, 3.45, 4]; Y=[0.1, 0.5, 1]
              VariableReference XValue: VariableName=[Phenology].Stage
          MultiplyFunction GrowthDuration
            Constant Multiplier: FixedValue=1.75
            VariableReference Phyllochron: VariableName=[Structure].Phyllochron
            LinearInterpolationFunction AgeFactor
              XYPairs: X=[3, 4, 5]; Y=[1, 1, 1]
              VariableReference XValue: VariableName=[Phenology].Stage
          MultiplyFunction LagDuration
            LinearInterpolationFunction AgeFactor
              XYPairs: X=[3, 4, 5]; Y=[0.4, 1, 1]
              VariableReference XValue: VariableName=[Phenology].Stage
            SubtractFunction LastLeafDuration
              AddFunction ThermalTimeToRipe
                VariableReference EarlyReproductive: VariableName=[Phenology].EarlyReproductive.Target
                VariableReference GrainDevelopment: VariableName=[Phenology].GrainDevelopment.Target
                VariableReference GrainFilling: VariableName=[Phenology].GrainFilling.Target
                VariableReference Maturing: VariableName=[Phenology].Maturing.Target
                VariableReference Ripening: VariableName=[Phenology].Ripening.Target
              VariableReference SenescenceDuration: VariableName=[Leaf].CohortParameters.SenescenceDuration
          MultiplyFunction SenescenceDuration
            Constant Multiplier: FixedValue=6
            VariableReference Phyllochron: VariableName=[Structure].Phyllochron
          Constant DetachmentLagDuration: FixedValue=1000000
          Constant DetachmentDuration: FixedValue=1000000
          Constant RelativeBranchLeafSize: FixedValue=1
          LinearInterpolationFunction MaximumNConc
            XYPairs: X=[3, 4, 6]; Y=[0.08, 0.05, 0.02]
            VariableReference XValue: VariableName=[Phenology].Stage
          MultiplyFunction CriticalNConc
            LinearInterpolationFunction CriticalNConcAt350ppm
              XYPairs: X=[3, 4, 6]; Y=[0.07, 0.04, 0.015]
              VariableReference XValue: VariableName=[Phenology].Stage
            LinearInterpolationFunction CO2Factor
              XYPairs: X=[350, 700]; Y=[1, 0.93]
              VariableReference XValue: VariableName=[Weather].CO2
          LinearInterpolationFunction MinimumNConc
            XYPairs: X=[3, 4, 6]; Y=[0.01, 0.005, 0.005]
            VariableReference XValue: VariableName=[Phenology].Stage
          AddFunction LagAcceleration
            Constant One: FixedValue=1
            MultiplyFunction Stress
              Constant StressResponseCoefficient: FixedValue=1
              LinearInterpolationFunction StressFactor
                XYPairs: X=[0, 0.5]; Y=[0.5, 0]
                VariableReference XValue: VariableName=[Oats].Leaf.Fw
          AddFunction SenescenceAcceleration: same as Replacements.Oats.Leaf.CohortParameters.LagAcceleration
          LinearInterpolationFunction SpecificLeafAreaMax
            XYPairs: X=[2, 3, 4]; Y=[25000, 30000, 40000]
            Memo
              Initial SLA is determined as the average of max and min SLA
            VariableReference XValue: VariableName=[Phenology].Stage
          LinearInterpolationFunction SpecificLeafAreaMin
            XYPairs: X=[0.4, 1]; Y=[10000, 18000]
            VariableReference XValue: VariableName=[Leaf].Fn
          Constant InitialNConc: FixedValue=0
          Constant StructuralFraction: FixedValue=0.3
          Constant StorageFraction: FixedValue=0
          Constant LeafSizeShapeParameter: FixedValue=0.3
          Constant SenessingLeafRelativeSize: FixedValue=1; Units=0-1
          MultiplyFunction ShadeInducedSenescenceRate
            LinearInterpolationFunction CoverEffect
              XYPairs: X=[0, 0.9, 0.95, 1]; Y=[0, 0, 0.01, 0.03]
              VariableReference XValue: VariableName=[Leaf].CohortCurrentRankCoverAbove
            VariableReference ThermalTime: VariableName=[Phenology].ThermalTime
          ArrayFunction LagDurationAgeMultiplier: Values=1 1 1
          ArrayFunction SenescenceDurationAgeMultiplier: Values=1 1 1
          ArrayFunction LeafSizeAgeMultiplier: Values=1 1 1 1 1 1 1 1 1 1 1 1
          Constant RemobilisationCost: FixedValue=0
          Constant CarbonConcentration: FixedValue=0.4
        RUEModel Photosynthesis
          Constant RUE: FixedValue=1.6
            Memo
              WHOLE PLANT RUE = bigger than RUE calculated using above ground biomass.
              1.35 measured for Oats at Gatton 2007 (Above ground biomass only) so assume 20% more for root biomass.
          WeightedTemperatureFunction FT: MaximumTemperatureWeighting=0.75
            XYPairs: X=[0, 15, 25, 35]; Y=[0, 1, 1, 0]
          LinearInterpolationFunction FN
            XYPairs: X=[0, 1, 1.5]; Y=[0, 1, 1]
            VariableReference XValue: VariableName=[Leaf].Fn
          LinearInterpolationFunction FW
            XYPairs: X=[0, 0.5, 1]; Y=[0, 1, 1]
            VariableReference XValue: VariableName=[Leaf].Fw
          LinearInterpolationFunction FVPD
            XYPairs: X=[0, 10, 40]; Y=[1, 1, 0]
            VariableReference XValue: VariableName=[Photosynthesis].VPD
          RUECO2Function FCO2: PhotosyntheticPathway=C3
          VariableReference RadnInt: VariableName=[Leaf].RadiationIntercepted
        Constant FrostFraction: FixedValue=0
        VariableReference ThermalTime: VariableName=[Phenology].ThermalTime
        MinimumFunction FRGRFunction
          VariableReference RUE_FT: VariableName=[Leaf].Photosynthesis.FT
          MinimumFunction Others
            VariableReference RUE_FN: VariableName=[Leaf].Photosynthesis.FN
            VariableReference RUE_FVPD: VariableName=[Leaf].Photosynthesis.FVPD
        BiomassRemoval BiomassRemovalDefaults: HarvestFractionLiveToRemove=0; HarvestFractionDeadToRemove=0; HarvestFractionLiveToResidue=0.8; HarvestFractionDeadToResidue=0.8
        Constant ExtinctionCoeff: FixedValue=0.45
          Memo
            Using extinction coefficient as per measured at Gatton in 2007 (0.45).
        Constant StructuralFraction: FixedValue=0.5
        Constant DMConversionEfficiency: FixedValue=1
        Constant RemobilisationCost: FixedValue=0
        Constant CarbonConcentration: FixedValue=0.4
        Constant WidthFunction: FixedValue=0
        VariableReference DepthFunction: VariableName=[Leaf].Height
        NutrientPoolFunctions DMDemandPriorityFactors: same as Replacements.Oats.Grain.DMDemandPriorityFactors
        NutrientPoolFunctions NDemandPriorityFactors: same as Replacements.Oats.Grain.DMDemandPriorityFactors
      GenericOrgan Stem: IsAboveGround=true
        MultiplyFunction SenescenceRate
          LinearInterpolationFunction SenescenceRate
            XYPairs: X=[3, 7, 8, 9]; Y=[0, 0, 0.2, 0.5]
            VariableReference XValue: VariableName=[Phenology].Stage
        LinearInterpolationFunction MaximumNConc
          XYPairs: X=[3, 4, 4.5, 6]; Y=[0.05, 0.04, 0.015, 0.012]
          VariableReference XValue: VariableName=[Phenology].Stage
        Constant MinimumNConc: FixedValue=0.0018
        PhaseLookupValue NitrogenDemandSwitch: Start=Emergence; End=StartGrainFill
          Constant: FixedValue=1
        Constant NReallocationFactor: FixedValue=0
        PhaseLookup NRetranslocationFactor
          PhaseLookupValue VegetativeGrowth: Start=Sowing; End=Flowering
            Constant Fraction: FixedValue=0
          PhaseLookupValue ReproductiveGrowth: Start=Flowering; End=HarvestRipe
            Constant Fraction: FixedValue=0.5
        PhaseLookup DMRetranslocationFactor
          PhaseLookupValue VegetativeGrowth: Start=Emergence; End=StartGrainFill
            Constant DMRetranslocationFactor: FixedValue=0
          PhaseLookupValue ReproductiveGrowth: Start=StartGrainFill; End=EndGrainFill
            Constant DMRetranslocationFactor: FixedValue=0
        BiomassRemoval BiomassRemovalDefaults: HarvestFractionLiveToRemove=0; HarvestFractionDeadToRemove=0; HarvestFractionLiveToResidue=0.6; HarvestFractionDeadToResidue=0.6
        DivideFunction PercentWSC
          VariableReference WSC: VariableName=[Stem].Live.StorageWt
          VariableReference StemWt: VariableName=[Stem].Live.Wt
        Constant DetachmentRateFunction: FixedValue=0; Units=/d
        Constant MaintenanceRespirationFunction: FixedValue=0; Units=0-1
        Constant DMConversionEfficiency: FixedValue=1; Units=0-1
        Constant DMReallocationFactor: FixedValue=0
        VariableReference CriticalNConc: VariableName=[Stem].MinimumNConc
        Constant RemobilisationCost: FixedValue=0
        Constant CarbonConcentration: FixedValue=0.4
        NutrientDemandFunctions DMDemands
          MultiplyFunction Structural
            PartitionFractionDemandFunction DMDemandFunction
              PhaseLookup PartitionFraction
                PhaseLookupValue PreStemElongation: Start=Emergence; End=TerminalSpikelet
                  Constant StemFraction: FixedValue=0.4
                PhaseLookupValue StemElongation: Start=TerminalSpikelet; End=FlagLeaf
                  Constant StemFraction: FixedValue=0.7
                PhaseLookupValue EarEmergence: Start=FlagLeaf; End=Flowering
                  Constant StemFraction: FixedValue=0.7
            PhaseLookup StructuralFraction
              PhaseLookupValue VegetativeGrowth: Start=Sowing; End=Flowering
                Constant Fraction: FixedValue=0.7
              PhaseLookupValue ReproductiveGrowth: Start=Flowering; End=HarvestRipe
                Constant Fraction: FixedValue=0.5
          Constant Metabolic: FixedValue=0
          StorageDMDemandFunction Storage
            SubtractFunction StorageFraction
              Constant One: FixedValue=1
              VariableReference StructuralFraction: VariableName=[Stem].DMDemands.Structural.StructuralFraction
          Constant QStructuralPriority: FixedValue=1
          Constant QMetabolicPriority: FixedValue=1
          Constant QStoragePriority: FixedValue=1
        NutrientDemandFunctions NDemands
          MultiplyFunction Structural
            VariableReference MinNconc: VariableName=[Stem].minimumNconc
            VariableReference PotentialDMAllocation: VariableName=[Stem].potentialDMAllocation.Structural
          MultiplyFunction Metabolic
            SubtractFunction MetabolicNconc
              VariableReference CritNconc: VariableName=[Stem].criticalNConc
              VariableReference MinNconc: VariableName=[Stem].minimumNconc
            VariableReference PotentialDMAllocation: VariableName=[Stem].potentialDMAllocation.Structural
          StorageNDemandFunction Storage
            VariableReference NitrogenDemandSwitch: VariableName=[Stem].nitrogenDemandSwitch
            VariableReference MaxNconc: VariableName=[Stem].maximumNconc
          Constant QStructuralPriority: FixedValue=1
          Constant QMetabolicPriority: FixedValue=1
          Constant QStoragePriority: FixedValue=1
        RetranslocateNonStructural RetranslocateNitrogen
        NutrientPoolFunctions InitialWt
          Constant Structural: FixedValue=0; Units=g/m^2
          Constant Metabolic: FixedValue=0
          Constant Storage: FixedValue=0
        Constant Photosynthesis: FixedValue=0
        VariableReference initialNConcFunction: VariableName=[Stem].MinimumNConc
      Root: GrowthRespiration=0; MaintenanceRespiration=0
        RootShapeCylinder RootShape
        Constant KLModifier: FixedValue=1
        Constant SoilWaterEffect: FixedValue=1
        Constant MaxDailyNUptake: FixedValue=20
        Constant SenescenceRate: FixedValue=0.005
        Constant MaximumRootDepth: FixedValue=1000000
        Constant MaximumNConc: FixedValue=0.01
        Constant MinimumNConc: FixedValue=0.01
        PhaseLookupValue NitrogenDemandSwitch: Start=Germination; End=Maturity
          Constant: FixedValue=1
        BiomassRemoval BiomassRemovalDefaults: HarvestFractionLiveToRemove=0; HarvestFractionDeadToRemove=0; HarvestFractionLiveToResidue=1; HarvestFractionDeadToResidue=1
        Constant KNO3: FixedValue=0.02
        Constant KNH4: FixedValue=0.01
        Constant SpecificRootLength: FixedValue=105; Units=m/g
        MultiplyFunction RootFrontVelocity
          PhaseLookup PotentialRootFrontVelocity
            PhaseLookupValue PreEmergence: Start=Germination; End=Emergence
              Constant Value: FixedValue=5; Units=mm/d
            PhaseLookupValue PostEmergence: Start=Emergence; End=Maturity
              Constant Value: FixedValue=20; Units=mm/d
          WeightedTemperatureFunction TemperatureFactor: MaximumTemperatureWeighting=0.5
            XYPairs: X=[0, 15, 25, 35]; Y=[0, 1, 1, 0]
          LinearInterpolationFunction WaterFactor
            SoilWaterScale: LLModel=1
            XYPairs: X=[0, 0.25, 1]; Y=[0, 1, 1]
            VariableReference XValue: VariableName=[SoilWaterScale]
        LinearInterpolationFunction NUptakeSWFactor
          SoilWaterScale: LLModel=1
          XYPairs: X=[0, 1]; Y=[0, 1]
          Memo
            This is modelled in the same way as the old wheat model where potential N uptake is decreased as the soil dries as described by NUptakeSWFactor
          VariableReference XValue: VariableName=[SoilWaterScale]
        Constant DMConversionEfficiency: FixedValue=1
        Constant MaintenanceRespirationFunction: FixedValue=1
        Constant RemobilisationCost: FixedValue=0
        Constant CarbonConcentration: FixedValue=0.4
        NutrientDemandFunctions DMDemands
          MultiplyFunction Structural
            PartitionFractionDemandFunction DMDemandFunction
              PhaseLookup PartitionFraction
                PhaseLookupValue PreEmergence: Start=Germination; End=Emergence
                  Constant Value: FixedValue=0
                PhaseLookupValue PreFlowering: Start=Emergence; End=Flowering
                  LinearInterpolationFunction AgeFactor
                    XYPairs: X=[3, 4]; Y=[0.5, 0.2]
                    VariableReference XValue: VariableName=[Phenology].Stage
                PhaseLookupValue PostFlowering: Start=Flowering; End=EndGrainFill
                  Constant Value: FixedValue=0.2
            Constant StructuralFraction: FixedValue=1
          Constant Metabolic: FixedValue=0
          StorageDMDemandFunction Storage
            SubtractFunction StorageFraction
              Constant One: FixedValue=1
              VariableReference StructuralFraction: VariableName=[Root].DMDemands.Structural.StructuralFraction
          Constant QStructuralPriority: FixedValue=1
          Constant QMetabolicPriority: FixedValue=1
          Constant QStoragePriority: FixedValue=1
        NutrientDemandFunctions NDemands
          MultiplyFunction Structural
            VariableReference MinNconc: VariableName=[Root].minimumNconc
            VariableReference PotentialDMAllocation: VariableName=[Root].potentialDMAllocation.Structural
          MultiplyFunction Metabolic
            SubtractFunction MetabolicNconc
              VariableReference CritNconc: VariableName=[Root].criticalNConc
              VariableReference MinNconc: VariableName=[Root].minimumNconc
            VariableReference PotentialDMAllocation: VariableName=[Root].potentialDMAllocation.Structural
          StorageNDemandFunction Storage
            VariableReference NitrogenDemandSwitch: VariableName=[Root].nitrogenDemandSwitch
            VariableReference MaxNconc: VariableName=[Root].maximumNconc
          Constant QStructuralPriority: FixedValue=1
          Constant QMetabolicPriority: FixedValue=1
          Constant QStoragePriority: FixedValue=1
        VariableReference CriticalNConc: VariableName=[Root].MinimumNConc
        NutrientPoolFunctions InitialWt
          Constant Structural: FixedValue=0.005; Units=g/plant
          Constant Metabolic: FixedValue=0
          Constant Storage: FixedValue=0
      GenericOrgan Panicle: IsAboveGround=true
        Constant NReallocationFactor: FixedValue=0
        Constant NRetranslocationFactor: FixedValue=0.3
        Constant MaximumNConc: FixedValue=0.025
        Constant SenescenceRate: FixedValue=0; Units=/d
        Constant MinimumNConc: FixedValue=0.02
        BiomassRemoval BiomassRemovalDefaults: HarvestFractionLiveToRemove=0; HarvestFractionDeadToRemove=0; HarvestFractionLiveToResidue=1; HarvestFractionDeadToResidue=1
        PhaseLookupValue NitrogenDemandSwitch: Start=Emergence; End=StartGrainFill
          Constant: FixedValue=1
        PhaseLookup DMRetranslocationFactor
          PhaseLookupValue VegetativeGrowth: Start=Emergence; End=StartGrainFill
            Constant DMRetranslocationFactor: FixedValue=0
          PhaseLookupValue ReproductiveGrowth: Start=StartGrainFill; End=EndGrainFill
            Constant DMRetranslocationFactor: FixedValue=0.5
        Constant DetachmentRateFunction: FixedValue=0; Units=/d
        Constant MaintenanceRespirationFunction: FixedValue=0; Units=0-1
        Constant DMConversionEfficiency: FixedValue=1; Units=0-1
        MultiplyFunction HeadNumber
          VariableReference StemNumber: VariableName=[Structure].TotalStemPopn
          Constant PaniclesPerStem: FixedValue=0.83; Units=0-1
        Constant DMReallocationFactor: FixedValue=0
        VariableReference CriticalNConc: VariableName=[Panicle].MinimumNConc
        Constant RemobilisationCost: FixedValue=0
        Constant CarbonConcentration: FixedValue=0.4
        NutrientDemandFunctions DMDemands
          MultiplyFunction Structural
            PopulationBasedDemandFunction DMDemandFunction
              VariableReference ThermalTime: VariableName=[Phenology].ThermalTime
              MinimumFunction ExpansionStress: same as Replacements.Oats.Leaf.CohortParameters.ExpansionStress
              VariableReference OrganPopulation: VariableName=[Panicle].HeadNumber
              Constant StartStage: FixedValue=4.8
              Constant MaximumOrganWt: FixedValue=0.4; Units=g
              AddFunction GrowthDuration
                VariableReference EarlyReproductive: VariableName=[Phenology].EarlyReproductive.Target
                VariableReference GrainDevelopment: VariableName=[Phenology].GrainDevelopment.Target
            Constant StructuralFraction: FixedValue=0.9
          Constant Metabolic: FixedValue=0
          StorageDMDemandFunction Storage
            SubtractFunction StorageFraction
              Constant One: FixedValue=1
              VariableReference StructuralFraction: VariableName=[Panicle].DMDemands.Structural.StructuralFraction
          Constant QStructuralPriority: FixedValue=1
          Constant QMetabolicPriority: FixedValue=1
          Constant QStoragePriority: FixedValue=1
        NutrientDemandFunctions NDemands
          MultiplyFunction Structural
            VariableReference MinNconc: VariableName=[Panicle].minimumNconc
            VariableReference PotentialDMAllocation: VariableName=[Panicle].potentialDMAllocation.Structural
          MultiplyFunction Metabolic
            SubtractFunction MetabolicNconc
              VariableReference CritNconc: VariableName=[Panicle].criticalNConc
              VariableReference MinNconc: VariableName=[Panicle].minimumNconc
            VariableReference PotentialDMAllocation: VariableName=[Panicle].potentialDMAllocation.Structural
          StorageNDemandFunction Storage
            VariableReference NitrogenDemandSwitch: VariableName=[Panicle].nitrogenDemandSwitch
            VariableReference MaxNconc: VariableName=[Panicle].maximumNconc
          Constant QStructuralPriority: FixedValue=1
          Constant QMetabolicPriority: FixedValue=1
          Constant QStoragePriority: FixedValue=1
        RetranslocateNonStructural RetranslocateNitrogen
        NutrientPoolFunctions InitialWt: same as Replacements.Oats.Stem.InitialWt
        Constant Photosynthesis: FixedValue=0
        VariableReference initialNConcFunction: VariableName=[Panicle].MinimumNConc
      CompositeBiomass AboveGround: OrganNames=[Leaf, Stem, Panicle, Grain]; IncludeLive=true; IncludeDead=true
      CompositeBiomass AboveGroundLive: OrganNames=[Leaf, Stem, Panicle, Grain]; IncludeLive=true; IncludeDead=false
      CompositeBiomass AboveGroundDead: OrganNames=[Leaf, Stem, Panicle, Grain]; IncludeLive=false; IncludeDead=true
      CompositeBiomass BelowGround: OrganNames=[Root]; IncludeLive=true; IncludeDead=true
      CompositeBiomass Total: OrganNames=[Leaf, Stem, Root, Panicle, Grain]; IncludeLive=true; IncludeDead=true
      CompositeBiomass TotalLive: OrganNames=[Leaf, Stem, Root, Panicle, Grain]; IncludeLive=true; IncludeDead=false
      CompositeBiomass TotalDead: OrganNames=[Leaf, Stem, Root, Panicle, Grain]; IncludeLive=false; IncludeDead=true
      CompositeBiomass Ear: OrganNames=[Panicle, Grain]; IncludeLive=true; IncludeDead=true
        Memo
          The Ear composite biomass object includes the Live and dead pools of all organs within the Ear to allow output for total dry matter and Nutrient contents, including total structural, non-structural and metabolic pools.
      CompositeBiomass StemPlusPanicle: OrganNames=[Stem, Panicle]; IncludeLive=true; IncludeDead=true
      Folder Cultivars
        Memo
          Most crop parameters can be specified individually for cultivars. Customized cultivar parameters are reported in this section.
        Cultivar Drummond
          Command:
            [Phenology].MinimumLeafNumber.FixedValue = 8.5
            [Phenology].VrnSensitivity.FixedValue = 7
            [Phenology].PpSensitivity.FixedValue = 3
            [Phenology].EarlyReproductiveLongDayBase.FixedValue = 3
            [Phenology].EarlyReproductivePpSensitivity.FixedValue = 2
            [Structure].Phyllochron.BasePhyllochron.FixedValue = 75
            [Structure].BranchingRate.StressFactors.CoverEffect.XYPairs.X = 0,0.2,0.35
            [Leaf].CohortParameters.MaxArea.AreaLargestLeaves.FixedValue = 4000
            [Structure].BranchingRate.PotentialBranchingRate.Vegetative.PotentialBranchingRate.XYPairs.X = 1,2,3.99,4,5,6,7,8,9
            [Structure].BranchingRate.PotentialBranchingRate.Vegetative.PotentialBranchingRate.XYPairs.Y = 0,0,0,1,2,4,7,12,20
            [Leaf].CohortParameters.GrowthDuration.AgeFactor.XYPairs.Y = 1,1,0.1
            [Grain].MaximumPotentialGrainSize.FixedValue = 0.05
            [Grain].NumberFunction.GrainNumber.GrainsPerGramOfStem.FixedValue = 40
        Cultivar Drummond_orig
          Command:
            [Phenology].MinimumLeafNumber.FixedValue = 9
            [Phenology].VrnSensitivity.FixedValue = 0
            [Phenology].PpSensitivity.FixedValue = 10
            [Structure].Phyllochron.BasePhyllochron.FixedValue = 80
            [Structure].BranchingRate.StressFactors.CoverEffect.XYPairs.X = 0,0.2,0.35
            [Leaf].CohortParameters.MaxArea.AreaLargestLeaves.FixedValue = 4000
            [Structure].BranchingRate.PotentialBranchingRate.Vegetative.PotentialBranchingRate.XYPairs.X = 1,2,3.99,4,5,6,7,8,9
        Cultivar Milton
          Command:
            [Phenology].MinimumLeafNumber.FixedValue = 8.5
            [Phenology].VrnSensitivity.FixedValue = 7
            [Phenology].PpSensitivity.FixedValue = 3
            [Phenology].EarlyReproductiveLongDayBase.FixedValue = 2
            [Phenology].EarlyReproductivePpSensitivity.FixedValue = 0
            [Structure].Phyllochron.BasePhyllochron.FixedValue = 105
            [Leaf].CohortParameters.MaxArea.AreaLargestLeaves.FixedValue = 4000
            [Leaf].CohortParameters.SenescenceDuration.Multiplier.FixedValue = 3
            [Leaf].CohortParameters.GrowthDuration.AgeFactor.XYPairs.Y = 1,1,0.1
            [Grain].MaximumPotentialGrainSize.FixedValue = 0.05
            [Grain].NumberFunction.GrainNumber.GrainsPerGramOfStem.FixedValue = 50
            [Leaf].ExtinctionCoeff.FixedValue = 0.6
        Cultivar Hokonui
          Command:
            [Phenology].MinimumLeafNumber.FixedValue = 9
            [Phenology].VrnSensitivity.FixedValue = 0
            [Phenology].PpSensitivity.FixedValue = 10
            [Structure].Phyllochron.BasePhyllochron.FixedValue = 90
            [Leaf].CohortParameters.GrowthDuration.AgeFactor.XYPairs.Y = 1,1,0.1
        Cultivar Stampede
          Command:
            [Phenology].MinimumLeafNumber.FixedValue = 9
            [Phenology].VrnSensitivity.FixedValue = 0
            [Phenology].PpSensitivity.FixedValue = 10
            [Structure].Phyllochron.BasePhyllochron.FixedValue = 80
            [Leaf].CohortParameters.GrowthDuration.AgeFactor.XYPairs.Y = 1,1,0.1
        Cultivar Coolibah
          Command:
            [Phenology].MinimumLeafNumber.FixedValue = 9
            [Phenology].VrnSensitivity.FixedValue = 5.3
            [Phenology].PpSensitivity.FixedValue = 3.0
            [Structure].Phyllochron.BasePhyllochron.FixedValue = 90
            [Leaf].CohortParameters.MaxArea.AreaLargestLeaves.FixedValue = 5000
            [Phenology].EarlyReproductivePpSensitivity.FixedValue = 0
            [Phenology].EarlyReproductiveLongDayBase.FixedValue = 2
            [Structure].BranchingRate.StressFactors.CoverEffect.XYPairs.X = 0,0.25,0.5
          Memo
            Leaf appearance rate calibrated using data from Gatton 2007 for Taipan and Coolibah
        Cultivar Taipan
          Command:
            [Phenology].MinimumLeafNumber.FixedValue = 9
            [Phenology].VrnSensitivity.FixedValue = 10
            [Phenology].PpSensitivity.FixedValue = 7.5
            [Phenology].EarlyReproductivePpSensitivity.FixedValue = 3
            [Phenology].EarlyReproductiveLongDayBase.FixedValue = 3
            [Structure].Phyllochron.BasePhyllochron.FixedValue = 90
            [Leaf].CohortParameters.MaxArea.AreaLargestLeaves.FixedValue = 8000
          Memo
            Leaf appearance rate calibrated using data from Gatton 2007 for Taipan and Coolibah
        Cultivar Wintaroo
          Command:
            [Phenology].MinimumLeafNumber.FixedValue = 7
            [Phenology].VrnSensitivity.FixedValue = 2
            [Phenology].PpSensitivity.FixedValue = 2
            [Phenology].EarlyReproductivePpSensitivity.FixedValue = 0
            [Phenology].EarlyReproductiveLongDayBase.FixedValue = 2
            [Structure].Phyllochron.BasePhyllochron.FixedValue = 90
        Cultivar Kangaroo
          Command:
            [Phenology].MinimumLeafNumber.FixedValue = 7
            [Phenology].VrnSensitivity.FixedValue = 4
            [Phenology].PpSensitivity.FixedValue = 4
            [Phenology].EarlyReproductivePpSensitivity.FixedValue = 0
            [Phenology].EarlyReproductiveLongDayBase.FixedValue = 2
            [Structure].Phyllochron.BasePhyllochron.FixedValue = 90
        Cultivar Brusher
          Command:
            [Phenology].MinimumLeafNumber.FixedValue = 7
            [Phenology].VrnSensitivity.FixedValue = 1
            [Phenology].PpSensitivity.FixedValue = 1
            [Phenology].EarlyReproductivePpSensitivity.FixedValue = 0
            [Phenology].EarlyReproductiveLongDayBase.FixedValue = 2
            [Structure].Phyllochron.BasePhyllochron.FixedValue = 80
        Cultivar Algerian
          Command:
            [Phenology].MinimumLeafNumber.FixedValue = 9
            [Phenology].VrnSensitivity.FixedValue = 12
            [Phenology].PpSensitivity.FixedValue = 6
            [Phenology].EarlyReproductivePpSensitivity.FixedValue = 4
            [Phenology].EarlyReproductiveLongDayBase.FixedValue = 3
            [Structure].Phyllochron.BasePhyllochron.FixedValue = 105
            [Leaf].CohortParameters.MaxArea.AreaLargestLeaves.FixedValue = 5000
            [Structure].BranchingRate.StressFactors.CoverEffect.XYPairs.X = 0,0.4,0.7
        Cultivar Nugene
          Command:
            [Phenology].MinimumLeafNumber.FixedValue = 9
            [Phenology].VrnSensitivity.FixedValue = 10
            [Phenology].PpSensitivity.FixedValue = 7.5
            [Phenology].EarlyReproductivePpSensitivity.FixedValue = 3
            [Phenology].EarlyReproductiveLongDayBase.FixedValue = 3
            [Structure].Phyllochron.BasePhyllochron.FixedValue = 90
            [Leaf].CohortParameters.MaxArea.AreaLargestLeaves.FixedValue = 8000
        Cultivar Drover
          Command:
            [Phenology].MinimumLeafNumber.FixedValue = 9
            [Phenology].VrnSensitivity.FixedValue = 4
            [Phenology].PpSensitivity.FixedValue = 9
            [Phenology].EarlyReproductivePpSensitivity.FixedValue = 6
            [Phenology].EarlyReproductiveLongDayBase.FixedValue = 3
            [Structure].Phyllochron.BasePhyllochron.FixedValue = 80
            [Leaf].CohortParameters.MaxArea.AreaLargestLeaves.FixedValue = 8000
        Cultivar Genie: same as Replacements.Oats.Cultivars.Nugene
        Cultivar Aladdin: same as Replacements.Oats.Cultivars.Nugene
        Cultivar Comet: same as Replacements.Oats.Cultivars.Nugene
        Cultivar Wizard: same as Replacements.Oats.Cultivars.Nugene
        Cultivar Bond: same as Replacements.Oats.Cultivars.Nugene
        Cultivar Coronet
          Command:
            [Phenology].MinimumLeafNumber.FixedValue = 9
            [Phenology].VrnSensitivity.FixedValue = 0
            [Phenology].PpSensitivity.FixedValue = 0
            [Structure].Phyllochron.BasePhyllochron.FixedValue = 110
            [Leaf].ExtinctionCoeff.FixedValue = 0.5
            [Leaf].CohortParameters.MaxArea.AreaLargestLeaves.FixedValue = 3073
            [Leaf].InitialLeaves1.Area = 28.4
            [Leaf].CohortParameters.MaxArea.AgeFactor.XYPairs.X = 3,3.5,4.0,4.5,4.9
            [Leaf].CohortParameters.MaxArea.AgeFactor.XYPairs.Y = 0.1,0.1,0.4,1,0.55
            [Structure].HeightModel.PotentialHeight.XYPairs.Y = 10,150,550,750
            [Structure].BranchingRate.PotentialBranchingRate.Vegetative.PotentialBranchingRate.XYPairs.X = 1,2,3,4,5,6,7,8
            [Structure].BranchingRate.PotentialBranchingRate.Vegetative.PotentialBranchingRate.XYPairs.Y = 0,1,1,0,0,0,0,0
            [Oats].Structure.BranchingRate.StressFactors.CoverEffect.XYPairs.X = 1,1,1
            [Oats].Leaf.CohortParameters.SpecificLeafAreaMax.XYPairs.X = 3,4.3,4.5,4.8
            [Oats].Leaf.CohortParameters.SpecificLeafAreaMax.XYPairs.Y = 15000,20000,23000,25000
            [Stem].MaximumNConc.XYPairs.Y = 0.045,0.04,0.01
            [Stem].MaximumNConc.XYPairs.X = 3.0, 4.2, 5
            [Oats].Structure.BranchMortality.MortalityPhase.Mortality.MortalityPerDegDay.XYPairs.Y[1] = 0.0008
        Cultivar CROA146
          Command:
            [Phenology].MinimumLeafNumber.FixedValue = 9
            [Phenology].VrnSensitivity.FixedValue = 0
            [Phenology].PpSensitivity.FixedValue = 0
            [Structure].Phyllochron.BasePhyllochron.FixedValue = 110
            [Leaf].ExtinctionCoeff.FixedValue = 0.5
            [Leaf].CohortParameters.MaxArea.AreaLargestLeaves.FixedValue = 4105
            [Leaf].InitialLeaves1.Area = 41.0
            [Leaf].CohortParameters.MaxArea.AgeFactor.XYPairs.X = 3,3.2,4.0,4.4,4.7
            [Leaf].CohortParameters.MaxArea.AgeFactor.XYPairs.Y = 0.12,0.2,1,1,0.55
            [Structure].HeightModel.PotentialHeight.XYPairs.Y = 10,150,550,750
            [Structure].BranchingRate.PotentialBranchingRate.Vegetative.PotentialBranchingRate.XYPairs.X = 1,2,3,4,5,6,7,8
            [Structure].BranchingRate.PotentialBranchingRate.Vegetative.PotentialBranchingRate.XYPairs.Y = 0,0,0,0,0,1.7,0,0
            [Oats].Structure.BranchingRate.StressFactors.CoverEffect.XYPairs.X = 1,1,1
            [Oats].Leaf.CohortParameters.SpecificLeafAreaMax.XYPairs.X = 3,3.5,4
            [Oats].Leaf.CohortParameters.SpecificLeafAreaMax.XYPairs.Y = 18000,20000,25000
            [Oats].Leaf.CohortParameters.GrowthDuration.AgeFactor.XYPairs.X = 3, 4.5, 4.6
            [Oats].Leaf.CohortParameters.GrowthDuration.AgeFactor.XYPairs.Y = 1, 1, 0.2
        Cultivar 107_32
          Command:
            [Phenology].MinimumLeafNumber.FixedValue = 9
            [Phenology].VrnSensitivity.FixedValue = 0
            [Phenology].PpSensitivity.FixedValue = 0
            [Structure].Phyllochron.BasePhyllochron.FixedValue = 110
            [Leaf].ExtinctionCoeff.FixedValue = 0.5
            [Leaf].CohortParameters.MaxArea.AreaLargestLeaves.FixedValue = 4289
            [Leaf].InitialLeaves1.Area = 68.5
            [Leaf].CohortParameters.MaxArea.AgeFactor.XYPairs.X = 3,3.2,4.0,4.3,4.6
            [Leaf].CohortParameters.MaxArea.AgeFactor.XYPairs.Y = 0.12,0.2,1,1,0.55
            [Structure].HeightModel.PotentialHeight.XYPairs.Y = 10,150,550,750
            [Structure].BranchingRate.PotentialBranchingRate.Vegetative.PotentialBranchingRate.XYPairs.X = 1,2,3,4,5,6,7,8
            [Structure].BranchingRate.PotentialBranchingRate.Vegetative.PotentialBranchingRate.XYPairs.Y = 0,0,0,0,0,1.7,0,0
            [Oats].Structure.BranchingRate.StressFactors.CoverEffect.XYPairs.X = 1,1,1
            [Oats].Leaf.CohortParameters.SpecificLeafAreaMax.XYPairs.X = 3,3.5,4
            [Oats].Leaf.CohortParameters.SpecificLeafAreaMax.XYPairs.Y = 18000,20000,25000
            [Oats].Leaf.CohortParameters.GrowthDuration.AgeFactor.XYPairs.X = 3, 4.5, 4.6
            [Oats].Leaf.CohortParameters.GrowthDuration.AgeFactor.XYPairs.Y = 1, 1, 0.2
        Cultivar Armstrong
          Command:
            [Phenology].MinimumLeafNumber.FixedValue = 9
            [Phenology].VrnSensitivity.FixedValue = 0
            [Phenology].PpSensitivity.FixedValue = 0
            [Structure].Phyllochron.BasePhyllochron.FixedValue = 135
            [Leaf].ExtinctionCoeff.FixedValue = 0.5
            [Leaf].CohortParameters.MaxArea.AreaLargestLeaves.FixedValue = 4417
            [Leaf].InitialLeaves1.Area = 54.6
            [Leaf].CohortParameters.MaxArea.AgeFactor.XYPairs.X = 3,3.2,4.0,4.3,4.9
            [Leaf].CohortParameters.MaxArea.AgeFactor.XYPairs.Y = 0.12,0.2,1,1,0.25
            [Structure].HeightModel.PotentialHeight.XYPairs.Y = 10,150,550,750
            [Structure].BranchingRate.PotentialBranchingRate.Vegetative.PotentialBranchingRate.XYPairs.X = 1,2,3,4,5,6,7,8
            [Structure].BranchingRate.PotentialBranchingRate.Vegetative.PotentialBranchingRate.XYPairs.Y = 0,0,0,0,0,1.7,0,0
            [Oats].Structure.BranchingRate.StressFactors.CoverEffect.XYPairs.X = 1,1,1
            [Oats].Leaf.CohortParameters.SpecificLeafAreaMax.XYPairs.X = 3,3.5,4
            [Oats].Leaf.CohortParameters.SpecificLeafAreaMax.XYPairs.Y = 18000,20000,25000
            [Oats].Leaf.CohortParameters.GrowthDuration.AgeFactor.XYPairs.X = 3, 4.5, 4.6
            [Oats].Leaf.CohortParameters.GrowthDuration.AgeFactor.XYPairs.Y = 1, 1, 0.2
        Cultivar 100_05
          Command:
            [Phenology].MinimumLeafNumber.FixedValue = 10.1
            [Phenology].VrnSensitivity.FixedValue = 0
            [Phenology].PpSensitivity.FixedValue = 0
            [Structure].Phyllochron.BasePhyllochron.FixedValue = 110
            [Leaf].ExtinctionCoeff.FixedValue = 0.5
            [Leaf].CohortParameters.MaxArea.AreaLargestLeaves.FixedValue = 5814
            [Leaf].InitialLeaves1.Area = 71.2
            [Leaf].CohortParameters.MaxArea.AgeFactor.XYPairs.X = 3,3.8,4.5,4.6,4.7
            [Leaf].CohortParameters.MaxArea.AgeFactor.XYPairs.Y = 0.1,0.4,1,0.9,0.45
            [Structure].HeightModel.PotentialHeight.XYPairs.Y = 10,150,550,750
            [Structure].BranchingRate.PotentialBranchingRate.Vegetative.PotentialBranchingRate.XYPairs.X = 1,2,3,4,5,6,7,8
            [Structure].BranchingRate.PotentialBranchingRate.Vegetative.PotentialBranchingRate.XYPairs.Y = 0,1,1,0,0,0,0,0
            [Oats].Structure.BranchingRate.StressFactors.CoverEffect.XYPairs.X = 1,1,1
            [Oats].Leaf.CohortParameters.SpecificLeafAreaMax.XYPairs.X = 3,4.3,4.5,4.8
            [Oats].Leaf.CohortParameters.SpecificLeafAreaMax.XYPairs.Y = 15000,20000,23000,25000
            [Stem].MaximumNConc.XYPairs.Y = 0.045,0.035,0.01
            [Stem].MaximumNConc.XYPairs.X = 3.0, 4.2, 4.8
            [Oats].Structure.BranchMortality.MortalityPhase.Mortality.MortalityPerDegDay.XYPairs.Y[1] = 0.0022
        Cultivar Milton2
          Command:
            [Phenology].MinimumLeafNumber.FixedValue = 9
            [Phenology].VrnSensitivity.FixedValue = 0
            [Phenology].PpSensitivity.FixedValue = 0
            [Structure].Phyllochron.BasePhyllochron.FixedValue = 110
            [Leaf].ExtinctionCoeff.FixedValue = 0.5
            [Leaf].CohortParameters.MaxArea.AreaLargestLeaves.FixedValue = 3593
            [Leaf].InitialLeaves1.Area = 45.0
            [Leaf].CohortParameters.MaxArea.AgeFactor.XYPairs.X = 3,3.2,4.0,4.5,4.8
            [Leaf].CohortParameters.MaxArea.AgeFactor.XYPairs.Y = 0.12,0.2,1,1,0.3
            [Structure].HeightModel.PotentialHeight.XYPairs.Y = 10,150,550,750
            [Structure].BranchingRate.PotentialBranchingRate.Vegetative.PotentialBranchingRate.XYPairs.X = 1,2,3,4,5,6,7,8
            [Structure].BranchingRate.PotentialBranchingRate.Vegetative.PotentialBranchingRate.XYPairs.Y = 0,0,0,0,0,1.7,0,0
            [Oats].Structure.BranchingRate.StressFactors.CoverEffect.XYPairs.X = 1,1,1
            [Oats].Leaf.CohortParameters.SpecificLeafAreaMax.XYPairs.X = 3,3.5,4
            [Oats].Leaf.CohortParameters.SpecificLeafAreaMax.XYPairs.Y = 18000,20000,25000
            [Oats].Leaf.CohortParameters.GrowthDuration.AgeFactor.XYPairs.X = 3, 4.5, 4.6
            [Oats].Leaf.CohortParameters.GrowthDuration.AgeFactor.XYPairs.Y = 1, 1, 0.2
      Constant MortalityRate: FixedValue=0
      Constant SeedMortalityRate: FixedValue=0
  DataStore
    ExcelInput Observed: FileNames=[Observed.xlsx]
      SheetNames=[Observed, MaxLeafSize, SLMACC, SAE, SWC, SoilMineralN, NLeach]
    PredictedObserved DailyPO: PredictedTableName=DailyReport; ObservedTableName=Observed; FieldNameUsedForMatch=SimulationName; FieldName2UsedForMatch=Clock.Today; AllColumns=false
    PredictedObserved HarvestPO: PredictedTableName=HarvestReport; ObservedTableName=Observed; FieldNameUsedForMatch=SimulationName; FieldName2UsedForMatch=Oats.Phenology.CurrentStageName; AllColumns=false
    PredictedObserved DailyPOSAE: PredictedTableName=DailyReportWater_n_MineralN; ObservedTableName=Observed; FieldNameUsedForMatch=SimulationName; FieldName2UsedForMatch=Clock.Today; AllColumns=false
    PredictedObserved EnviroPO: PredictedTableName=EnviroReport; ObservedTableName=Observed; FieldNameUsedForMatch=SimulationName; FieldName2UsedForMatch=Clock.Today; AllColumns=false
    PredictedObserved DailyPOSup: PredictedTableName=SupReport; ObservedTableName=Observed; FieldNameUsedForMatch=SimulationName; FieldName2UsedForMatch=Clock.Today; AllColumns=false
  Folder Validation
    Memo
      A test dataset has been developed to test the APSIM Oats model for a range of environmental (soil and climate) conditions, management options (sowing dates, populations, nitrogen rates, row spacing, irrigation), genetic backgrounds (different regions, cultivar types) and for special considerations such as defoliation (or simulated grazing).  These tests have been groups into various geographical regions to allow the user to evaluate the suitability of the model for their particular region of interest.  Graphs of model performance are provided for yield, biomass production, canopy development, phenological development, water and nitrogen uptake, and grain yield components.
    Folder Combined Results
      Memo Combined Results
        Simulation results for the combined datasets from the various countries are shown in the following graphs.  The model is able to adequately capture the influence of growing conditions (soil, climate) and management (population, Nitrogen, irrigation, sowing date).
    Folder New Zealand
      Experiment RS_Oats_9899
        Memo Experiment Description
          Data from:

          [martin2001effect]

          	The response of oats (Avena sativa L.) to timing and intensity of drought was determined in a mobile
          rainshelter, which excluded rainfall during crop growth. Ten irrigation treatments subjected the crops to
          drought of varying duration at different stages during plant growth; the crops were otherwise fully
          irrigated. Oat grain yield generally increased linearly with cumulative water use, and decreased linearly as
          the maximum potential soil moisture deficit experienced during crop growth increased, regardless of the
          timing of drought. The exception to this was the no drought (fully irrigated) treatment, where lodging
          reduced panicle number and grain weight compared to early drought treatments. Drought affected yield
          mainly by reducing panicle and grain number, effects on grain weight were small. . Relieving early drought
          through late irrigation led to more late tillers, more panicles, heavier grains, and later maturity. Full and
          late drought increased screenings.
        Factors
          Factor _Irrig
            CompositeFactor Nil
              Specifications:
                [Irrig]
                [Physical]
                [Water].Thickness=200,200,200,200,200,200,200,200
                [Water].InitialValues=0.32,0.3,0.27,0.24,0.23,0.23,0.13,0.17
              Operations Irrig
                1999-02-10  [Oats].Harvest();
                1999-02-10  [Oats].EndCrop();
              Physical
                Thickness  BD     AirDry  LL15  DUL   SAT   KS
                200        1.311  0.07    0.12  0.32  0.42  4832.039
                200        1.524  0.14    0.14  0.3   0.41  389.229
                200        1.65   0.14    0.14  0.27  0.34  16.362
                200        1.601  0.1     0.1   0.24  0.32  97.995
                200        1.601  0.05    0.14  0.23  0.35  97.995
                200        1.601  0.05    0.16  0.23  0.34  97.995
                200        1.601  0.09    0.09  0.13  0.31  97.995
                200        1.601  0.06    0.06  0.17  0.31  97.995
                SoilCrop OatsSoil: LL=[0.12, 0.14, 0.14, 0.1, 0.14, 0.16, 0.09, 0.06]; KL=[0.06, 0.07, 0.04, 0.04, 0.05, 0.03, 0.02, 0.01]; XF=[1, 1, 1, 1, 1, 1, 1, 1]
            CompositeFactor Full
              Specifications:
                [Irrig]
                [Physical]
                [Water].Thickness=200,200,200,200,200,200,200,200
                [Water].InitialValues=0.3,0.3,0.28,0.26,0.29,0.28,0.11,0.12
              Operations Irrig
                1998-10-31  [Irrigation].Apply(30);
                1998-11-09  [Irrigation].Apply(35.3);
                1998-11-16  [Irrigation].Apply(45);
                1998-11-23  [Irrigation].Apply(44);
                1998-11-30  [Irrigation].Apply(30.1);
                1998-12-07  [Irrigation].Apply(41.6);
                1998-12-14  [Irrigation].Apply(55);
                1998-12-21  [Irrigation].Apply(50);
                1998-12-28  [Irrigation].Apply(55);
                1999-01-05  [Irrigation].Apply(53);
                1999-01-11  [Irrigation].Apply(50.4);
                1999-01-18  [Irrigation].Apply(49);
                1999-01-25  [Irrigation].Apply(49);
                1999-02-01  [Irrigation].Apply(51.2);
                1999-02-08  [Irrigation].Apply(53);
                1999-02-15  [Irrigation].Apply(34);
                1999-02-22  [Irrigation].Apply(37);
                1999-03-01  [Irrigation].Apply(24);
                1999-03-03  [Oats].Harvest();
                1999-03-03  [Oats].EndCrop();
                Memo
                  Added an Irrigation on 30 Oct after looking at data and seeing a Panicle.
              Physical
                Thickness  BD     AirDry  LL15   DUL    SAT    KS
                200        1.311  0.05    0.1    0.3    0.419  4832.039
                200        1.524  0.05    0.1    0.3    0.405  389.229
                200        1.65   0.149   0.149  0.28   0.342  16.362
                200        1.601  0.129   0.129  0.255  0.322  97.995
                200        1.601  0.155   0.155  0.288  0.348  97.995
                200        1.601  0.05    0.149  0.28   0.342  97.995
                200        1.601  0.05    0.053  0.107  0.307  97.995
                200        1.601  0.061   0.061  0.122  0.31   97.995
                SoilCrop OatsSoil: LL=[0.1, 0.1, 0.149, 0.129, 0.155, 0.149, 0.053, 0.061]; KL=[0.06, 0.05, 0.04, 0.06, 0.05, 0.02, 0.02, 0]; XF=[1, 1, 1, 1, 1, 1, 1, 1]
            CompositeFactor LD1
              Specifications:
                [Irrig]
                [Physical]
                [Water].Thickness=200,200,200,200,200,200,200,200
                [Water].InitialValues=0.28,0.3,0.26,0.28,0.27,0.28,0.2,0.22
              Operations Irrig
                1998-10-27  [Irrigation].Apply(50);
                1998-11-02  [Irrigation].Apply(30);
                1999-02-10  [Oats].Harvest();
                1999-02-10  [Oats].EndCrop();
              Physical
                Thickness  BD     AirDry  LL15  DUL   SAT
                200        1.311  0.05    0.1   0.32  0.42
                200        1.524  0.12    0.12  0.3   0.41
                200        1.65   0.13    0.13  0.26  0.34
                200        1.601  0.1     0.13  0.28  0.32
                200        1.601  0.05    0.17  0.27  0.35
                200        1.601  0.05    0.18  0.28  0.34
                200        1.601  0.05    0.05  0.2   0.31
                200        1.601  0.06    0.06  0.22  0.31
                SoilCrop OatsSoil: LL=[0.1, 0.12, 0.13, 0.129, 0.17, 0.18, 0.053, 0.061]; KL=[0.06, 0.05, 0.04, 0.04, 0.04, 0.03, 0.02, 0.01]; XF=[1, 1, 1, 1, 1, 1, 1, 1]
            CompositeFactor LD4
              Specifications:
                [Irrig]
                [Physical]
                [Water].Thickness=200,200,200,200,200,200,200,200
                [Water].InitialValues=0.32,0.3,0.26,0.19,0.25,0.21,0.13,0.2
              Operations Irrig
                1998-10-27  [Irrigation].Apply(50)
                1998-11-02  [Irrigation].Apply(30)
                1998-11-09  [Irrigation].Apply( 35.3)
                1998-11-16  [Irrigation].Apply(45)
                1998-11-23  [Irrigation].Apply( 44)
                1998-11-30  [Irrigation].Apply(30.1 )
                1998-12-07  [Irrigation].Apply( 41.6)
                1999-02-10  [Oats].Harvest();
                1999-02-10  [Oats].EndCrop();
              Physical
                Thickness  BD     AirDry  LL15  DUL   SAT   KS
                200        1.311  0.05    0.1   0.32  0.42  4832.039
                200        1.524  0.13    0.13  0.3   0.41  389.229
                200        1.65   0.1     0.1   0.26  0.34  16.362
                200        1.601  0.08    0.08  0.24  0.32  97.995
                200        1.601  0.05    0.16  0.27  0.35  97.995
                200        1.601  0.05    0.16  0.23  0.34  97.995
                200        1.601  0.08    0.08  0.15  0.31  97.995
                200        1.601  0.06    0.06  0.2   0.31  97.995
                SoilCrop OatsSoil: LL=[0.1, 0.13, 0.1, 0.09, 0.16, 0.16, 0.08, 0.061]; KL=[0.06, 0.06, 0.05, 0.06, 0.05, 0.02, 0.02, 0.01]; XF=[1, 1, 1, 1, 1, 1, 1, 1]
            CompositeFactor ED1
              Specifications:
                [Irrig]
                [Physical]
                [Water].Thickness=200,200,200,200,200,200,200,200
                [Water].InitialValues=0.25,0.33,0.27,0.22,0.2,0.25,0.19,0.17
              Operations Irrig
                1998-11-16  [Irrigation].Apply(  45 )
                1998-11-23  [Irrigation].Apply(  44 )
                1998-11-30  [Irrigation].Apply(  30.1 )
                1998-12-07  [Irrigation].Apply(  41.6 )
                1998-12-14  [Irrigation].Apply(  55 )
                1998-12-21  [Irrigation].Apply(  50 )
                1998-12-28  [Irrigation].Apply(  55 )
                1999-01-05  [Irrigation].Apply(  53 )
                1999-01-11  [Irrigation].Apply( 50.4 )
                1999-01-18  [Irrigation].Apply(  49 )
                1999-01-25  [Irrigation].Apply(  49 )
                1999-02-01  [Irrigation].Apply(  51.2 )
                1999-02-08  [Irrigation].Apply(  53 )
                1999-02-15  [Irrigation].Apply(  34 )
                1999-02-22  [Irrigation].Apply(  37 )
                1999-03-01  [Irrigation].Apply(  24 )
                1999-03-03  [Oats].Harvest();
                1999-03-03  [Oats].EndCrop();
              Physical
                Thickness  BD    AirDry  LL15  DUL   SAT   KS
                200        1.31  0.05    0.1   0.25  0.42  4832.039
                200        1.52  0.1     0.1   0.33  0.41  389.229
                200        1.65  0.1     0.15  0.27  0.34  16.362
                200        1.6   0.14    0.14  0.22  0.32  97.995
                200        1.6   0.05    0.15  0.2   0.35  97.995
                200        1.6   0.05    0.15  0.25  0.34  97.995
                200        1.6   0.1     0.1   0.19  0.31  97.995
                200        1.6   0.06    0.06  0.17  0.31  97.995
                SoilCrop OatsSoil: LL=[0.1, 0.1, 0.149, 0.14, 0.15, 0.149, 0.1, 0.06]; KL=[0.06, 0.05, 0.04, 0.06, 0.05, 0.02, 0.02, 0]; XF=[1, 1, 1, 1, 1, 1, 1, 1]
        Simulation LincRS9899
          Clock: Start=1998-09-28; End=1999-04-01
          Summary summaryfile
          Weather: FileName=WeatherFiles\Lincoln.met; Latitude=-43.626; Tav=11.6; Amp=10.6
          SoilArbitrator Soil Arbitrator
          Zone paddock: Area=1; Slope=0; AspectAngle=0; Altitude=50
            Soil: SoilType=NZ_sedementary; Region=Plains; State=Canterbury; Country=New Zealnd; Latitude=0; Longitude=0
              Chemical: Thickness=[100, 200, 300, 300, 300, 300]; PH=[6.6, 6.2, 5.7, 5.5, 5.5, 5.5]; PHUnits=Water
              Physical
                Thickness  ParticleSizeSand  ParticleSizeSilt  ParticleSizeClay  Rocks     BD     AirDry  LL15   DUL   SAT    KS
                200        5                 65                30                0.108346  1.311  0.05    0.1    0.25  0.419  4832.039
                200        5                 65                30                0         1.524  0.1     0.1    0.33  0.405  389.229
                200        5                 65                30                0         1.65   0.149   0.149  0.27  0.342  16.362
                200        5                 65                30                0.125332  1.601  0.14    0.14   0.22  0.322  97.995
                200        5                 65                30                0         1.601  0.05    0.15   0.2   0.348  97.995
                200        5                 65                30                0         1.601  0.05    0.149  0.25  0.342  97.995
                200        5                 65                30                0.166077  1.601  0.1     0.1    0.19  0.307  97.995
                200        5                 65                30                0.160645  1.601  0.06    0.06   0.17  0.309  97.995
                Rocks, ParticleSizeSand, ParticleSizeSilt, ParticleSizeClay source: Calculated
                SoilCrop OatsSoil: LL=[0.1, 0.1, 0.149, 0.14, 0.15, 0.149, 0.1, 0.06]; KL=[0.06, 0.05, 0.04, 0.06, 0.05, 0.02, 0.02, 0]; XF=[1, 0.2, 1, 1, 1, 1, 1, 1]
              WaterBalance SoilWater: SummerDate=1-Nov; SummerU=6; SummerCona=2; WinterDate=1-Apr; WinterU=9; WinterCona=4.4; DiffusConst=0; DiffusSlope=0; Salb=0.18; CN2Bare=68; CNRed=20; CNCov=0.8; DischargeWidth=0; CatchmentArea=0; PSIDul=-100
                Thickness  SWCON  KLAT
                200        0.7    0
                200        0.7    0
                200        0.95   0
                200        0.95   0
                200        0.95   0
                200        0.95   0
                200        0.95   0
                200        0.95   0
              Organic: FOMCNRatio=40; CarbonUnits=Total
                Thickness  Carbon  SoilCNRatio  FBiom  FInert  FOM
                180        2.625   11           0.033  0.437   427.528
                150        1.247   11           0.019  0.657   316.72
                400        0.316   11           0.012  0.85    142.312
                270        0.208   11           0.01   0.945   82.9318
                500        0.2     11           0.01   0.983   30.5089
              Water: Thickness=[200, 200, 200, 200, 200, 200, 200, 200]; InitialValues=[0.31, 0.31, 0.16, 0.15, 0.1, 0.1, 0.11, 0.12]; InitialPAWmm=82.4; RelativeTo=LL15; FilledFromTop=false
              CERESSoilTemperature Temperature
              Nutrient
              Solute NO3: Thickness=[100, 200, 300, 300, 300, 300]; InitialValues=[202.213, 103.567, 4.67033, 2.60267, 1.562, 1.562]; InitialValuesUnits=ppm; WaterTableConcentration=0; D0=0; DepthConstant=0; MaxDepthSoluteAccessible=0; RunoffEffectivenessAtMovingSolute=0; MaxEffectiveRunoff=0
              Solute NH4: Thickness=[100, 200, 300, 300, 300, 300]; InitialValues=[3, 2.5, 1.33333, 1, 1, 1]; InitialValuesUnits=ppm; WaterTableConcentration=0; D0=0; DepthConstant=0; MaxDepthSoluteAccessible=0; RunoffEffectivenessAtMovingSolute=0; MaxEffectiveRunoff=0
              Solute Urea: Thickness=[100, 200, 300, 300, 300, 300]; InitialValues=[0, 0, 0, 0, 0, 0]; InitialValuesUnits=kg/ha; WaterTableConcentration=0; D0=0; DepthConstant=0; MaxDepthSoluteAccessible=0; RunoffEffectivenessAtMovingSolute=0; MaxEffectiveRunoff=0
              OutputLayers OutputNutrientLayers: Thickness=[200, 200, 200, 200, 200, 200, 200, 200]
              OutputLayers OutputWaterLayers: Thickness=[200, 200, 200, 200, 200, 200, 200, 200]
            MicroClimate: a_interception=0; b_interception=1; c_interception=0; d_interception=0; SoilHeatFluxFraction=0.4; MinimumHeightDiffForNewLayer=0; NightInterceptionFraction=0.5; ReferenceHeight=2
            Fertiliser
            SurfaceOrganicMatter Surface Organic Matter: InitialResidueName=wheat_stubble; InitialResidueType=wheat; InitialResidueMass=0; InitialStandingFraction=0; InitialCPR=0; InitialCNR=80
            Irrigation
            Plant Oats
            Manager ClimateControl
              StartDate = 10/17/1998 00:00:00
              EndDate = 04/01/1999 00:00:00
```csharp
using Models.Soils;
using System.Xml.Serialization;
using Models;
using Models.PMF;
using System.Text;
using System.Collections.Generic;
using APSIM.Shared.Utilities;
using Models.Core;
using System;
using Models.Climate;

namespace Models
{
    [Serializable] 
    [System.Xml.Serialization.XmlInclude(typeof(Model))]
    public class Script : Model
    {
        [Link] Weather Met;
        [Link] Clock Clock;
    
        [Description("Start Date")]
        public DateTime StartDate { get; set; }
        
        [Description("End Date")]
        public DateTime EndDate { get; set; }
 
    
        [EventSubscribe("PreparingNewWeatherData")]
        private void OnPreparingNewWeatherData(object sender, EventArgs e)
        {
            if ((Clock.Today.Date >= StartDate) && (Clock.Today.Date <= EndDate))
                Met.Rain = 0;        
        }
    }
}
```
            Folder Manager folder
              Operations
                1998-09-29  [Oats].Sow(population:300, cultivar:"Drummond", depth:30, rowSpacing:130);
              Operations Irrig
                1998-11-09  [Irrigation].Apply(35.3);
                1998-11-16  [Irrigation].Apply(45);
                1998-11-23  [Irrigation].Apply(44);
                1998-11-30  [Irrigation].Apply(30.1);
                1998-12-07  [Irrigation].Apply(41.6);
                1998-12-14  [Irrigation].Apply(55);
                1998-12-21  [Irrigation].Apply(50);
                1998-12-28  [Irrigation].Apply(55);
                1999-01-05  [Irrigation].Apply(53);
                1999-01-11  [Irrigation].Apply(50.4);
                1999-01-18  [Irrigation].Apply(49);
                1999-01-25  [Irrigation].Apply(49);
                1999-02-01  [Irrigation].Apply(51.2);
                1999-02-08  [Irrigation].Apply(53);
                1999-02-15  [Irrigation].Apply(34);
                1999-02-22  [Irrigation].Apply(37);
                1999-03-01  [Irrigation].Apply(24);
              Manager LeafSize
```csharp
using Newtonsoft.Json;
using APSIM.Shared.Utilities;
using System.Xml.Serialization;
using Models;
using Models.PMF;
using Models.Soils;
using System.Text;
using System.Collections.Generic;
using Models.Core;
using System;
using Models.Soils.Nutrients;

namespace Models
{
    [Serializable] 
    public class Script : Model
    {
        [Link] Clock Clock;
        [Link] Plant Oats;
        [Link] Zone zone;
                    
        [JsonIgnore] public bool InitialDay { get; set; }
        
        [JsonIgnore] public double LeafExpandedPosition { get; set; }
        [JsonIgnore] public double LeafAppearedPosition { get; set; }
        [JsonIgnore] public double ExpandedLeafNoYesterday { get; set; }
        [JsonIgnore] public double AppearedLeafNoYesterday { get; set; }
        [JsonIgnore] public double MostRecentlyExpandedLeafSize { get; set; }
        [JsonIgnore] public double MostRecentlyAppearedLeafMaxSize { get; set; }
        
        [EventSubscribe("StartOfSimulation")]
        private void OnSimulationCommencing(object sender, EventArgs e)
        {
            InitialDay = true;
            LeafExpandedPosition = 0;
            LeafAppearedPosition = 0;
            ExpandedLeafNoYesterday = 0;
            AppearedLeafNoYesterday = 0;
            MostRecentlyExpandedLeafSize = 0;
            MostRecentlyAppearedLeafMaxSize = 0;
        }
        
        [EventSubscribe("DoManagement")]
        private void OnDoManagement(object sender, EventArgs e)
        {
            ExpandedLeafNoYesterday = Convert.ToDouble(zone.Get("Oats.Leaf.ExpandedCohortNo"));
            AppearedLeafNoYesterday = Convert.ToDouble(zone.Get("Oats.Leaf.AppearedCohortNo"));
        }
        
        [EventSubscribe("DoManagementCalculations")]
        private void OnDoManagementCalculations(object sender, EventArgs e)
        {
            if (Convert.ToDouble(zone.Get("Oats.Leaf.ExpandedCohortNo")) > ExpandedLeafNoYesterday)
            {
                LeafExpandedPosition = Convert.ToDouble(zone.Get("Oats.Leaf.ExpandedCohortNo"));
                MostRecentlyExpandedLeafSize = (double)zone.Get("Oats.Leaf.CohortSize[" + (int)LeafExpandedPosition + "]");
            }
            
            if (Convert.ToDouble(zone.Get("Oats.Leaf.AppearedCohortNo")) > AppearedLeafNoYesterday)
            {
                LeafAppearedPosition = Convert.ToDouble(zone.Get("Oats.Leaf.AppearedCohortNo"));
                MostRecentlyAppearedLeafMaxSize = (double)zone.Get("Oats.Leaf.CohortParameters.MaxArea.Value()");
            }
            
        }
    }
}
```
            Report DailyReport
            Report HarvestReport
            Report SupReport: EventNames=[Clock].DoReport
              VariableNames:
                [Clock].Today
                [Phenology].ThermalTime
                [Leaf].CohortSize
                [Leaf].CohortParameters.MaxArea
                [Oats].Arbitrator.DM.TotalFixationSupply
                [Oats].Arbitrator.FN
                [Oats].Structure.Phyllochron
                [Oats].Leaf.CohortMaxSize
                [Oats].Leaf.CohortParameters.GrowthDuration
                [Oats].Leaf.CohortParameters.LagDuration
                [Oats].Leaf.CohortParameters.SenescenceDuration
                [Oats].Leaf.CohortParameters.SpecificLeafAreaMax
                [Oats].Leaf.CohortParameters.SpecificLeafAreaMin
                [Oats].Leaf.Photosynthesis.FT
                [Oats].Leaf.Photosynthesis.FVPD
                [Oats].Leaf.Photosynthesis.RueAct
                [Oats].Leaf.NextExpandingLeafProportion
                [Oats].Structure.MeanTillerGrowthRate
                sum([Soil].Water.MM[1:8]) as ProfileWater
                [LeafSize].Script.LeafAppearedPosition
                [LeafSize].Script.MostRecentlyAppearedLeafMaxSize
                [LeafSize].Script.LeafExpandedPosition
                [LeafSize].Script.MostRecentlyExpandedLeafSize
                [Grain].AccumThermalTime
                [Oats].Panicle.HeadNumber
                [Oats].Grain.NumberFunction
            Report DailyReportMineralN: EventNames=[Clock].EndOfDay
              VariableNames:
                [Clock].Today
                [Soil].Nutrient.MineralN
                [Soil].Nutrient.MineralisedN
                sum([Soil].Nutrient.MineralN) as WholeProfileMineralN
                sum([Soil].Nutrient.MineralisedN) as WholeProfileMineralisedN
            Report EnviroReport: same as Replacements.EnviroReport
      Experiment CPT
        Memo Experiment Description
          Jamieson, P. D. and C. A. Munro (1999). A simple method for the phenological evaluation of new cereal cultivars. Agronomy Society of New Zealand - Proceedings, Twenty-Ninth Annual Conference, 1999. J. G. Hampton and K. M. Pollock. 29: 63-68.

          This experiment is part of the ongoing Cultivar Prediction Trial at Plant & Food Lincoln wher a Cultivar is planted at 3 sowing dates throughout the year and the time of flowering, Final leaf number and Flag leaf are recorded.
        Factors
          Permutation
            Factor Sow
              Specification=[Clock].StartDate = 2002-03-07,2002-05-15,2002-09-09,2003-03-14,2003-05-21,2003-09-02,2004-03-23,2004-05-28,2004-09-06
            Factor Cult: Specification=[SowAndHarvest].Script.Cultivar = Hokonui,Stampede
        Simulation PaddockCPT
          Clock: Start=2002-03-01; End=2010-02-01
          Weather: FileName=WeatherFiles/Lincoln.met; Latitude=-43.626; Tav=11.6; Amp=10.6
          Summary summaryfile
          SoilArbitrator Soil Arbitrator
          Zone paddock: Area=1; Slope=0; AspectAngle=0; Altitude=50
            Soil: Latitude=0; Longitude=0
              Chemical: Thickness=[100, 200, 300, 300, 300, 300]; PH=[6.6, 6.2, 5.7, 5.5, 5.5, 5.5]; PHUnits=Water
              Physical
                Thickness  BD   AirDry  LL15  DUL   SAT
                200        1.2  0.05    0.1   0.32  0.46
                200        1.2  0.1     0.1   0.32  0.46
                200        1.2  0.07    0.07  0.13  0.4
                200        1.2  0.07    0.07  0.1   0.3
                200        1.2  0.08    0.08  0.11  0.3
                200        1.2  0.07    0.07  0.1   0.3
                200        1.2  0.07    0.07  0.1   0.3
                200        1.2  0.07    0.07  0.1   0.3
                SoilCrop WheatSoil: LL=[0.1, 0.1, 0.07, 0.07, 0.08, 0.07, 0.07, 0.07]; KL=[0.06, 0.06, 0.06, 0.06, 0.04, 0.025, 0.01, 0.005]; XF=[1, 1, 1, 1, 1, 1, 1, 1]
                SoilCrop OatsSoil: LL=[0.1, 0.1, 0.07, 0.07, 0.08, 0.07, 0.07, 0.07]; KL=[0.06, 0.06, 0.06, 0.06, 0.04, 0.025, 0.01, 0.005]; XF=[1, 1, 1, 1, 1, 1, 1, 1]
              WaterBalance SoilWater: SummerDate=1-Nov; SummerU=9; SummerCona=4.4; WinterDate=1-Apr; WinterU=4; WinterCona=2; DiffusConst=88; DiffusSlope=35; Salb=0.18; CN2Bare=68; CNRed=20; CNCov=0.8; DischargeWidth=0; CatchmentArea=0; PSIDul=-100
                Thickness  SWCON  KLAT
                200        0.7    0
                200        0.7    0
                200        0.95   0
                200        0.95   0
                200        0.95   0
                200        0.95   0
                200        0.95   0
                200        0.95   0
              Organic: FOMCNRatio=30; CarbonUnits=Total
                Thickness  Carbon  SoilCNRatio  FBiom  FInert  FOM
                100        1.82    11.5         0.025  0.3     1243.93
                200        1.47    11.5         0.025  0.4     833.832
                300        1.2     11.5         0.015  0.75    457.617
                300        1.03    11.5         0.01   0.9     251.145
                300        0.47    11.5         0.01   0.96    137.831
                300        0.47    11.5         0.01   0.96    75.6435
              Water: Thickness=[200, 200, 200, 200, 200, 200, 200, 200]; InitialValues=[0.29, 0.28, 0.16, 0.15, 0.1, 0.1, 0.11, 0.12]; InitialPAWmm=136; RelativeTo=LL15; FilledFromTop=false
              CERESSoilTemperature Temperature
              Nutrient
              Solute NO3: Thickness=[100, 200, 300, 300, 300, 300]; InitialValues=[180.833, 12.5, 1.389, 1.389, 0, 0]; InitialValuesUnits=ppm; WaterTableConcentration=0; D0=0; DepthConstant=0; MaxDepthSoluteAccessible=0; RunoffEffectivenessAtMovingSolute=0; MaxEffectiveRunoff=0
              Solute NH4: Thickness=[100, 200, 300, 300, 300, 300]; InitialValues=[0, 0, 0, 0, 0, 0]; InitialValuesUnits=ppm; WaterTableConcentration=0; D0=0; DepthConstant=0; MaxDepthSoluteAccessible=0; RunoffEffectivenessAtMovingSolute=0; MaxEffectiveRunoff=0
              Solute Urea: same as Validation.New Zealand.RS_Oats_9899.LincRS9899.paddock.Soil.Urea
            Irrigation
            SurfaceOrganicMatter Surface Organic Matter: InitialResidueName=wheat_stubble; InitialResidueType=wheat; InitialResidueMass=0; InitialStandingFraction=0; InitialCPR=0; InitialCNR=80
            Fertiliser
            MicroClimate: a_interception=0; b_interception=1; c_interception=0; d_interception=0; SoilHeatFluxFraction=0.4; MinimumHeightDiffForNewLayer=0; NightInterceptionFraction=0.5; ReferenceHeight=2
            Plant Oats
            Manager SowAndHarvest
              Cultivar = Otane
```csharp
using Models.Soils;
using Models.PMF.Phen;
using System;
using Models.Core;
using Models.PMF;
using APSIM.Shared.Utilities;
using System.Xml.Serialization;
using Newtonsoft.Json;
        
namespace Models
{
    [Serializable] 
    [System.Xml.Serialization.XmlInclude(typeof(Model))]
    public class Script : Model
    {
        [Link] private Plant Oats;
        [Link] private Clock Clock;
        [Link] private Simulation sim;
        [Link] private Summary Summary;
        [Link(Type = LinkType.Path, Path = "[Oats].Phenology")]
        private Phenology phenology;
        
        [Description("Cultivar")]
        public string Cultivar { get; set; }
        
        [JsonIgnore] public bool Sown { get; set; }
        [JsonIgnore] public bool Harvested { get; set; }
        [JsonIgnore] public bool EndSet { get; set; }
        
        [EventSubscribe("StartOfSimulation")]
        private void OnSimulationCommencing(object sender, EventArgs e)
        {
            Sown = false;
            Harvested = false;
            EndSet = false;
        }
        
        [EventSubscribe("DoManagement")]
        private void OnDoManagement(object sender, EventArgs e)
        {
            if (Sown == false)
            {
                Oats.Sow(population: 200, cultivar: Cultivar, depth: 15, rowSpacing: 150, budNumber: 1);
                Sown = true;
            }
            
            if (phenology.CurrentPhase.Name == "Maturing")
            {
                Oats.Harvest();
                Oats.EndCrop();
                Harvested = true;
                Summary.WriteMessage(this, "Maturity reached so setting end date to stop simulation", MessageType.Diagnostic);
            }
            
            if ((Harvested == true) && (EndSet == false))
            {
                sim.Set("Clock.EndDate", Clock.Today.AddDays(1));
                EndSet = true;
            }
        }
    }
}
```
            Report HarvestReport: EventNames=[Clock].EndOfSimulation
              VariableNames:
                [Oats].Structure.LeafTipsAppeared
                [Oats].Structure.FinalLeafNumber
                [Oats].Phenology.FlagLeafDAS
                [Oats].Phenology.FloweringDAS
                [Oats].Phenology.MaturityDAS
      Folder SAE
        Experiment SAE_Oats_2020
          Memo Experiment Description
            *	The aim of this SAE funded project is to assess contrasting plant traits in oats.

            *	The focus is on early-vigour as a critical plant trait in winter-sown oat catch crops.

            *	Early vigour influences N uptake rate by the catch crop and by association may also reduce the amount of residual soil N at risk of leaching.

            *	The treatments are 6 oat genotypes with potential differences for early canopy expansion.

            *	The experiment had 4 replicates

            *	400 kg N/ha at sowing to mimic  aurine patch to ne mopped by the oat catch crop

            *	Key differences in early vigour were due to individual leaf size in first 6 leaves
          Factors
            Factor Cultivars
              CompositeFactor Coronet: Specifications=[SowingHarvesting]
                Operations SowHar
                  2020-07-23  [Oats].Sow(population: 350, cultivar: "Coronet", depth: 40, rowSpacing: 45)
                  2020-11-12  [Oats].Harvest()
              CompositeFactor Armstrong: Specifications=[SowingHarvesting]
                Operations SowHar
                  2020-07-23  [Oats].Sow(population: 350, cultivar: "Armstrong", depth: 40, rowSpacing: 45)
                  2020-11-12  [Oats].Harvest()
              CompositeFactor Milton2: Specifications=[SowingHarvesting]
                Operations SowHar
                  2020-07-23  [Oats].Sow(population: 350, cultivar: "Milton2", depth: 40, rowSpacing: 45)
                  2020-11-12  [Oats].Harvest()
              CompositeFactor CROA146: Specifications=[SowingHarvesting]
                Operations SowHar
                  2020-07-23  [Oats].Sow(population: 350, cultivar: "CROA146", depth: 40, rowSpacing: 45)
                  2020-11-12  [Oats].Harvest()
              CompositeFactor 107_32: Specifications=[SowingHarvesting]
                Operations SowHar
                  2020-07-23  [Oats].Sow(population: 350, cultivar: "107_32", depth: 40, rowSpacing: 45)
                  2020-11-12  [Oats].Harvest()
              CompositeFactor 100_05: Specifications=[SowingHarvesting]
                Operations SowHar
                  2020-07-23  [Oats].Sow(population: 350, cultivar: "100_05", depth: 40, rowSpacing: 45)
                  2020-11-12  [Oats].Harvest()
              CompositeFactor Fallow: Specifications=[SowingHarvesting]
                Operations SowHar
                  Memo
                    A work-around - Sowed one plant before start of simulation as the model did not accept sowing zero plants
          Simulation A_Block_2020x
            Clock: Start=2020-07-21; End=2020-11-15
            Weather: FileName=WeatherFiles/weatherData.met; Latitude=-43.7; Tav=12.1; Amp=17
            Summary summaryfile
            SoilArbitrator Soil Arbitrator
            Zone paddock: Area=1; Slope=0; AspectAngle=0; Altitude=50
              Folder Manager folder
                Operations SowingHarvesting
                  2020-07-23  [Oats].Sow(population: 350, cultivar: "Milton", depth: 30, rowSpacing: 45)
                  2020-11-12  [Oats].Harvest()
                Operations IrrigationSchedule
                  2020-09-29  [Irrigation].Apply(10.0)
                  2020-09-30  [Irrigation].Apply(30.0)
                  2020-10-08  [Irrigation].Apply(30.0)
                  2020-10-22  [Irrigation].Apply(30.0)
                  2020-10-29  [Irrigation].Apply(30.0)
                  2020-11-20  [Irrigation].Apply(30.0)
                Operations FertiliserSchedule
                  2020-07-23  [Fertiliser].Apply(amount: 400, type: "UreaN", depth: 10)
                Manager LeafSize: same as Validation.New Zealand.RS_Oats_9899.LincRS9899.paddock.Manager folder.LeafSize
              MicroClimate: a_interception=0; b_interception=1; c_interception=0; d_interception=0; SoilHeatFluxFraction=0.4; MinimumHeightDiffForNewLayer=0; NightInterceptionFraction=0.5; ReferenceHeight=2
              Irrigation
              Fertiliser
              SurfaceOrganicMatter Surface Organic Matter: InitialResidueName=oat_stubble; InitialResidueType=oats; InitialResidueMass=1000; InitialStandingFraction=0.5; InitialCPR=0; InitialCNR=120
              Plant Oats
                Folder NewCultivars
                  Cultivar Coronet: same as Replacements.Oats.Cultivars.Coronet
                  Cultivar CROA146: same as Replacements.Oats.Cultivars.CROA146
                  Cultivar 107_32: same as Replacements.Oats.Cultivars.107_32
                  Cultivar Armstrong: same as Replacements.Oats.Cultivars.Armstrong
                  Cultivar 100_05: same as Replacements.Oats.Cultivars.100_05
                  Cultivar Milton2: same as Replacements.Oats.Cultivars.Milton2
                  Memo ReadMe
                    # Comparing cultivars Coronet and PFR 100-05

                    - Data collected by **Mike George**
                    - Data sits in: https://iplant.plantandfood.co.nz/project/I161208

                    ## Context:
                    - PFR 100-05 showed faster canopy cloure rates via drone aerial photos
                    - Field trial was done to identify mechanisms.

                    ##Main differences between cultivars were:

                    - Larger leaves by PRR 100-05 (45-80% larger)
                    - Taller stems by PFR 100-05 (50% taller)

                    ## Observations

                    - We agreed to keep only leaf size as genotype difference. Height also differed as:
                    - [Structure].HeightModel.PotentialHeight.XYPairs.Y = 13,204,820,820
                    - [Structure].HeightModel.PotentialHeight.XYPairs.Y = 20,300,1200,1200

                    ## Modifications (by RC, RZ, EK)
                    - Changed sowing depth to 40 mm to delay emergence
                    - Changed depth at which fertiliser N was applied to 10 cm (initially 40 cm which was an error)
                    - Removed the initialisation of the second leaf
                    - Changed maximum leaf area to match observations (cultivar-specific)
                    - Changed tillering dynamics (cultivar-specific)
                    - Changed phyllochron to improve leaf tip appearance (cultivar-specific)
                    - Changed the extinction coefficient (cultivar-specific)
                    - Changed stem height for a closer fit with measured values
                    - Changed stem maximum N conc
              Report EnviroReport: EventNames=[Clock].DoReport
                VariableNames:
                  [Clock].Today
                  [Weather].MeanT
                  [Weather].Radn
                  [Weather].Rain
                  [Irrigation].IrrigationApplied
                  [Oats].Leaf.Fw
                  ([Oats].Leaf.Transpiration + [Soil].SoilWater.Es + [MicroClimate].PrecipitationInterception) as ET
                  [MicroClimate].PrecipitationInterception as Interception
                  [Soil].SoilWater.Es as Evaporation
                  [Soil].SoilWater.Drainage as Drainage
                  [Soil].SoilWater.Runoff as Runoff
                  sum([Soil].Water.MM) as TotalSoilWater
                  sum([Soil].Nutrient.MineralisedN) as MineralisedN
                  [Fertiliser].NitrogenApplied as FertiliserN
                  sum([Soil].Nutrient.Natm) as DenitrifiedN
                  ([Soil].SoilWater.LeachUrea+[Soil].SoilWater.LeachNH4+[Soil].SoilWater.LeachNO3) as NLeached
                  [SurfaceOrganicMatter].N as TotalSurfOMN
                  sum([Soil].Nutrient.FOM.N) as TotalFOMN
                  sum([Soil].Nutrient.Microbial.N) as TotalMicrobialN
                  sum([Soil].Nutrient.Humic.N) as TotalHumicN
                  (sum([Soil].NH4.kgha) + sum([Soil].NO3.kgha)) as TotalSoilN
                  sum([Soil].Urea.kgha) as TotalUrea
                  sum([Soil].NH4.kgha) as TotalNH4
                  sum([Soil].NO3.kgha) as TotalNO3
              Report DailyReport: EventNames=[Clock].DoReport
                VariableNames:
                  [Clock].Today
                  [Oats].Total.Wt
                  [Oats].AboveGround.Wt
                  [Oats].AboveGroundLive.Wt
                  [Oats].Leaf.Live.Wt
                  [Oats].Stem.Wt
                  [Oats].AboveGroundDead.Wt
                  [Oats].Leaf.Dead.Wt
                  [Oats].Leaf.Senesced.Wt
                  [Oats].Structure.Height
                  [Oats].Leaf.Height
                  [Oats].Total.N
                  [Oats].AboveGround.N
                  [Oats].AboveGroundLive.N
                  [Oats].Leaf.Live.N
                  [Oats].Stem.N
                  [Oats].AboveGroundDead.N
                  [Oats].Leaf.Dead.N
                  [Oats].AboveGround.NConc
                  [Oats].AboveGroundLive.NConc
                  [Oats].Leaf.Live.NConc
                  [Oats].Stem.NConc
                  [Oats].Stem.Live.NConc
                  [Oats].Leaf.LAI
                  [Oats].Structure.LeafTipsAppeared
                  [Oats].Structure.TotalStemPopn
                  [Oats].Leaf.AppearedCohortNo
                  [Oats].Leaf.CoverGreen
                  [Oats].Leaf.CoverTotal
                  [Oats].Leaf.GreenCohortNo
                  [Oats].Leaf.DeadCohortNo
                  [Oats].Leaf.SenescingCohortNo
                  [Oats].Leaf.ExpandedCohortNo
                  [Oats].Leaf.SpecificArea
                  [Oats].Phenology.CurrentPhase.Name
                  [Oats].Phenology.CurrentStageName
                  [Oats].Phenology.Zadok.Stage
                  [Oats].Phenology.Stage
                  [Oats].Leaf.Fn
                  [Oats].Leaf.Fw
                  [Oats].SowingData.Cultivar
                  ([Oats].Leaf.Transpiration + [Soil].SoilWater.Es + [MicroClimate].PrecipitationInterception) as ET
                  [MicroClimate].PrecipitationInterception as Interception
                  [Weather].MeanT
                  [Weather].Radn
                  [Weather].Rain
                  [Fertiliser].NitrogenApplied as FertiliserN
                  [Irrigation].IrrigationApplied as Irrigation
                  [Soil].SoilWater.Thickness
                  [Soil].OutputWaterLayers.SW[1] as VWC_0_30
                  [Soil].OutputWaterLayers.SW[2] as VWC_30_60
                  [Soil].OutputWaterLayers.SW[3] as VWC_60_90
                  ([Soil].OutputNutrientLayers.NO3[1] + [Soil].OutputNutrientLayers.NH4[1]) as SoilN_0_15
                  ([Soil].OutputNutrientLayers.NO3[2] + [Soil].OutputNutrientLayers.NH4[2]) as SoilN_15_30
                  ([Soil].OutputNutrientLayers.NO3[3] + [Soil].OutputNutrientLayers.NH4[3]) as SoilN_30_60
                  ([Soil].OutputNutrientLayers.NO3[4] + [Soil].OutputNutrientLayers.NH4[4]) as SoilN_60_90
                  (SoilN_0_15 + SoilN_15_30 + SoilN_30_60 + SoilN_60_90) as SoilN_0_90
                  ([Soil].Nutrient.MineralisedN[1] + [Soil].Nutrient.MineralisedN[2] + [Soil].Nutrient.MineralisedN[3] + [Soil].Nutrient.MineralisedN[4]) as MineralisedN_0_90
              Report SupReport: EventNames=[Clock].DoReport
                VariableNames:
                  [Clock].Today
                  [Phenology].ThermalTime
                  [Leaf].CohortSize
                  [Leaf].CohortParameters.MaxArea
                  [Oats].Arbitrator.DM.TotalFixationSupply
                  [Oats].Arbitrator.FN
                  [Oats].Structure.Phyllochron
                  [Oats].Leaf.CohortMaxSize
                  [Oats].Leaf.CohortParameters.GrowthDuration
                  [Oats].Leaf.CohortParameters.LagDuration
                  [Oats].Leaf.CohortParameters.SenescenceDuration
                  [Oats].Leaf.CohortParameters.SpecificLeafAreaMax
                  [Oats].Leaf.CohortParameters.SpecificLeafAreaMin
                  [Oats].Leaf.Photosynthesis.FT
                  [Oats].Leaf.Photosynthesis.FVPD
                  [Oats].Leaf.Photosynthesis.RueAct
                  [Oats].Leaf.NextExpandingLeafProportion
                  [Oats].Structure.MeanTillerGrowthRate
                  [LeafSize].Script.LeafAppearedPosition
                  [LeafSize].Script.MostRecentlyAppearedLeafMaxSize
                  [LeafSize].Script.LeafExpandedPosition
                  [LeafSize].Script.MostRecentlyExpandedLeafSize
                  [Grain].AccumThermalTime
                  [Oats].Panicle.HeadNumber
                  [Oats].Grain.NumberFunction
              Report HarvestReport: EventNames=[Oats].Harvesting
                VariableNames:
                  [Oats].Structure.LeafTipsAppeared
                  [Oats].Structure.FinalLeafNumber
                  [Oats].Phenology.FlagLeafDAS
                  [Oats].Phenology.FloweringDAS
                  [Oats].Phenology.MaturityDAS
                  [Oats].Phenology.CurrentPhase.Name
                  [Oats].Phenology.CurrentStageName
                  [Oats].AboveGroundLive.Wt
                  [Oats].Grain.Wt
              Report DailyReportWater_n_MineralN: EventNames=[Clock].DoReport
                VariableNames:
                  [Clock].Today
                  [Oats].Total.Wt
                  [Oats].AboveGround.Wt
                  [Oats].AboveGroundLive.Wt
                  [Oats].Leaf.Live.Wt
                  [Oats].Stem.Wt
                  [Oats].AboveGroundDead.Wt
                  [Oats].Leaf.Dead.Wt
                  [Oats].Leaf.Senesced.Wt
                  [Oats].Structure.Height
                  [Oats].Leaf.Height
                  [Oats].Total.N
                  [Oats].AboveGround.N
                  [Oats].AboveGroundLive.N
                  [Oats].Leaf.Live.N
                  [Oats].Stem.N
                  [Oats].AboveGroundDead.N
                  [Oats].Leaf.Dead.N
                  [Oats].AboveGround.NConc
                  [Oats].AboveGroundLive.NConc
                  [Oats].Leaf.Live.NConc
                  [Oats].Stem.NConc
                  [Oats].Stem.Live.NConc
                  [Oats].Leaf.LAI
                  [Oats].Structure.LeafTipsAppeared
                  [Oats].Structure.TotalStemPopn
                  [Oats].Leaf.AppearedCohortNo
                  [Oats].Leaf.CoverGreen
                  [Oats].Leaf.CoverTotal
                  [Oats].Leaf.GreenCohortNo
                  [Oats].Leaf.DeadCohortNo
                  [Oats].Leaf.SenescingCohortNo
                  [Oats].Leaf.ExpandedCohortNo
                  [Oats].Leaf.SpecificArea
                  [Oats].Phenology.CurrentPhase.Name
                  [Oats].Phenology.CurrentStageName
                  [Oats].Phenology.Zadok.Stage
                  [Oats].Phenology.Stage
                  [Oats].Leaf.Fn
                  [Oats].Leaf.Fw
                  [Oats].SowingData.Cultivar
                  ([Oats].Leaf.Transpiration + [Soil].SoilWater.Es + [MicroClimate].PrecipitationInterception) as ET
                  [MicroClimate].PrecipitationInterception as Interception
                  [Weather].MeanT
                  [Weather].Radn
                  [Weather].Rain
                  [Fertiliser].NitrogenApplied as FertiliserN
                  [Irrigation].IrrigationApplied as Irrigation
                  [Soil].SoilWater.Thickness
                  [Soil].OutputWaterLayers.SW[1] as VWC_0_30
                  [Soil].OutputWaterLayers.SW[2] as VWC_30_60
                  [Soil].OutputWaterLayers.SW[3] as VWC_60_90
                  ([Soil].OutputNutrientLayers.NO3[1] + [Soil].OutputNutrientLayers.NH4[1]) as SoilN_0_15
                  ([Soil].OutputNutrientLayers.NO3[2] + [Soil].OutputNutrientLayers.NH4[2]) as SoilN_15_30
                  ([Soil].OutputNutrientLayers.NO3[3] + [Soil].OutputNutrientLayers.NH4[3]) as SoilN_30_60
                  ([Soil].OutputNutrientLayers.NO3[4] + [Soil].OutputNutrientLayers.NH4[4]) as SoilN_60_90
                  (SoilN_0_15 + SoilN_15_30 ) as SoilN_0_30
                  (SoilN_0_15 + SoilN_15_30 + SoilN_30_60) as SoilN_0_60
                  (SoilN_0_15 + SoilN_15_30 + SoilN_30_60 + SoilN_60_90) as SoilN_0_90
                  ([Soil].Nutrient.MineralisedN[1] + [Soil].Nutrient.MineralisedN[2] + [Soil].Nutrient.MineralisedN[3] + [Soil].Nutrient.MineralisedN[4]) as MineralisedN_0_90
              Soil: SoilType=Mottled Immature Pallic Soil; LocalName=Templeton-Wakanui; Site=A Block, Boundary Rd; NearestTown=Lincoln; Region=Plains; State=Canterbury; Country=New Zealnd; Latitude=-43.626; Longitude=172.486; YearOfSampling=2020; DataSource=Samples from the site analysed at PFR lab
                Memo
                  Soil N in the first four layers (0-90 cm of profile) initialised using measured data. See https://iplant.plantandfood.co.nz/project/I190710/_layouts/15/WopiFrame.aspx?sourcedoc=/project/I190710/DataProtocols/SVS_LincolnPotatoOnion_SoilMinN.xlsx&action=default
                Physical
                  Thickness  ParticleSizeSand  ParticleSizeSilt  ParticleSizeClay  Rocks  BD     AirDry  LL15   DUL    SAT    KS
                  150        14.6              62.3              23                0      1.236  0.065   0.195  0.366  0.534  460.3
                  125        14.6              62.3              23                0      1.251  0.176   0.195  0.37   0.528  445.2
                  75         13.8              63.2              23.1              0      1.378  0.187   0.187  0.348  0.48   212.2
                  150        16.3              66.3              17.4              0      1.672  0.151   0.151  0.331  0.369  72.8
                  200        6.7               90.9              2.5               0      1.626  0.185   0.185  0.364  0.386  155.8
                  150        9.6               87.8              2.5               0      1.599  0.163   0.163  0.351  0.397  195.5
                  150        50.4              45.8              3.8               0      1.383  0.067   0.067  0.314  0.477  3097.2
                  150        27.1              69.2              3.8               0      1.526  0.118   0.118  0.335  0.424  1203.7
                  150        66.6              28.9              4.5               0      1.366  0.052   0.052  0.268  0.479  5247.5
                  200        64.7              30.3              5                 0      1.367  0.052   0.052  0.282  0.484  5150.5
                  300        64.7              30.3              5                 0      1.367  0.052   0.052  0.282  0.484  5150.5
                  SoilCrop OatsSoil
                    LL=[0.195, 0.195, 0.187, 0.151, 0.185, 0.163, 0.067, 0.118, 0.052, 0.052, 0.052]
                    KL=[0.1, 0.1, 0.05, 0.04, 0.03, 0.01, 0, 0, 0, 0, 0]
                    XF=[1, 1, 1, 1, 1, 1, 1, 1, 1, 1, 1]
                WaterBalance SoilWater: SummerDate=1-Nov; SummerU=6; SummerCona=2.5; WinterDate=1-Apr; WinterU=2; WinterCona=2; DiffusConst=0; DiffusSlope=0; Salb=0.18; CN2Bare=68; CNRed=20; CNCov=0.8; DischargeWidth=0; CatchmentArea=0; PSIDul=-100
                  Thickness  SWCON  KLAT
                  150        0.526  0
                  125        0.541  0
                  75         0.543  0
                  150        0.524  0
                  200        0.55   0
                  150        0.556  0
                  150        0.579  0
                  150        0.578  0
                  150        0.589  0
                  200        0.569  0
                  300        0.569  0
                Chemical: Thickness=[150, 150, 300, 300, 300, 300, 300]; PH=[6.6, 6.2, 5.7, 5.5, 5.5, 5.5, 5.5]; PHUnits=Water
                Organic: FOMCNRatio=50; CarbonUnits=Total
                  Thickness  Carbon  SoilCNRatio  FBiom  FInert  FOM
                  150        2.89    12.5         0.058  0.424   1000.9
                  125        2.43    12.3         0.024  0.692   478.1
                  75         1.72    11.6         0.011  0.85    172.2
                  150        0.47    11.5         0.008  0.869   176.2
                  200        0.24    11.4         0.008  0.93    109.9
                  150        0.23    11.3         0.008  0.962   33.7
                  150        0.16    11.2         0.008  0.968   15.9
                  150        0.2     11.2         0.008  0.989   7.5
                  150        0.14    10.8         0.008  0.988   3.6
                  200        0.14    10.9         0.008  0.99    2
                  300        0.14    10.9         0.008  0.99    0
                Nutrient
                CERESSoilTemperature Temperature
                Water: Thickness=[150, 125, 75, 150, 200, 150, 150, 150, 150, 200, 300]; InitialPAWmm=367.6; RelativeTo=LL15; FilledFromTop=true
                  InitialValues=[0.366, 0.37, 0.348, 0.331, 0.364, 0.351, 0.314, 0.335, 0.268, 0.282, 0.282]
                OutputLayers OutputWaterLayers: Thickness=[300, 300, 300, 300, 300, 300]
                OutputLayers OutputNutrientLayers: Thickness=[150, 150, 300, 300, 300, 300, 300]
                Solute NO3: Thickness=[150, 150, 300, 300, 300, 300, 300]; InitialValues=[5.03, 2.44, 4.7, 0.81, 0.5, 0.5, 0.02]; InitialValuesUnits=ppm; WaterTableConcentration=0; D0=0; DepthConstant=0; MaxDepthSoluteAccessible=0; RunoffEffectivenessAtMovingSolute=0; MaxEffectiveRunoff=0
                Solute NH4: Thickness=[150, 150, 300, 300, 300, 300, 300]; InitialValues=[0.94, 1.91, 1.6, 0.9, 1.923, 1.923, 0.221]; InitialValuesUnits=ppm; WaterTableConcentration=0; D0=0; DepthConstant=0; MaxDepthSoluteAccessible=0; RunoffEffectivenessAtMovingSolute=0; MaxEffectiveRunoff=0
                Solute Urea: Thickness=[150, 150, 300, 300, 300, 300, 300]; InitialValues=[0, 0, 0, 0, 0, 0, 0]; InitialValuesUnits=kg/ha; WaterTableConcentration=0; D0=0; DepthConstant=0; MaxDepthSoluteAccessible=0; RunoffEffectivenessAtMovingSolute=0; MaxEffectiveRunoff=0
      Experiment RS_Oats_1718
        Memo Experiment Description
          #Experiment description

          ## Introduction
          This is a simulation of Oats in a crop rotation consisting of a forage species, fodder beet, grown over spring/summer and harvested in autumn, followed by the catch crop, oats. The actual experiment was done in two parts in the rain shelter facility of Plant and Food Research, Lincoln, NZ.  The experiments were designed to help develop the model for the respective plants and here they are used to further demonstrate that ApsimX can simulate water and nitrogen cycling in the field and then to examine whether catch crops are a good option for mitigating N leaching from forages.

           Part 1: Co-limitation of water and nitrogen on fodder beet physiology (no detail supplied for this experiment as it is not simulated herein)

           Part 2: Ability of oats to act as catch-crops over winter/spring
           - Irrigation: 2 treatments, low (enough to keep plants growing) or full irrigation (to match PET)
           - Nitrogen: 3 treatments, 80 kg N/ha, 125 kg N/ha & 320 kg N/ha at sowing (urea applied at sowing)

          Oats Experiment Management:
               - Cultivar: Milton
               - Sowing density: 300 plants/m2
                    row spacing: 15 cm
                          depth: 45 mm

              General actions:
                  05/07/2017 - Sowing
                  05/07/2017 - Fertiliser application (400kg/ha Potash, Urea: treat4=80kgN/ha, treat5=125kgN/ha, treat6=320kgN/ha)
                  24/07/2017 - Plants started to emerge
                  11/09/2017 - Irrigation started in treatements 4, 5, and 6
                  06/11/2017 - Irrigation extended to all plots
                  04-09/01/2018 - Plots harvested
        Factors
          Permutation
            Factor Nit
              CompositeFactor 80: Specifications=[TreatmentSpecificActions].Script.NitFactor = 0
              CompositeFactor 125: Specifications=[TreatmentSpecificActions].Script.NitFactor = 50
              CompositeFactor 320: Specifications=[TreatmentSpecificActions].Script.NitFactor = 300
            Factor Irr
              CompositeFactor Full
                Specifications:
                  [IrrigationSchedule]
                  [TreatmentSpecificActions].Script.IrrFactor = true
                Operations Full
                  2016-11-23  [Irrigation].Apply(30.0)
                  2016-11-30  [Irrigation].Apply(25.0)
                  2016-12-07  [Irrigation].Apply(25.0)
                  2016-12-21  [Irrigation].Apply(25.2)
                  2016-12-29  [Irrigation].Apply(30.0)
                  2017-01-04  [Irrigation].Apply(40.0)
                  2017-01-11  [Irrigation].Apply(32.9)
                  2017-01-18  [Irrigation].Apply(25.4)
                  2017-01-25  [Irrigation].Apply(31.3)
                  2017-02-08  [Irrigation].Apply(33.0)
                  2017-02-15  [Irrigation].Apply(35.0)
                  2017-02-22  [Irrigation].Apply(29.0)
                  2017-03-08  [Irrigation].Apply(34.0)
                  2017-03-22  [Irrigation].Apply(50.1)
                  2017-04-12  [Irrigation].Apply(30.9)
                  2017-04-27  [Irrigation].Apply(18.9)
                  2017-09-11  [Irrigation].Apply(20.9)
                  2017-09-12  [Irrigation].Apply(21.1)
                  2017-09-13  [Irrigation].Apply(21.4)
                  2017-10-10  [Irrigation].Apply(22.2)
                  2017-10-11  [Irrigation].Apply(22.5)
                  2017-10-12  [Irrigation].Apply(22.5)
                  Memo
                    Have added an extra irrigation, on 22 Oct,

                    Data indcates water applied but no notes of it RFZ

                    In Statefactors have donethe irrigations for
                      17/12  21/1 19/11 14/1
              CompositeFactor Nil
                Specifications:
                  [IrrigationSchedule]
                  [TreatmentSpecificActions].Script.IrrFactor = false
                Operations Nil
                  Memo
                    Have added an extra irrigation, on 3 Nov,

                    Data indcates water applied but no notes of it RFZ
        Simulation Rainshelter2017
          Clock: Start=2017-06-01; End=2018-01-15
          Weather: FileName=WeatherFiles/Lincoln.met; Latitude=-43.626; Tav=11.6; Amp=10.6
          Summary summaryfile
          SoilArbitrator Soil Arbitrator
          Zone paddock: Area=1; Slope=0; AspectAngle=0; Altitude=50
            Folder Manager folder
              Operations GeneralIrrigation
                2017-11-06  [Irrigation].Apply(45.0)
                2017-11-15  [Irrigation].Apply(30.0)
                2017-11-22  [Irrigation].Apply(29.7)
                2017-11-29  [Irrigation].Apply(35.0)
                2017-12-06  [Irrigation].Apply(46.7)
              Operations IrrigationSchedule
              Operations FertiliserSchedule
              Operations SowingHarvesting
                2017-07-05  [Oats].Sow(population: 400, cultivar: "Milton", depth: 45, rowSpacing: 45)
                2018-01-12  [Oats].Harvest()
              Manager ClimateControl
                StartDate = 10/17/2016 00:00:00
                EndDate = 06/30/2017 00:00:00
                OtherDateString = 27/07/2017 28/07/2017 09/08/2017 13/08/2017 14/08/2017 31/08/2017
```csharp
using Models.Soils;
using System.Globalization;
using System.Xml.Serialization;
using Models;
using Models.PMF;
using System.Text;
using System.Collections.Generic;
using APSIM.Shared.Utilities;
using Models.Core;
using System;
using Models.Climate;

// This script simulates a rainshelter, it controls the amount of rainfall (=0.0) and radiation (=95% of weather)
// It does that for a period between two dates, as well as at sporadic dates

namespace Models
{
    [Serializable] 
    [System.Xml.Serialization.XmlInclude(typeof(Model))]
    public class Script : Model
    {
        [Link] Weather Met;
        [Link] Clock Clock;
    
        [Description("Start date: ")]
        public DateTime StartDate { get; set; }
        [Description("End date: ")]
        public DateTime EndDate { get; set; }
         [Description("Other dates: ")]
         public string OtherDateString  { get; set; }
         
         private const string dateFormat = "dd/MM/yyyy";

         private DateTime[] OtherDates;
         private double todaysRain;

        [EventSubscribe("StartOfSimulation")]
        private void OnSimulationCommencing(object sender, EventArgs e)
        {
            //gather the dates the variables will be controlled
            string[] auxDates = OtherDateString.Split(new Char []{' ',','});
            OtherDates = new DateTime[auxDates.Length];
            for (int i = 0; i < auxDates.Length; i++)
                OtherDates[i] = DateTime.ParseExact(auxDates[i], dateFormat, CultureInfo.InvariantCulture);
        }

        [EventSubscribe("PreparingNewWeatherData")]
        private void OnPreparingNewWeatherData(object sender, EventArgs e)
        {
            if ((Clock.Today.Date >= StartDate.Date) && (Clock.Today.Date <= EndDate.Date))
            {
                todaysRain = Met.Rain;
                changeMetData();
            }
            else
            {
                for (int i = 0; i < OtherDates.Length; i++)
                    if (Clock.Today.Date == OtherDates[0].Date)
                        changeMetData();
            }

            // rain shelter partial day cover
            if (Clock.Today.Date == DateTime.ParseExact("01/09/2017", dateFormat, CultureInfo.InvariantCulture).Date)
                Met.Rain -= 2.0;
            
            // rain shelter cover removed for weekend
            if ((Clock.Today.Date == DateTime.ParseExact("03/06/2017", dateFormat, CultureInfo.InvariantCulture).Date)||(Clock.Today.Date == DateTime.ParseExact("04/06/2017", dateFormat, CultureInfo.InvariantCulture).Date))
            {
                Met.Rain = todaysRain;
                Met.Radn /= 0.95;
            }
        }

        private void changeMetData()
        {
            Met.Rain *= 0.0;
            Met.Radn *= 0.95;
        }
    }
}
```
              Manager TreatmentSpecificActions
                NitFactor = 0
                IrrFactor = False
```csharp
using Models.Interfaces;
using APSIM.Shared.Utilities;
using System.Xml.Serialization;
using Models;
using Models.PMF;
using Models.Soils;
using System.Text;
using System.Collections.Generic;
using Models.Core;
using System;
using Models.Soils.Nutrients;

// This script performs management actions that are not common to all treatments

namespace Models
{
    [Serializable] 
    public class Script : Model
    {
        [Link] private Clock Clock;
        [Link] private Irrigation Irrigation;
        [Link] private Fertiliser Fert;
        [Link] private Soil ThisSoil;
        [Link(ByName = true)] private ISolute no3;
        [Link(ByName = true)] private ISolute nh4;
        [Link]
        private IPhysical soilPhysical;

        [Description("Allow irrigation to be applied?")]
        public bool IrrFactor { get; set; }
        [Description("Amount of fertiliser to be applied (kg/ha)")]
        public double NitFactor { get; set; }


        private void SetSoilLayers()
        {
        
            int i = 0;

            if (soilPhysical.Thickness.Length != 7)
               throw new Exception("Soil layer exception");

            if ((IrrFactor == false) && (NitFactor == 300))
            {
                nh4.SetKgHa(SoluteSetterType.Fertiliser,new double[]{108,12,7,5,4,3,3});
                no3.SetKgHa(SoluteSetterType.Fertiliser,new double[] {55,30,25,12,3,5,5});
            }   
            else if ((IrrFactor == false) && (NitFactor == 50))
            {
                nh4.SetKgHa(SoluteSetterType.Fertiliser,new double[]{14.2,3.6,3.2,1.0,2.8,3.7,3});
                no3.SetKgHa(SoluteSetterType.Fertiliser,new double[] {34,16.8,15.8,7.7,1.8,2.3,5});
            }   
            else if ((IrrFactor == false) && (NitFactor == 0))
            {
                nh4.SetKgHa(SoluteSetterType.Fertiliser,new double[]{3.7,3.5,4.1,1.2,2.1,2.3,3});
                no3.SetKgHa(SoluteSetterType.Fertiliser,new double[] {18,13.7,10.8,4.2,1.9,2.8,5});
            }   
            else if ((IrrFactor == true) && (NitFactor == 300))
            {
                nh4.SetKgHa(SoluteSetterType.Fertiliser,new double[]{1.8,1.8,3.0,2.3,2.4,1.8,3});
                no3.SetKgHa(SoluteSetterType.Fertiliser,new double[] {12.6,6.4,5.3,2.8,2.2,2.2,5});
            }   
            else if ((IrrFactor == true) && (NitFactor == 50))
            {
                nh4.SetKgHa(SoluteSetterType.Fertiliser,new double[]{1.9,1.5,3.5,2.0,2.6,1.8,3});
                no3.SetKgHa(SoluteSetterType.Fertiliser,new double[] {8.5,5.4,1.9,1.5,1.8,2.7,5});
            }
            else if ((IrrFactor == true) && (NitFactor == 0))
            {
                nh4.SetKgHa(SoluteSetterType.Fertiliser,new double[]{2.5,2.4,3.1,3.4,5.6,2.5,3});
                no3.SetKgHa(SoluteSetterType.Fertiliser,new double[] {5.6,3.9,1.3,1.0,1.3,2.2,5});
            }
        }

        [EventSubscribe("DoManagement")]
        private void OnDoManagement(object sender, EventArgs e)
        {

            if (Clock.Today.Date == DateTime.Parse("02-Jun-2017"))
               SetSoilLayers();

        
            // Oats - Irrigation on dryland plots only, after harvest
            if (IrrFactor == false)
            {
                if ((Clock.Today.Date == DateTime.Parse("25-May-2017")) || (Clock.Today.Date == DateTime.Parse("26-May-2017")))
                    Irrigation.Apply(50.0);

                if (Clock.Today.Date == DateTime.Parse("29-May-2017"))
                if (NitFactor == 300)
                    Irrigation.Apply(64.0);

                if (Clock.Today.Date == DateTime.Parse("30-May-2017"))
                {
                    if (NitFactor == 0)
                        Irrigation.Apply(30.3);
                    if (NitFactor == 50)
                        Irrigation.Apply(51.0);
                }
            }

            // Oats - Irrigation on all 300N plots plus dryland 50N plots
            if (Clock.Today.Date == DateTime.Parse("13-Dec-2017"))
            {
                if (NitFactor == 300)
                    Irrigation.Apply(50.0);
                if ((NitFactor == 50) && (IrrFactor == false))
                    Irrigation.Apply(50.0);
            }

            // Oats - Fertiliser for irrigated plots only, on sowing
            if (Clock.Today.Date == DateTime.Parse("05-Jul-2017"))
            if (IrrFactor == true)
            {
                if (NitFactor == 0)
                    Fert.Apply(40, "UreaN", 10);
                if (NitFactor == 50)
                    Fert.Apply(85, "UreaN", 10);
                if (NitFactor == 300)
                    Fert.Apply(270, "UreaN", 10);
            }
        }
    }
}
```
              Manager LeafSize: same as Validation.New Zealand.RS_Oats_9899.LincRS9899.paddock.Manager folder.LeafSize
            MicroClimate: a_interception=0; b_interception=1; c_interception=0; d_interception=0; SoilHeatFluxFraction=0.4; MinimumHeightDiffForNewLayer=0; NightInterceptionFraction=0.5; ReferenceHeight=2
            Irrigation
            Fertiliser
            SurfaceOrganicMatter Surface Organic Matter: InitialResidueName=oat_stubble; InitialResidueType=oats; InitialResidueMass=1000; InitialStandingFraction=0.5; InitialCPR=0; InitialCNR=20
            Plant Oats
            Soil: SoilType=Silt loam over sand; LocalName=Templeton; Site=RainShelter; NearestTown=Lincoln; Region=Plains; State=Canterbury; Country=New Zealand; Latitude=37.15; Longitude=172.28
              Memo Info
                # Soil Profile Description

                Templeton Silt Loam over sand, Typic Immature Pallic soil

                 Horizon  Depth (cm) Description
                 Ah         0-28     Very dark grayish brown (10YR 3/2); silt loam; no stones; moderately developed fine to medium blocky structure
                 Bw(f)     28-55     Dark yellowish brown (10YR 4/4); silt loam; no stones; weakly developed coarse to very coarse blocky structure
                 Bw(g)     55-95     Olive brown (2.5Y 4/4); fine sandy loam; no stones; apedal massive
                 2BC(g)    95-145    Olive brown (2.5Y 4/4); loamy sand;no stones; apedal single-grain
                 3BCg     145-153    Light yellowish brown (2.5Y 6/3); silt loam; no stones; apedal massive
                 4BCg     153-200+   Light yellowish brown (2.5Y 6/3); medium sand; no stones; apedal single-grain
                 ** 2BC(g) horizon contains a band of massive silt loam material between 115-130 cm

                Sampling layers:
                Layer  Depth (cm)
                 1	  0-15
                 2	 15-30
                 3	 30-60
                 4	 60-90
                 5	 90-120
                 6	120-150
                 7	150-180 -- Only for water
              Chemical: Thickness=[200, 150, 200, 150, 200, 150, 200, 250, 300]; PH=[6.1, 6.1, 6, 6, 6, 6, 6, 6, 6]; PHUnits=Water
              Physical
                Thickness  ParticleSizeSand  ParticleSizeSilt  ParticleSizeClay  Rocks  BD    AirDry  LL15  DUL   SAT    KS
                150        5                 65                24                0      1.27  0.1     0.1   0.32  0.48   2911.1
                150        5                 65                22.667            0      1.38  0.1     0.1   0.31  0.47   711.9
                300        5                 65                17.167            0      1.39  0.08    0.08  0.32  0.475  442.9
                300        5                 65                11.667            0      1.45  0.14    0.14  0.37  0.44   171.9
                300        5                 65                11.5              0      1.41  0.14    0.14  0.35  0.467  1973.9
                300        5                 65                16.667            0      1.49  0.12    0.12  0.34  0.437  1483.6
                300        5                 65                16                0      1.49  0.07    0.07  0.2   0.437  944
                Rocks, ParticleSizeSand, ParticleSizeSilt source: Calculated
                SoilCrop OatsSoil: LL=[0.1, 0.1, 0.08, 0.14, 0.14, 0.12, 0.07]; KL=[0.1, 0.1, 0.05, 0.04, 0.03, 0.01, 0]; XF=[1, 1, 1, 1, 1, 1, 1]
              WaterBalance SoilWater: SummerDate=1-Nov; SummerU=9; SummerCona=4.4; WinterDate=1-Apr; WinterU=4; WinterCona=2; DiffusConst=88; DiffusSlope=35; Salb=0.23; CN2Bare=50; CNRed=20; CNCov=0.8; DischargeWidth=0; CatchmentArea=0; PSIDul=-100; Thickness=[200, 150, 200, 150, 200, 150, 200, 250, 300]; SWCON=[0.9, 0.6, 0.6, 0.6, 0.546, 0.569, 0.533, 0.464, 0.541]
              Organic: FOMCNRatio=40; CarbonUnits=Total
                Thickness  Carbon  SoilCNRatio  FBiom  FInert  FOM
                200        3.4     11           0.06   0.2     271.505
                150        1.8     11           0.04   0.3     211.448
                200        0.3     11           0.012  0.85    151.509
                150        0.32    11           0.01   0.945   117.996
                200        0.14    11           0.01   0.983   84.5475
                150        0.21    11           0.01   0.98    65.8457
                200        0.2     11           0.01   0.99    47.1805
                250        0.2     11           0.01   0.99    31.1033
                300        0.17    11           0.01   0.99    18.8651
              Water: Thickness=[150, 150, 300, 300, 300, 300, 300]; InitialValues=[0.3, 0.244, 0.25, 0.25, 0.264, 0.256, 0.162]; InitialPAWmm=241.2; RelativeTo=LL15; FilledFromTop=false
                Memo ReadThisIfInitialSoilNisOfInterest
                  Initial soil N varied from treatment to treatment depending on the irrigation and N treatment of the previous fodder beet trial.  These treatment specific initial N contents are set in a manager scrip called "TreatmentSpecificActions", over writing what is set in this node
              CERESSoilTemperature Temperature
              Nutrient
              Solute NO3: Thickness=[200, 150, 200, 150, 200, 150, 200, 250, 300]; InitialValuesUnits=ppm; WaterTableConcentration=0; D0=0; DepthConstant=0; MaxDepthSoluteAccessible=0; RunoffEffectivenessAtMovingSolute=0; MaxEffectiveRunoff=0
                InitialValues=[9.57863, 6.03621, 1.00719, 1.07136, 1.10345, 1.06383, 1.01599, 0.872483, 0.671141]
              Solute NH4: Thickness=[200, 150, 200, 150, 200, 150, 200, 250, 300]; InitialValuesUnits=ppm; WaterTableConcentration=0; D0=0; DepthConstant=0; MaxDepthSoluteAccessible=0; RunoffEffectivenessAtMovingSolute=0; MaxEffectiveRunoff=0
                InitialValues=[1.06518, 1.06848, 0.983213, 0.49632, 0.252874, 0.212766, 0.221096, 0.246085, 0.223714]
              Solute Urea: Thickness=[200, 150, 200, 150, 200, 150, 200, 250, 300]; InitialValues=[0, 0, 0, 0, 0, 0, 0, 0, 0]; InitialValuesUnits=kg/ha; WaterTableConcentration=0; D0=0; DepthConstant=0; MaxDepthSoluteAccessible=0; RunoffEffectivenessAtMovingSolute=0; MaxEffectiveRunoff=0
              OutputLayers OutputNutrientLayers: Thickness=[150, 150, 300, 300, 300, 300, 300]
              OutputLayers OutputWaterLayers: Thickness=[200, 200, 200, 200, 200, 200, 200, 200, 200]
            Report EnviroReport: same as Validation.New Zealand.SAE.SAE_Oats_2020.A_Block_2020x.paddock.EnviroReport
            Report DailyReport: EventNames=[Clock].DoReport
              VariableNames:
                [Clock].Today
                [Weather].MeanT
                [Soil].Water.Volumetric
                [Soil].Water.MM
                sum([Soil].Water.MM) as ProfileWater
                [SurfaceOrganicMatter].Wt
                sum([Soil].NO3.kgha) as TotalSoilNitrogen
                [Oats].AboveGround.N
                [Oats].AboveGround.Wt
                [Oats].AboveGroundLive.N
                [Oats].AboveGroundLive.Wt
                [Oats].AboveGroundDead.N
                [Oats].AboveGroundDead.Wt
                [Oats].Arbitrator.DMDemand
                [Oats].Arbitrator.DM.TotalFixationSupply
                [Oats].Ear.N
                [Oats].Ear.NConc
                [Oats].Ear.Wt
                [Oats].Grain.N
                [Oats].Grain.NConc
                [Oats].Grain.Number
                [Oats].Grain.Size
                [Oats].Grain.Wt
                [Oats].Grain.Live.Wt
                [Oats].Leaf.AppearedCohortNo
                [Oats].Leaf.CoverDead
                [Oats].Leaf.CoverGreen
                [Oats].Leaf.CoverTotal
                [Oats].Leaf.Dead.N
                [Oats].Leaf.Dead.NConc
                [Oats].Leaf.Dead.Wt
                [Oats].Leaf.DeadCohortNo
                [Oats].Leaf.SenescingCohortNo
                [Oats].Leaf.ExpandedCohortNo
                [Oats].Leaf.Fn
                [Oats].Leaf.Fw
                [Oats].Leaf.Height
                [Oats].Leaf.InitialisedCohortNo
                [Oats].Leaf.LAI
                [Oats].Leaf.Live.N
                [Oats].Leaf.Live.NConc
                [Oats].Leaf.Live.Wt
                [Oats].Leaf.SpecificArea
                [Oats].Leaf.Transpiration
                [Oats].Phenology.CurrentPhase.Name
                [Oats].Phenology.CurrentStageName
                [Oats].Phenology.DailyVernalisation
                [Oats].Phenology.MeanTemp
                [Oats].Phenology.Photoperiod
                [Oats].Phenology.Stage
                [Oats].Phenology.ThermalTime
                [Oats].Phenology.ThermalTime
                [Oats].Phenology.Vrn1
                [Oats].Phenology.Vrn2
                [Oats].Phenology.Vrn4
                [Oats].Phenology.Zadok.Stage
                [Oats].Root.Depth
                [Oats].Root.N
                [Oats].Root.Wt
                [Oats].Root.NConc
                [Oats].Root.WaterUptake
                [Oats].Panicle.N
                [Oats].Panicle.NConc
                [Oats].Panicle.Wt
                [Oats].Panicle.Live.StorageWt
                [Oats].Stem.N
                [Oats].Stem.NConc
                [Oats].Stem.Wt
                [Oats].Stem.PercentWSC
                [Oats].Stem.Live.StorageWt
                [Oats].StemPlusPanicle.Wt
                [Oats].StemPlusPanicle.N
                [Oats].SowingData.Cultivar
                [Oats].Structure.HaunStageTerminalSpikelet
                [Oats].Structure.HaunStage
                [Oats].Structure.Height
                [Oats].Structure.LeafTipsAppeared
                [Oats].Structure.FinalLeafNumber
                [Oats].Structure.FinalLeafNumber.ValueToHold.PhotoPLeaves
                [Oats].Structure.MainStemPopn
                [Oats].Structure.MeanTillerGrowthRate
                [Oats].Structure.TotalStemPopn
                [Oats].Total.N
                [Oats].Total.Wt
                [SurfaceOrganicMatter].Wt
                ([Oats].Leaf.Transpiration + [Soil].SoilWater.Es + [MicroClimate].PrecipitationInterception) as ET
                sum([Soil].NO3.kgha) as TotalSoilNitrogen
                [Oats].Phenology.FlagLeafDAS
                [Oats].Phenology.FloweringDAS
                [Oats].Phenology.MaturityDAS
                [Oats].Phenology.PhotoPeriod
                [Oats].Phenology.PhotoPeriodDeltaFunction
                [Oats].Phenology.Stage
                [Oats].Phenology.SoilTemperatureFunction
            Report HarvestReport
            Report SupReport: EventNames=[Clock].DoReport
              VariableNames:
                [Clock].Today
                [Phenology].ThermalTime
                [Leaf].CohortSize
                [Leaf].CohortParameters.MaxArea
                [Oats].Arbitrator.DM.TotalFixationSupply
                [Oats].Arbitrator.FN
                [Oats].Structure.Phyllochron
                [Oats].Leaf.CohortMaxSize
                [Oats].Leaf.CohortParameters.GrowthDuration
                [Oats].Leaf.CohortParameters.LagDuration
                [Oats].Leaf.CohortParameters.SenescenceDuration
                [Oats].Leaf.CohortParameters.SpecificLeafAreaMax
                [Oats].Leaf.CohortParameters.SpecificLeafAreaMin
                [Oats].Leaf.Photosynthesis.FT
                [Oats].Leaf.Photosynthesis.FVPD
                [Oats].Leaf.Photosynthesis.RueAct
                [Oats].Leaf.NextExpandingLeafProportion
                [Oats].Structure.MeanTillerGrowthRate
                [LeafSize].Script.LeafAppearedPosition
                [LeafSize].Script.MostRecentlyAppearedLeafMaxSize
                [LeafSize].Script.LeafExpandedPosition
                [LeafSize].Script.MostRecentlyExpandedLeafSize
                [Grain].AccumThermalTime
                [Oats].Panicle.HeadNumber
                [Oats].Grain.NumberFunction
                sum([Soil].Water.MM) as ProfileWater
      Folder FRNL
        Experiment WinterSowing2015
          Memo Experiment Description
            FRNL Experiment: Data from [malcolm2016catch]

            Note: the 2015 version of this experiment established inconsistently and data is not of the same quality as that generated in 2016.

            Grazing winter forage crops is an important management strategy for profitable livestock production in many New Zealand regions where there is commonly a pasture feed deficit during this period. However, the high stocking densities that are often associated with these systems can have negative environmental effects, such as nitrogen (N) leaching losses to groundwater. This field study investigated the potential biomass production and reduced risk of N leaching from establishing oats (Avena sativa L.) as a green-chop catch crop after winter-grazed forage kale (Brassica oleracea var. acephala L.) in Canterbury, New Zealand. Oat crops were direct-drilled on two sowing dates (early: 1 July 2015 and late: 1 August 2015) and were managed under high (400 kg N/ha) and low (0 kg N/ha) N load conditions, representing urine-patch and inter urine-patch areas. For the early-sown crops yields were 6.1 (low N) and 11.8 t DM/ha (high N) at final harvest (50% ear emergence) on 19 November 2015. For the late-sown crops yields were 6.7 (low N) and 10.1 t DM/ha (high N) at the same development stage (26 November 2015). By establishing oats as a catch crop in winter soil profile mineral-N (0-120 cm depth) was reduced by up to 86% (early) and 80% (late) in the high N (simulated urine-patch) treatments compared with the respective fallow treatment. These results indicated the technical feasibility of direct drilling oats as catch crops immediately after winter forage grazing, with likely production and environmental benefits such as the reduced risk of N leaching losses.
          Factors
            Permutation
              Factor Sow
                CompositeFactor July
                  Specifications:
                    [Operations]
                    [Fertilise].Script.SDSwitch = 1.0
                  Operations
                    2015-07-01  [Oats].Sow(population:80, cultivar:"Milton", depth:40, rowSpacing:150);
                CompositeFactor Aug
                  Specifications:
                    [Operations]
                    [Fertilise].Script.SDSwitch = 2.0
                  Operations
                    2015-08-01  [Oats].Sow(population:80, cultivar:"Milton", depth:40, rowSpacing:150);
              Factor Fert
                CompositeFactor 0: Specifications=[Fertilize]
                  Operations Fertilize
                    2015-06-01  [Fertiliser].Apply(0, "UreaN", 10);
                CompositeFactor 400: Specifications=[Fertilize]
                  Operations Fertilize
                    2015-06-01  [Fertiliser].Apply(400, "UreaN", 10);
          Simulation ABlock
            Clock: Start=2015-05-25; End=2015-12-01
            Weather: FileName=WeatherFiles/Lincoln.met; Latitude=-43.626; Tav=11.6; Amp=10.6
            Summary summaryfile
            SoilArbitrator Soil Arbitrator
            Zone paddock: Area=1; Slope=0; AspectAngle=0; Altitude=50
              Irrigation
              SurfaceOrganicMatter Surface Organic Matter: InitialResidueName=foragebrassica; InitialResidueType=foragebrassica; InitialResidueMass=1500; InitialStandingFraction=0; InitialCPR=0; InitialCNR=50
              Fertiliser
              MicroClimate: a_interception=0; b_interception=1; c_interception=0; d_interception=0; SoilHeatFluxFraction=0.4; MinimumHeightDiffForNewLayer=0; NightInterceptionFraction=0.5; ReferenceHeight=2
              Plant Oats
              Folder Manager folder
                Operations
                Manager Fertilise
                  SDSwitch = 0
                  FertDate1 = 05-Aug
                  FertDate2 = 01-Oct
                  FertDate3 = 20-Oct
                  FertDate4 = 25-Nov
                  Amount1 = 0
                  Amount2 = 0
                  Amount3 = 0
                  Amount4 = 0
```csharp
using Models.Soils;
using System;
using Models.Core;
using Models.PMF;
using APSIM.Shared.Utilities;
namespace Models
{
    [Serializable]
    public class Script : Model
    {
        [Link] Clock Clock;
        [Link] Fertiliser Fertiliser;
        
        [Description("Date to fertilise")]
        public string FertDate1 { get; set; }
        [Description("Date to fertilise")]
        public string FertDate2 { get; set; }
        [Description("Date to fertilise")]
        public string FertDate3 { get; set; }
        [Description("Date to fertilise")]
        public string FertDate4 { get; set; }
        
        [Description("Amount of fertiliser to be applied (kg/ha)")]
        public double Amount1 { get; set; }
        [Description("Amount of fertiliser to be applied (kg/ha)")]
        public double Amount2 { get; set; }
        [Description("Amount of fertiliser to be applied (kg/ha)")]
        public double Amount3 { get; set; }
        [Description("Amount of fertiliser to be applied (kg/ha)")]
        public double Amount4 { get; set; }
        
        [Description("Amount of fertiliser to be applied (kg/ha)")]
        public double SDSwitch { get; set; }
        
        [EventSubscribe("DoManagement")]
        private void OnDoManagement(object sender, EventArgs e)
        {
            if (DateUtilities.WithinDates(FertDate1, Clock.Today, FertDate1))
                Fertiliser.Apply(amount: Amount1 * SDSwitch, type: "NO3N");
            if (DateUtilities.WithinDates(FertDate2, Clock.Today, FertDate2))
                Fertiliser.Apply(amount: Amount2, type: "NO3N");
            if (DateUtilities.WithinDates(FertDate3, Clock.Today, FertDate3))
                Fertiliser.Apply(amount: Amount3, type: "NO3N");
            if (DateUtilities.WithinDates(FertDate4, Clock.Today, FertDate4))
                Fertiliser.Apply(amount: Amount4 * SDSwitch, type: "NO3N");
        }
    }
}
```
                Operations Fertilize
                  2015-06-01  [Fertiliser].Apply(0, "UreaN", 10);
                Operations Irr
                  2015-10-15  [Irrigation].Apply(25);
                  2015-11-03  [Irrigation].Apply(25);
                  2015-11-15  [Irrigation].Apply(25);
                  2015-11-20  [Irrigation].Apply(30);
                Manager Harvesting
```csharp
using Models.Soils.Nutrients;
using System;
using Models.Core;
using System.Collections.Generic;
using System.Text;
using Models.Soils;
using Models.Soils.Nutrients;
using Models.PMF;
using Models;
using System.Xml.Serialization;
using APSIM.Shared.Utilities;

namespace Models
{
    [Serializable] 
    public class Script : Model
    {

    }
}
```
              Report DailyReport
              Report HarvestReport
              Report SupReport: EventNames=[Clock].DoReport
                VariableNames:
                  [Clock].Today
                  [Leaf].CohortSize
                  [Oats].Arbitrator.DM.TotalFixationSupply
                  [Oats].Arbitrator.FN
                  [Oats].Leaf.CohortMaxSize
                  [Oats].Leaf.CohortParameters.GrowthDuration
                  [Oats].Leaf.CohortParameters.LagDuration
                  [Oats].Leaf.CohortParameters.MaxArea
                  [Oats].Leaf.CohortParameters.SenescenceDuration
                  [Oats].Leaf.CohortParameters.SpecificLeafAreaMax
                  [Oats].Leaf.CohortParameters.SpecificLeafAreaMin
                  [Oats].Leaf.Photosynthesis.FT
                  [Oats].Leaf.Photosynthesis.FVPD
                  [Oats].Leaf.Photosynthesis.RueAct
                  [Oats].Leaf.NextExpandingLeafProportion
                  [Oats].Structure.MeanTillerGrowthRate
                  sum([Soil].Water.MM[1:8]) as ProfileWater
              Soil TempletonABlock: Latitude=0; Longitude=0
                Physical
                  Thickness  ParticleSizeSand  ParticleSizeSilt  ParticleSizeClay  Rocks  BD     AirDry  LL15   DUL    SAT    KS
                  100        15                63                22                0      1.23   0.063   0.14   0.3    0.535  480
                  100        15                63                22                0      1.235  0.065   0.16   0.325  0.53   420
                  200        12.5              66                21.5              0      1.375  0.074   0.185  0.35   0.481  240
                  200        15                65                20                0      1.66   0.06    0.15   0.315  0.374  24
                  200        5                 72.5              22.5              0      1.59   0.074   0.185  0.325  0.4    24
                  200        45                47                8                 0      1.44   0.04    0.1    0.315  0.45   1200
                  200        25                60                15                0      1.525  0.048   0.12   0.325  0.425  480
                  200        60                35                5                 0      1.36   0.028   0.07   0.28   0.475  720
                  200        50                44                6                 0      1.35   0.04    0.1    0.345  0.46   1200
                  200        50                44                6                 0      1.35   0.032   0.08   0.28   0.46   1140
                  SoilCrop OatsSoil
                    LL=[0.155, 0.17, 0.185, 0.15, 0.185, 0.1, 0.12, 0.07, 0.1, 0.08]
                    KL=[0.1, 0.08, 0.05, 0.035, 0.02, 0.01, 0.007, 0.003, 0.001, 0]
                    XF=[1, 1, 1, 1, 1, 1, 1, 1, 1, 1]
                WaterBalance SoilWater: SummerDate=1-Nov; SummerU=9; SummerCona=4.4; WinterDate=1-Apr; WinterU=9; WinterCona=4.4; DiffusConst=88; DiffusSlope=35.4; Salb=0.18; CN2Bare=68; CNRed=20; CNCov=0.8; PSIDul=-100; Thickness=[100, 100, 200, 200, 200, 200, 200, 200, 200, 200]
                  SWCON=[0.563, 0.56, 0.481, 0.423, 0.437, 0.545, 0.53, 0.508, 0.534, 0.533]
                Organic: FOMCNRatio=40; CarbonUnits=Total
                  Thickness  Carbon  SoilCNRatio  FBiom  FInert  FOM
                  100        3.2     11           0.06   0.315   900
                  100        2.75    11           0.046  0.522   700
                  200        1.85    11.5         0.01   0.785   550
                  200        0.45    10           0.008  0.899   200
                  200        0.25    9.5          0.008  0.953   100
                  200        0.2     9            0.008  0.969   40
                  200        0.2     9            0.008  0.989   7.5
                  200        0.15    9            0.008  0.99    2.5
                  200        0.1     9            0.008  0.987   0
                  200        0.1     9            0.008  0.988   0
                Chemical: Thickness=[150, 150, 300, 300, 300, 300, 300]; PH=[7, 7, 7, 7, 7, 7, 7]; PHUnits=Water
                CERESSoilTemperature Temperature
                Water: Thickness=[100, 100, 200, 200, 200, 200, 200, 200, 200, 200]; InitialPAWmm=341.5; RelativeTo=LL15; FilledFromTop=false
                  InitialValues=[0.3, 0.325, 0.35, 0.315, 0.325, 0.315, 0.325, 0.28, 0.345, 0.28]
                Memo SoilDoc
                  This soil was parameterised based on ....
                OutputLayers OutputNutrientLayers: Thickness=[150, 150, 300, 300, 300, 300, 300]
                Solute NO3: Thickness=[150, 150, 300, 300, 300, 300, 300]; InitialValues=[5, 10, 6.5, 2.5, 2, 1, 0.5]; InitialValuesUnits=ppm; WaterTableConcentration=0; D0=0; DepthConstant=0; MaxDepthSoluteAccessible=0; RunoffEffectivenessAtMovingSolute=0; MaxEffectiveRunoff=0
                Solute NH4: Thickness=[150, 150, 300, 300, 300, 300, 300]; InitialValues=[5, 2, 1, 0.35, 0.2, 0.2, 0.2]; InitialValuesUnits=ppm; WaterTableConcentration=0; D0=0; DepthConstant=0; MaxDepthSoluteAccessible=0; RunoffEffectivenessAtMovingSolute=0; MaxEffectiveRunoff=0
                Solute Urea: Thickness=[150, 150, 300, 300, 300, 300, 300]; InitialValues=[0, 0, 0, 0, 0, 0, 0]; InitialValuesUnits=ppm; WaterTableConcentration=0; D0=0; DepthConstant=0; MaxDepthSoluteAccessible=0; RunoffEffectivenessAtMovingSolute=0; MaxEffectiveRunoff=0
                OutputLayers OutputWaterLayers: Thickness=[300, 300, 300, 300, 300, 300]
                Nutrient
        Experiment WinterSowing2016
          Memo Experiment Description
            FRNL Experiment: Data from [malcolm2016catch]

            Grazing winter forage crops is an important management strategy for profitable livestock production in many New Zealand regions where there is commonly a pasture feed deficit during this period. However, the high stocking densities that are often associated with these systems can have negative environmental effects, such as nitrogen (N) leaching losses to groundwater. This field study investigated the potential biomass production and reduced risk of N leaching from establishing oats (Avena sativa L.) as a green-chop catch crop after winter-grazed forage kale (Brassica oleracea var. acephala L.) in Canterbury, New Zealand. Oat crops were direct-drilled on two sowing dates (early: 1 July 2015 and late: 1 August 2015) and were managed under high (400 kg N/ha) and low (0 kg N/ha) N load conditions, representing urine-patch and inter urine-patch areas. For the early-sown crops yields were 6.1 (low N) and 11.8 t DM/ha (high N) at final harvest (50% ear emergence) on 19 November
            2015. For the late-sown crops yields were 6.7 (low N) and 10.1 t DM/ha (high N) at the same development stage (26 November 2015). By establishing oats as a catch crop in winter soil profile mineral-N (0-120 cm depth) was reduced by up to 86% (early) and 80% (late) in the high N (simulated urine-patch) treatments compared with the respective fallow treatment. These results indicated the technical feasibility of direct drilling oats as catch crops immediately after winter forage grazing, with likely production and environmental benefits such as the reduced risk of N leaching losses.
          Factors
            Permutation
              Factor Sow
                CompositeFactor July: Specifications=[SowingHarvesting]
                  Operations SowingHarvesting
                    2016-07-01  [Oats].Sow(population:300, cultivar:"Milton", depth:40, rowSpacing:150);
                    2016-11-30  [Oats].Harvest()
                    2016-11-30  [Oats].EndCrop()
                CompositeFactor Aug: Specifications=[SowingHarvesting]
                  Operations SowingHarvesting
                    2016-08-01  [Oats].Sow(population:300, cultivar:"Milton", depth:40, rowSpacing:150);
                    2016-11-30  [Oats].Harvest()
                    2016-11-30  [Oats].EndCrop()
          Simulation RS2016
            Clock: Start=2016-05-25; End=2016-12-01
            Weather: FileName=WeatherFiles/Lincoln.met; Latitude=-43.626; Tav=11.6; Amp=10.6
            Summary summaryfile
            SoilArbitrator Soil Arbitrator
            Zone paddock: Area=1; Slope=0; AspectAngle=0; Altitude=50
              Soil: Latitude=0; Longitude=0
                Chemical: Thickness=[100, 200, 300, 300, 300, 300]; PH=[6.6, 6.2, 5.7, 5.5, 5.5, 5.5]; PHUnits=Water
                Physical
                  Thickness  BD   AirDry  LL15  DUL   SAT
                  200        1.2  0.15    0.15  0.32  0.46
                  200        1.2  0.15    0.15  0.32  0.46
                  200        1.2  0.15    0.15  0.3   0.4
                  200        1.2  0.15    0.15  0.3   0.4
                  200        1.2  0.15    0.15  0.3   0.4
                  200        1.2  0.15    0.15  0.3   0.4
                  200        1.2  0.15    0.15  0.3   0.4
                  200        1.2  0.15    0.15  0.3   0.4
                  SoilCrop WheatSoil: LL=[0.15, 0.15, 0.15, 0.15, 0.15, 0.15, 0.15, 0.15]; KL=[0.06, 0.06, 0.06, 0.06, 0.04, 0.03, 0.01, 0.01]; XF=[1, 1, 1, 1, 1, 1, 1, 1]
                  SoilCrop OatsSoil: LL=[0.15, 0.15, 0.15, 0.15, 0.15, 0.15, 0.15, 0.15]; KL=[0.06, 0.06, 0.06, 0.06, 0.04, 0.03, 0.01, 0.01]; XF=[1, 1, 1, 1, 1, 1, 1, 1]
                WaterBalance SoilWater: SummerDate=1-Nov; SummerU=6; SummerCona=2; WinterDate=1-Apr; WinterU=9; WinterCona=4.4; DiffusConst=88; DiffusSlope=35; Salb=0.18; CN2Bare=68; CNRed=20; CNCov=0.8; DischargeWidth=0; CatchmentArea=0; PSIDul=-100
                  Thickness  SWCON  KLAT
                  200        0.7    0
                  200        0.7    0
                  200        0.95   0
                  200        0.95   0
                  200        0.95   0
                  200        0.95   0
                  200        0.95   0
                  200        0.95   0
                Organic: same as Validation.New Zealand.CPT.PaddockCPT.paddock.Soil.Organic
                Water: Thickness=[200, 200, 200, 200, 200, 200, 200, 200]; InitialValues=[0.29, 0.28, 0.16, 0.15, 0.15, 0.15, 0.15, 0.15]; InitialPAWmm=56; RelativeTo=LL15; FilledFromTop=false
                CERESSoilTemperature Temperature
                Nutrient
                Solute NO3: Thickness=[100, 200, 300, 300, 300, 300]; InitialValues=[180.833, 12.5, 1.38889, 1.38889, 0, 0]; InitialValuesUnits=ppm; WaterTableConcentration=0; D0=0; DepthConstant=0; MaxDepthSoluteAccessible=0; RunoffEffectivenessAtMovingSolute=0; MaxEffectiveRunoff=0
                Solute NH4: same as Validation.New Zealand.CPT.PaddockCPT.paddock.Soil.NH4
                Solute Urea: same as Validation.New Zealand.RS_Oats_9899.LincRS9899.paddock.Soil.Urea
                OutputLayers OutputWaterLayers: Thickness=[300, 300, 300, 300, 300, 300]
                OutputLayers OutputNutrientLayers: Thickness=[150, 150, 300, 300, 300, 300, 300]
              Irrigation
              SurfaceOrganicMatter Surface Organic Matter: InitialResidueName=wheat_stubble; InitialResidueType=wheat; InitialResidueMass=0; InitialStandingFraction=0; InitialCPR=0; InitialCNR=80
              Fertiliser
              MicroClimate: a_interception=0; b_interception=1; c_interception=0; d_interception=0; SoilHeatFluxFraction=0.4; MinimumHeightDiffForNewLayer=0; NightInterceptionFraction=0.5; ReferenceHeight=2
              Plant Oats
              Folder Manager folder
                Operations IrrigationOperations
                  2016-09-06  [Irrigation].Apply(25);
                  2016-09-13  [Irrigation].Apply(28);
                  2016-09-19  [Irrigation].Apply(25);
                  2016-09-26  [Irrigation].Apply(25);
                  2016-10-05  [Irrigation].Apply(30);
                Operations FertiliserOperations
                  2016-07-01  [Fertiliser].Apply(400, "UreaN", 10);
                Operations SowingHarvesting
                  2016-08-01  [Oats].Sow(population:300, cultivar:"Milton", depth:40, rowSpacing:150);
                  2016-11-13  [Oats].Harvest()
              Report DailyReport
              Report HarvestReport
        Experiment WinterSowing2017
          Memo Experiment Description
            *	FRNL Experiment conducted in ABlock in 2017
            *	Measurements included crop development, yield, N conc final soil mineral N
            *	Soil - templeton
            *	Target population - 300 plants/m2
            *	Urine patch (fallow versus cover crop) experiment
            *	Report below indicates five irrigation events Oct-Dec. These have been estimated.

            Reported in Malcolm B, Teixeira E, Maley S, Johnstone P, Hunt A, de Ruiter J 2018b. FRNL Critical step 2.12 – results summary from the 2017 Canterbury field studies, March 2018. A Plant & Food Research report prepared for: PFR (SAE). Milestone No. 74326. Contract No. NA. Job code: P/442060/09. SPTS No. 16106.
          Factors
            Permutation
              Factor Rate
                CompositeFactor 0: Specifications=[SowingHarvesting]
                  Operations SowingHarvesting
                    2017-12-31  [Oats].Sow(population: 1, cultivar: "Milton", depth: 200, rowSpacing: 150)
                    2018-12-31  [Oats].Harvest()
                CompositeFactor 300: Specifications=[SowingHarvesting]
                  Operations SowingHarvesting
                    2017-06-20  [Oats].Sow(population: 300, cultivar: "Milton", depth: 20, rowSpacing: 150)
                    2017-12-31  [Oats].Harvest()
                    2017-12-31  [Oats].EndCrop()
          Simulation ABlock2017cc
            Clock: Start=2017-06-18; End=2018-01-25
            Weather: FileName=WeatherFiles/Lincoln.met; Latitude=-43.626; Tav=11.6; Amp=10.6
            Summary summaryfile
            SoilArbitrator Soil Arbitrator
            Zone Block: Area=1; Slope=0; AspectAngle=0; Altitude=50
              Folder Manager folder
                Operations FertiliserSchedule
                  2017-06-20  [Fertiliser].Apply(400, "UreaN", 10);
                Operations SowingHarvesting
                  2017-06-20  [Oats].Sow(population: 250, cultivar: "Milton", depth: 20, rowSpacing: 150)
                  2017-12-31  [Oats].Harvest()
                Operations IrrigationOperations
                  2017-10-02  [Irrigation].Apply(20);
                  2017-11-10  [Irrigation].Apply(30);
                  2017-11-21  [Irrigation].Apply(30)
                  2017-11-30  [Irrigation].Apply(30)
                  2017-12-10  [Irrigation].Apply(30)
              MicroClimate: a_interception=0; b_interception=1; c_interception=0; d_interception=0; SoilHeatFluxFraction=0.4; MinimumHeightDiffForNewLayer=0; NightInterceptionFraction=0.5; ReferenceHeight=2
              Irrigation
              Fertiliser
              SurfaceOrganicMatter: InitialResidueName=pasture; InitialResidueType=pasture; InitialResidueMass=2500; InitialCPR=0; InitialCNR=40
              Soil TempletonABlock: Latitude=0; Longitude=0
                Physical: same as Validation.New Zealand.FRNL.WinterSowing2015.ABlock.paddock.TempletonABlock.Physical
                WaterBalance SoilWater: SummerDate=1-Nov; SummerU=9; SummerCona=4.4; WinterDate=1-Apr; WinterU=4; WinterCona=2; DiffusConst=88; DiffusSlope=35.4; Salb=0.18; CN2Bare=68; CNRed=20; CNCov=0.8; PSIDul=-100; Thickness=[100, 100, 200, 200, 200, 200, 200, 200, 200, 200]
                  SWCON=[0.563, 0.56, 0.481, 0.423, 0.437, 0.545, 0.53, 0.508, 0.534, 0.533]
                Organic: same as Validation.New Zealand.FRNL.WinterSowing2015.ABlock.paddock.TempletonABlock.Organic
                Chemical: Thickness=[150, 150, 300, 300, 300, 300, 300]; PH=[7, 7, 7, 7, 7, 7, 7]; PHUnits=Water
                CERESSoilTemperature Temperature
                Water: Thickness=[100, 100, 200, 200, 200, 200, 200, 200, 200, 200]; InitialPAWmm=341.5; RelativeTo=LL15; FilledFromTop=false
                  InitialValues=[0.3, 0.325, 0.35, 0.315, 0.325, 0.315, 0.325, 0.28, 0.345, 0.28]
                Memo SoilDoc
                  This soil was parameterised based on ....
                OutputLayers OutputNutrientLayers: Thickness=[150, 150, 300, 300, 300, 300, 300]
                Solute NO3: Thickness=[150, 150, 300, 300, 300, 300, 300]; InitialValues=[25, 15, 6.5, 2.5, 2, 1, 0.5]; InitialValuesUnits=ppm; WaterTableConcentration=0; D0=0; DepthConstant=0; MaxDepthSoluteAccessible=0; RunoffEffectivenessAtMovingSolute=0; MaxEffectiveRunoff=0
                Solute NH4: same as Validation.New Zealand.FRNL.WinterSowing2015.ABlock.paddock.TempletonABlock.NH4
                Solute Urea: same as Validation.New Zealand.FRNL.WinterSowing2015.ABlock.paddock.TempletonABlock.Urea
                OutputLayers OutputWaterLayers: Thickness=[300, 300, 300, 300, 300, 300]
                Nutrient
              Plant Oats
                Folder NewCultivars
                  Cultivar Coronet
                    Command:
                      [Phenology].MinimumLeafNumber.FixedValue = 9
                      [Phenology].VrnSensitivity.FixedValue = 0
                      [Phenology].PpSensitivity.FixedValue = 0
                      [Phenology].EarlyReproductiveLongDayBase.FixedValue = 0
                      [Phenology].EarlyReproductivePpSensitivity.FixedValue = 0
                      [Structure].Phyllochron.BasePhyllochron.FixedValue = 105
                      [Leaf].ExtinctionCoeff.FixedValue = 0.6
                      [Leaf].CohortParameters.MaxArea.AreaLargestLeaves.FixedValue = 1640
                      [Leaf].InitialLeaves1.Area = 200
                      [Leaf].InitialLeaves2.Area = 400
                      [Leaf].CohortParameters.MaxArea.AgeFactor.XYPairs.X = 3,4,4.3
                      [Leaf].CohortParameters.MaxArea.AgeFactor.XYPairs.Y = 0.05,1,0.05
                  Cultivar PFR_100_05
                    Command:
                      [Phenology].MinimumLeafNumber.FixedValue = 9
                      [Phenology].VrnSensitivity.FixedValue = 0
                      [Phenology].PpSensitivity.FixedValue = 0
                      [Phenology].EarlyReproductiveLongDayBase.FixedValue = 0
                      [Phenology].EarlyReproductivePpSensitivity.FixedValue = 0
                      [Structure].Phyllochron.BasePhyllochron.FixedValue = 105
                      [Leaf].ExtinctionCoeff.FixedValue = 0.6
                      [Leaf].CohortParameters.MaxArea.AreaLargestLeaves.FixedValue = 2500
                      [Leaf].InitialLeaves1.Area = 340
                      [Leaf].InitialLeaves2.Area = 660
                      [Leaf].CohortParameters.MaxArea.AgeFactor.XYPairs.X = 3,4,4.3
                      [Leaf].CohortParameters.MaxArea.AgeFactor.XYPairs.Y =  0.05,1,0.05
                  Memo ReadMe
                    # Comparing cultivars Coronet and PFR 100-05

                    - Data collected by **Mike George**
                    - Data sits in: https://iplant.plantandfood.co.nz/project/I161208

                    ## Context:
                    - PFR 100-05 showed faster canopy cloure rates via drone aerial photos
                    - Field trial was done to identify mechanisms.

                    ##Main differences between cultivars were:

                    - Larger leaves by PRR 100-05 (45-80% larger)
                    - Taller stems by PFR 100-05 (50% taller)

                    ## Observations

                    - We agreed to keep only leaf size as genotype difference. Height also differed as:
                    - [Structure].HeightModel.PotentialHeight.XYPairs.Y = 13,204,820,820
                    - [Structure].HeightModel.PotentialHeight.XYPairs.Y = 20,300,1200,1200
              Report Output
                VariableNames:
                  [Clock].Today as ReportDate
                  [Clock].Today.Year as Year
                  [FactorLabels].Script.AGENT_NO as AGENT_NO
                  [FactorLabels].Script.Lat as Lat
                  [FactorLabels].Script.Lon as Lon
                  [FactorLabels].Script.GCM as GCM
                  [FactorLabels].Script.RCP as RCP
                  [FactorLabels].Script.TS as TimeSlice
                  [FactorLabels].Script.SoilStamp as SoilStamp
                  [CropManagement].Script.CurrentCrop as CropSpecies
                  sum([Soil].Water.MM) as SoilWater_Total
                  sum([Soil].Urea.kgha) as SoilUrea_Total
                  sum([Soil].NH4.kgha) as SoilNH4_Total
                  sum([Soil].NO3.kgha) as SoilNO3_Total
                  (sum([Soil].Urea.kgha) + sum([Soil].NH4.kgha) + sum([Soil].NO3.kgha)) as SoilMineralN_Total
                  [CropManagement].Script.HarvestedWt as HarvestedCropBiomass
                  [CropManagement].Script.HarvestedN as HarvestedCropN
                  [CropManagement].Script.HarvestedNconc as HarvestedCropNconc
                  [CropManagement].Script.CropYield as CropYield
                  [CropManagement].Script.SowDOY as SowingDOY
                  [CropManagement].Script.HarvestDOY as HarvestingDOY
                  [CropManagement].Script.CoverCropCultivar as CoverCropCultivar
                  [Oats].Panicle.HeadNumber
                  [ExtraVariables].Script.CropAboveGroundBiomassN as UptakeN_Cum
                  [ExtraVariables].Script.AccumSoilOMMineralisedToLayer as SoilOMMineralisedNToGivenLayer_Cum
                  ([ExtraVariables].Script.AccumSoilOMMineralisedToLayer+[ExtraVariables].Script.AccumSurfaceOMMineralisation) as MineralisedNToGivenLayer_Cum
                  [ExtraVariables].Script.AccumDenitrifiedNToLayer as DenitrifiedNToGivenLayer_Cum
                  [ExtraVariables].Script.AccumFlowNAtLayer as LeachedNAtGivenLayer_Cum
                  [ExtraVariables].Script.SumUreaToLayer as UreaToGivenLayer_Sum
                  [ExtraVariables].Script.SumNH4ToLayer as NH4ToGivenLayer_Sum
                  [ExtraVariables].Script.SumNO3ToLayer as NO3ToGivenLayer_Sum
                  [ExtraVariables].Script.SumMineralNToLayer as MineralNToGivenLayer_Sum
                  [ExtraVariables].Script.SumFOMNToLayer as FOMNToGivenLayer_Sum
                  [ExtraVariables].Script.SumMicrobialNToLayer as MicrobialNToGivenLayer_Sum
                  [ExtraVariables].Script.SumHumicNToLayer as HumicNToGivenLayer_Sum
                  [ExtraVariables].Script.SumOrganicNToLayer as OrganicNToGivenLayer_Sum
                  [ExtraVariables].Script.SumOrganicCToLayer as OrganicCToGivenLayer_Sum
                  [Soil].SoilNitrogen.oc[1] as OC_TopLayer
                  [ExtraVariables].Script.DeltaSoilMineralNToLayer as SoilMineralN_DeltaToGivenLayer
                  [ExtraVariables].Script.DeltaSoilOrganicNToLayer as SoilOrganicN_DeltaToGivenLayer
                  [ExtraVariables].Script.CropAboveGroundBiomassWt as CropBiomass_Cum
                  [ExtraVariables].Script.CropAboveGroundBiomassN as CropN_Cum
                  [ExtraVariables].Script.CropAboveGroundBiomassNConc as CropNconc
                Memo: same as Replacements.DailyReportWater_n_MineralN.Memo
              Report DailyReport: EventNames=[Clock].EndOfDay
                VariableNames:
                  [Clock].Today
                  [Weather].MaxT
                  [Weather].MinT
                  [Weather].Radn
                  [Weather].Rain
                  [Oats].AboveGroundLive.Wt
                  [Oats].Leaf.LAI
                  [Oats].Leaf.CoverGreen
                  [Fertiliser].NitrogenApplied
                  [ExtraVariables].Script.AccumSoilOMMineralisedToLayer as SoilOMMineralisedNToGivenLayer_Cum
                  ([ExtraVariables].Script.AccumSoilOMMineralisedToLayer+[ExtraVariables].Script.AccumSurfaceOMMineralisation) as MineralisedNToGivenLayer_Cum
                  [ExtraVariables].Script.AccumDenitrifiedNToLayer as DenitrifiedNToGivenLayer_Cum
                  [ExtraVariables].Script.AccumFlowNAtLayer as LeachedNAtGivenLayer_Cum
                  [ExtraVariables].Script.SumUreaToLayer as UreaToGivenLayer_Sum
                  [ExtraVariables].Script.SumNH4ToLayer as NH4ToGivenLayer_Sum
                  [ExtraVariables].Script.SumNO3ToLayer as NO3ToGivenLayer_Sum
                  [ExtraVariables].Script.SumMineralNToLayer as MineralNToGivenLayer_Sum
                  [ExtraVariables].Script.CropAboveGroundBiomassWt as CropBiomass_Cum
                  [ExtraVariables].Script.CropAboveGroundBiomassN as CropN_Cum
                  [ExtraVariables].Script.CropAboveGroundBiomassNConc as CropNconc
                  [CropManagement].Script.HarvestedWt as HarvestedCropBiomass
                  [CropManagement].Script.HarvestedN as HarvestedCropN
                  [CropManagement].Script.HarvestedNconc as HarvestedCropNconc
                  [CropManagement].Script.CropYield as CropYield
                  [ExtraVariables].Script.depthForReporting as ReportDepth
                  [CropManagement].Script.SowDOY as SowingDOY
                  [CropManagement].Script.HarvestDOY as HarvestingDOY
                  [ExtraVariables].Script.AccumLightInterception as AccumLightInterc
                  [CropManagement].Script.CoverCropCultivar as CoverCropCultivar
                  [Oats].Leaf.Live.Wt as LeafBiomass
                  [Oats].Stem.Live.Wt as StemBiomass
                  [Oats].AboveGround.Wt as AboveBiomass
                  [Oats].Leaf.Live.N as LeafN
                  [Oats].Stem.Live.N as StemN
                  [Oats].AboveGround.N as AboveN
                  [ExtraVariables].Script.AccumTotalLeachedN as TotalLeachedN_Cum
                  [ExtraVariables].Script.AccumUptakeN as UptakeN_Cum
                  [ExtraVariables].Script.AccumRainfall as Rainfall_Cum
                  [ExtraVariables].Script.AccumIrrigation as AppliedIrrigation_Cum
                  [ExtraVariables].Script.AccumFertiliser as AppliedFertiliserN_Cum
                  [Oats].Phenology.Stage
                  [Oats].Phenology.CurrentStageName
                Memo: same as Replacements.DailyReportWater_n_MineralN.Memo
              Report DailyReportWater_n_MineralN: EventNames=[Clock].EndOfDay
                VariableNames:
                  [Clock].Today
                  ([Soil].OutputNutrientLayers.NO3[1] + [Soil].OutputNutrientLayers.NH4[1]) as SoilN_0_15
                  ([Soil].OutputNutrientLayers.NO3[2] + [Soil].OutputNutrientLayers.NH4[2]) as SoilN_15_30
                  ([Soil].OutputNutrientLayers.NO3[3] + [Soil].OutputNutrientLayers.NH4[3]) as SoilN_30_60
                  ([Soil].OutputNutrientLayers.NO3[4] + [Soil].OutputNutrientLayers.NH4[4]) as SoilN_60_90
                  (SoilN_0_15 + SoilN_15_30 ) as SoilN_0_30
                  (SoilN_0_15 + SoilN_15_30 + SoilN_30_60) as SoilN_0_60
                  (SoilN_0_15 + SoilN_15_30 + SoilN_30_60 + SoilN_60_90) as SoilN_0_90
                Memo: same as Replacements.DailyReportWater_n_MineralN.Memo
        Experiment TempletonLysimeter2017
          Memo Experiment description
            *	FRNL Lysimeter experiment conducted in ABlock in 2017

            *	Measurements included crop development, yield, N conc final soil mineral N

            *	Soil described as Templeton (see separate simulation Balmoral soil)

            *	Target population - 300 plants/m2

            *	Urine patch (fallow versus cover crop) experiment

            *	Oats sown in July or August.
          Factors
            Permutation
              Factor Sow
                CompositeFactor Jul: Specifications=[SowingHarvesting]
                  Operations SowingHarvesting
                    2017-07-10  [Oats].Sow(population: 50, cultivar: "Milton", depth: 20, rowSpacing: 150)
                    2017-12-02  [Oats].Harvest()
                    2017-12-02  [Oats].EndCrop()
                CompositeFactor Aug: Specifications=[SowingHarvesting]
                  Operations SowingHarvesting
                    2017-08-11  [Oats].Sow(population: 50, cultivar: "Milton", depth: 20, rowSpacing: 150)
                    2017-12-02  [Oats].Harvest()
                    2017-12-02  [Oats].EndCrop()
          Simulation TempLys2017
            Clock: Start=2017-07-09; End=2017-12-09
            Weather: FileName=WeatherFiles/Lincoln.met; Latitude=-43.626; Tav=11.6; Amp=10.6
            Summary summaryfile
            SoilArbitrator Soil Arbitrator
            Zone Block: Area=1; Slope=0; AspectAngle=0; Altitude=50
              Folder Manager folder
                Operations FertiliserSchedule
                  2017-07-10  [Fertiliser].Apply(amount: 300, type: "UreaN", depth: 10)
                Operations SowingHarvesting
                  2017-07-10  [Oats].Sow(population: 250, cultivar: "Milton", depth: 20, rowSpacing: 150)
                  2017-12-02  [Oats].Harvest()
                  2017-12-02  [Oats].EndCrop()
              MicroClimate: a_interception=0; b_interception=1; c_interception=0; d_interception=0; SoilHeatFluxFraction=0.4; MinimumHeightDiffForNewLayer=0; NightInterceptionFraction=0.5; ReferenceHeight=2
              Irrigation
              Fertiliser
              SurfaceOrganicMatter: InitialResidueName=pasture; InitialResidueType=pasture; InitialResidueMass=1500; InitialCPR=0; InitialCNR=40
              Soil TempletonABlock: Latitude=0; Longitude=0
                Physical: same as Validation.New Zealand.FRNL.WinterSowing2015.ABlock.paddock.TempletonABlock.Physical
                WaterBalance SoilWater: SummerDate=1-Nov; SummerU=9; SummerCona=4.4; WinterDate=1-Apr; WinterU=4; WinterCona=2; DiffusConst=88; DiffusSlope=35.4; Salb=0.18; CN2Bare=68; CNRed=20; CNCov=0.8; PSIDul=-100; Thickness=[100, 100, 200, 200, 100, 200, 200, 200, 200, 200]
                  SWCON=[0.563, 0.56, 0.481, 0.423, 0.437, 0.545, 0.53, 0.508, 0.534, 0.533]
                Organic: same as Validation.New Zealand.FRNL.WinterSowing2015.ABlock.paddock.TempletonABlock.Organic
                Chemical: Thickness=[150, 150, 300, 300, 300, 300, 300]; PH=[7, 7, 7, 7, 7, 7, 7]; PHUnits=Water
                CERESSoilTemperature Temperature
                Water: Thickness=[100, 100, 200, 200, 200, 200, 200, 200, 200, 200]; InitialPAWmm=341.5; RelativeTo=LL15; FilledFromTop=false
                  InitialValues=[0.3, 0.325, 0.35, 0.315, 0.325, 0.315, 0.325, 0.28, 0.345, 0.28]
                Memo SoilDoc
                  This soil was parameterised based on ....
                OutputLayers OutputNutrientLayers: Thickness=[150, 150, 300, 100, 300, 300, 300]
                Nutrient
                Solute NO3: Thickness=[150, 150, 300, 300, 300, 300, 300]; InitialValues=[5, 5, 6.5, 2.5, 2, 1, 0.5]; InitialValuesUnits=ppm; WaterTableConcentration=0; D0=0; DepthConstant=0; MaxDepthSoluteAccessible=0; RunoffEffectivenessAtMovingSolute=0; MaxEffectiveRunoff=0
                Solute NH4: same as Validation.New Zealand.FRNL.WinterSowing2015.ABlock.paddock.TempletonABlock.NH4
                Solute Urea: same as Validation.New Zealand.FRNL.WinterSowing2015.ABlock.paddock.TempletonABlock.Urea
                OutputLayers OutputWaterLayers: Thickness=[300, 300, 300, 300, 300, 300]
                LayerStructure: Thickness=[100, 100, 200, 200, 100]
              Plant Oats: same as Validation.New Zealand.FRNL.WinterSowing2017.ABlock2017cc.Block.Oats
              Report Output: same as Validation.New Zealand.FRNL.WinterSowing2017.ABlock2017cc.Block.Output
              Report DailyReport: same as Validation.New Zealand.FRNL.WinterSowing2017.ABlock2017cc.Block.DailyReport
              Report DailyReportWater_n_MineralN: EventNames=[Clock].EndOfDay
                VariableNames:
                  [Clock].Today
                  ([Soil].OutputNutrientLayers.NO3[1] + [Soil].OutputNutrientLayers.NH4[1]) as SoilN_0_15
                  ([Soil].OutputNutrientLayers.NO3[2] + [Soil].OutputNutrientLayers.NH4[2]) as SoilN_15_30
                  ([Soil].OutputNutrientLayers.NO3[3] + [Soil].OutputNutrientLayers.NH4[3]) as SoilN_30_60
                  ([Soil].OutputNutrientLayers.NO3[4] + [Soil].OutputNutrientLayers.NH4[4]) as SoilN_60_90
                Memo: same as Replacements.DailyReportWater_n_MineralN.Memo
              Report EnviroReport: EventNames=[Clock].DoReport
                VariableNames:
                  [Clock].Today
                  [Weather].MeanT
                  [Weather].Radn
                  [Weather].Rain as Rainfall
                  [Irrigation].IrrigationApplied
                  [Oats].Leaf.Fw
                  ([Oats].Leaf.Transpiration + [Soil].SoilWater.Es + [MicroClimate].PrecipitationInterception) as ET
                  [MicroClimate].PrecipitationInterception as Interception
                  [Oats].Leaf.Transpiration as Transpiration
                  [Soil].SoilWater.Es as Evaporation
                  [Soil].SoilWater.Drainage as Drainage
                  [Soil].SoilWater.Runoff as Runoff
                  sum([Soil].Water.MM) as TotalSoilWater
                  sum([Soil].Nutrient.MineralisedN) as MineralisedN
                  [Fertiliser].NitrogenApplied as FertiliserN
                  sum([Soil].Nutrient.Natm) as DenitrifiedN
                  ([Soil].SoilWater.LeachUrea+[Soil].SoilWater.LeachNH4+[Soil].SoilWater.LeachNO3) as NLeached
                  [SurfaceOrganicMatter].N as TotalSurfOMN
                  sum([Soil].Nutrient.FOM.N) as TotalFOMN
                  sum([Soil].Nutrient.Microbial.N) as TotalMicrobialN
                  sum([Soil].Nutrient.Humic.N) as TotalHumicN
                  (sum([Soil].NH4.kgha) + sum([Soil].NO3.kgha)) as TotalSoilN
                  sum([Soil].Urea.kgha) as TotalUrea
                  sum([Soil].NH4.kgha) as TotalNH4
                  sum([Soil].NO3.kgha) as TotalNO3
                  sum([Soil].Nutrient.DenitrifiedN) as Denitrification
                  [Soil].SoilWater.FlowNO3
                  ([Soil].SoilWater.Flux[5] + [Soil].SoilWater.Flow[5]) as Drainage70cm
                  ([Soil].SoilWater.FlowNH4[5] + [Soil].SoilWater.FlowNO3[5]) as Leaching70cm
        Experiment BalmoralLysimeter2017
          Memo Experiment Description
            *	FRNL Lysimeter experiment conducted in ABlock in 2017
            *	Measurements included crop development, yield, N conc final soil mineral N
            *	Soil described as Balmoral (see separate simulation Templeton soil)
            *	Target population - 300 plants/m2
            *	Urine patch (fallow versus cover crop) experiment
            *	Oats sown in July or August.
          Factors
            Permutation
              Factor Sow
                CompositeFactor Jul: Specifications=[SowingHarvesting]
                  Operations SowingHarvesting
                    2017-07-10  [Oats].Sow(population: 10, cultivar: "Milton", depth: 30, rowSpacing: 150)
                    2017-12-02  [Oats].Harvest()
                    2017-12-02  [Oats].EndCrop()
                CompositeFactor Aug: Specifications=[SowingHarvesting]
                  Operations SowingHarvesting
                    2017-08-11  [Oats].Sow(population: 10, cultivar: "Milton", depth: 30, rowSpacing: 150)
                    2017-12-02  [Oats].Harvest()
                    2017-12-02  [Oats].EndCrop()
          Simulation BalmoralLys2017
            Clock: Start=2017-07-09; End=2017-12-09
            Weather: FileName=WeatherFiles/Lincoln.met; Latitude=-43.626; Tav=11.6; Amp=10.6
            Summary summaryfile
            SoilArbitrator Soil Arbitrator
            Zone Block: Area=1; Slope=0; AspectAngle=0; Altitude=50
              Folder Manager folder: same as Validation.New Zealand.FRNL.TempletonLysimeter2017.TempLys2017.Block.Manager folder
              MicroClimate: a_interception=0; b_interception=1; c_interception=0; d_interception=0; SoilHeatFluxFraction=0.4; MinimumHeightDiffForNewLayer=0; NightInterceptionFraction=0.5; ReferenceHeight=2
              Irrigation
              Fertiliser
              SurfaceOrganicMatter: InitialResidueName=pasture; InitialResidueType=pasture; InitialResidueMass=2500; InitialCPR=0; InitialCNR=40
              Soil Balmoral: SoilType=Stony silt loam over sand; LocalName=Balmoral; Country=New Zealand; Latitude=37.5; Longitude=172.5
                Comments=Parameters adapted from data for Balmoral and Lismore soils. Data from NZ-NSD and publications. Further adaptation to better fit the results of the trial (particularly increased water retention and organic matter content
                Physical
                  Thickness  ParticleSizeSand  ParticleSizeSilt  ParticleSizeClay  BD    AirDry  LL15   DUL    SAT    KS
                  100        20                58                22                1.2   0.025   0.08   0.3    0.5    3000
                  100        20                57                23                1.2   0.07    0.075  0.3    0.49   2000
                  100        25                53                22                1.1   0.065   0.065  0.25   0.45   2500
                  200        40                37                23                0.65  0.045   0.045  0.15   0.3    5000
                  200        70                18                12                0.45  0.035   0.035  0.1    0.2    15000
                  300        90                5                 5                 0.4   0.025   0.025  0.07   0.15   22500
                  300        95                2                 3                 0.35  0.02    0.02   0.07   0.15   25000
                  200        95                1                 4                 0.4   0.02    0.02   0.075  0.175  22500
                  250        95                1                 4                 0.4   0.02    0.02   0.075  0.175  22500
                  250        95                1                 4                 0.4   0.02    0.02   0.075  0.175  22500
                  SoilCrop OatsSoil
                    LL=[0.08, 0.075, 0.065, 0.045, 0.035, 0.025, 0.02, 0.02, 0.02, 0.02]
                    KL=[0.08, 0.06, 0.045, 0.35, 0.01, 0.005, 0.003, 0.001, 0.001, 0.001]
                    XF=[1, 1, 1, 0.8, 0.6, 0.5, 0.5, 0.5, 0.5, 0.5]
                WaterBalance SoilWater: SummerDate=1-Oct; SummerU=9; SummerCona=4.4; WinterDate=1-Apr; WinterU=4; WinterCona=2; DiffusConst=88; DiffusSlope=35; Salb=0.2; CN2Bare=60; CNRed=10; CNCov=0.8; DischargeWidth=0; CatchmentArea=0; PSIDul=-100; Thickness=[100, 100, 100, 200, 200, 300, 300, 200, 250, 250]
                  SWCON=[0.55, 0.55, 0.575, 0.62, 0.63, 0.65, 0.63, 0.65, 0.63, 0.63]
                Organic: FOMCNRatio=40; CarbonUnits=Total
                  Thickness  Carbon  SoilCNRatio  FBiom  FInert  FOM
                  100        5.2     11.5         0.08   0.4     820
                  100        5       11.5         0.06   0.5     604
                  100        3.75    11.5         0.03   0.6     300
                  200        1.5     11.5         0.01   0.85    150
                  200        1       11.5         0.008  0.925   75
                  300        0.6     11.5         0.008  0.96    40
                  300        0.5     11.5         0.008  0.99    10
                  200        0.4     11.5         0.008  0.995   1
                  500        0.4     11.5         0.008  0.995   0
                CERESSoilTemperature Temperature
                Water: Thickness=[100, 100, 100, 200, 200, 300, 300, 200, 500]; InitialValues=[0.3, 0.3, 0.25, 0.15, 0.1, 0.07, 0.07, 0.075, 0.075]; InitialPAWmm=164; RelativeTo=LL15; FilledFromTop=true
                Chemical: Thickness=[100, 100, 100, 200, 200, 300, 300, 200, 500]; PH=[7, 7, 7, 7, 7, 7, 7, 7, 7]; PHUnits=Water
                OutputLayers OutputNutrientLayers: Thickness=[150, 150, 300, 300, 300, 300, 300]
                Nutrient
                Solute NO3: Thickness=[100, 100, 100, 200, 200, 300, 300, 200, 500]; InitialValues=[25, 25.5, 3, 1.5, 1, 0.5, 0.5, 0.3, 0.3]; InitialValuesUnits=ppm; WaterTableConcentration=0; D0=0; DepthConstant=0; MaxDepthSoluteAccessible=0; RunoffEffectivenessAtMovingSolute=0; MaxEffectiveRunoff=0
                Solute NH4: Thickness=[100, 100, 100, 200, 200, 300, 300, 200, 500]; InitialValues=[5, 2, 0.5, 0.2, 0.15, 0.1, 0.1, 0.1, 0.1]; InitialValuesUnits=ppm; WaterTableConcentration=0; D0=0; DepthConstant=0; MaxDepthSoluteAccessible=0; RunoffEffectivenessAtMovingSolute=0; MaxEffectiveRunoff=0
                Solute Urea: Thickness=[100, 100, 100, 200, 200, 300, 300, 200, 500]; InitialValues=[0, 0, 0, 0, 0, 0, 0, 0, 0]; InitialValuesUnits=ppm; WaterTableConcentration=0; D0=0; DepthConstant=0; MaxDepthSoluteAccessible=0; RunoffEffectivenessAtMovingSolute=0; MaxEffectiveRunoff=0
                OutputLayers OutputWaterLayers: Thickness=[300, 300, 300, 300, 300, 300]
                LayerStructure: Thickness=[100, 100, 200, 200, 100]
              Plant Oats: same as Validation.New Zealand.FRNL.WinterSowing2017.ABlock2017cc.Block.Oats
              Report Output: same as Validation.New Zealand.FRNL.WinterSowing2017.ABlock2017cc.Block.Output
              Report DailyReport: same as Validation.New Zealand.FRNL.WinterSowing2017.ABlock2017cc.Block.DailyReport
              Report DailyReportWater_n_MineralN: same as Validation.New Zealand.FRNL.TempletonLysimeter2017.TempLys2017.Block.DailyReportWater_n_MineralN
              Report EnviroReport: same as Validation.New Zealand.FRNL.TempletonLysimeter2017.TempLys2017.Block.EnviroReport
        Experiment Southland2018
          Memo Experiment description
            *	Controlled FRNL trial
            * 	Trial location: Mossburn, Southland
            *	Coordinates: 45.686°S, 168.265°E
            *	Soil: Morven (considered stony)
            *	Weather station: On-site (alternative closest NIWA station used in simulation)
            *	This experiment evaluated oats sown in June or August targeting 300 plants/m2)
            * 	The paddock was previously in wheat
            *	400 kg N/ha applied at sowing to simulate urine patch.
          Factors
            Permutation
              Factor Sow
                CompositeFactor Jun_Rate0: Specifications=[SowingHarvesting]
                  Operations SowingHarvesting
                    2018-12-21  [Oats].Sow(population: 1, cultivar: "Milton", depth: 200, rowSpacing: 150)
                    2019-12-21  [Oats].Harvest()
                    2019-12-21  [Oats].EndCrop()
                CompositeFactor Jun_Rate300
                  Specifications:
                    [SowingHarvesting]
                  Operations SowingHarvesting
                    2018-06-21  [Oats].Sow(population: 50, cultivar: "Milton", depth: 20, rowSpacing: 150)
                    2018-12-21  [Oats].Harvest()
                    2018-12-21  [Oats].EndCrop()
                CompositeFactor Aug_Rate0: same as Validation.New Zealand.FRNL.Southland2018.Factors.Permutation.Sow.Jun_Rate0
                CompositeFactor Aug_Rate300: Specifications=[SowingHarvesting]
                  Operations SowingHarvesting
                    2018-08-08  [Oats].Sow(population: 50, cultivar: "Milton", depth: 20, rowSpacing: 150)
                    2018-12-21  [Oats].Harvest()
                    2018-12-21  [Oats].EndCrop()
          Simulation MorvenSoil
            Clock: Start=2018-06-20; End=2018-12-30
            Weather: FileName=WeatherFiles/Gore2.met; Latitude=-46.115; Tav=9.5; Amp=17
            Summary summaryfile
            SoilArbitrator Soil Arbitrator
            Zone Block: Area=1; Slope=0; AspectAngle=0; Altitude=50
              Folder Manager folder
                Operations FertiliserSchedule
                  2018-06-21  [Fertiliser].Apply(amount: 400, type: "UreaN", depth: 50)
                Operations SowingHarvesting
                  2018-06-21  [Oats].Sow(population: 300, cultivar: "Milton", depth: 20, rowSpacing: 150)
                  2018-12-21  [Oats].Harvest()
                  2018-12-21  [Oats].EndCrop()
              MicroClimate: a_interception=0; b_interception=1; c_interception=0; d_interception=0; SoilHeatFluxFraction=0.4; MinimumHeightDiffForNewLayer=0; NightInterceptionFraction=0.5; ReferenceHeight=2
              Irrigation
              Fertiliser
              SurfaceOrganicMatter: InitialResidueName=wheat; InitialResidueType=wheat; InitialResidueMass=1000; InitialCPR=0; InitialCNR=80
              Soil Makarewa_3b1: SoilType=Generic soil; Country=New Zealand; Latitude=37.5; Longitude=172.5
                Physical
                  Thickness  ParticleSizeSand  ParticleSizeSilt  ParticleSizeClay  BD     AirDry  LL15   DUL    SAT    KS
                  150        12.5              42.5              45                0.918  0.138   0.276  0.541  0.592  500
                  150        12.5              42.5              45                0.918  0.197   0.276  0.541  0.592  450
                  300        12.5              42.5              45                1.073  0.329   0.329  0.539  0.567  250
                  300        12.5              42.5              45                1.073  0.329   0.329  0.539  0.567  100
                  300        12.5              42.5              45                1.073  0.329   0.329  0.539  0.567  60
                  300        12.5              42.5              45                1.073  0.329   0.329  0.539  0.567  70
                  300        12.5              42.5              45                1.073  0.329   0.329  0.539  0.567  150
                  200        25                60                15                1.45   0.155   0.155  0.3    0.425  250
                  SoilCrop OatsSoil: LL=[0.276, 0.276, 0.329, 0.329, 0.329, 0.329, 0.329, 0.155]; KL=[0.09, 0.08, 0.045, 0.03, 0.015, 0.001, 0.001, 0.001]; XF=[1, 1, 0.435, 0.435, 0.435, 0.435, 0.435, 0.435]
                WaterBalance SoilWater: SummerDate=1-Oct; SummerU=9; SummerCona=4.4; WinterDate=1-Apr; WinterU=4; WinterCona=2; DiffusConst=88; DiffusSlope=35; Salb=0.13; CN2Bare=73; CNRed=10; CNCov=0.8; DischargeWidth=0; CatchmentArea=0; PSIDul=-100; Thickness=[150, 150, 300, 300, 300, 300, 300, 200]; SWCON=[0.35, 0.33, 0.27, 0.25, 0.14, 0.15, 0.35, 0.4]
                Organic: FOMCNRatio=40; CarbonUnits=Total
                  Thickness  Carbon  SoilCNRatio  FBiom  FInert  FOM
                  50         3       11           0.044  0.211   124.07
                  50         3       11           0.036  0.321   115.105
                  50         2.6     11           0.029  0.416   106.788
                  50         2.165   11           0.024  0.497   99.072
                  50         1.517   11           0.02   0.567   91.914
                  50         1.083   11           0.018  0.628   85.272
                  50         0.792   11           0.016  0.679   79.111
                  50         0.597   11           0.014  0.724   73.394
                  50         0.466   11           0.013  0.762   68.091
                  50         0.378   11           0.012  0.796   63.171
                  250        0.254   11           0.011  0.87    43.417
                  250        0.207   11           0.01   0.938   29.84
                  500        0.2     11           0.01   0.98    14.095
                  500        0.2     11           0.01   0.996   6.658
                Chemical: Thickness=[150, 150, 300, 300, 300, 300, 300, 200]; PH=[6, 6, 6, 6, 6, 6, 6, 6]; PHUnits=Water
                CERESSoilTemperature Temperature
                Water: Thickness=[150, 150, 300, 300, 300, 300, 300, 200]; InitialValues=[0.541, 0.541, 0.539, 0.539, 0.539, 0.539, 0.539, 0.3]; InitialPAWmm=423.5; RelativeTo=LL15; FilledFromTop=false
                Memo SoilDoc
                  This soil was parameterised based on ....
                OutputLayers OutputNutrientLayers: Thickness=[150, 150, 300, 300, 300, 300, 300]
                Nutrient
                Solute NO3: Thickness=[150, 150, 300, 300, 300, 300, 300, 200]; InitialValues=[5, 7, 2.25, 1.2, 0.952, 0.702, 0.46, 0.345]; InitialValuesUnits=ppm; WaterTableConcentration=0; D0=0; DepthConstant=0; MaxDepthSoluteAccessible=0; RunoffEffectivenessAtMovingSolute=0; MaxEffectiveRunoff=0
                Solute NH4: Thickness=[150, 150, 300, 300, 300, 300, 300, 200]; InitialValues=[2, 2, 0.5, 0.125, 0.119, 0.117, 0.115, 0.172]; InitialValuesUnits=ppm; WaterTableConcentration=0; D0=0; DepthConstant=0; MaxDepthSoluteAccessible=0; RunoffEffectivenessAtMovingSolute=0; MaxEffectiveRunoff=0
                Solute Urea: Thickness=[150, 150, 300, 300, 300, 300, 300, 200]; InitialValues=[0, 0, 0, 0, 0, 0, 0, 0]; InitialValuesUnits=ppm; WaterTableConcentration=0; D0=0; DepthConstant=0; MaxDepthSoluteAccessible=0; RunoffEffectivenessAtMovingSolute=0; MaxEffectiveRunoff=0
                OutputLayers OutputWaterLayers: Thickness=[300, 300, 300, 300, 300, 300]
              Plant Oats: same as Validation.New Zealand.FRNL.WinterSowing2017.ABlock2017cc.Block.Oats
              Report Output: same as Validation.New Zealand.FRNL.WinterSowing2017.ABlock2017cc.Block.Output
              Report DailyReport: same as Validation.New Zealand.FRNL.WinterSowing2017.ABlock2017cc.Block.DailyReport
              Report DailyReportWater_n_MineralN: same as Validation.New Zealand.FRNL.WinterSowing2017.ABlock2017cc.Block.DailyReportWater_n_MineralN
      Folder SLMACC
        Experiment SLMACC_Canterbury_2020
          Memo Experiment Description
            * 	Trial location: Springston, Canterbury
            *	Coordinates: 43.641°S, 172.349°E
            *	Soil: Balmoral
            *	Weather station: Broadfield
            *	This experiment evaluated oat populations (i.e. target of 0 [fallow],150, 300, 450 plants/m2)
            *	Two row spacings (75 & 150 cm) were also evaluated in the trial (see factors)
            *	Note that these ppopulations were not achieved so, actual plant counts are used in the model (see factors).
            * 	The paddock was previously in a kale crop
            *	This is a grazed field and grazing occured on the winter (kale) crop prior to sowing oats
            *	Irrigation: a total of 210 mm was applied to all treatments (source: BM. SM)

            *	According to the DairyNZ fact sheet (https://www.dairynz.co.nz/media/253803/1-74_Kale_growing_a_high_yielding_crop.pdf), Kale yield can vary (12-17 t DM)depending on the variety (short, intermediate & giant). Utilisation efficiency is 80-85%.
            *	According to Chakwizira et al 2015(https://www.tandfonline.com/doi/epdf/10.1080/00288233.2015.1016538?needAccess=true&role=button), a well fertilised crop contains ~1.3%.
            *	Based on a 15 t DM/ha (average yield), aboveground residue will be 2.25 t DM/ha.
            * 	Root biomass is assumed to be 9.9 % (i.e. 1.485 t DM/ha) according to Urlic et al 2015(https://www.researchgate.net/publication/273506706_Phosphorus-Use_Efficiency_of_Kale_Genotypes_from_Coastal_Croatia/figures?lo=1).
            *	We can approximate that Root N conc is ~1.3% based on Canola research data
          Factors
            Permutation
              Factor Rate
                CompositeFactor 0Width75: Specifications=[SowingHarvesting]
                  Operations SowingHarvesting
                    2020-11-13  [Oats].Sow(population: 1, cultivar: "Milton", depth: 200, rowSpacing: 75)
                    2021-11-13  [Oats].Harvest()
                CompositeFactor 0Width150: Specifications=[SowingHarvesting]
                  Operations SowingHarvesting
                    2020-11-13  [Oats].Sow(population: 1, cultivar: "Milton", depth: 200, rowSpacing: 150)
                    2021-11-13  [Oats].Harvest()
                CompositeFactor 150Width75: Specifications=[SowingHarvesting]
                  Operations SowingHarvesting
                    2020-08-19  [Oats].Sow(population: 130, cultivar: "Milton", depth: 20, rowSpacing: 75)
                    2020-11-13  [Oats].Harvest()
                CompositeFactor 150Width150: Specifications=[SowingHarvesting]
                  Operations SowingHarvesting
                    2020-08-19  [Oats].Sow(population: 130, cultivar: "Milton", depth: 20, rowSpacing: 150)
                    2020-11-13  [Oats].Harvest()
                CompositeFactor 300Width75: Specifications=[SowingHarvesting]
                  Operations SowingHarvesting
                    2020-08-19  [Oats].Sow(population: 250, cultivar: "Milton", depth: 20, rowSpacing: 75)
                    2020-11-13  [Oats].Harvest()
                CompositeFactor 300Width150: Specifications=[SowingHarvesting]
                  Operations SowingHarvesting
                    2020-08-19  [Oats].Sow(population: 250, cultivar: "Milton", depth: 20, rowSpacing: 150)
                    2020-11-13  [Oats].Harvest()
                CompositeFactor 450Width75: Specifications=[SowingHarvesting]
                  Operations SowingHarvesting
                    2020-08-19  [Oats].Sow(population: 375, cultivar: "Milton", depth: 20, rowSpacing: 75)
                    2020-11-13  [Oats].Harvest()
                CompositeFactor 450Width150: Specifications=[SowingHarvesting]
                  Operations SowingHarvesting
                    2020-08-19  [Oats].Sow(population: 375, cultivar: "Milton", depth: 20, rowSpacing: 150)
                    2020-11-13  [Oats].Harvest()
          Simulation BalmoralSoil
            Clock: Start=2020-08-12; End=2020-11-12
            Weather: FileName=WeatherFiles/Lincoln.met; Latitude=-43.626; Tav=11.6; Amp=10.6
            Summary summaryfile
            SoilArbitrator Soil Arbitrator
            Zone Block: Area=1; Slope=0; AspectAngle=0; Altitude=50
              Folder Manager folder
                Operations IrrigationOperations
                  2020-09-23  [Irrigation].Apply(5);
                  2020-09-24  [Irrigation].Apply(5);
                  2020-09-25  [Irrigation].Apply(5);
                  2020-09-26  [Irrigation].Apply(5);
                  2020-09-27  [Irrigation].Apply(5);
                  2020-09-28  [Irrigation].Apply(5);
                  2020-09-29  [Irrigation].Apply(5);
                  2020-09-30  [Irrigation].Apply(5);
                  2020-10-01  [Irrigation].Apply(5);
                  2020-10-02  [Irrigation].Apply(5);
                  2020-10-03  [Irrigation].Apply(5);
                  2020-10-04  [Irrigation].Apply(5);
                  2020-10-05  [Irrigation].Apply(5);
                  2020-10-06  [Irrigation].Apply(5);
                  2020-10-07  [Irrigation].Apply(5);
                  2020-10-08  [Irrigation].Apply(5);
                  2020-10-09  [Irrigation].Apply(5);
                  2020-10-10  [Irrigation].Apply(5);
                  2020-10-11  [Irrigation].Apply(5);
                  2020-10-12  [Irrigation].Apply(5);
                  2020-10-14  [Irrigation].Apply(5);
                  2020-10-15  [Irrigation].Apply(5);
                  2020-10-16  [Irrigation].Apply(5);
                  2020-10-17  [Irrigation].Apply(5);
                  2020-10-18  [Irrigation].Apply(5);
                  2020-10-19  [Irrigation].Apply(5);
                  2020-10-20  [Irrigation].Apply(5);
                  2020-10-21  [Irrigation].Apply(5);
                  2020-10-22  [Irrigation].Apply(5);
                  2020-10-23  [Irrigation].Apply(5);
                  2020-10-24  [Irrigation].Apply(5);
                  2020-10-25  [Irrigation].Apply(5);
                  2020-10-26  [Irrigation].Apply(5);
                  2020-10-27  [Irrigation].Apply(5);
                  2020-10-28  [Irrigation].Apply(5);
                  2020-10-29  [Irrigation].Apply(5);
                  2020-10-30  [Irrigation].Apply(5);
                  2020-10-31  [Irrigation].Apply(5);
                  2020-11-02  [Irrigation].Apply(5);
                  2020-11-03  [Irrigation].Apply(5);
                  2020-11-05  [Irrigation].Apply(5);
                  2020-11-06  [Irrigation].Apply(5);
                Operations SowingHarvesting: same as Validation.New Zealand.SLMACC.SLMACC_Canterbury_2020.Factors.Permutation.Rate.300Width150.SowingHarvesting
              MicroClimate: a_interception=0; b_interception=1; c_interception=0; d_interception=0; SoilHeatFluxFraction=0.4; MinimumHeightDiffForNewLayer=0; NightInterceptionFraction=0.5; ReferenceHeight=2
              Irrigation
              Fertiliser
              SurfaceOrganicMatter: InitialResidueName=Kale; InitialResidueType=kale; InitialResidueMass=3500; InitialStandingFraction=0.25; InitialCPR=0; InitialCNR=15
              Soil Balmoral: SoilType=Stony silt loam over sand; LocalName=Balmoral; Country=New Zealand; Latitude=37.5; Longitude=172.5
                Comments=Parameters adapted from data for Balmoral and Lismore soils. Data from NZ-NSD and publications. Further adaptation to better fit the results of the trial (particularly increased water retention and organic matter content
                Physical: same as Validation.New Zealand.FRNL.BalmoralLysimeter2017.BalmoralLys2017.Block.Balmoral.Physical
                WaterBalance SoilWater: SummerDate=1-Oct; SummerU=6; SummerCona=3; WinterDate=1-Apr; WinterU=3; WinterCona=1; DiffusConst=88; DiffusSlope=35; Salb=0.2; CN2Bare=60; CNRed=10; CNCov=0.8; DischargeWidth=0; CatchmentArea=0; PSIDul=-100; Thickness=[100, 100, 100, 200, 200, 300, 300, 200, 250, 250]
                  SWCON=[0.55, 0.55, 0.575, 0.62, 0.63, 0.65, 0.63, 0.65, 0.63, 0.63]
                Organic: same as Validation.New Zealand.FRNL.BalmoralLysimeter2017.BalmoralLys2017.Block.Balmoral.Organic
                CERESSoilTemperature Temperature
                Water: Thickness=[100, 100, 100, 200, 200, 300, 300, 200, 500]; InitialValues=[0.3, 0.3, 0.25, 0.15, 0.1, 0.07, 0.07, 0.075, 0.075]; InitialPAWmm=164; RelativeTo=LL15; FilledFromTop=false
                Chemical: Thickness=[100, 100, 100, 200, 200, 300, 300, 200, 500]; PH=[7, 7, 7, 7, 7, 7, 7, 7, 7]; PHUnits=Water
                OutputLayers OutputNutrientLayers: Thickness=[150, 150, 300, 300, 300, 300, 300]
                Nutrient
                Solute NO3: Thickness=[100, 100, 100, 200, 200, 300, 300, 200, 500]; InitialValues=[50, 7.5, 3, 1.5, 1, 0.5, 0.5, 0.3, 0.3]; InitialValuesUnits=ppm; WaterTableConcentration=0; D0=0; DepthConstant=0; MaxDepthSoluteAccessible=0; RunoffEffectivenessAtMovingSolute=0; MaxEffectiveRunoff=0
                Solute NH4: same as Validation.New Zealand.FRNL.BalmoralLysimeter2017.BalmoralLys2017.Block.Balmoral.NH4
                Solute Urea: same as Validation.New Zealand.FRNL.BalmoralLysimeter2017.BalmoralLys2017.Block.Balmoral.Urea
                OutputLayers OutputWaterLayers: Thickness=[300, 300, 300, 300, 300, 300]
              Plant Oats
              Report Output: same as Validation.New Zealand.FRNL.WinterSowing2017.ABlock2017cc.Block.Output
              Report DailyReport: same as Validation.New Zealand.FRNL.WinterSowing2017.ABlock2017cc.Block.DailyReport
              Report EnviroReport
                VariableNames:
                  [Clock].Today
                  [Clock].Today.Year as Year
                  sum([Soil].Nutrient.DenitrifiedN) as Denitrification
                  [Soil].SoilWater.FlowNO3
              Report DailyReportWater_n_MineralN: same as Validation.New Zealand.FRNL.WinterSowing2017.ABlock2017cc.Block.DailyReportWater_n_MineralN
        Experiment SLMACC_Canterbury_2021
          Memo Experiment Description
            * 	Trial location: Barhill, Canterbury
            *	Coordinates:43.757°S, 171.932°E
            *	Soil: Templeton
            *	Weather station: Chertsey Cws
            *	This experiment evaluated oat populations (i.e. target of 0 [fallow],150, 300 plants/m2)
            *	Note that these populations were not achieved so, actual plant counts are used in the model (see factors).
            * 	The paddock was previously in a kale crop
            *	This is a grazed field and grazing occured on the winter (kale) crop prior to sowing oats
            *	A total of 100 kg N/ha as urea was applied to oats & the crop grown to grain.
          Memo ReadMe
            1) Rates adjusted based on measured average plant population - ENK
          Factors
            Permutation
              Factor Rate
                CompositeFactor 0: Specifications=[SowingHarvesting]
                  Operations SowingHarvesting
                    2022-02-11  [Oats].Sow(population: 1, cultivar: "Milton", depth: 200, rowSpacing: 150)
                    2022-08-11  [Oats].Harvest()
                CompositeFactor 150: Specifications=[SowingHarvesting]
                  Operations SowingHarvesting
                    2021-09-01  [Oats].Sow(population: 160, cultivar: "Milton", depth: 20, rowSpacing: 150)
                    2022-02-12  [Oats].Harvest()
                CompositeFactor 300: Specifications=[SowingHarvesting]
                  Operations SowingHarvesting
                    2021-09-01  [Oats].Sow(population: 280, cultivar: "Milton", depth: 20, rowSpacing: 150)
                    2022-02-12  [Oats].Harvest()
          Simulation Springston_Temp_Soil
            Clock: Start=2021-08-25; End=2022-02-20
            Weather: FileName=WeatherFiles/Lincoln.met; Latitude=-43.626; Tav=11.6; Amp=10.6
            Summary summaryfile
            SoilArbitrator Soil Arbitrator
            Zone Block: Area=1; Slope=0; AspectAngle=0; Altitude=50
              Folder Manager folder
                Operations FertiliserSchedule
                  2021-10-08  [Fertiliser].Apply(amount: 50, type: "UreaN", depth: 10)
                  2021-11-01  [Fertiliser].Apply(amount: 50, type: "UreaN", depth: 10)
                Operations SowingHarvesting
                  2021-09-01  [Oats].Sow(population: 250, cultivar: "Milton", depth: 20, rowSpacing: 150)
                  2022-02-11  [Oats].Harvest()
              MicroClimate: a_interception=0; b_interception=1; c_interception=0; d_interception=0; SoilHeatFluxFraction=0.4; MinimumHeightDiffForNewLayer=0; NightInterceptionFraction=0.5; ReferenceHeight=2
              Irrigation
              Fertiliser
              SurfaceOrganicMatter: InitialResidueName=kale; InitialResidueType=kale; InitialResidueMass=5000; InitialStandingFraction=0.25; InitialCPR=0; InitialCNR=15
              Soil TempletonABlock: Latitude=0; Longitude=0
                Physical: same as Validation.New Zealand.FRNL.WinterSowing2015.ABlock.paddock.TempletonABlock.Physical
                WaterBalance SoilWater: same as Validation.New Zealand.FRNL.WinterSowing2017.ABlock2017cc.Block.TempletonABlock.SoilWater
                Organic: same as Validation.New Zealand.FRNL.WinterSowing2015.ABlock.paddock.TempletonABlock.Organic
                Chemical: Thickness=[150, 150, 300, 300, 300, 300, 300]; PH=[7, 7, 7, 7, 7, 7, 7]; PHUnits=Water
                CERESSoilTemperature Temperature
                Water: Thickness=[100, 100, 200, 200, 200, 200, 200, 200, 200, 200]; InitialPAWmm=341.5; RelativeTo=LL15; FilledFromTop=false
                  InitialValues=[0.3, 0.325, 0.35, 0.315, 0.325, 0.315, 0.325, 0.28, 0.345, 0.28]
                Memo SoilDoc
                  This soil was parameterised based on ....
                OutputLayers OutputNutrientLayers: Thickness=[150, 150, 300, 300, 300, 300, 300]
                Nutrient
                Solute NO3: Thickness=[150, 150, 300, 300, 300, 300, 300]; InitialValues=[75, 15, 6.5, 2.5, 2, 1, 0.5]; InitialValuesUnits=ppm; WaterTableConcentration=0; D0=0; DepthConstant=0; MaxDepthSoluteAccessible=0; RunoffEffectivenessAtMovingSolute=0; MaxEffectiveRunoff=0
                Solute NH4: same as Validation.New Zealand.FRNL.WinterSowing2015.ABlock.paddock.TempletonABlock.NH4
                Solute Urea: same as Validation.New Zealand.FRNL.WinterSowing2015.ABlock.paddock.TempletonABlock.Urea
                OutputLayers OutputWaterLayers: Thickness=[300, 300, 300, 300, 300, 300]
              Plant Oats: same as Validation.New Zealand.FRNL.WinterSowing2017.ABlock2017cc.Block.Oats
              Report Output: same as Validation.New Zealand.FRNL.WinterSowing2017.ABlock2017cc.Block.Output
              Report DailyReport: same as Validation.New Zealand.FRNL.WinterSowing2017.ABlock2017cc.Block.DailyReport
              Report DailyReportWater_n_MineralN: same as Validation.New Zealand.FRNL.WinterSowing2017.ABlock2017cc.Block.DailyReportWater_n_MineralN
              BiomassRemovalEvents OatCut: PlantToRemoveBiomassFrom=Oats; RemovalType=0
                BiomassRemovals:
                  PlantName  OrganName  TypeString  LiveToRemove  DeadToRemove  LiveToResidue  DeadToResidue
                  Oats       Grain      Cutting     0.8           0.5           0.1            0.1
                  Oats       Leaf       Cutting     0.8           0.8           0.1            0.1
                  Oats       Stem       Cutting     0.8           0.8           0.1            0.1
                  Oats       Root       Cutting     0             0             1              1
                  Oats       Panicle    Cutting     0.8           0.5           0.1            0.1
        Experiment SLMACC_Southland_2020
          DisabledSimNames=[SouthlandRate0Width75, SouthlandRate450Width75, SouthlandRate300Width75, SouthlandRate150Width75]
          Memo Experiment Description
            * 	Trial location: Winton, Southland
            *	Coordinates: 46.198°S, 168.307°E
            *	Soil: Caroline - descried as moderately deep (see https://greatsouth.nz/storage/app/media/data_sheets/R_13_4_5382.pdf)
            *	In the above web document, Caroline is said to be similar to Lumsden, Makarewa & Jacobstown soils.
            *	Weather station: On-site. However measurements were not taken daily and so the Gore NIWA station was used
            *	The experiment evaluated oat populations (i.e. target of 0 [fallow],150, 300, 450 plants/m2)- row spacing was 150 cm
            *	Note: target populations were not achieved and so, actual plant counts are used in the model (see factors).
            * 	The paddock was previously in a swedes
            *	This is a grazed field.
          Factors
            Permutation
              Factor Rate
                CompositeFactor 0: Specifications=[SowingHarvesting]
                  Operations SowingHarvesting
                    2020-12-07  [Oats].Sow(population: 1, cultivar: "Milton", depth: 200, rowSpacing: 150)
                    2021-12-07  [Oats].Harvest()
                CompositeFactor 150: Specifications=[SowingHarvesting]
                  Operations SowingHarvesting
                    2020-08-28  [Oats].Sow(population: 64, cultivar: "Milton", depth: 20, rowSpacing: 150)
                    2020-12-07  [Oats].Harvest()
                CompositeFactor 300: Specifications=[SowingHarvesting]
                  Operations SowingHarvesting
                    2020-08-28  [Oats].Sow(population: 138, cultivar: "Milton", depth: 20, rowSpacing: 150)
                    2020-12-07  [Oats].Harvest()
                CompositeFactor 450: Specifications=[SowingHarvesting]
                  Operations SowingHarvesting
                    2020-08-28  [Oats].Sow(population: 169, cultivar: "Milton", depth: 20, rowSpacing: 150)
                    2020-12-07  [Oats].Harvest()
          Simulation WintonMakarewaSoil
            Clock: Start=2020-08-12; End=2020-12-09
            Weather: FileName=WeatherFiles/gore.met; Latitude=-43.7; Tav=9; Amp=17
            Summary summaryfile
            SoilArbitrator Soil Arbitrator
            Zone Block: Area=1; Slope=0; AspectAngle=0; Altitude=50
              Folder Manager folder
                Operations SowingHarvesting
                  2020-08-28  [Oats].Sow(population: 250, cultivar: "Milton", depth: 20, rowSpacing: 150)
                  2020-12-07  [Oats].Harvest()
              MicroClimate: a_interception=0; b_interception=1; c_interception=0; d_interception=0; SoilHeatFluxFraction=0.4; MinimumHeightDiffForNewLayer=0; NightInterceptionFraction=0.5; ReferenceHeight=2
              Irrigation
              Fertiliser
              SurfaceOrganicMatter: InitialResidueName=pasture; InitialResidueType=fodderbeet; InitialResidueMass=2000; InitialStandingFraction=0.1; InitialCPR=0; InitialCNR=20
              Soil Makarewa_3b1: SoilType=Generic soil; Country=New Zealand; Latitude=37.5; Longitude=172.5
                Physical: same as Validation.New Zealand.FRNL.Southland2018.MorvenSoil.Block.Makarewa_3b1.Physical
                WaterBalance SoilWater: same as Validation.New Zealand.FRNL.Southland2018.MorvenSoil.Block.Makarewa_3b1.SoilWater
                Organic: FOMCNRatio=30; CarbonUnits=Total
                  Thickness  Carbon  SoilCNRatio  FBiom  FInert  FOM
                  50         3       11           0.044  0.211   124.07
                  50         3       11           0.036  0.321   115.105
                  50         2.6     11           0.029  0.416   106.788
                  50         2.165   11           0.024  0.497   99.072
                  50         1.517   11           0.02   0.567   91.914
                  50         1.083   11           0.018  0.628   85.272
                  50         0.792   11           0.016  0.679   79.111
                  50         0.597   11           0.014  0.724   73.394
                  50         0.466   11           0.013  0.762   68.091
                  50         0.378   11           0.012  0.796   63.171
                  250        0.254   11           0.011  0.87    43.417
                  250        0.207   11           0.01   0.938   29.84
                  500        0.2     11           0.01   0.98    14.095
                  500        0.2     11           0.01   0.996   6.658
                Chemical: Thickness=[150, 150, 300, 300, 300, 300, 300, 200]; PH=[6, 6, 6, 6, 6, 6, 6, 6]; PHUnits=Water
                CERESSoilTemperature Temperature
                Water: Thickness=[150, 150, 300, 300, 300, 300, 300, 200]; InitialValues=[0.541, 0.541, 0.539, 0.539, 0.539, 0.539, 0.539, 0.3]; InitialPAWmm=423.5; RelativeTo=LL15; FilledFromTop=false
                Memo SoilDoc
                  This soil was parameterised based on ....
                OutputLayers OutputNutrientLayers: Thickness=[150, 150, 300, 300, 300, 300, 300]
                Nutrient
                Solute NO3: Thickness=[150, 150, 300, 300, 300, 300, 300, 200]; InitialValues=[50, 18, 2.25, 1.2, 0.952, 0.702, 0.46, 0.345]; InitialValuesUnits=ppm; WaterTableConcentration=0; D0=0; DepthConstant=0; MaxDepthSoluteAccessible=0; RunoffEffectivenessAtMovingSolute=0; MaxEffectiveRunoff=0
                Solute NH4: Thickness=[150, 150, 300, 300, 300, 300, 300, 200]; InitialValues=[20, 3, 0.5, 0.125, 0.119, 0.117, 0.115, 0.172]; InitialValuesUnits=ppm; WaterTableConcentration=0; D0=0; DepthConstant=0; MaxDepthSoluteAccessible=0; RunoffEffectivenessAtMovingSolute=0; MaxEffectiveRunoff=0
                Solute Urea: same as Validation.New Zealand.FRNL.Southland2018.MorvenSoil.Block.Makarewa_3b1.Urea
                OutputLayers OutputWaterLayers: Thickness=[300, 300, 300, 300, 300, 300]
              Plant Oats: same as Validation.New Zealand.FRNL.WinterSowing2017.ABlock2017cc.Block.Oats
              Report Output
                VariableNames:
                  [Clock].Today as ReportDate
                  [Clock].Today.Year as Year
                  [FactorLabels].Script.AGENT_NO as AGENT_NO
                  [FactorLabels].Script.Lat as Lat
                  [FactorLabels].Script.Lon as Lon
                  [FactorLabels].Script.GCM as GCM
                  [FactorLabels].Script.RCP as RCP
                  [FactorLabels].Script.TS as TimeSlice
                  [FactorLabels].Script.SoilStamp as SoilStamp
                  [CropManagement].Script.CurrentCrop as CropSpecies
                  sum([Soil].Water.MM) as SoilWater_Total
                  sum([Soil].Urea.kgha) as SoilUrea_Total
                  sum([Soil].NH4.kgha) as SoilNH4_Total
                  sum([Soil].NO3.kgha) as SoilNO3_Total
                  (sum([Soil].Urea.kgha) + sum([Soil].NH4.kgha) + sum([Soil].NO3.kgha)) as SoilMineralN_Total
                  sum([Soil].Nutrient.FOM.N) as SoilFOMN_Total
                  sum([Soil].Nutrient.Microbial.N) as SoilMicrobialN_Total
                  sum([Soil].Nutrient.Humic.N) as SoilHumicN_Total
                  (sum([Soil].Nutrient.FOM.N) + sum([Soil].Nutrient.Microbial.N) + sum([Soil].Nutrient.Humic.N)) as SoilOrganicN_Total
                  (sum([Soil].Nutrient.FOM.C) + sum([Soil].Nutrient.Microbial.C) + sum([Soil].Nutrient.Humic.C)) as SoilOrganicC_Total
                  [SurfaceOrganicMatter].N as SurfOMN_Total
                  [Soil].SoilNitrogen.oc[1] as OC_TopLayer
                  [CropManagement].Script.HarvestedWt as HarvestedCropBiomass
                  [CropManagement].Script.HarvestedN as HarvestedCropN
                  [CropManagement].Script.HarvestedNconc as HarvestedCropNconc
                  [CropManagement].Script.CropYield as CropYield
                  [CropManagement].Script.SowDOY as SowingDOY
                  [CropManagement].Script.HarvestDOY as HarvestingDOY
                  [CropManagement].Script.CoverCropCultivar as CoverCropCultivar
                  [Oats].Panicle.HeadNumber
                  [ExtraVariables].Script.CropAboveGroundBiomassN as UptakeN_Cum
                  [ExtraVariables].Script.AccumSoilOMMineralisedToLayer as SoilOMMineralisedNToGivenLayer_Cum
                  ([ExtraVariables].Script.AccumSoilOMMineralisedToLayer+[ExtraVariables].Script.AccumSurfaceOMMineralisation) as MineralisedNToGivenLayer_Cum
                  [ExtraVariables].Script.AccumDenitrifiedNToLayer as DenitrifiedNToGivenLayer_Cum
                  [ExtraVariables].Script.AccumFlowNAtLayer as LeachedNAtGivenLayer_Cum
                  [ExtraVariables].Script.SumUreaToLayer as UreaToGivenLayer_Sum
                  [ExtraVariables].Script.SumNH4ToLayer as NH4ToGivenLayer_Sum
                  [ExtraVariables].Script.SumNO3ToLayer as NO3ToGivenLayer_Sum
                  [ExtraVariables].Script.SumMineralNToLayer as MineralNToGivenLayer_Sum
                  [ExtraVariables].Script.SumFOMNToLayer as FOMNToGivenLayer_Sum
                  [ExtraVariables].Script.SumMicrobialNToLayer as MicrobialNToGivenLayer_Sum
                  [ExtraVariables].Script.SumHumicNToLayer as HumicNToGivenLayer_Sum
                  [ExtraVariables].Script.SumOrganicNToLayer as OrganicNToGivenLayer_Sum
                  [ExtraVariables].Script.SumOrganicCToLayer as OrganicCToGivenLayer_Sum
                  [Soil].SoilNitrogen.oc[1] as OC_TopLayer
                  [ExtraVariables].Script.DeltaSoilMineralNToLayer as SoilMineralN_DeltaToGivenLayer
                  [ExtraVariables].Script.DeltaSoilOrganicNToLayer as SoilOrganicN_DeltaToGivenLayer
                  [ExtraVariables].Script.CropAboveGroundBiomassWt as CropBiomass_Cum
                  [ExtraVariables].Script.CropAboveGroundBiomassN as CropN_Cum
                  [ExtraVariables].Script.CropAboveGroundBiomassNConc as CropNconc
              Report DailyReport: EventNames=[Clock].EndOfDay
                VariableNames:
                  [Clock].Today
                  [Weather].MaxT
                  [Weather].MinT
                  [Weather].Radn
                  [Weather].Rain
                  [Oats].AboveGroundLive.Wt
                  [Oats].Leaf.LAI
                  [Oats].Leaf.CohortParameters.MaxArea
                  [Oats].Leaf.CohortParameters.SpecificLeafAreaMax
                  [LeafSizeScript].Script.LeafExpandedPosition
                  [LeafSizeScript].Script.MostRecentlyExpandedLeafSize
                  [LeafSizeScript].Script.LeafAppearedPosition
                  [LeafSizeScript].Script.MostRecentlyAppearedLeafMaxSize
                  //[Phenology].FlagLeafDAS
                  [Phenology].FloweringDAS
                  [Oats].Panicle.HeadNumber
                  [Fertiliser].NitrogenApplied
                  [ExtraVariables].Script.DeltaSurfaceOMN as SurfaceOMN_DeltaTotal
                  [ExtraVariables].Script.DeltaSoilMineralNTotal as SoilMineralN_DeltaTotal
                  [ExtraVariables].Script.DeltaSoilOrganicNTotal as SoilOrganicN_DeltaTotal
                  [ExtraVariables].Script.DeltaSoilOrganicCTotal as SoilOrganicC_DeltaTotal
                  [ExtraVariables].Script.AccumSoilOMMineralisedToLayer as SoilOMMineralisedNToGivenLayer_Cum
                  ([ExtraVariables].Script.AccumSoilOMMineralisedToLayer+[ExtraVariables].Script.AccumSurfaceOMMineralisation) as MineralisedNToGivenLayer_Cum
                  [ExtraVariables].Script.AccumDenitrifiedNToLayer as DenitrifiedNToGivenLayer_Cum
                  [ExtraVariables].Script.AccumFlowNAtLayer as LeachedNAtGivenLayer_Cum
                  [ExtraVariables].Script.SumUreaToLayer as UreaToGivenLayer_Sum
                  [ExtraVariables].Script.SumNH4ToLayer as NH4ToGivenLayer_Sum
                  [ExtraVariables].Script.SumNO3ToLayer as NO3ToGivenLayer_Sum
                  [ExtraVariables].Script.SumMineralNToLayer as MineralNToGivenLayer_Sum
                  [ExtraVariables].Script.SumFOMNToLayer as FOMNToGivenLayer_Sum
                  [ExtraVariables].Script.SumMicrobialNToLayer as MicrobialNToGivenLayer_Sum
                  [ExtraVariables].Script.SumHumicNToLayer as HumicNToGivenLayer_Sum
                  [ExtraVariables].Script.SumOrganicNToLayer as OrganicNToGivenLayer_Sum
                  [ExtraVariables].Script.SumOrganicCToLayer as OrganicCToGivenLayer_Sum
                  [Soil].SoilNitrogen.oc[1] as OC_TopLayer
                  [ExtraVariables].Script.DeltaSoilMineralNToLayer as SoilMineralN_DeltaToGivenLayer
                  [ExtraVariables].Script.DeltaSoilOrganicNToLayer as SoilOrganicN_DeltaToGivenLayer
                  [ExtraVariables].Script.CropAboveGroundBiomassWt as CropBiomass_Cum
                  [ExtraVariables].Script.CropAboveGroundBiomassN as CropN_Cum
                  [ExtraVariables].Script.CropAboveGroundBiomassNConc as CropNconc
                  [CropManagement].Script.HarvestedWt as HarvestedCropBiomass
                  [CropManagement].Script.HarvestedN as HarvestedCropN
                  [CropManagement].Script.HarvestedNconc as HarvestedCropNconc
                  [CropManagement].Script.CropYield as CropYield
                  [ExtraVariables].Script.depthForReporting as ReportDepth
                  [CropManagement].Script.SowDOY as SowingDOY
                  [CropManagement].Script.HarvestDOY as HarvestingDOY
                  [ExtraVariables].Script.AccumLightInterception as AccumLightInterc
                  [CropManagement].Script.CoverCropCultivar as CoverCropCultivar
                  [Oats].Panicle.HeadNumber
                  [Oats].Leaf.Live.Wt as LeafBiomass
                  [Oats].Stem.Live.Wt as StemBiomass
                  [Oats].AboveGround.Wt as AboveBiomass
                  [Oats].Leaf.AppearedCohortNo as LeafCountMainStem
                  [ExtraVariables].Script.AccumLightInterception
                  [ExtraVariables].Script.AccumTotalLeachedN as TotalLeachedN_Cum
                  [ExtraVariables].Script.AccumUptakeN as UptakeN_Cum
                  [ExtraVariables].Script.AccumRainfall as Rainfall_Cum
                  [ExtraVariables].Script.AccumIrrigation as AppliedIrrigation_Cum
                  [ExtraVariables].Script.AccumFertiliser as AppliedFertiliserN_Cum
                  [Oats].Phenology.Stage
                  [Oats].Phenology.CurrentStageName
              Report DailyReportWater_n_MineralN: same as Validation.New Zealand.FRNL.WinterSowing2017.ABlock2017cc.Block.DailyReportWater_n_MineralN
        Experiment SLMACC_Southland_2021
          DisabledSimNames=[SouthlandRate0Width75, SouthlandRate450Width75, SouthlandRate300Width75, SouthlandRate150Width75]
          Memo Experiment Description
            * 	Trial location: Wrey's Bush, Southland
            *	Coordinates: 46.021°S, 168.090°E
            *	Soil: Aparima
            *	Weather station: Birchwood Wxt Aws
            *	The experiment evaluated oat populations (i.e. target of 0 [fallow],150, 300, 450 plants/m2)- row spacing was 150 cm
            *	Note: target populations were not achieved and so, actual plant counts are used in the model (see factors).
            * 	The paddock was previously in a swedes
            *	This is a grazed field.
          Memo ReadMe
            1) Rates adjusted based on measured average plant population - ENK

            1) Negative values in interception data zeroed - ENK
          Factors
            Permutation
              Factor Rate
                CompositeFactor 0: Specifications=[SowingHarvesting]
                  Operations SowingHarvesting
                    2021-12-01  [Oats].Sow(population: 1, cultivar: "Milton", depth: 200, rowSpacing: 150)
                    2022-12-02  [Oats].Harvest()
                CompositeFactor 150: Specifications=[SowingHarvesting]
                  Operations SowingHarvesting
                    2021-07-29  [Oats].Sow(population: 67, cultivar: "Milton", depth: 20, rowSpacing: 150)
                    2021-12-02  [Oats].Harvest()
                CompositeFactor 300: Specifications=[SowingHarvesting]
                  Operations SowingHarvesting
                    2021-07-29  [Oats].Sow(population: 82, cultivar: "Milton", depth: 20, rowSpacing: 150)
                    2021-12-02  [Oats].Harvest()
                CompositeFactor 450: Specifications=[SowingHarvesting]
                  Operations SowingHarvesting
                    2021-07-29  [Oats].Sow(population: 125, cultivar: "Milton", depth: 20, rowSpacing: 150)
                    2021-12-02  [Oats].Harvest()
          Simulation WreysBush_Aparima
            Clock: Start=2021-07-18; End=2021-12-01
            Weather: FileName=WeatherFiles/gore.met; Latitude=-43.7; Tav=9; Amp=17
            Summary summaryfile
            SoilArbitrator Soil Arbitrator
            Zone Block: Area=1; Slope=0; AspectAngle=0; Altitude=50
              Folder Manager folder
                Operations SowingHarvesting
                  2021-07-29  [Oats].Sow(population: 250, cultivar: "Milton", depth: 20, rowSpacing: 150)
                  2021-12-02  [Oats].Harvest()
              MicroClimate: a_interception=0; b_interception=1; c_interception=0; d_interception=0; SoilHeatFluxFraction=0.4; MinimumHeightDiffForNewLayer=0; NightInterceptionFraction=0.5; ReferenceHeight=2
              Irrigation
              Fertiliser
              SurfaceOrganicMatter: InitialResidueName=oat_stubble; InitialResidueType=oats; InitialResidueMass=1500; InitialStandingFraction=0.5; InitialCPR=0; InitialCNR=20
              Soil Balmoral: SoilType=Generic soil; Country=New Zealand; Latitude=37.5; Longitude=172.5
                Chemical: Thickness=[150, 150, 300, 300, 300, 300, 300, 200]; PH=[6, 6, 6, 6, 6, 6, 6, 6]; PHUnits=Water
                Physical
                  Thickness  ParticleSizeSand  ParticleSizeSilt  ParticleSizeClay  Rocks  BD      AirDry   LL15     DUL      SAT      KS
                  150        13                39                13                35     0.6825  0.04875  0.0715   0.2405   0.325    500
                  150        9.8               29.4              9.8               51     0.4557  0.0686   0.08134  0.1715   0.24255  450
                  300        4.6               13.8              4.6               77     0.299   0.03243  0.0414   0.0598   0.1104   250
                  300        4.83              13.8              4.37              77     0.299   0.03335  0.03335  0.07935  0.1081   100
                  300        4.4               12                3.6               80     0.28    0.03     0.03     0.069    0.0926   60
                  300        4.6               12                3.4               80     0.285   0.0306   0.0306   0.068    0.0908   70
                  300        4.8               12                3.2               80     0.29    0.031    0.031    0.064    0.0864   150
                  200        5                 12                3                 80     0.29    0.031    0.031    0.06     0.085    250
                  SoilCrop OatsSoil
                    LL=[0.0975, 0.07105, 0.03243, 0.03335, 0.03, 0.0306, 0.031, 0.031]
                    KL=[0.08, 0.06, 0.045, 0.04, 0.01, 0.005, 0.003, 0.001]
                    XF=[1, 1, 1, 1, 1, 1, 1, 1]
                WaterBalance SoilWater: SummerDate=1-Oct; SummerU=8; SummerCona=4; WinterDate=1-Apr; WinterU=4; WinterCona=1.5; DiffusConst=88; DiffusSlope=35; Salb=0.2; CN2Bare=60; CNRed=10; CNCov=0.8; DischargeWidth=0; CatchmentArea=0; PSIDul=-100; Thickness=[150, 150, 300, 300, 300, 300, 300, 200]; SWCON=[0.5, 0.5, 0.43, 0.375, 0.34, 0.35, 0.4, 0.48]
                Organic: FOMCNRatio=30; CarbonUnits=Total
                  Thickness  Carbon  SoilCNRatio  FBiom  FInert  FOM
                  150        2.5     11           0.08   0.2     320.735
                  150        1.75    11           0.04   0.325   256.112
                  300        0.75    11           0.018  0.6     163.304
                  300        0.3     11           0.01   0.85    104.127
                  300        0.2     11           0.008  0.95    66.395
                  300        0.1     11           0.008  0.98    42.335
                  300        0.1     11           0.008  0.99    26.994
                  200        0.1     11           0.008  0.995   19.998
                CERESSoilTemperature Temperature
                Water: Thickness=[150, 150, 300, 300, 300, 300, 300, 200]; InitialPAWmm=96.814; RelativeTo=LL15; FilledFromTop=false
                  InitialValues=[0.2405, 0.1715, 0.0598, 0.07935, 0.069, 0.068, 0.064, 0.06]
                Memo SoilDoc
                  This soil was parameterised based on ....
                OutputLayers OutputNutrientLayers: Thickness=[150, 150, 300, 300, 300, 300, 300]
                Nutrient
                Solute NO3: Thickness=[150, 150, 300, 300, 300, 300, 300, 200]; InitialValues=[10.903, 8.73, 2.028, 0.577, 0.428, 0.316, 0.207, 0.155]; InitialValuesUnits=ppm; WaterTableConcentration=0; D0=0; DepthConstant=0; MaxDepthSoluteAccessible=0; RunoffEffectivenessAtMovingSolute=0; MaxEffectiveRunoff=0
                Solute NH4: Thickness=[150, 150, 300, 300, 300, 300, 300, 200]; InitialValues=[13.115, 0.747, 0.225, 0.058, 0.054, 0.053, 0.052, 0.077]; InitialValuesUnits=ppm; WaterTableConcentration=0; D0=0; DepthConstant=0; MaxDepthSoluteAccessible=0; RunoffEffectivenessAtMovingSolute=0; MaxEffectiveRunoff=0
                Solute Urea: same as Validation.New Zealand.FRNL.Southland2018.MorvenSoil.Block.Makarewa_3b1.Urea
                OutputLayers OutputWaterLayers: Thickness=[300, 300, 300, 300, 300, 300]
              Plant Oats: same as Validation.New Zealand.FRNL.WinterSowing2017.ABlock2017cc.Block.Oats
              Report Output: same as Validation.New Zealand.SLMACC.SLMACC_Southland_2020.WintonMakarewaSoil.Block.Output
              Report DailyReport: same as Validation.New Zealand.SLMACC.SLMACC_Southland_2020.WintonMakarewaSoil.Block.DailyReport
              Report DailyReportWater_n_MineralN: same as Validation.New Zealand.FRNL.WinterSowing2017.ABlock2017cc.Block.DailyReportWater_n_MineralN
        Experiment SLMACC_WestCoast1_2020
          Memo Experiment Description
            * 	Trial location: Hokitika, West Coast
            *	Coordinates: 42.771°S, 170.909°E
            *	Soil: Descriped as heavy glay - using Huangarua soil in this simulation
            *	Weather station: Hokitika AWS
            *	The experiment evaluated oat populations (i.e. target of 0 [fallow], 300 plants/m2)- row spacing was 150 cm
            *	Note: target populations were not achieved and so, actual plant counts are used in the model (see factors).
            * 	The paddock was previously in a turnip-swedes
            *	This is a grazed field.
          Factors
            Permutation
              Factor Rate
                CompositeFactor 0: Specifications=[SowingHarvesting]
                  Operations SowHar
                    2020-11-28  [Oats].Sow(population: 1, cultivar: "Milton", depth: 200, rowSpacing: 150)
                    2021-11-28  [Oats].Harvest()
                CompositeFactor 300: Specifications=[SowingHarvesting]
                  Operations SowHar
                    2020-08-18  [Oats].Sow(population: 280, cultivar: "Milton", depth: 20, rowSpacing: 150)
                    2020-11-28  [Oats].Harvest()
          Simulation Kowhotirangix
            Clock: Start=2020-08-12; End=2020-11-30
            Weather: FileName=WeatherFiles/Hokotika.met; Latitude=-43.7; Tav=11.8; Amp=17
            Summary summaryfile
            SoilArbitrator Soil Arbitrator
            Zone Block: Area=1; Slope=0; AspectAngle=0; Altitude=50
              Folder Manager folder
                Operations SowingHarvesting
                  2020-08-18  [Oats].Sow(population: 280, cultivar: "Milton", depth: 20, rowSpacing: 150)
                  2020-11-24  [Oats].Harvest()
              MicroClimate: a_interception=0; b_interception=1; c_interception=0; d_interception=0; SoilHeatFluxFraction=0.4; MinimumHeightDiffForNewLayer=0; NightInterceptionFraction=0.5; ReferenceHeight=2
              Irrigation
              Fertiliser
              SurfaceOrganicMatter: InitialResidueName=oat_stubble; InitialResidueType=oats; InitialResidueMass=1500; InitialStandingFraction=0.5; InitialCPR=0; InitialCNR=20
              Soil Huangarua: SoilType=Generic soil; Country=New Zealand; Latitude=37.5; Longitude=172.5
                Chemical: Thickness=[150, 150, 300, 300, 300, 300, 300, 200]; PH=[6, 6, 6, 6, 6, 6, 6, 6]; PHUnits=Water
                Physical
                  Thickness  ParticleSizeSand  ParticleSizeSilt  ParticleSizeClay  Rocks  BD       AirDry   LL15    DUL      SAT      KS
                  150        19                57                19                5      1.02125  0.07125  0.1615  0.38     0.475    500
                  150        15.6              46.8              15.6              22     0.8775   0.1092   0.1131  0.273    0.3861   450
                  300        10                30                10                50     0.6      0.0705   0.1     0.1725   0.24     250
                  300        6.09              17.4              5.51              71     0.377    0.04205  0.058   0.10005  0.1363   100
                  300        5.06              13.8              4.14              77     0.322    0.0345   0.046   0.07935  0.10649  60
                  300        4.6               12                3.4               80     0.285    0.0306   0.04    0.069    0.0908   70
                  300        4.8               12                3.2               80     0.29     0.031    0.04    0.069    0.0864   150
                  200        5                 12                3                 80     0.29     0.031    0.04    0.069    0.085    250
                  SoilCrop MaizeSoil
                    LL=[0.1425, 0.1131, 0.0705, 0.04205, 0.0345, 0.0306, 0.031, 0.031]
                    KL=[0.08, 0.06, 0.045, 0.04, 0.01, 0.005, 0.003, 0.001]
                    XF=[1, 1, 1, 1, 1, 1, 1, 1]
                  SoilCrop OatsSoil: same as Validation.New Zealand.SLMACC.SLMACC_WestCoast1_2020.Kowhotirangix.Block.Huangarua.Physical.MaizeSoil
                WaterBalance SoilWater: same as Validation.New Zealand.SLMACC.SLMACC_Southland_2021.WreysBush_Aparima.Block.Balmoral.SoilWater
                Organic: same as Validation.New Zealand.SLMACC.SLMACC_Southland_2021.WreysBush_Aparima.Block.Balmoral.Organic
                CERESSoilTemperature Temperature
                Water: Thickness=[150, 150, 300, 300, 300, 300, 300, 200]; InitialPAWmm=124.33; RelativeTo=LL15; FilledFromTop=false
                  InitialValues=[0.38, 0.273, 0.1725, 0.10005, 0.07935, 0.069, 0.069, 0.069]
                Memo SoilDoc
                  This soil was parameterised based on ....
                OutputLayers OutputNutrientLayers: Thickness=[150, 150, 300, 300, 300, 300, 300]
                Nutrient
                Solute NO3: Thickness=[150, 150, 300, 300, 300, 300, 300, 200]; InitialValues=[45.097, 13.65, 2.069, 1.282, 0.952, 0.702, 0.46, 0.345]; InitialValuesUnits=ppm; WaterTableConcentration=0; D0=0; DepthConstant=0; MaxDepthSoluteAccessible=0; RunoffEffectivenessAtMovingSolute=0; MaxEffectiveRunoff=0
                Solute NH4: Thickness=[150, 150, 300, 300, 300, 300, 300, 200]; InitialValues=[21.79, 2.969, 0.65, 0.128, 0.119, 0.117, 0.115, 0.172]; InitialValuesUnits=ppm; WaterTableConcentration=0; D0=0; DepthConstant=0; MaxDepthSoluteAccessible=0; RunoffEffectivenessAtMovingSolute=0; MaxEffectiveRunoff=0
                Solute Urea: same as Validation.New Zealand.FRNL.Southland2018.MorvenSoil.Block.Makarewa_3b1.Urea
                OutputLayers OutputWaterLayers: Thickness=[300, 300, 300, 300, 300, 300]
              Plant Oats: same as Validation.New Zealand.FRNL.WinterSowing2017.ABlock2017cc.Block.Oats
              Report Output: same as Validation.New Zealand.SLMACC.SLMACC_Southland_2020.WintonMakarewaSoil.Block.Output
              Report DailyReport: same as Validation.New Zealand.SLMACC.SLMACC_Southland_2020.WintonMakarewaSoil.Block.DailyReport
              Report DailyReportWater_n_MineralN: same as Validation.New Zealand.FRNL.WinterSowing2017.ABlock2017cc.Block.DailyReportWater_n_MineralN
        Experiment SLMACC_Southland_2021Lys
          DisabledSimNames=[SouthlandRate0Width75, SouthlandRate450Width75, SouthlandRate300Width75, SouthlandRate150Width75]
          Memo Experiment Description
            * 	Lysimeter experiment
            *	Trial location: Wallacetown, Southland
            *	Coordinates: 46.311°S, 168.311°E
            *	Soil: Waikiwi
            *	Weather station: Invercargill Aero 2 Ews
            *	Urine (200 kg N/ha) and non-urine comparison
            *	Shallow (10 cm) and deep (25 cm) cultivation
            *	Oats sown in July or September
            *	Measurements = Soil properties, N & P leaching, biomass, N uptake, soil N (taken at the end of trial)
            * 	The paddock was previously in long-term pasture (10yrs+)

            * 	Texture
            *		Depth		% sand		% silt		% clay
            * 		0-10 cm		3.4		68.5		28.2
            *		10-20 cm	3.4		70.7		25.9
            *		20-30 cm	4.4		68.5		27.1
            *		30-40 cm	4.2		69.5		26.3
            *		40-50 cm	3.9		70.8		25.3
            *		50-60 cm	3.3		71.2		25.4
            *		60-70 cm	6.8		66.9		26.3
          Factors
            Permutation
              Factor Sow
                CompositeFactor JulRate0: Specifications=[SowingHarvesting]
                  Operations SowHar
                    2021-02-12  [Oats].Sow(population: 1, cultivar: "Milton", depth: 200, rowSpacing: 150)
                    2022-02-12  [Oats].Harvest()
                CompositeFactor JulRate300: Specifications=[SowingHarvesting]
                  Operations SowHar
                    2021-07-28  [Oats].Sow(population: 50, cultivar: "Milton", depth: 20, rowSpacing: 150)
                    2021-02-12  [Oats].Harvest()
                CompositeFactor SepRate300: Specifications=[SowingHarvesting]
                  Operations SowHar
                    2021-09-27  [Oats].Sow(population: 25, cultivar: "Milton", depth: 20, rowSpacing: 150)
                    2021-02-12  [Oats].Harvest()
          Simulation Waikiwi
            Clock: Start=2021-07-18; End=2021-12-05
            Weather: FileName=WeatherFiles/Gore2.met; Latitude=-46.115; Tav=9.5; Amp=17
            Summary summaryfile
            SoilArbitrator Soil Arbitrator
            Zone Block: Area=1; Slope=0; AspectAngle=0; Altitude=50
              MicroClimate: a_interception=0; b_interception=1; c_interception=0; d_interception=0; SoilHeatFluxFraction=0.4; MinimumHeightDiffForNewLayer=0; NightInterceptionFraction=0.5; ReferenceHeight=2
              Irrigation
              Fertiliser
              SurfaceOrganicMatter: InitialResidueName=pasture; InitialResidueType=pasture; InitialResidueMass=2500; InitialStandingFraction=0; InitialCPR=0; InitialCNR=40
              Plant Oats: same as Validation.New Zealand.FRNL.WinterSowing2017.ABlock2017cc.Block.Oats
              Report Output: same as Validation.New Zealand.SLMACC.SLMACC_Southland_2020.WintonMakarewaSoil.Block.Output
              Report DailyReport: same as Validation.New Zealand.SLMACC.SLMACC_Southland_2020.WintonMakarewaSoil.Block.DailyReport
              Report DailyReportWater_n_MineralN: same as Validation.New Zealand.FRNL.WinterSowing2017.ABlock2017cc.Block.DailyReportWater_n_MineralN
              Report EnviroReport: same as Validation.New Zealand.FRNL.TempletonLysimeter2017.TempLys2017.Block.EnviroReport
              Soil Waikiwi30a1: SoilType=Typic Firm Brown Soils; LocalName=Waikiwi_30a1; Site=Woodlands; NearestTown=Invercargill; Country=New Zealand; Latitude=-41; Longitude=174
                DataSource=Profile descriptions provided by Smap based on the work done by Trevor Webb.
                Physical
                  Thickness  ParticleSizeSand  ParticleSizeSilt  ParticleSizeClay  BD     AirDry  LL15   DUL    SAT    KS
                  100        3.4               68.5              28.2              1.089  0.106   0.211  0.423  0.548  1440
                  100        3.4               70.7              25.9              1.089  0.127   0.211  0.423  0.548  1440
                  100        4.4               68.5              27.1              1.272  0.232   0.232  0.405  0.484  960
                  100        4.2               69.5              26.3              1.349  0.248   0.248  0.427  0.457  24
                  100        3.9               70.8              25.3              1.349  0.248   0.248  0.427  0.457  24
                  100        3.3               71.2              25.4              1.349  0.248   0.248  0.427  0.457  24
                  100        6.8               66.9              26.3              1.349  0.248   0.248  0.427  0.457  24
                  SoilCrop CloverseedSoil: LL=[0.211, 0.211, 0.232, 0.248, 0.248, 0.248, 0.248]; KL=[0.09, 0.09, 0.048, 0.006, 0, 0, 0]; XF=[1, 1, 1, 0.154, 0.154, 0.154, 0.154]
                  SoilCrop FieldpeaSoil: LL=[0.211, 0.211, 0.232, 0.248, 0.248, 0.248, 0.248]; KL=[0.09, 0.09, 0.048, 0.006, 0, 0, 0]; XF=[0.819, 0.819, 0.819, 0.091, 0.091, 0.091, 0.091]
                  SoilCrop FababeanSoil: LL=[0.211, 0.211, 0.232, 0.248, 0.248, 0.248, 0.248]; KL=[0.09, 0.09, 0.059, 0.011, 0.003, 0, 0]; XF=[1, 1, 1, 0.121, 0.121, 0.121, 0.121]
                  SoilCrop KaleSoil: LL=[0.211, 0.211, 0.232, 0.248, 0.248, 0.248, 0.248]; KL=[0.09, 0.09, 0.078, 0.029, 0.019, 0.013, 0.008]; XF=[1, 1, 1, 0.121, 0.121, 0.121, 0.121]
                  SoilCrop ItalianRyegrassSoil: LL=[0.211, 0.211, 0.232, 0.248, 0.248, 0.248, 0.248]; KL=[0.09, 0.09, 0.035, 0, 0, 0, 0]; XF=[1, 1, 1, 0.121, 0.121, 0.121, 0.121]
                  SoilCrop LucerneSoil: LL=[0.211, 0.211, 0.232, 0.248, 0.248, 0.248, 0.248]; KL=[0.075, 0.075, 0.065, 0.024, 0.016, 0.01, 0.007]; XF=[1, 1, 1, 0.301, 0.301, 0.301, 0.301]
                  SoilCrop MaizeSoil: LL=[0.211, 0.211, 0.232, 0.248, 0.248, 0.248, 0.248]; KL=[0.09, 0.09, 0.066, 0.016, 0.006, 0.003, 0]; XF=[1, 1, 1, 0.121, 0.121, 0.121, 0.121]
                  SoilCrop OatsSoil: LL=[0.211, 0.211, 0.232, 0.248, 0.248, 0.248, 0.248]; KL=[0.09, 0.09, 0.053, 0.008, 0, 0, 0]; XF=[1, 1, 1, 0.154, 0.154, 0.154, 0.154]
                  SoilCrop PotatoSoil: LL=[0.211, 0.211, 0.232, 0.248, 0.248, 0.248, 0.248]; KL=[0.09, 0.09, 0.053, 0.008, 0, 0, 0]; XF=[0.819, 0.819, 0.819, 0.091, 0.091, 0.091, 0.091]
                  SoilCrop GrassseedSoil: LL=[0.211, 0.211, 0.232, 0.248, 0.248, 0.248, 0.248]; KL=[0.09, 0.09, 0.048, 0.006, 0, 0, 0]; XF=[1, 1, 1, 0.121, 0.121, 0.121, 0.121]
                  SoilCrop TriticaleSoil: LL=[0.211, 0.211, 0.232, 0.248, 0.248, 0.248, 0.248]; KL=[0.09, 0.09, 0.066, 0.016, 0.006, 0.003, 0]; XF=[1, 1, 1, 0.154, 0.154, 0.154, 0.154]
                  SoilCrop WheatSoil: LL=[0.211, 0.211, 0.232, 0.248, 0.248, 0.248, 0.248]; KL=[0.09, 0.09, 0.066, 0.016, 0.006, 0.003, 0]; XF=[1, 1, 1, 0.154, 0.154, 0.154, 0.154]
                  SoilCrop Ryegrass_CloverSoil: LL=[0.211, 0.211, 0.232, 0.248, 0.248, 0.248, 0.248]; KL=[0.15, 0.15, 0.071, 0.006, 0, 0, 0]; XF=[1, 1, 1, 0.121, 0.121, 0.121, 0.121]
                  SoilCrop AGPRyegrassSoil: LL=[0.211, 0.211, 0.232, 0.248, 0.248, 0.248, 0.248]; KL=[0.15, 0.15, 0.059, 0, 0, 0, 0]; XF=[1, 1, 1, 0.121, 0.121, 0.121, 0.121]
                  SoilCrop AGPWhiteCloverSoil: LL=[0.211, 0.211, 0.232, 0.248, 0.248, 0.248, 0.248]; KL=[0.09, 0.09, 0.048, 0.006, 0, 0, 0]; XF=[1, 1, 1, 0.154, 0.154, 0.154, 0.154]
                  SoilCrop BarleySoil: LL=[0.211, 0.211, 0.232, 0.248, 0.248, 0.248, 0.248]; KL=[0.09, 0.09, 0.066, 0.016, 0.006, 0.003, 0]; XF=[1, 1, 1, 0.301, 0.301, 0.301, 0.301]
                  SoilCrop Ag_PastureSoil: LL=[0.211, 0.211, 0.232, 0.248, 0.248, 0.248, 0.248]; KL=[0.15, 0.15, 0.08, 0.01, 0, 0, 0]; XF=[1, 1, 1, 0.121, 0.121, 0.121, 0.121]
                  SoilCrop SCRUMSoil: LL=[0.211, 0.211, 0.232, 0.248, 0.248, 0.248, 0.248]; KL=[0.09, 0.09, 0.09, 0.09, 0.09, 0.09, 0.09]; XF=[1, 1, 1, 0.154, 0.154, 0.154, 0.154]
                  SoilCrop CanolaSoil: LL=[0.211, 0.211, 0.232, 0.248, 0.248, 0.248, 0.248]; KL=[0.09, 0.09, 0.059, 0.011, 0.003, 0, 0]; XF=[1, 1, 1, 0.121, 0.121, 0.121, 0.121]
                  SoilCrop WhiteCloverSoil: LL=[0.211, 0.211, 0.232, 0.248, 0.248, 0.248, 0.248]; KL=[0.09, 0.09, 0.035, 0, 0, 0, 0]; XF=[1, 1, 1, 0.121, 0.121, 0.121, 0.121]
                  SoilCrop FodderBeetSoil: LL=[0.211, 0.211, 0.232, 0.248, 0.248, 0.248, 0.248]; KL=[0.09, 0.09, 0.053, 0.008, 0, 0, 0]; XF=[0.819, 0.819, 0.819, 0.091, 0.091, 0.091, 0.091]
                WaterBalance SoilWater: SummerDate=1-oct; SummerU=9; SummerCona=4.4; WinterDate=1-apr; WinterU=9; WinterCona=4.4; DiffusConst=88; DiffusSlope=35; Salb=0.13; CN2Bare=73; CNRed=20; CNCov=0.8; DischargeWidth=0; CatchmentArea=0; PSIDul=-100
                  Thickness  SWCON  KLAT
                  200        0.3    0
                  125        0.3    0
                  200        0.3    0
                  1475       0.15   0
                Organic: FOMCNRatio=40; CarbonUnits=Total
                  Thickness  Carbon  SoilCNRatio  FBiom  FInert  FOM
                  50         2.6     11           0.145  0.211   350
                  50         2.6     11           0.125  0.321   200
                  50         2.6     11           0.11   0.416   150
                  50         2.165   11           0.1    0.497   140
                  50         1.517   11           0.06   0.567   110
                  50         1.083   11           0.05   0.628   90
                  50         0.792   11           0.06   0.679   70
                  50         0.597   11           0.065  0.724   50
                  50         0.466   11           0.06   0.762   25
                  50         0.378   11           0.04   0.796   15
                  250        0.254   11           0.015  0.87    5
                  250        0.207   11           0.01   0.938   1
                  500        0.2     11           0.008  0.98    0
                  500        0.2     11           0.005  0.996   0
                Chemical: Thickness=[200, 125, 200, 1475]; PH=[7, 7, 7, 7]; PHUnits=Water
                Nutrient
                CERESSoilTemperature Temperature
                Water: Thickness=[200, 125, 200, 368.8, 368.8, 368.8, 368.8]; InitialValues=[0.423, 0.423, 0.405, 0.427, 0.427, 0.427, 0.327]; InitialPAWmm=324.456; RelativeTo=LL15; FilledFromTop=true
                LayerStructure: Thickness=[150, 150, 150, 150, 100]
                Solute NO3: Thickness=[200, 125, 200, 1475]; InitialValues=[2, 1, 1, 1]; InitialValuesUnits=ppm; WaterTableConcentration=0; D0=0; DepthConstant=0; MaxDepthSoluteAccessible=0; RunoffEffectivenessAtMovingSolute=0; MaxEffectiveRunoff=0
                Solute NH4: Thickness=[1800]; InitialValues=[1]; InitialValuesUnits=ppm; WaterTableConcentration=0; D0=0; DepthConstant=0; MaxDepthSoluteAccessible=0; RunoffEffectivenessAtMovingSolute=0; MaxEffectiveRunoff=0
                Solute Urea: Thickness=[1800]; InitialValues=[0]; InitialValuesUnits=ppm; WaterTableConcentration=0; D0=0; DepthConstant=0; MaxDepthSoluteAccessible=0; RunoffEffectivenessAtMovingSolute=0; MaxEffectiveRunoff=0
                OutputLayers OutputNutrientLayers: Thickness=[150, 150, 300, 300, 300, 300, 300]
                OutputLayers OutputWaterLayers: Thickness=[300, 300, 300, 300, 300, 300]
              Folder Manager folder
                Operations FertiliserSchedule
                  2021-07-28  [Fertiliser].Apply(amount: 200, type: "UreaN", depth: 10)
                Operations SowingHarvesting
                  2021-07-28  [Oats].Sow(population: 250, cultivar: "Milton", depth: 20, rowSpacing: 150)
                  2021-02-12  [Oats].Harvest()
    Folder Australia
      Memo Experiment Description
        The Oats model construction for Australian varieties was based primarily around the experiment at Gatton in 2007. Supporting phenology data was collected at the Leslie Research Centre (LRC) and Wellcamp Research Station for northern varieties, data kindly supplied by Bruce Winter, Oats Breeder with DAFQ. The model was then extended to data sets at Roma in QLD, and also sites in South Australia (Tarlee, Pinery) where additional adjustments were made to the relevant varieties.

        The Gatton, Roma, Tarlee, and Pinery experiments were used to construct the original APSIM Oats model and published at the Australian Agronomy Conference in 2008.

        Peake A, Whitbread A, Davoren B, Braun J and Limpus, S. (2008). The development of a model in APSIM for the simulation of grazing oats and oaten hay. In: Global Issues, Paddock Action. Proceedings of the 14th ASA Conference, 21-25 September 2008, Adelaide, South Australia.
      Folder Gatton2007
        Memo Experiment Description
          This experiment comprised an early and late sowing date, but full growth and soil water data was only collected for the early sowing date. The late sowing date was comprised of observation plots for phenology data collection only.

          Extinction coefficient and 'kl' values were measured on the early sowing date in addition to partitioned biomass data. Note that the kl values measured and used to simulated this irrigated trial were high, and may not apply to many dryland situations. Other simulations in the Australian validation data sets used the traditional wheat kl values for dryland situations.
        Folder Gatton2007early
          Experiment Gatton2007
            Factors
              Factor Cv: Specification=[Operations]
                Operations Coolibah
                  2007-05-24  [Oats].Sow(population:95, cultivar:"Coolibah", depth:20, rowSpacing:250);
                Operations Taipan
                  2007-05-24  [Oats].Sow(population:104, cultivar:"Taipan", depth:20, rowSpacing:250);
            Simulation Gatton2007Base
              Clock: Start=2007-05-01; End=2007-11-30
              Summary summaryfile
              Weather: FileName=WeatherFiles/Hybrid Gatton07 metfile.met; Latitude=-27.55; Tav=20.61; Amp=13.47
              SoilArbitrator Soil Arbitrator
              Zone paddock: Area=1; Slope=0; AspectAngle=0; Altitude=50
                Soil: Latitude=0; Longitude=0
                  Physical
                    Thickness  BD    AirDry  LL15  DUL    SAT
                    150        1.37  0.11    0.15  0.394  0.445
                    150        1.29  0.15    0.19  0.325  0.45
                    300        1.4   0.18    0.22  0.432  0.47
                    300        1.47  0.19    0.22  0.363  0.43
                    300        1.37  0.19    0.22  0.34   0.43
                    SoilCrop OatsSoil: LL=[0.21, 0.2, 0.29, 0.295, 0.24]; KL=[0.15, 0.13, 0.07, 0.03, 0.03]; XF=[1, 1, 1, 1, 1]
                  WaterBalance SoilWater: SummerDate=1-Nov; SummerU=5; SummerCona=3; WinterDate=1-Apr; WinterU=5; WinterCona=3; DiffusConst=40; DiffusSlope=16; Salb=0.13; CN2Bare=78; CNRed=20; CNCov=0.8; PSIDul=-100; Thickness=[150, 150, 300, 300, 300, 300, 300]; SWCON=[0.5, 0.5, 0.5, 0.5, 0.5, 0.5, 0.5]
                  Organic: FOMCNRatio=20; CarbonUnits=Total
                    Thickness  Carbon  SoilCNRatio  FBiom  FInert  FOM
                    150        1.65    14.5         0.035  0.45    173.565
                    150        1.13    14.5         0.02   0.55    135.172
                    300        0.68    14.5         0.015  0.8     81.9861
                    300        0.48    14.5         0.01   0.99    49.7271
                    300        0.3     14.5         0.01   0.99    30.161
                    300        0.39    14.5         0.01   0.99    18.2936
                    300        0.36    14.5         0.01   0.99    11.0956
                  Chemical: Thickness=[150, 150, 300, 300, 300, 300, 300]; PH=[7.3, 7.1, 7.1, 7.1, 7.4, 7.8, 7.9]; PHUnits=Water
                  Water: Thickness=[150, 150, 300, 300, 300, 300, 300]; InitialValues=[0.26, 0.33, 0.35, 0.33, 0.26, 0.27, 0.3]; InitialPAWmm=160.5; RelativeTo=LL15; FilledFromTop=false
                  CERESSoilTemperature Temperature
                  Nutrient
                  Solute NO3: Thickness=[150, 150, 300, 300, 300, 300, 300]; InitialValues=[22.6, 5.50005, 1.30001, 0, 0, 0, 0]; InitialValuesUnits=ppm; WaterTableConcentration=0; D0=0; DepthConstant=0; MaxDepthSoluteAccessible=0; RunoffEffectivenessAtMovingSolute=0; MaxEffectiveRunoff=0
                  Solute NH4: Thickness=[150, 150, 300, 300, 300, 300, 300]; InitialValues=[0.300063, 0.300063, 0.300063, 0, 0, 0, 0]; InitialValuesUnits=ppm; WaterTableConcentration=0; D0=0; DepthConstant=0; MaxDepthSoluteAccessible=0; RunoffEffectivenessAtMovingSolute=0; MaxEffectiveRunoff=0
                  Solute Urea: same as Validation.New Zealand.SAE.SAE_Oats_2020.A_Block_2020x.paddock.Soil.Urea
                  OutputLayers OutputNutrientLayers: Thickness=[150, 150, 300, 300, 300]
                  OutputLayers OutputWaterLayers: Thickness=[150, 150, 300, 300, 300]
                Irrigation
                SurfaceOrganicMatter Surface Organic Matter: InitialResidueName=wheat_stubble; InitialResidueType=wheat; InitialResidueMass=0; InitialStandingFraction=0; InitialCPR=0; InitialCNR=80
                Fertiliser
                MicroClimate: a_interception=0; b_interception=1; c_interception=0; d_interception=0; SoilHeatFluxFraction=0.4; MinimumHeightDiffForNewLayer=0; NightInterceptionFraction=0.5; ReferenceHeight=2
                Plant Oats
                Folder Management
                  Operations IrrigandFert
                    2007-05-18  [Irrigation].Apply(140);
                    2007-05-31  [Irrigation].Apply(15);
                    2007-07-12  [Irrigation].Apply(15);
                    2007-07-24  [Irrigation].Apply(29);
                    2007-08-14  [Irrigation].Apply(45);
                    2007-05-14  [Fertiliser].Apply(150, "UreaN", 40);
                    2007-07-23  [Fertiliser].Apply(90, "UreaN", 10);
                    2007-08-13  [Fertiliser].Apply(110, "UreaN", 10);
                    Memo
                      Additional N added to create non limiting as test. Urea first application now 300
                  Operations
                  Manager Harvesting
                    script: same as in Validation.New Zealand.FRNL.WinterSowing2015.ABlock.paddock.Manager folder.Harvesting
                Report DailyReport
                Report HarvestReport
                Report SupReport: EventNames=[Clock].DoReport
                  VariableNames:
                    [Clock].Today
                    [Phenology].ThermalTime
                    [Leaf].CohortSize
                    [Leaf].CohortParameters.MaxArea
                    [Oats].Arbitrator.DM.TotalFixationSupply
                    [Oats].Arbitrator.FN
                    [Oats].Structure.Phyllochron
                    [Oats].Leaf.CohortMaxSize
                    [Oats].Leaf.CohortParameters.GrowthDuration
                    [Oats].Leaf.CohortParameters.LagDuration
                    [Oats].Leaf.CohortParameters.SenescenceDuration
                    [Oats].Leaf.CohortParameters.SpecificLeafAreaMax
                    [Oats].Leaf.CohortParameters.SpecificLeafAreaMin
                    [Oats].Leaf.Photosynthesis.FT
                    [Oats].Leaf.Photosynthesis.FVPD
                    [Oats].Leaf.Photosynthesis.RueAct
                    [Oats].Leaf.NextExpandingLeafProportion
                    [Oats].Structure.MeanTillerGrowthRate
                    sum([Soil].Water.MM[1:5]) as ProfileWater
          Memo Leaf Rust after anthesis
            Field notes recorded leaf rust becoming severe in Coolibah on 12/9/07 - no biomass cuts were taken after this
        Folder Gatton2007LATEsown
          Experiment Gatton2007Late
            Memo Experiment Description
              The late sown experiment at Gatton in 2007 was comprised of observation plots of the two varieties used in the early sowing date. 4 plants were monitored for phenology (Leaf Appearance Rate and Zadoks stage) from each observation plot.
            Factors
              Factor Cv: Specification=[Operations]
                Operations CoolibahLate
                  2007-06-22  [Oats].Sow(population:95, cultivar:"Coolibah", depth:20, rowSpacing:250);
                Operations TaipanLate
                  2007-06-22  [Oats].Sow(population:104, cultivar:"Taipan", depth:20, rowSpacing:250);
            Simulation Gatton2007BaseLate
              Clock: Start=2007-05-01; End=2007-11-30
              Summary summaryfile
              Weather: FileName=WeatherFiles/Hybrid Gatton07 metfile.met; Latitude=-27.55; Tav=20.61; Amp=13.47
              SoilArbitrator Soil Arbitrator
              Zone paddock: Area=1; Slope=0; AspectAngle=0; Altitude=50
                Soil: same as Validation.Australia.Gatton2007.Gatton2007early.Gatton2007.Gatton2007Base.paddock.Soil
                Irrigation
                SurfaceOrganicMatter Surface Organic Matter: InitialResidueName=wheat_stubble; InitialResidueType=wheat; InitialResidueMass=0; InitialStandingFraction=0; InitialCPR=0; InitialCNR=80
                Fertiliser
                MicroClimate: a_interception=0; b_interception=1; c_interception=0; d_interception=0; SoilHeatFluxFraction=0.4; MinimumHeightDiffForNewLayer=0; NightInterceptionFraction=0.5; ReferenceHeight=2
                Plant Oats
                Folder Management: same as Validation.Australia.Gatton2007.Gatton2007early.Gatton2007.Gatton2007Base.paddock.Management
                Report DailyReport
                Report HarvestReport
                Report SupReport: EventNames=[Clock].DoReport
                  VariableNames:
                    [Clock].Today
                    [Phenology].ThermalTime
                    [Leaf].CohortSize
                    [Leaf].CohortParameters.MaxArea
                    [Oats].Arbitrator.FN
                    [Oats].Structure.Phyllochron
                    [Oats].Leaf.CohortMaxSize
                    [Oats].Leaf.CohortParameters.GrowthDuration
                    [Oats].Leaf.CohortParameters.LagDuration
                    [Oats].Leaf.CohortParameters.SenescenceDuration
                    [Oats].Leaf.CohortParameters.SpecificLeafAreaMax
                    [Oats].Leaf.CohortParameters.SpecificLeafAreaMin
                    [Oats].Leaf.Photosynthesis.FT
                    [Oats].Leaf.Photosynthesis.FVPD
                    [Oats].Leaf.Photosynthesis.RueAct
                    [Oats].Leaf.NextExpandingLeafProportion
                    [Oats].Structure.MeanTillerGrowthRate
                    sum([Soil].Water.MM[1:5]) as ProfileWater
      Folder Wellcamp2006
        Memo
          This experiment was run at DPI Wellcamp Research Station, Queensland in 2006.
          Phenology data (Zadok stage) was the only data collected.

          This experiment was a phenology experiment based on small and narrow observation plots (4 rows) in conjunction with a QDAF Oats breeing trial. The decision was taken to use a nearby SILO met-data set rather than the onsite weather station, due to the possibility that the onsite met station had not been calibrated for some time.
        Experiment Wellcamp2006
          Factors
            Permutation
              Factor Cv: Specification=[Sowing]
                Operations Coolibah
                  2006-04-03  [Oats].Sow(population:100, cultivar:"Coolibah", depth:30, rowSpacing:250);
                Operations Taipan
                  2006-04-03  [Oats].Sow(population:100, cultivar:"Taipan", depth:30, rowSpacing:250);
                Operations Algerian
                  2006-04-03  [Oats].Sow(population:100, cultivar:"Algerian", depth:30, rowSpacing:250);
                Operations Nugene
                  2006-04-03  [Oats].Sow(population:100, cultivar:"Nugene", depth:30, rowSpacing:250);
                Operations Drover
                  2006-04-03  [Oats].Sow(population:100, cultivar:"Drover", depth:30, rowSpacing:250);
              Factor Cut: Specification=[Cutting]
                Manager None
```csharp
using Models.Soils;
using System;
using System.Collections.Generic;
using Models.Core;
using Models.PMF;
using Models.PMF.Interfaces;
using System.Xml.Serialization;

namespace Models
{
    [Serializable] 
    [System.Xml.Serialization.XmlInclude(typeof(Model))]
    public class Script : Model
    {
        
    }
}
```
                Manager One
                  CutDate = 08/10/2006 00:00:00
```csharp
using Models.PMF.Interfaces;
using Newtonsoft.Json;
using System;
using System.Collections.Generic;
using Models.Core;
using Models.PMF;
using Models.PMF.Interfaces;
using System.Xml.Serialization;
using Models.Soils;

namespace Models
{
    [Serializable] 
    [System.Xml.Serialization.XmlInclude(typeof(Model))]
    public class Script : Model
    {
        [Link] Plant Oats;
        [Link] Clock Clock;

        [Description("Cut Date")]
        public DateTime CutDate { get; set; }


        
        [EventSubscribe("StartOfSimulation")]
        private void OnSimulationCommencing(object sender, EventArgs e)
        {
            
        }
        
        [EventSubscribe("DoManagement")]
        private void OnDoManagement(object sender, EventArgs e)
        {
            //Set up  array of remove fractions to send with Cut method.  Each member in the array corresponds to an organ in the same order they are set up in.
            if (Clock.Today.Date == CutDate)
            {
                //Remove.SetPhenologyStage = 3.5;
                var Panicle = Oats.FindChild<IHasDamageableBiomass>("Panicle");
                var Leaf = Oats.FindChild<IHasDamageableBiomass>("Leaf");
                var Stem = Oats.FindChild<IHasDamageableBiomass>("Stem");
                var Grain = Oats.FindChild<IHasDamageableBiomass>("Grain");
                var Root = Oats.FindChild<IHasDamageableBiomass>("Root");
                Panicle.RemoveBiomass(liveToRemove: 1.0, deadToRemove: 0.0, liveToResidue: 0.0, deadToResidue: 0.0);
                Leaf.RemoveBiomass(liveToRemove: 0.8, deadToRemove: 0.0, liveToResidue: 0.0, deadToResidue: 0.0);
                Stem.RemoveBiomass(liveToRemove: 0.8, deadToRemove: 0.0, liveToResidue: 0.0, deadToResidue: 0.0);
                Grain.RemoveBiomass(liveToRemove: 1.0, deadToRemove: 0.0, liveToResidue: 0.0, deadToResidue: 0.0);
                Root.RemoveBiomass(liveToRemove: 0.0, deadToRemove: 0.0, liveToResidue: 0.0, deadToResidue: 0.0);

            }
        }
    }
}
```
                Manager Two
                  CutDate1 = 08/10/2006 00:00:00
                  CutDate2 = 09/04/2006 00:00:00
```csharp
using Models.PMF.Interfaces;
using Newtonsoft.Json;
using System;
using System.Collections.Generic;
using Models.Core;
using Models.PMF;
using Models.PMF.Interfaces;
using System.Xml.Serialization;
using Models.Soils;

namespace Models
{
    [Serializable] 
    [System.Xml.Serialization.XmlInclude(typeof(Model))]
    public class Script : Model
    {
        [Link] Plant Oats;
        [Link] Clock Clock;

        [Description("Cut Date1")]
        public DateTime CutDate1 { get; set; }
        [Description("Cut Date2")]
        public DateTime CutDate2 { get; set; }


        
        [EventSubscribe("StartOfSimulation")]
        private void OnSimulationCommencing(object sender, EventArgs e)
        {
            
        }
        
        [EventSubscribe("DoManagement")]
        private void OnDoManagement(object sender, EventArgs e)
        {
            //Set up  array of remove fractions to send with Cut method.  Each member in the array corresponds to an organ in the same order they are set up in.
            if (Clock.Today.Date == CutDate1)
            {
                //Remove.SetPhenologyStage = 3.5;
                var Panicle = Oats.FindChild<IHasDamageableBiomass>("Panicle");
                var Leaf = Oats.FindChild<IHasDamageableBiomass>("Leaf");
                var Stem = Oats.FindChild<IHasDamageableBiomass>("Stem");
                var Grain = Oats.FindChild<IHasDamageableBiomass>("Grain");
                var Root = Oats.FindChild<IHasDamageableBiomass>("Root");
                Panicle.RemoveBiomass(liveToRemove: 1.0, deadToRemove: 0.0, liveToResidue: 0.0, deadToResidue: 0.0);
                Leaf.RemoveBiomass(liveToRemove: 0.8, deadToRemove: 0.0, liveToResidue: 0.0, deadToResidue: 0.0);
                Stem.RemoveBiomass(liveToRemove: 0.8, deadToRemove: 0.0, liveToResidue: 0.0, deadToResidue: 0.0);
                Grain.RemoveBiomass(liveToRemove: 1.0, deadToRemove: 0.0, liveToResidue: 0.0, deadToResidue: 0.0);
                Root.RemoveBiomass(liveToRemove: 0.0, deadToRemove: 0.0, liveToResidue: 0.0, deadToResidue: 0.0);

            }
            if (Clock.Today.Date == CutDate2)
            {
                //Remove.SetPhenologyStage = 3.5;
                  var Panicle = Oats.FindChild<IHasDamageableBiomass>("Panicle");
                var Leaf = Oats.FindChild<IHasDamageableBiomass>("Leaf");
                var Stem = Oats.FindChild<IHasDamageableBiomass>("Stem");
                var Grain = Oats.FindChild<IHasDamageableBiomass>("Grain");
                var Root = Oats.FindChild<IHasDamageableBiomass>("Root");
                Panicle.RemoveBiomass(liveToRemove: 1.0, deadToRemove: 0.0, liveToResidue: 0.0, deadToResidue: 0.0);
                Leaf.RemoveBiomass(liveToRemove: 0.8, deadToRemove: 0.0, liveToResidue: 0.0, deadToResidue: 0.0);
                Stem.RemoveBiomass(liveToRemove: 0.8, deadToRemove: 0.0, liveToResidue: 0.0, deadToResidue: 0.0);
                Grain.RemoveBiomass(liveToRemove: 1.0, deadToRemove: 0.0, liveToResidue: 0.0, deadToResidue: 0.0);
                Root.RemoveBiomass(liveToRemove: 0.0, deadToRemove: 0.0, liveToResidue: 0.0, deadToResidue: 0.0);
            }
        }
    }
}
```
          Simulation Wellcamp2006Base
            Clock: Start=2006-02-25; End=2006-11-02
            Summary summaryfile
            Weather: FileName=WeatherFiles/cotswald hills moyola 2006.met; Latitude=-27.52; Tav=17.9; Amp=12.97
            SoilArbitrator Soil Arbitrator
            Zone paddock: Area=1; Slope=0; AspectAngle=0; Altitude=50
              Soil: Latitude=0; Longitude=0
                Physical
                  Thickness  BD    AirDry  LL15  DUL   SAT
                  150        0.9   0.11    0.22  0.52  0.59
                  150        1.01  0.306   0.34  0.53  0.59
                  300        1.02  0.3     0.38  0.54  0.59
                  300        1     0.3     0.36  0.54  0.59
                  300        1.06  0.3     0.4   0.52  0.57
                  300        1.14  0.3     0.36  0.49  0.54
                  300        1.23  0.3     0.38  0.46  0.51
                  SoilCrop WheatSoil: LL=[0.22, 0.34, 0.38, 0.36, 0.4, 0.36, 0.46]; KL=[0.1, 0.1, 0.08, 0.06, 0.04, 0.02, 0.01]; XF=[1, 1, 1, 1, 1, 1, 1]
                  SoilCrop OatsSoil: LL=[0.34, 0.34, 0.38, 0.36, 0.4, 0.36, 0.46]; KL=[0.06, 0.06, 0.04, 0.04, 0.02, 0.02, 0.01]; XF=[1, 1, 1, 1, 1, 1, 1]
                WaterBalance SoilWater: SummerDate=1-Nov; SummerU=6; SummerCona=3.5; WinterDate=1-Apr; WinterU=6; WinterCona=3.5; DiffusConst=40; DiffusSlope=16; Salb=0.13; CN2Bare=73; CNRed=20; CNCov=0.8; PSIDul=-100; Thickness=[150, 150, 300, 300, 300, 300, 300]; SWCON=[0.3, 0.3, 0.3, 0.3, 0.3, 0.3, 0.3]
                Organic: FOMCNRatio=40; CarbonUnits=Total
                  Thickness  Carbon  SoilCNRatio  FBiom  FInert  FOM
                  150        1.24    12.5         0.03   0.4     69.4258
                  150        1.24    12.5         0.02   0.6     54.0689
                  300        1.25    12.5         0.01   0.8     32.7944
                  300        1.1     12.5         0.01   0.9     19.8908
                  300        0.71    12.5         0.01   0.95    12.0644
                  300        0.34    12.5         0.01   0.95    7.31743
                  300        0.26    12.5         0.01   0.95    4.43824
                Chemical: Thickness=[150, 150, 300, 300, 300, 300, 300]; PH=[7, 7, 7, 7, 7, 7, 7]; PHUnits=Water
                Water: Thickness=[150, 150, 300, 300, 300, 300, 300]; InitialValues=[0.38, 0.46, 0.42, 0.37, 0.33, 0.35, 0.35]; InitialPAWmm=24; RelativeTo=LL15; FilledFromTop=false
                CERESSoilTemperature Temperature
                Nutrient
                Solute NO3: Thickness=[150, 150, 300, 300, 300, 300, 300]; InitialValues=[26.8, 6.6, 5.8, 10.2, 12.9, 11.6, 11.6]; InitialValuesUnits=ppm; WaterTableConcentration=0; D0=0; DepthConstant=0; MaxDepthSoluteAccessible=0; RunoffEffectivenessAtMovingSolute=0; MaxEffectiveRunoff=0
                Solute NH4: Thickness=[150, 150, 300, 300, 300, 300, 300]; InitialValues=[0.6, 0.1, 0.1, 0.1, 0.1, 0.1, 0.1]; InitialValuesUnits=ppm; WaterTableConcentration=0; D0=0; DepthConstant=0; MaxDepthSoluteAccessible=0; RunoffEffectivenessAtMovingSolute=0; MaxEffectiveRunoff=0
                Solute Urea: same as Validation.New Zealand.SAE.SAE_Oats_2020.A_Block_2020x.paddock.Soil.Urea
                OutputLayers OutputWaterLayers: Thickness=[150, 150, 300, 300, 300, 300, 300]
                OutputLayers OutputNutrientLayers: Thickness=[150, 150, 300, 300, 300, 300, 300]
              Irrigation
              SurfaceOrganicMatter Surface Organic Matter: InitialResidueName=wheat_stubble; InitialResidueType=wheat; InitialResidueMass=0; InitialStandingFraction=0; InitialCPR=0; InitialCNR=80
              Fertiliser
              MicroClimate: a_interception=0; b_interception=1; c_interception=0; d_interception=0; SoilHeatFluxFraction=0.4; MinimumHeightDiffForNewLayer=0; NightInterceptionFraction=0.5; ReferenceHeight=2
              Plant Oats
              Folder Management
                Manager Cutting: same as Validation.Australia.Wellcamp2006.Wellcamp2006.Factors.Permutation.Cut.None
                Operations IrrigandFert
                  2006-04-03  [Fertiliser].Apply(35, "NO3N", 20);
                  2006-05-10  [Irrigation].Apply(40);
                  2006-08-15  [Fertiliser].Apply(40, "NO3N", 10);
                  2006-06-05  [Irrigation].Apply(60);
                Operations Sowing
                Manager Harvesting: same as Validation.Australia.Gatton2007.Gatton2007early.Gatton2007.Gatton2007Base.paddock.Management.Harvesting
              Report DailyReport
              Report HarvestReport
              Report SupReport: EventNames=[Clock].DoReport
                VariableNames:
                  [Clock].Today
                  [Phenology].ThermalTime
                  [Leaf].CohortSize
                  [Leaf].CohortParameters.MaxArea
                  [Oats].Arbitrator.DM.TotalFixationSupply
                  [Oats].Arbitrator.FN
                  [Oats].Structure.Phyllochron
                  [Oats].Leaf.CohortMaxSize
                  [Oats].Leaf.CohortParameters.GrowthDuration
                  [Oats].Leaf.CohortParameters.LagDuration
                  [Oats].Leaf.CohortParameters.SenescenceDuration
                  [Oats].Leaf.CohortParameters.SpecificLeafAreaMax
                  [Oats].Leaf.CohortParameters.SpecificLeafAreaMin
                  [Oats].Leaf.Photosynthesis.FT
                  [Oats].Leaf.Photosynthesis.FVPD
                  [Oats].Leaf.Photosynthesis.RueAct
                  [Oats].Leaf.NextExpandingLeafProportion
                  [Oats].Structure.MeanTillerGrowthRate
                  sum([Soil].Water.MM[1:7]) as ProfileWater
      Folder Roma2006
        Memo
          This experiment was run at Roma Research Station, Queensland in 2006.
           Two reps were used to generate cut and regrowth data (two cuts taken).
          The third rep was split in two, and one half was used to allow unlimited growth (no cutting), and the other half was only cut once. Soil water data for the ungrazed treatment was sourced exclusively from rep 3 except for the sowing PAW which was measured bulked across the experiment.

          Inaccuracy in the prediction of SLA and LAI was probably due to measurement error. The trial was heavily water stressed and it was difficult to accurately measure leaf area of curled, drought stress leaves, particularly when they were stored overnight.
        Experiment Roma2006
          Factors
            Permutation
              Factor Cv: Specification=[Sowing]
                Operations Coolibah
                  2006-05-25  [Oats].Sow(population:129, cultivar:"Coolibah", depth:30, rowSpacing:250);
                Operations Taipan
                  2006-05-25  [Oats].Sow(population:123, cultivar:"Taipan", depth:30, rowSpacing:250);
                Operations Algerian
                  2006-05-25  [Oats].Sow(population:105, cultivar:"Algerian", depth:30, rowSpacing:250);
              Factor Cut: Specification=[Cutting]
                Manager None: same as Validation.Australia.Wellcamp2006.Wellcamp2006.Factors.Permutation.Cut.None
                Manager One
                  CutDate = 08/10/2006 00:00:00
```csharp
using Models.PMF.Interfaces;
using Newtonsoft.Json;
using System;
using System.Collections.Generic;
using Models.Core;
using Models.PMF;
using Models.PMF.Interfaces;
using System.Xml.Serialization;
using Models.Soils;

namespace Models
{
    [Serializable] 
    [System.Xml.Serialization.XmlInclude(typeof(Model))]
    public class Script : Model
    {
        [Link] Plant Oats;
        [Link] Clock Clock;

        [Description("Cut Date")]
        public DateTime CutDate { get; set; }


        
        [EventSubscribe("StartOfSimulation")]
        private void OnSimulationCommencing(object sender, EventArgs e)
        {
            
        }
        
        [EventSubscribe("DoManagement")]
        private void OnDoManagement(object sender, EventArgs e)
        {
            //Set up  array of remove fractions to send with Cut method.  Each member in the array corresponds to an organ in the same order they are set up in.
            if (Clock.Today.Date == CutDate)
            {
                //Remove.SetPhenologyStage = 3.5;
                var Panicle = Oats.FindChild<IHasDamageableBiomass>("Panicle");
                var Leaf = Oats.FindChild<IHasDamageableBiomass>("Leaf");
                var Stem = Oats.FindChild<IHasDamageableBiomass>("Stem");
                var Grain = Oats.FindChild<IHasDamageableBiomass>("Grain");
                var Root = Oats.FindChild<IHasDamageableBiomass>("Root");
                Panicle.RemoveBiomass(liveToRemove: 1.0, deadToRemove: 0.0, liveToResidue: 0.0, deadToResidue: 0.0);
                Leaf.RemoveBiomass(liveToRemove: 0.7, deadToRemove: 0.0, liveToResidue: 0.0, deadToResidue: 0.0);
                Stem.RemoveBiomass(liveToRemove: 0.7, deadToRemove: 0.0, liveToResidue: 0.0, deadToResidue: 0.0);
                Grain.RemoveBiomass(liveToRemove: 1.0, deadToRemove: 0.0, liveToResidue: 0.0, deadToResidue: 0.0);
                Root.RemoveBiomass(liveToRemove: 0.0, deadToRemove: 0.0, liveToResidue: 0.0, deadToResidue: 0.0);

            }
        }
    }
}
```
                Manager Two
                  CutDate1 = 08/10/2006 00:00:00
                  CutDate2 = 09/04/2006 00:00:00
```csharp
using Models.PMF.Interfaces;
using Newtonsoft.Json;
using System;
using System.Collections.Generic;
using Models.Core;
using Models.PMF;
using Models.PMF.Interfaces;
using System.Xml.Serialization;
using Models.Soils;

namespace Models
{
    [Serializable] 
    [System.Xml.Serialization.XmlInclude(typeof(Model))]
    public class Script : Model
    {
        [Link] Plant Oats;
        [Link] Clock Clock;

        [Description("Cut Date1")]
        public DateTime CutDate1 { get; set; }
        [Description("Cut Date2")]
        public DateTime CutDate2 { get; set; }


        
        [EventSubscribe("StartOfSimulation")]
        private void OnSimulationCommencing(object sender, EventArgs e)
        {
            
        }
        
        [EventSubscribe("DoManagement")]
        private void OnDoManagement(object sender, EventArgs e)
        {
            //Set up  array of remove fractions to send with Cut method.  Each member in the array corresponds to an organ in the same order they are set up in.
            if (Clock.Today.Date == CutDate1)
            {
                //Remove.SetPhenologyStage = 3.5;
                var Panicle = Oats.FindChild<IHasDamageableBiomass>("Panicle");
                var Leaf = Oats.FindChild<IHasDamageableBiomass>("Leaf");
                var Stem = Oats.FindChild<IHasDamageableBiomass>("Stem");
                var Grain = Oats.FindChild<IHasDamageableBiomass>("Grain");
                var Root = Oats.FindChild<IHasDamageableBiomass>("Root");
                Panicle.RemoveBiomass(liveToRemove: 1.0, deadToRemove: 0.0, liveToResidue: 0.0, deadToResidue: 0.0);
                Leaf.RemoveBiomass(liveToRemove: 0.7, deadToRemove: 0.0, liveToResidue: 0.0, deadToResidue: 0.0);
                Stem.RemoveBiomass(liveToRemove: 0.7, deadToRemove: 0.0, liveToResidue: 0.0, deadToResidue: 0.0);
                Grain.RemoveBiomass(liveToRemove: 1.0, deadToRemove: 0.0, liveToResidue: 0.0, deadToResidue: 0.0);
                Root.RemoveBiomass(liveToRemove: 0.0, deadToRemove: 0.0, liveToResidue: 0.0, deadToResidue: 0.0);

            }
            if (Clock.Today.Date == CutDate2)
            {
                //Remove.SetPhenologyStage = 3.5;
                var Panicle = Oats.FindChild<IHasDamageableBiomass>("Panicle");
                var Leaf = Oats.FindChild<IHasDamageableBiomass>("Leaf");
                var Stem = Oats.FindChild<IHasDamageableBiomass>("Stem");
                var Grain = Oats.FindChild<IHasDamageableBiomass>("Grain");
                var Root = Oats.FindChild<IHasDamageableBiomass>("Root");
                Panicle.RemoveBiomass(liveToRemove: 1.0, deadToRemove: 0.0, liveToResidue: 0.0, deadToResidue: 0.0);
                Leaf.RemoveBiomass(liveToRemove: 0.7, deadToRemove: 0.0, liveToResidue: 0.0, deadToResidue: 0.0);
                Stem.RemoveBiomass(liveToRemove: 0.7, deadToRemove: 0.0, liveToResidue: 0.0, deadToResidue: 0.0);
                Grain.RemoveBiomass(liveToRemove: 1.0, deadToRemove: 0.0, liveToResidue: 0.0, deadToResidue: 0.0);
                Root.RemoveBiomass(liveToRemove: 0.0, deadToRemove: 0.0, liveToResidue: 0.0, deadToResidue: 0.0);
            }
        }
    }
}
```
          Simulation Roma2006Base
            Clock: Start=2006-05-24; End=2006-11-20
            Summary summaryfile
            Weather: FileName=WeatherFiles/Roma2006.met; Latitude=-26.55; Tav=20.55; Amp=17.97
            Zone paddock: Area=1; Slope=0; AspectAngle=0; Altitude=50
              Soil: Latitude=0; Longitude=0
                Physical
                  Thickness  BD    AirDry  LL15  DUL    SAT
                  150        1.25  0.11    0.19  0.4    0.45
                  150        1.33  0.15    0.19  0.389  0.44
                  300        1.32  0.18    0.21  0.422  0.47
                  300        1.47  0.19    0.22  0.317  0.4
                  300        1.52  0.19    0.22  0.332  0.38
                  300        1.55  0.19    0.22  0.33   0.38
                  SoilCrop OatsSoil: LL=[0.2, 0.2, 0.21, 0.26, 0.29, 0.3]; KL=[0.06, 0.05, 0.04, 0.03, 0.02, 0.02]; XF=[1, 1, 0.5, 0.2, 0.2, 0.2]
                WaterBalance SoilWater: SummerDate=1-Nov; SummerU=2; SummerCona=2; WinterDate=1-Apr; WinterU=2; WinterCona=2; DiffusConst=40; DiffusSlope=16; Salb=0.13; CN2Bare=78; CNRed=20; CNCov=0.8; PSIDul=-100; Thickness=[150, 150, 300, 300, 300, 300]; SWCON=[0.3, 0.3, 0.3, 0.5, 0.5, 0.5]
                Organic: FOMCNRatio=20; CarbonUnits=Total
                  Thickness  Carbon  SoilCNRatio  FBiom  FInert  FOM
                  150        1.46    14.5         0.035  0.45    195.299
                  150        0.7     14.5         0.02   0.55    144.681
                  300        0.3     14.5         0.015  0.8     79.4026
                  300        0.15    14.5         0.01   0.99    43.577
                  300        0.05    14.5         0.01   0.99    23.9156
                  300        0.05    14.5         0.01   0.99    13.1252
                Chemical: Thickness=[150, 150, 300, 300, 300, 300]; PH=[7.2, 7.9, 7.9, 7.3, 7.1, 7.1]; PHUnits=Water
                Water: Thickness=[150, 150, 300, 300, 300, 300]; InitialValues=[0.327, 0.333, 0.333, 0.262, 0.286, 0.29]; InitialPAWmm=132.3; RelativeTo=LL15; FilledFromTop=false
                CERESSoilTemperature Temperature
                Nutrient
                Solute NO3: Thickness=[150, 150, 300, 300, 300, 300]; InitialValues=[16.1, 21.7, 24.3, 13.3, 7.9, 7.9]; InitialValuesUnits=ppm; WaterTableConcentration=0; D0=0; DepthConstant=0; MaxDepthSoluteAccessible=0; RunoffEffectivenessAtMovingSolute=0; MaxEffectiveRunoff=0
                Solute NH4: Thickness=[150, 150, 300, 300, 300, 300]; InitialValues=[0.3, 0.3, 0.3, 0.3, 0.3, 0.5]; InitialValuesUnits=ppm; WaterTableConcentration=0; D0=0; DepthConstant=0; MaxDepthSoluteAccessible=0; RunoffEffectivenessAtMovingSolute=0; MaxEffectiveRunoff=0
                Solute Urea: Thickness=[150, 150, 300, 300, 300, 300]; InitialValues=[0, 0, 0, 0, 0, 0]; InitialValuesUnits=kg/ha; WaterTableConcentration=0; D0=0; DepthConstant=0; MaxDepthSoluteAccessible=0; RunoffEffectivenessAtMovingSolute=0; MaxEffectiveRunoff=0
                OutputLayers OutputWaterLayers: Thickness=[150, 150, 300, 300, 300, 300]
                OutputLayers OutputNutrientLayers: Thickness=[150, 150, 300, 300, 300, 300]
              Irrigation
              SurfaceOrganicMatter Surface Organic Matter: InitialResidueName=wheat_stubble; InitialResidueType=wheat; InitialResidueMass=0; InitialStandingFraction=0; InitialCPR=0; InitialCNR=80
              Fertiliser
              MicroClimate: a_interception=0; b_interception=1; c_interception=0; d_interception=0; SoilHeatFluxFraction=0.4; MinimumHeightDiffForNewLayer=0; NightInterceptionFraction=0.5; ReferenceHeight=2
              Plant Oats
              Folder Management
                Manager Cutting: same as Validation.Australia.Wellcamp2006.Wellcamp2006.Factors.Permutation.Cut.None
                Operations IrrigandFert
                  2006-05-25  [Fertiliser].Apply(35, "NO3N", 20);
                  2006-05-29  [Irrigation].Apply(10);
                  2006-06-05  [Irrigation].Apply(10);
                  2006-08-15  [Fertiliser].Apply(40, "NO3N", 10);
                  2006-06-05  [Irrigation].Apply(60);
                Operations Sowing
                Manager Harvesting: same as Validation.Australia.Gatton2007.Gatton2007early.Gatton2007.Gatton2007Base.paddock.Management.Harvesting
              Report DailyReport
              Report HarvestReport
              Report SupReport: same as Validation.Australia.Gatton2007.Gatton2007early.Gatton2007.Gatton2007Base.paddock.SupReport
            SoilArbitrator Soil Arbitrator
      Folder Tarlee2007
        Memo Experiment Description
          This experiment was run at Tarlee, South Australia, in 2007. Leaf disease (probably yellow spot) was observed to take hold in the latter stages of the experiment that may explain differences between observed and simulated LAI, leaf biomass and dead leaf biomass toward the end of the experiment.
        Experiment Tarlee2007
          Factors
            Factor AgRegime: Specification=[Operations]
              Operations HighInput
                2007-05-30  [Fertiliser].Apply(100, "UreaN", 10);
                2007-08-27  [Irrigation].Apply(62);
                2007-09-17  [Irrigation].Apply(62);
              Operations LowInput
                2007-05-30  [Fertiliser].Apply(50, "UreaN", 10);
          Simulation Tarlee2007Base
            Clock: Start=2007-05-03; End=2007-11-30
            Summary summaryfile
            Weather: FileName=WeatherFiles/MNHRZ_onsite_metdata07.met; Latitude=-34.27; Tav=17.67; Amp=16.12
            Zone paddock: Area=1; Slope=0; AspectAngle=0; Altitude=50
              Soil: SoilType=Clay Loam over Medium Clay; Site=Tarlee (TDS); NearestTown=Giles Corner; Region=Mid-north; State=South Australia; Latitude=-34.2367; Longitude=138.741; LocationAccuracy=+-20m; DataSource=University of Adelaide, Roseworthy
                Physical
                  Thickness  BD     AirDry  LL15   DUL    SAT
                  100        1.342  0.093   0.15   0.371  0.463
                  200        1.348  0.147   0.184  0.367  0.461
                  250        1.342  0.15    0.18   0.414  0.464
                  250        1.48   0.15    0.2    0.403  0.436
                  300        1.58   0.15    0.21   0.363  0.398
                  400        1.56   0.15    0.22   0.371  0.406
                  300        1.56   0.15    0.22   0.371  0.406
                  SoilCrop WheatSoil: LL=[0.186, 0.184, 0.228, 0.251, 0.261, 0.285, 0.285]; KL=[0.06, 0.06, 0.06, 0.04, 0.04, 0.02, 0.02]; XF=[1, 1, 1, 1, 1, 1, 1]
                  SoilCrop BarleySoil: LL=[0.186, 0.184, 0.228, 0.251, 0.261, 0.285, 0.285]; KL=[0.07, 0.07, 0.07, 0.05, 0.05, 0.03, 0.03]; XF=[1, 1, 1, 1, 1, 1, 1]
                  SoilCrop OatsSoil: LL=[0.15, 0.174, 0.216, 0.257, 0.263, 0.263, 0.263]; KL=[0.1, 0.1, 0.07, 0.07, 0.04, 0.03, 0.03]; XF=[1, 1, 1, 1, 1, 1, 1]
                  SoilCrop VetchSoil: LL=[0.186, 0.184, 0.216, 0.223, 0.237, 0.24, 0.24]; KL=[0.06, 0.06, 0.06, 0.04, 0.04, 0.02, 0.02]; XF=[1, 1, 1, 1, 1, 1, 1]
                WaterBalance SoilWater: SummerDate=1-Nov; SummerU=6; SummerCona=3.5; WinterDate=1-Apr; WinterU=2; WinterCona=2; DiffusConst=60; DiffusSlope=20; Salb=0.13; CN2Bare=73; CNRed=20; CNCov=0.8; PSIDul=-100; Thickness=[100, 200, 250, 250, 300, 400, 300]; SWCON=[0.5, 0.5, 0.5, 0.5, 0.5, 0.5, 0.5]
                Organic: FOMCNRatio=40; CarbonUnits=Total
                  Thickness  Carbon  SoilCNRatio  FBiom  FInert  FOM
                  100        1.56    12           0.04   0.4     351.498
                  200        0.74    12           0.02   0.5     251.859
                  250        0.48    12           0.02   0.7     166.036
                  250        0.2     12           0.02   1       109.458
                  300        0.13    12           0.01   1       66.3894
                  400        0.13    12           0.01   1       34.0855
                  300        0.13    12           0.01   1       20.6739
                Chemical: Thickness=[100, 200, 250, 250, 300, 400, 300]; PH=[7.2, 7.4, 8.1, 9, 9.3, 9.3, 9.3]; PHUnits=Water
                Water: Thickness=[100, 200, 250, 250, 300, 400, 300]; InitialValues=[0.22, 0.23, 0.255, 0.3, 0.332, 0.328, 0.328]; InitialPAWmm=172.15; RelativeTo=LL15; FilledFromTop=false
                CERESSoilTemperature Temperature
                Nutrient
                Solute NO3: Thickness=[100, 200, 250, 250, 300, 400, 300]; InitialValues=[15.0001, 11, 8.00003, 4.39999, 2, 0.999999, 1]; InitialValuesUnits=ppm; WaterTableConcentration=0; D0=0; DepthConstant=0; MaxDepthSoluteAccessible=0; RunoffEffectivenessAtMovingSolute=0; MaxEffectiveRunoff=0
                Solute NH4: Thickness=[100, 200, 250, 250, 300, 400, 300]; InitialValuesUnits=ppm; WaterTableConcentration=0; D0=0; DepthConstant=0; MaxDepthSoluteAccessible=0; RunoffEffectivenessAtMovingSolute=0; MaxEffectiveRunoff=0
                  InitialValues=[1.00004, 1.99998, 1.00004, 0.999998, 0.0999905, 0.0999905, 0.1]
                Solute Urea: Thickness=[100, 200, 250, 250, 300, 400, 300]; InitialValues=[0, 0, 0, 0, 0, 0, 0]; InitialValuesUnits=kg/ha; WaterTableConcentration=0; D0=0; DepthConstant=0; MaxDepthSoluteAccessible=0; RunoffEffectivenessAtMovingSolute=0; MaxEffectiveRunoff=0
                OutputLayers OutputWaterLayers: Thickness=[100, 200, 250, 250, 300, 400, 300]
                OutputLayers OutputNutrientLayers: Thickness=[100, 200, 250, 250, 300, 400, 300]
              Irrigation
              SurfaceOrganicMatter Surface Organic Matter: InitialResidueName=wheat_stubble; InitialResidueType=wheat; InitialResidueMass=0; InitialStandingFraction=0; InitialCPR=0; InitialCNR=80
              Fertiliser
              MicroClimate: a_interception=0; b_interception=1; c_interception=0; d_interception=0; SoilHeatFluxFraction=0.4; MinimumHeightDiffForNewLayer=0; NightInterceptionFraction=0.5; ReferenceHeight=2
              Plant Oats
              Folder Management
                Operations Sowing
                  2007-05-11  [Oats].Sow(population:200, cultivar:"Wintaroo", depth:30, rowSpacing:250);
                Operations
                Operations Harverst
                  2007-11-17  [Oats].Harvest()
              Report DailyReport
              Report HarvestReport
              Report SupReport: EventNames=[Clock].DoReport
                VariableNames:
                  [Clock].Today
                  [Phenology].ThermalTime
                  [Leaf].CohortSize
                  [Leaf].CohortParameters.MaxArea
                  [Oats].Arbitrator.DM.TotalFixationSupply
                  [Oats].Arbitrator.FN
                  [Oats].Structure.Phyllochron
                  [Oats].Leaf.CohortMaxSize
                  [Oats].Leaf.CohortParameters.GrowthDuration
                  [Oats].Leaf.CohortParameters.LagDuration
                  [Oats].Leaf.CohortParameters.SenescenceDuration
                  [Oats].Leaf.CohortParameters.SpecificLeafAreaMax
                  [Oats].Leaf.CohortParameters.SpecificLeafAreaMin
                  [Oats].Leaf.Photosynthesis.FT
                  [Oats].Leaf.Photosynthesis.FVPD
                  [Oats].Leaf.Photosynthesis.RueAct
                  [Oats].Leaf.NextExpandingLeafProportion
                  [Oats].Structure.MeanTillerGrowthRate
                  sum([Soil].Water.MM[1:6]) as ProfileWater
            SoilArbitrator Soil Arbitrator
      Folder LRCphenology
        Memo
          These simulations were used to develop phenology parameters for a range of cultivars used in northern Australia. Observed data was kindly supplied by Bruce Winter (Oats Breeder) and Richard Uebergang from experiments conducted at DAFQ Leslie Research Centre, Holberton St Toowoomba. SILO weather data from the nearby Toowoomba Airport was used. Approximated irrigation data and fertiliser regime was provided by LRC staff who managed the phenology screening trials to be non-water and N limiting.
        Experiment LRC2011
          Factors
            Permutation
              Factor Cv
                Specification=[SowAndCut].Script.Cultivar = Algerian, Nugene, Drover, Genie
              Factor Management: Specification=[SowAndCut].Script.Management = 1 to 3 step 1
          Simulation LRC2011Base
            Clock: Start=2011-02-01; End=2011-12-31
            Summary summaryfile
            Weather: FileName=WeatherFiles/Toowoomba_AP.met; Latitude=-27.54; Tav=18.01; Amp=11.94
            SoilArbitrator Soil Arbitrator
            Zone paddock: Area=1; Slope=0; AspectAngle=0; Altitude=50
              Soil: same as Validation.Australia.Wellcamp2006.Wellcamp2006.Wellcamp2006Base.paddock.Soil
              Irrigation
              SurfaceOrganicMatter Surface Organic Matter: InitialResidueName=wheat_stubble; InitialResidueType=wheat; InitialResidueMass=0; InitialStandingFraction=0; InitialCPR=0; InitialCNR=80
              Fertiliser
              MicroClimate: a_interception=0; b_interception=1; c_interception=0; d_interception=0; SoilHeatFluxFraction=0.4; MinimumHeightDiffForNewLayer=0; NightInterceptionFraction=0.5; ReferenceHeight=2
              Plant Oats
              Folder Management
                Operations IrrigandFert
                  2011-04-03  [Fertiliser].Apply(35, "NO3N", 20);
                  2011-04-01  [Irrigation].Apply(40);
                  2011-08-15  [Fertiliser].Apply(40, "NO3N", 10);
                  2011-06-30  [Irrigation].Apply(25);
                  2011-07-30  [Irrigation].Apply(25);
                  2011-08-15  [Irrigation].Apply(30);
                  2011-09-30  [Irrigation].Apply(40);
                  2011-10-30  [Irrigation].Apply(40);
                  2011-11-15  [Irrigation].Apply(40);
                Manager Harvesting: same as Validation.Australia.Gatton2007.Gatton2007early.Gatton2007.Gatton2007Base.paddock.Management.Harvesting
                Manager SowAndCut
                  Cultivar = Coolibah
                  Management = 0
```csharp
using Models.PMF.Interfaces;
using Newtonsoft.Json;
using System;
using System.Collections.Generic;
using Models.Core;
using Models.PMF;
using Models.PMF.Interfaces;
using System.Xml.Serialization;
using APSIM.Shared.Utilities;
using Models.Soils;
using Models.Management;

namespace Models
{
    [Serializable] 
    [System.Xml.Serialization.XmlInclude(typeof(Model))]
    public class Script : Model
    {
        [Link] Plant Oats;
        [Link] Clock Clock;
        [Link] BiomassRemovalEvents toa; 

        [Description("Cultivar")]
        public string Cultivar { get; set; }
        [Description("Management")]
        public int Management { get; set; }

        private string SowDate;
        private string CutDate1;
        private string CutDate2;



        
        [EventSubscribe("StartOfSimulation")]
        private void OnSimulationCommencing(object sender, EventArgs e)
        {
            
            if (Management == 1)
            {
            SowDate = "9-feb";
            CutDate1 = "";
            CutDate2 = "";
            }
            else if (Management == 2)
            {
            SowDate = "8-mar";
            CutDate1 = "";
            CutDate2 = "";
            }
            else if (Management == 3)
            {
            SowDate = "5-apr";
            CutDate1 = "";
            CutDate2 = "";
            }
            else if (Management == 4)
            {
            SowDate = "9-feb";
            CutDate1 = "12-apr";
            CutDate2 = "10-may";
            }
            else if (Management == 5)
            {
            SowDate = "8-mar";
            CutDate1 = "9-may";
            CutDate2 = "6-jun";
            }
            else if (Management == 6)
            {
            SowDate = "5-apr";
            CutDate1 = "6-jun";
            CutDate2 = "4-jul";
            }

        }
        
        [EventSubscribe("DoManagement")]
        private void OnDoManagement(object sender, EventArgs e)
        {

            if (DateUtilities.WithinDates(SowDate,Clock.Today,SowDate) )
            {
                Oats.Sow(population:95, cultivar: Cultivar, depth:40, rowSpacing:250);
            }

            //Set up  array of remove fractions to send with Cut method.  Each member in the array corresponds to an organ in the same order they are set up in.
            if (CutDate1 !="")
                if (DateUtilities.WithinDates(CutDate1,Clock.Today,CutDate1))
                {
                    //Remove.SetPhenologyStage = 2.0;
                    var Panicle = Oats.FindChild<IHasDamageableBiomass>("Panicle");
                    var Leaf = Oats.FindChild<IHasDamageableBiomass>("Leaf");
                    var Stem = Oats.FindChild<IHasDamageableBiomass>("Stem");
                    var Grain = Oats.FindChild<IHasDamageableBiomass>("Grain");
                    var Root = Oats.FindChild<IHasDamageableBiomass>("Root");
                    Panicle.RemoveBiomass(liveToRemove: 1.0, deadToRemove: 0.0, liveToResidue: 0.0, deadToResidue: 0.0);
                    Leaf.RemoveBiomass(liveToRemove: 0.8, deadToRemove: 0.0, liveToResidue: 0.0, deadToResidue: 0.0);
                    Stem.RemoveBiomass(liveToRemove: 0.8, deadToRemove: 0.0, liveToResidue: 0.0, deadToResidue: 0.0);
                    Grain.RemoveBiomass(liveToRemove: 1.0, deadToRemove: 0.0, liveToResidue: 0.0, deadToResidue: 0.0);
                    Root.RemoveBiomass(liveToRemove: 0.0, deadToRemove: 0.0, liveToResidue: 0.0, deadToResidue: 0.0);

                }
            //Set up  array of remove fractions to send with Cut method.  Each member in the array corresponds to an organ in the same order they are set up in.
            if (CutDate2 !="")
                if (DateUtilities.WithinDates(CutDate2,Clock.Today,CutDate2))
                {
                    toa.Remove();
                }

            
        }
    }
}
```
              Report DailyReport
              Report HarvestReport
              Report SupReport: same as Validation.Australia.Wellcamp2006.Wellcamp2006.Wellcamp2006Base.paddock.SupReport
              BiomassRemovalEvents OatCut: same as Validation.New Zealand.SLMACC.SLMACC_Canterbury_2021.Springston_Temp_Soil.Block.OatCut
        Experiment LRC2012
          Factors
            Permutation
              Factor Cv
                Specification=[SowAndCut].Script.Cultivar = Algerian, Nugene, Drover, Genie, Aladdin
              Factor Management: Specification=[SowAndCut].Script.Management = 1 to 3 step 1
          Simulation LRC2012Base
            Clock: Start=2012-02-01; End=2012-12-31
            Summary summaryfile
            Weather: FileName=WeatherFiles/Toowoomba_AP.met; Latitude=-27.54; Tav=18.01; Amp=11.94
            SoilArbitrator Soil Arbitrator
            Zone paddock: Area=1; Slope=0; AspectAngle=0; Altitude=50
              Soil: same as Validation.Australia.Wellcamp2006.Wellcamp2006.Wellcamp2006Base.paddock.Soil
              Irrigation
              SurfaceOrganicMatter Surface Organic Matter: InitialResidueName=wheat_stubble; InitialResidueType=wheat; InitialResidueMass=0; InitialStandingFraction=0; InitialCPR=0; InitialCNR=80
              Fertiliser
              MicroClimate: a_interception=0; b_interception=1; c_interception=0; d_interception=0; SoilHeatFluxFraction=0.4; MinimumHeightDiffForNewLayer=0; NightInterceptionFraction=0.5; ReferenceHeight=2
              Plant Oats
              Folder Management
                Operations IrrigandFert
                  2012-04-03  [Fertiliser].Apply(35, "NO3N", 20);
                  2012-04-10  [Irrigation].Apply(40);
                  2012-08-15  [Fertiliser].Apply(40, "NO3N", 10);
                  2012-05-20  [Irrigation].Apply(30);
                  2012-08-10  [Irrigation].Apply(25);
                  2012-08-31  [Irrigation].Apply(30);
                  2012-09-20  [Irrigation].Apply(40);
                  2012-10-30  [Irrigation].Apply(40);
                  2012-11-15  [Irrigation].Apply(25);
                Manager Harvesting: same as Validation.Australia.Gatton2007.Gatton2007early.Gatton2007.Gatton2007Base.paddock.Management.Harvesting
                Manager SowAndCut
                  Cultivar = Coolibah
                  Management = 0
```csharp
using Models.PMF.Interfaces;
using Newtonsoft.Json;
using System;
using System.Collections.Generic;
using Models.Core;
using Models.PMF;
using Models.PMF.Interfaces;
using System.Xml.Serialization;
using APSIM.Shared.Utilities;
using Models.Soils;
using Models.Management;

namespace Models
{
    [Serializable] 
    [System.Xml.Serialization.XmlInclude(typeof(Model))]
    public class Script : Model
    {
        [Link] Plant Oats;
        [Link] Clock Clock;
        [Link] BiomassRemovalEvents toa; 

        [Description("Cultivar")]
        public string Cultivar { get; set; }
        [Description("Management")]
        public int Management { get; set; }

        private string SowDate;
        private string CutDate1;
        private string CutDate2;



        
        [EventSubscribe("StartOfSimulation")]
        private void OnSimulationCommencing(object sender, EventArgs e)
        {
            
            if (Management == 1)
            {
            SowDate = "6-feb";
            CutDate1 = "";
            CutDate2 = "";
            }
            else if (Management == 2)
            {
            SowDate = "5-mar";
            CutDate1 = "";
            CutDate2 = "";
            }
            else if (Management == 3)
            {
            SowDate = "2-apr";
            CutDate1 = "";
            CutDate2 = "";
            }
            else if (Management == 4)
            {
            SowDate = "6-feb";
            CutDate1 = "2-apr";
            CutDate2 = "30-apr";
            }
            else if (Management == 5)
            {
            SowDate = "5-mar";
            CutDate1 = "30-apr";
            CutDate2 = "28-may";
            }
            else if (Management == 6)
            {
            SowDate = "2-apr";
            CutDate1 = "28-may";
            CutDate2 = "25-jun";
            }

        }
        
        [EventSubscribe("DoManagement")]
        private void OnDoManagement(object sender, EventArgs e)
        {

            if (DateUtilities.WithinDates(SowDate,Clock.Today,SowDate) )
            {
                Oats.Sow(population:95, cultivar: Cultivar, depth:40, rowSpacing:250);
            }

            //Set up  array of remove fractions to send with Cut method.  Each member in the array corresponds to an organ in the same order they are set up in.
            if (CutDate1 !="")
                if (DateUtilities.WithinDates(CutDate1,Clock.Today,CutDate1))
                {
                    //Remove.SetPhenologyStage = 2.0;
                    var Panicle = Oats.FindChild<IHasDamageableBiomass>("Panicle");
                    var Leaf = Oats.FindChild<IHasDamageableBiomass>("Leaf");
                    var Stem = Oats.FindChild<IHasDamageableBiomass>("Stem");
                    var Grain = Oats.FindChild<IHasDamageableBiomass>("Grain");
                    var Root = Oats.FindChild<IHasDamageableBiomass>("Root");
                    Panicle.RemoveBiomass(liveToRemove: 1.0, deadToRemove: 0.0, liveToResidue: 0.0, deadToResidue: 0.0);
                    Leaf.RemoveBiomass(liveToRemove: 0.8, deadToRemove: 0.0, liveToResidue: 0.0, deadToResidue: 0.0);
                    Stem.RemoveBiomass(liveToRemove: 0.8, deadToRemove: 0.0, liveToResidue: 0.0, deadToResidue: 0.0);
                    Grain.RemoveBiomass(liveToRemove: 1.0, deadToRemove: 0.0, liveToResidue: 0.0, deadToResidue: 0.0);
                    Root.RemoveBiomass(liveToRemove: 0.0, deadToRemove: 0.0, liveToResidue: 0.0, deadToResidue: 0.0);

                }
            //Set up  array of remove fractions to send with Cut method.  Each member in the array corresponds to an organ in the same order they are set up in.
            if (CutDate2 !="")
                if (DateUtilities.WithinDates(CutDate2,Clock.Today,CutDate2))
                {
                    toa.Remove();
                }

            
        }
    }
}
```
              Report DailyReport
              Report HarvestReport
              Report SupReport: same as Validation.Australia.Wellcamp2006.Wellcamp2006.Wellcamp2006Base.paddock.SupReport
              BiomassRemovalEvents OatCut: same as Validation.New Zealand.SLMACC.SLMACC_Canterbury_2021.Springston_Temp_Soil.Block.OatCut
        Experiment LRC2014
          Factors
            Permutation
              Factor Cv
                Specification=[SowAndCut].Script.Cultivar = Algerian, Drover, Genie, Aladdin, Comet, Taipan, Wizard
              Factor Management: Specification=[SowAndCut].Script.Management = 1 to 2 step 1
          Simulation LRC2014Base
            Clock: Start=2014-02-01; End=2014-12-31
            Summary summaryfile
            Weather: FileName=WeatherFiles/Toowoomba_AP.met; Latitude=-27.54; Tav=18.01; Amp=11.94
            SoilArbitrator Soil Arbitrator
            Zone paddock: Area=1; Slope=0; AspectAngle=0; Altitude=50
              Soil: same as Validation.Australia.Wellcamp2006.Wellcamp2006.Wellcamp2006Base.paddock.Soil
              Irrigation
              SurfaceOrganicMatter Surface Organic Matter: InitialResidueName=wheat_stubble; InitialResidueType=wheat; InitialResidueMass=0; InitialStandingFraction=0; InitialCPR=0; InitialCNR=80
              Fertiliser
              MicroClimate: a_interception=0; b_interception=1; c_interception=0; d_interception=0; SoilHeatFluxFraction=0.4; MinimumHeightDiffForNewLayer=0; NightInterceptionFraction=0.5; ReferenceHeight=2
              Plant Oats
              Folder Management
                Operations IrrigandFert
                  2014-02-01  [Irrigation].Apply(50);
                  2014-02-14  [Irrigation].Apply(25);
                  2014-03-01  [Irrigation].Apply(25);
                  2014-03-15  [Irrigation].Apply(40);
                  2014-03-21  [Fertiliser].Apply(35, "NO3N", 20);
                  2014-04-21  [Irrigation].Apply(25);
                  2014-05-18  [Irrigation].Apply(25);
                  2014-08-15  [Fertiliser].Apply(40, "NO3N", 10);
                  2014-06-03  [Irrigation].Apply(25);
                  2014-06-19  [Irrigation].Apply(25);
                  2014-07-10  [Irrigation].Apply(30);
                  2014-08-01  [Irrigation].Apply(25);
                  2014-09-05  [Irrigation].Apply(30);
                  2014-09-22  [Irrigation].Apply(25);
                  2014-10-03  [Irrigation].Apply(40);
                  2014-10-17  [Irrigation].Apply(25);
                  2014-10-30  [Irrigation].Apply(40);
                  2014-11-14  [Irrigation].Apply(25);
                  2014-11-30  [Irrigation].Apply(25);
                Manager Harvesting: same as Validation.Australia.Gatton2007.Gatton2007early.Gatton2007.Gatton2007Base.paddock.Management.Harvesting
                Manager SowAndCut
                  Cultivar = Coolibah
                  Management = 0
```csharp
using Models.PMF.Interfaces;
using Newtonsoft.Json;
using System;
using System.Collections.Generic;
using Models.Core;
using Models.PMF;
using Models.PMF.Interfaces;
using System.Xml.Serialization;
using APSIM.Shared.Utilities;
using Models.Soils;
using Models.Management;

namespace Models
{
    [Serializable] 
    [System.Xml.Serialization.XmlInclude(typeof(Model))]
    public class Script : Model
    {
        [Link] Plant Oats;
        [Link] Clock Clock;
        [Link] BiomassRemovalEvents toa;     

        [Description("Cultivar")]
        public string Cultivar { get; set; }
        [Description("Management")]
        public int Management { get; set; }

        private string SowDate;
        private string CutDate1;
        private string CutDate2;



        
        [EventSubscribe("StartOfSimulation")]
        private void OnSimulationCommencing(object sender, EventArgs e)
        {
            
            if (Management == 1)
            {
            SowDate = "3-mar";
            CutDate1 = "";
            CutDate2 = "";
            }
            else if (Management == 2)
            {
            SowDate = "1-apr";
            CutDate1 = "";
            CutDate2 = "";
            }
            else if (Management == 3)
            {
            SowDate = "3-feb";
            CutDate1 = "1-jun";
            CutDate2 = "";
            }
            else if (Management == 4)
            {
            SowDate = "3-feb";
            CutDate1 = "24-mar";
            CutDate2 = "28-apr";
            }
            else if (Management == 5)
            {
            SowDate = "3-mar";
            CutDate1 = "28-apr";
            CutDate2 = "26-may";
            }
            else if (Management == 6)
            {
            SowDate = "1-apr";
            CutDate1 = "26-may";
            CutDate2 = "23-jun";
            }

        }
        
        [EventSubscribe("DoManagement")]
        private void OnDoManagement(object sender, EventArgs e)
        {

            if (DateUtilities.WithinDates(SowDate,Clock.Today,SowDate) )
            {
                Oats.Sow(population:95, cultivar: Cultivar, depth:40, rowSpacing:250);
            }

            //Set up  array of remove fractions to send with Cut method.  Each member in the array corresponds to an organ in the same order they are set up in.
            if (CutDate1 !="")
                if (DateUtilities.WithinDates(CutDate1,Clock.Today,CutDate1))
                {
                    //Remove.SetPhenologyStage = 2.0;
                    var Panicle = Oats.FindChild<IHasDamageableBiomass>("Panicle");
                    var Leaf = Oats.FindChild<IHasDamageableBiomass>("Leaf");
                    var Stem = Oats.FindChild<IHasDamageableBiomass>("Stem");
                    var Grain = Oats.FindChild<IHasDamageableBiomass>("Grain");
                    var Root = Oats.FindChild<IHasDamageableBiomass>("Root");
                    Panicle.RemoveBiomass(liveToRemove: 1.0, deadToRemove: 0.0, liveToResidue: 0.0, deadToResidue: 0.0);
                    Leaf.RemoveBiomass(liveToRemove: 0.8, deadToRemove: 0.0, liveToResidue: 0.0, deadToResidue: 0.0);
                    Stem.RemoveBiomass(liveToRemove: 0.8, deadToRemove: 0.0, liveToResidue: 0.0, deadToResidue: 0.0);
                    Grain.RemoveBiomass(liveToRemove: 1.0, deadToRemove: 0.0, liveToResidue: 0.0, deadToResidue: 0.0);
                    Root.RemoveBiomass(liveToRemove: 0.0, deadToRemove: 0.0, liveToResidue: 0.0, deadToResidue: 0.0);

                }
            //Set up  array of remove fractions to send with Cut method.  Each member in the array corresponds to an organ in the same order they are set up in.
            if (CutDate2 !="")
                if (DateUtilities.WithinDates(CutDate2,Clock.Today,CutDate2))
                {
                   toa.Remove();
                }

            
        }
    }
}
```
              Report DailyReport
              Report HarvestReport
              Report SupReport: same as Validation.Australia.Wellcamp2006.Wellcamp2006.Wellcamp2006Base.paddock.SupReport
              BiomassRemovalEvents OatCut: same as Validation.New Zealand.SLMACC.SLMACC_Canterbury_2021.Springston_Temp_Soil.Block.OatCut
        Experiment LRC2015
          Factors
            Permutation
              Factor Cv
                Specification=[SowAndCut].Script.Cultivar = Algerian, Drover, Genie, Aladdin, Comet, Taipan, Wizard
              Factor Management: Specification=[SowAndCut].Script.Management = 1 to 3 step 1
          Simulation LRC2015Base
            Clock: Start=2015-02-01; End=2015-12-31
            Summary summaryfile
            Weather: FileName=WeatherFiles/Toowoomba_AP.met; Latitude=-27.54; Tav=18.01; Amp=11.94
            SoilArbitrator Soil Arbitrator
            Zone paddock: Area=1; Slope=0; AspectAngle=0; Altitude=50
              Soil: same as Validation.Australia.Wellcamp2006.Wellcamp2006.Wellcamp2006Base.paddock.Soil
              Irrigation
              SurfaceOrganicMatter Surface Organic Matter: InitialResidueName=wheat_stubble; InitialResidueType=wheat; InitialResidueMass=0; InitialStandingFraction=0; InitialCPR=0; InitialCNR=80
              Fertiliser
              MicroClimate: a_interception=0; b_interception=1; c_interception=0; d_interception=0; SoilHeatFluxFraction=0.4; MinimumHeightDiffForNewLayer=0; NightInterceptionFraction=0.5; ReferenceHeight=2
              Plant Oats
              Folder Management
                Operations IrrigandFert
                  2015-02-01  [Irrigation].Apply(50);
                  2015-02-14  [Irrigation].Apply(25);
                  2015-03-10  [Irrigation].Apply(40);
                  2015-03-21  [Fertiliser].Apply(35, "NO3N", 20);
                  2015-04-15  [Irrigation].Apply(25);
                  2015-05-21  [Irrigation].Apply(25);
                  2015-08-15  [Fertiliser].Apply(40, "NO3N", 10);
                  2015-06-03  [Irrigation].Apply(25);
                  2015-06-23  [Irrigation].Apply(25);
                  2015-07-07  [Irrigation].Apply(30);
                  2015-07-21  [Irrigation].Apply(30);
                  2015-08-12  [Irrigation].Apply(25);
                  2015-09-14  [Irrigation].Apply(40);
                  2015-09-28  [Irrigation].Apply(40);
                  2015-10-16  [Irrigation].Apply(40);
                  2015-11-21  [Irrigation].Apply(25);
                Manager Harvesting: same as Validation.Australia.Gatton2007.Gatton2007early.Gatton2007.Gatton2007Base.paddock.Management.Harvesting
                Manager SowAndCut
                  Cultivar = Coolibah
                  Management = 0
```csharp
using Models.PMF.Interfaces;
using Newtonsoft.Json;
using System;
using System.Collections.Generic;
using Models.Core;
using Models.PMF;
using Models.PMF.Interfaces;
using System.Xml.Serialization;
using APSIM.Shared.Utilities;
using Models.Soils;
using Models.Management;

namespace Models
{
    [Serializable] 
    [System.Xml.Serialization.XmlInclude(typeof(Model))]
    public class Script : Model
    {
        [Link] Plant Oats;
        [Link] Clock Clock;
        [Link] BiomassRemovalEvents toa;     

        [Description("Cultivar")]
        public string Cultivar { get; set; }
        [Description("Management")]
        public int Management { get; set; }

        private string SowDate;
        private string CutDate1;
        private string CutDate2;



        
        [EventSubscribe("StartOfSimulation")]
        private void OnSimulationCommencing(object sender, EventArgs e)
        {
            
            if (Management == 1)
            {
            SowDate = "2-feb";
            CutDate1 = "";
            CutDate2 = "";
            }
            else if (Management == 2)
            {
            SowDate = "2-mar";
            CutDate1 = "";
            CutDate2 = "";
            }
            else if (Management == 3)
            {
            SowDate = "30-mar";
            CutDate1 = "";
            CutDate2 = "";
            }
            else if (Management == 4)
            {
            SowDate = "2-feb";
            CutDate1 = "30-mar";
            CutDate2 = "27-apr";
            }
            else if (Management == 5)
            {
            SowDate = "2-mar";
            CutDate1 = "27-apr";
            CutDate2 = "25-may";
            }
            else if (Management == 6)
            {
            SowDate = "30-mar";
            CutDate1 = "25-may";
            CutDate2 = "22-jun";
            }

        }
        
        [EventSubscribe("DoManagement")]
        private void OnDoManagement(object sender, EventArgs e)
        {

            if (DateUtilities.WithinDates(SowDate,Clock.Today,SowDate) )
            {
                Oats.Sow(population:95, cultivar: Cultivar, depth:40, rowSpacing:250);
            }

            //Set up  array of remove fractions to send with Cut method.  Each member in the array corresponds to an organ in the same order they are set up in.
            if (CutDate1 !="")
                if (DateUtilities.WithinDates(CutDate1,Clock.Today,CutDate1))
                {
                    //Remove.SetPhenologyStage = 2.0;
                    var Panicle = Oats.FindChild<IHasDamageableBiomass>("Panicle");
                    var Leaf = Oats.FindChild<IHasDamageableBiomass>("Leaf");
                    var Stem = Oats.FindChild<IHasDamageableBiomass>("Stem");
                    var Grain = Oats.FindChild<IHasDamageableBiomass>("Grain");
                    var Root = Oats.FindChild<IHasDamageableBiomass>("Root");
                    Panicle.RemoveBiomass(liveToRemove: 1.0, deadToRemove: 0.0, liveToResidue: 0.0, deadToResidue: 0.0);
                    Leaf.RemoveBiomass(liveToRemove: 0.8, deadToRemove: 0.0, liveToResidue: 0.0, deadToResidue: 0.0);
                    Stem.RemoveBiomass(liveToRemove: 0.8, deadToRemove: 0.0, liveToResidue: 0.0, deadToResidue: 0.0);
                    Grain.RemoveBiomass(liveToRemove: 1.0, deadToRemove: 0.0, liveToResidue: 0.0, deadToResidue: 0.0);
                    Root.RemoveBiomass(liveToRemove: 0.0, deadToRemove: 0.0, liveToResidue: 0.0, deadToResidue: 0.0);

                }
            //Set up  array of remove fractions to send with Cut method.  Each member in the array corresponds to an organ in the same order they are set up in.
            if (CutDate2 !="")
                if (DateUtilities.WithinDates(CutDate2,Clock.Today,CutDate2))
                {
                    toa.Remove();
                }

            
        }
    }
}
```
              Report DailyReport
              Report HarvestReport
              Report SupReport: same as Validation.Australia.Wellcamp2006.Wellcamp2006.Wellcamp2006Base.paddock.SupReport
              BiomassRemovalEvents OatCut: same as Validation.New Zealand.SLMACC.SLMACC_Canterbury_2021.Springston_Temp_Soil.Block.OatCut
        Experiment LRC2016
          Factors: same as Validation.Australia.LRCphenology.LRC2015.Factors
          Simulation LRC2016Base
            Clock: Start=2016-02-01; End=2016-12-31
            Summary summaryfile
            Weather: FileName=WeatherFiles/Toowoomba_AP.met; Latitude=-27.54; Tav=18.01; Amp=11.94
            SoilArbitrator Soil Arbitrator
            Zone paddock: Area=1; Slope=0; AspectAngle=0; Altitude=50
              Soil: same as Validation.Australia.Wellcamp2006.Wellcamp2006.Wellcamp2006Base.paddock.Soil
              Irrigation
              SurfaceOrganicMatter Surface Organic Matter: InitialResidueName=wheat_stubble; InitialResidueType=wheat; InitialResidueMass=0; InitialStandingFraction=0; InitialCPR=0; InitialCNR=80
              Fertiliser
              MicroClimate: a_interception=0; b_interception=1; c_interception=0; d_interception=0; SoilHeatFluxFraction=0.4; MinimumHeightDiffForNewLayer=0; NightInterceptionFraction=0.5; ReferenceHeight=2
              Plant Oats
              Folder Management
                Operations IrrigandFert
                  2016-02-01  [Irrigation].Apply(50);
                  2016-02-14  [Irrigation].Apply(25);
                  2016-03-01  [Irrigation].Apply(40);
                  2016-03-21  [Irrigation].Apply(25);
                  2016-03-21  [Fertiliser].Apply(35, "NO3N", 20);
                  2016-04-08  [Irrigation].Apply(40);
                  2016-04-22  [Irrigation].Apply(40);
                  2016-05-06  [Irrigation].Apply(25);
                  2016-08-15  [Fertiliser].Apply(40, "NO3N", 10);
                  2016-05-20  [Irrigation].Apply(25);
                  2016-07-21  [Irrigation].Apply(30);
                  2016-08-10  [Irrigation].Apply(25);
                  2016-09-02  [Irrigation].Apply(30);
                  2016-10-15  [Irrigation].Apply(25);
                  2016-10-30  [Irrigation].Apply(40);
                  2016-11-20  [Irrigation].Apply(40);
                Manager Harvesting: same as Validation.Australia.Gatton2007.Gatton2007early.Gatton2007.Gatton2007Base.paddock.Management.Harvesting
                Manager SowAndCut
                  Cultivar = Coolibah
                  Management = 0
```csharp
using Models.PMF.Interfaces;
using Newtonsoft.Json;
using System;
using System.Collections.Generic;
using Models.Core;
using Models.PMF;
using Models.PMF.Interfaces;
using System.Xml.Serialization;
using APSIM.Shared.Utilities;
using Models.Soils;
using Models.Management;

namespace Models
{
    [Serializable] 
    [System.Xml.Serialization.XmlInclude(typeof(Model))]
    public class Script : Model
    {
        [Link] Plant Oats;
        [Link] Clock Clock;
        [Link] BiomassRemovalEvents toa;     

        [Description("Cultivar")]
        public string Cultivar { get; set; }
        [Description("Management")]
        public int Management { get; set; }

        private string SowDate;
        private string CutDate1;
        private string CutDate2;



        
        [EventSubscribe("StartOfSimulation")]
        private void OnSimulationCommencing(object sender, EventArgs e)
        {
            
            if (Management == 1)
            {
            SowDate = "1-feb";
            CutDate1 = "";
            CutDate2 = "";
            }
            else if (Management == 2)
            {
            SowDate = "29-feb";
            CutDate1 = "";
            CutDate2 = "";
            }
            else if (Management == 3)
            {
            SowDate = "29-mar";
            CutDate1 = "";
            CutDate2 = "";
            }
            else if (Management == 4)
            {
            SowDate = "1-feb";
            CutDate1 = "29-mar";
            CutDate2 = "26-apr";
            }
            else if (Management == 5)
            {
            SowDate = "29-feb";
            CutDate1 = "26-apr";
            CutDate2 = "24-may";
            }
            else if (Management == 6)
            {
            SowDate = "29-mar";
            CutDate1 = "24-may";
            CutDate2 = "21-jun";
            }
        }
        
        [EventSubscribe("DoManagement")]
        private void OnDoManagement(object sender, EventArgs e)
        {

            if (DateUtilities.WithinDates(SowDate,Clock.Today,SowDate) )
            {
                Oats.Sow(population:95, cultivar: Cultivar, depth:40, rowSpacing:250);
            }

            //Set up  array of remove fractions to send with Cut method.  Each member in the array corresponds to an organ in the same order they are set up in.
            if (CutDate1 !="")
                if (DateUtilities.WithinDates(CutDate1,Clock.Today,CutDate1))
                {
                    //Remove.SetPhenologyStage = 2.0;
                    var Panicle = Oats.FindChild<IHasDamageableBiomass>("Panicle");
                    var Leaf = Oats.FindChild<IHasDamageableBiomass>("Leaf");
                    var Stem = Oats.FindChild<IHasDamageableBiomass>("Stem");
                    var Grain = Oats.FindChild<IHasDamageableBiomass>("Grain");
                    var Root = Oats.FindChild<IHasDamageableBiomass>("Root");
                    Panicle.RemoveBiomass(liveToRemove: 1.0, deadToRemove: 0.0, liveToResidue: 0.0, deadToResidue: 0.0);
                    Leaf.RemoveBiomass(liveToRemove: 0.8, deadToRemove: 0.0, liveToResidue: 0.0, deadToResidue: 0.0);
                    Stem.RemoveBiomass(liveToRemove: 0.8, deadToRemove: 0.0, liveToResidue: 0.0, deadToResidue: 0.0);
                    Grain.RemoveBiomass(liveToRemove: 1.0, deadToRemove: 0.0, liveToResidue: 0.0, deadToResidue: 0.0);
                    Root.RemoveBiomass(liveToRemove: 0.0, deadToRemove: 0.0, liveToResidue: 0.0, deadToResidue: 0.0);

                }
            //Set up  array of remove fractions to send with Cut method.  Each member in the array corresponds to an organ in the same order they are set up in.
            if (CutDate2 !="")
                if (DateUtilities.WithinDates(CutDate2,Clock.Today,CutDate2))
                {
                    toa.Remove();
                }

            
        }
    }
}
```
              Report DailyReport
              Report HarvestReport
              Report SupReport: same as Validation.Australia.Wellcamp2006.Wellcamp2006.Wellcamp2006Base.paddock.SupReport
              BiomassRemovalEvents OatCut: same as Validation.New Zealand.SLMACC.SLMACC_Canterbury_2021.Springston_Temp_Soil.Block.OatCut
        Experiment LRC2017
          Factors
            Permutation
              Factor Cv
                Specification=[SowAndCut].Script.Cultivar = Algerian, Genie, Aladdin, Comet, Taipan, Wizard, Bond
              Factor Management: Specification=[SowAndCut].Script.Management = 1 to 3 step 1
          Simulation LRC2017Base
            Clock: Start=2017-02-01; End=2017-12-31
            Summary summaryfile
            Weather: FileName=WeatherFiles/Toowoomba_AP.met; Latitude=-27.54; Tav=18.01; Amp=11.94
            SoilArbitrator Soil Arbitrator
            Zone paddock: Area=1; Slope=0; AspectAngle=0; Altitude=50
              Soil: same as Validation.Australia.Wellcamp2006.Wellcamp2006.Wellcamp2006Base.paddock.Soil
              Irrigation
              SurfaceOrganicMatter Surface Organic Matter: InitialResidueName=wheat_stubble; InitialResidueType=wheat; InitialResidueMass=0; InitialStandingFraction=0; InitialCPR=0; InitialCNR=80
              Fertiliser
              MicroClimate: a_interception=0; b_interception=1; c_interception=0; d_interception=0; SoilHeatFluxFraction=0.4; MinimumHeightDiffForNewLayer=0; NightInterceptionFraction=0.5; ReferenceHeight=2
              Plant Oats
              Folder Management
                Operations IrrigandFert
                  2017-02-01  [Irrigation].Apply(50);
                  2017-02-14  [Irrigation].Apply(25);
                  2017-03-21  [Fertiliser].Apply(35, "NO3N", 20);
                  2017-04-22  [Irrigation].Apply(25);
                  2017-05-09  [Irrigation].Apply(25);
                  2017-08-15  [Fertiliser].Apply(40, "NO3N", 10);
                  2017-05-24  [Irrigation].Apply(25);
                  2017-07-05  [Irrigation].Apply(30);
                  2017-07-25  [Irrigation].Apply(25);
                  2017-08-14  [Irrigation].Apply(25);
                  2017-08-29  [Irrigation].Apply(30);
                  2017-09-11  [Irrigation].Apply(25);
                  2017-09-25  [Irrigation].Apply(40);
                  2017-11-11  [Irrigation].Apply(25);
                Manager Harvesting: same as Validation.Australia.Gatton2007.Gatton2007early.Gatton2007.Gatton2007Base.paddock.Management.Harvesting
                Manager SowAndCut
                  Cultivar = Coolibah
                  Management = 0
```csharp
using Models.PMF.Interfaces;
using Newtonsoft.Json;
using System;
using System.Collections.Generic;
using Models.Core;
using Models.PMF;
using Models.PMF.Interfaces;
using System.Xml.Serialization;
using APSIM.Shared.Utilities;
using Models.Soils;
using Models.Management;

namespace Models
{
    [Serializable] 
    [System.Xml.Serialization.XmlInclude(typeof(Model))]
    public class Script : Model
    {
        [Link] Plant Oats;
        [Link] Clock Clock;
        [Link] BiomassRemovalEvents toa;     

        [Description("Cultivar")]
        public string Cultivar { get; set; }
        [Description("Management")]
        public int Management { get; set; }

        private string SowDate;
        private string CutDate1;
        private string CutDate2;



        
        [EventSubscribe("StartOfSimulation")]
        private void OnSimulationCommencing(object sender, EventArgs e)
        {
            
            if (Management == 1)
            {
            SowDate = "7-feb";
            CutDate1 = "";
            CutDate2 = "";
            }
            else if (Management == 2)
            {
            SowDate = "7-mar";
            CutDate1 = "";
            CutDate2 = "";
            }
            else if (Management == 3)
            {
            SowDate = "4-apr";
            CutDate1 = "";
            CutDate2 = "";
            }
            else if (Management == 4)
            {
            SowDate = "7-feb";
            CutDate1 = "4-apr";
            CutDate2 = "2-may";
            }
            else if (Management == 5)
            {
            SowDate = "7-mar";
            CutDate1 = "2-may";
            CutDate2 = "30-may";
            }
            else if (Management == 6)
            {
            SowDate = "4-apr";
            CutDate1 = "30-may";
            CutDate2 = "27-jun";
            }

        }
        
        [EventSubscribe("DoManagement")]
        private void OnDoManagement(object sender, EventArgs e)
        {

            if (DateUtilities.WithinDates(SowDate,Clock.Today,SowDate) )
            {
                Oats.Sow(population:95, cultivar: Cultivar, depth:40, rowSpacing:250);
            }

            //Set up  array of remove fractions to send with Cut method.  Each member in the array corresponds to an organ in the same order they are set up in.
            if (CutDate1 !="")
                if (DateUtilities.WithinDates(CutDate1,Clock.Today,CutDate1))
                {
                    //Remove.SetPhenologyStage = 2.0;
                    var Panicle = Oats.FindChild<IHasDamageableBiomass>("Panicle");
                    var Leaf = Oats.FindChild<IHasDamageableBiomass>("Leaf");
                    var Stem = Oats.FindChild<IHasDamageableBiomass>("Stem");
                    var Grain = Oats.FindChild<IHasDamageableBiomass>("Grain");
                    var Root = Oats.FindChild<IHasDamageableBiomass>("Root");
                    Panicle.RemoveBiomass(liveToRemove: 1.0, deadToRemove: 0.0, liveToResidue: 0.0, deadToResidue: 0.0);
                    Leaf.RemoveBiomass(liveToRemove: 0.8, deadToRemove: 0.0, liveToResidue: 0.0, deadToResidue: 0.0);
                    Stem.RemoveBiomass(liveToRemove: 0.8, deadToRemove: 0.0, liveToResidue: 0.0, deadToResidue: 0.0);
                    Grain.RemoveBiomass(liveToRemove: 1.0, deadToRemove: 0.0, liveToResidue: 0.0, deadToResidue: 0.0);
                    Root.RemoveBiomass(liveToRemove: 0.0, deadToRemove: 0.0, liveToResidue: 0.0, deadToResidue: 0.0);

                }
            //Set up  array of remove fractions to send with Cut method.  Each member in the array corresponds to an organ in the same order they are set up in.
            if (CutDate2 !="")
                if (DateUtilities.WithinDates(CutDate2,Clock.Today,CutDate2))
                {
                    toa.Remove();
                }

            
        }
    }
}
```
              Report DailyReport
              Report HarvestReport
              Report SupReport: same as Validation.Australia.Wellcamp2006.Wellcamp2006.Wellcamp2006Base.paddock.SupReport
              BiomassRemovalEvents OatCut: same as Validation.New Zealand.SLMACC.SLMACC_Canterbury_2021.Springston_Temp_Soil.Block.OatCut
  Folder Sensibility
    Experiment OatsExampleTarlee2007
      Factors: same as Validation.Australia.Tarlee2007.Tarlee2007.Factors
      Simulation Tarlee2007example
        Clock: Start=2007-05-03; End=2007-11-30
        Summary summaryfile
        Weather: FileName=WeatherFiles/MNHRZ_onsite_metdata07.met; Latitude=-34.27; Tav=17.67; Amp=16.12
        Zone paddock: Area=1; Slope=0; AspectAngle=0; Altitude=50
          Soil: same as Validation.Australia.Tarlee2007.Tarlee2007.Tarlee2007Base.paddock.Soil
          Irrigation
          SurfaceOrganicMatter Surface Organic Matter: InitialResidueName=wheat_stubble; InitialResidueType=wheat; InitialResidueMass=0; InitialStandingFraction=0; InitialCPR=0; InitialCNR=80
          Fertiliser
          MicroClimate: a_interception=0; b_interception=1; c_interception=0; d_interception=0; SoilHeatFluxFraction=0.4; MinimumHeightDiffForNewLayer=0; NightInterceptionFraction=0.5; ReferenceHeight=2
          Plant Oats
          Folder Management
            Operations Sowing
              2007-05-11  [Oats].Sow(population:200, cultivar:"Wintaroo", depth:30, rowSpacing:250);
            Operations Harvest
              2007-11-17  [Oats].Harvest()
            Operations
          Report DailyReport: EventNames=[Clock].DoReport
            VariableNames:
              [Clock].Today
              [Oats].Phenology.CurrentStageName
              [Weather].MeanT
              [Soil].Water.Volumetric
              [Soil].Water.MM
              sum([Soil].Water.MM) as ProfileWater
              [Oats].AboveGround.N
              [Oats].AboveGround.Wt
              [Oats].AboveGroundLive.N
              [Oats].AboveGroundLive.N*10 as UptakeNKgHA
              [Oats].AboveGroundLive.Wt
              [Oats].AboveGroundDead.N
              [Oats].AboveGroundDead.Wt
              [Oats].Arbitrator.DMDemand
              [Oats].Arbitrator.DM.TotalFixationSupply
              [Oats].Ear.N
              [Oats].Ear.NConc
              [Oats].Ear.Wt
              [Oats].Grain.N
              [Oats].Grain.NConc
              [Oats].Grain.Number
              [Oats].Grain.Size
              [Oats].Grain.Wt
              [Oats].Grain.Live.Wt
              [Oats].Leaf.AppearedCohortNo
              [Oats].Leaf.CoverDead
              [Oats].Leaf.CoverGreen
              [Oats].Leaf.CoverTotal
              [Oats].Leaf.Dead.N
              [Oats].Leaf.Dead.NConc
              [Oats].Leaf.Dead.Wt
              [Oats].Leaf.DeadCohortNo
              [Oats].Leaf.GreenCohortNo
              [Oats].Leaf.SenescingCohortNo
              [Oats].Leaf.ExpandedCohortNo
              [Oats].Leaf.Fn
              [Oats].Leaf.Fw
              [Oats].Leaf.Height
              [Oats].Leaf.InitialisedCohortNo
              [Oats].Leaf.LAI
              [Oats].Leaf.Live.N
              [Oats].Leaf.Live.NConc
              [Oats].Leaf.Live.Wt
              [Oats].Leaf.SpecificArea
              [Oats].Leaf.Transpiration
              [Oats].Phenology.CurrentPhase.Name
              [Oats].Phenology.CurrentStageName
              [Oats].Phenology.DailyVernalisation
              [Oats].Phenology.MeanTemp
              [Oats].Phenology.Photoperiod
              [Oats].Phenology.Stage
              [Oats].Phenology.ThermalTime
              [Oats].Phenology.ThermalTime
              [Oats].Phenology.Vrn1
              [Oats].Phenology.Vrn2
              [Oats].Phenology.Vrn4
              [Oats].Phenology.Zadok.Stage
              [Oats].Root.Depth
              [Oats].Root.N
              [Oats].Root.Wt
              [Oats].Root.NConc
              [Oats].Root.WaterUptake
              [Oats].Panicle.N
              [Oats].Panicle.NConc
              [Oats].Panicle.Wt
              [Oats].Panicle.Live.StorageWt
              [Oats].Stem.N
              [Oats].Stem.NConc
              [Oats].Stem.Wt
              [Oats].Stem.PercentWSC
              [Oats].Stem.Live.StorageWt
              [Oats].StemPlusPanicle.Wt
              [Oats].StemPlusPanicle.N
              [Oats].SowingData.Cultivar
              [Oats].Structure.HaunStageTerminalSpikelet
              [Oats].Structure.HaunStage
              [Oats].Structure.Height
              [Oats].Structure.LeafTipsAppeared
              [Oats].Structure.FinalLeafNumber
              [Oats].Structure.FinalLeafNumber.ValueToHold.PhotoPLeaves
              [Oats].Structure.MainStemPopn
              [Oats].Structure.MeanTillerGrowthRate
              [Oats].Structure.TotalStemPopn
              [Oats].Total.N
              [Oats].Total.Wt
              [SurfaceOrganicMatter].Wt
              ([Oats].Leaf.Transpiration + [Soil].SoilWater.Es + [MicroClimate].PrecipitationInterception) as ET
              sum([Soil].NO3.kgha) as TotalSoilNitrogen
              [Oats].Phenology.FlagLeafDAS
              [Oats].Phenology.FloweringDAS
              [Oats].Phenology.MaturityDAS
              [Oats].Phenology.PhotoPeriod
              [Oats].Phenology.PhotoPeriodDeltaFunction
              [Oats].Phenology.Stage
              [Oats].Phenology.SoilTemperatureFunction
              [Clock].Today.Year
          Report HarvestReport: EventNames=[Oats].Harvesting
            VariableNames:
              [Oats].Structure.LeafTipsAppeared
              [Oats].Structure.FinalLeafNumber
              [Oats].Phenology.FlagLeafDAS
              [Oats].Phenology.FloweringDAS
              [Oats].Phenology.MaturityDAS
              [Oats].Phenology.CurrentPhase.Name
              [Oats].Phenology.CurrentStageName
              [Oats].AboveGroundLive.Wt
              [Oats].AboveGroundLive.Wt
              [Oats].Grain.Wt
          Report SupReport: same as Validation.Australia.Tarlee2007.Tarlee2007.Tarlee2007Base.paddock.SupReport
        SoilArbitrator Soil Arbitrator
    Experiment SLMACC_Southland_2021_Pop
      DisabledSimNames=[SouthlandRate0Width75, SouthlandRate450Width75, SouthlandRate300Width75, SouthlandRate150Width75]
      Memo Experiment Description: same as Validation.New Zealand.SLMACC.SLMACC_Southland_2021Lys.Experiment Description
      Factors
        Permutation
          Factor Sow
            CompositeFactor Rate10: Specifications=[SowingHarvesting]
              Operations SowHar
                2021-08-28  [Oats].Sow(population: 10, cultivar: "Milton", depth: 20, rowSpacing: 150)
                2021-02-12  [Oats].Harvest()
            CompositeFactor Rate5: Specifications=[SowingHarvesting]
              Operations SowHar
                2021-08-28  [Oats].Sow(population: 5, cultivar: "Milton", depth: 20, rowSpacing: 150)
                2021-02-12  [Oats].Harvest()
            CompositeFactor Rate15: Specifications=[SowingHarvesting]
              Operations SowHar
                2021-08-28  [Oats].Sow(population: 15, cultivar: "Milton", depth: 20, rowSpacing: 150)
                2021-02-12  [Oats].Harvest()
            CompositeFactor Rate25: Specifications=[SowingHarvesting]
              Operations SowHar
                2021-08-28  [Oats].Sow(population: 25, cultivar: "Milton", depth: 20, rowSpacing: 150)
                2021-02-12  [Oats].Harvest()
            CompositeFactor Rate50: Specifications=[SowingHarvesting]
              Operations SowHar
                2021-08-28  [Oats].Sow(population: 50, cultivar: "Milton", depth: 20, rowSpacing: 150)
                2021-02-12  [Oats].Harvest()
            CompositeFactor Rate100: Specifications=[SowingHarvesting]
              Operations SowHar
                2021-08-28  [Oats].Sow(population: 100, cultivar: "Milton", depth: 20, rowSpacing: 150)
                2021-02-12  [Oats].Harvest()
            CompositeFactor Rate150: Specifications=[SowingHarvesting]
              Operations SowHar
                2021-08-28  [Oats].Sow(population: 150, cultivar: "Milton", depth: 20, rowSpacing: 150)
                2021-02-12  [Oats].Harvest()
            CompositeFactor Rate200: Specifications=[SowingHarvesting]
              Operations SowHar
                2021-08-28  [Oats].Sow(population: 200, cultivar: "Milton", depth: 20, rowSpacing: 150)
                2021-02-12  [Oats].Harvest()
            CompositeFactor Rate250: Specifications=[SowingHarvesting]
              Operations SowHar
                2021-08-28  [Oats].Sow(population: 250, cultivar: "Milton", depth: 20, rowSpacing: 150)
                2021-02-12  [Oats].Harvest()
            CompositeFactor Rate300: Specifications=[SowingHarvesting]
              Operations SowHar
                2021-08-28  [Oats].Sow(population: 300, cultivar: "Milton", depth: 20, rowSpacing: 150)
                2021-02-12  [Oats].Harvest()
      Simulation WaikiwiSoil
        Clock: Start=2021-07-18; End=2021-12-05
        Weather: FileName=WeatherFiles/Gore2.met; Latitude=-46.115; Tav=9.5; Amp=17
        Summary summaryfile
        SoilArbitrator Soil Arbitrator
        Zone Block: Area=1; Slope=0; AspectAngle=0; Altitude=50
          MicroClimate: a_interception=0; b_interception=1; c_interception=0; d_interception=0; SoilHeatFluxFraction=0.4; MinimumHeightDiffForNewLayer=0; NightInterceptionFraction=0.5; ReferenceHeight=2
          Irrigation
          Fertiliser
          SurfaceOrganicMatter: InitialResidueName=pasture; InitialResidueType=pasture; InitialResidueMass=1500; InitialStandingFraction=0.5; InitialCPR=0; InitialCNR=40
          Folder Manager folder: same as Validation.New Zealand.SLMACC.SLMACC_Southland_2021Lys.Waikiwi.Block.Manager folder
          Plant Oats: same as Validation.New Zealand.FRNL.WinterSowing2017.ABlock2017cc.Block.Oats
          Report Output: same as Validation.New Zealand.SLMACC.SLMACC_Southland_2020.WintonMakarewaSoil.Block.Output
          Report DailyReport: same as Validation.New Zealand.SLMACC.SLMACC_Southland_2020.WintonMakarewaSoil.Block.DailyReport
          Report DailyReportWater_n_MineralN: same as Validation.New Zealand.FRNL.WinterSowing2017.ABlock2017cc.Block.DailyReportWater_n_MineralN
          Report EnviroReport: same as Validation.New Zealand.FRNL.TempletonLysimeter2017.TempLys2017.Block.EnviroReport
          Soil Waikiwi30a1: SoilType=Typic Firm Brown Soils; LocalName=Waikiwi_30a1; Site=Woodlands; NearestTown=Invercargill; Country=New Zealand; Latitude=-41; Longitude=174
            DataSource=Profile descriptions provided by Smap based on the work done by Trevor Webb.
            Physical: same as Validation.New Zealand.SLMACC.SLMACC_Southland_2021Lys.Waikiwi.Block.Waikiwi30a1.Physical
            WaterBalance SoilWater: same as Validation.New Zealand.SLMACC.SLMACC_Southland_2021Lys.Waikiwi.Block.Waikiwi30a1.SoilWater
            Organic: FOMCNRatio=50; CarbonUnits=Total
              Thickness  Carbon  SoilCNRatio  FBiom  FInert  FOM
              50         2.6     11           0.145  0.211   350
              50         2.6     11           0.125  0.321   200
              50         2.6     11           0.11   0.416   150
              50         2.165   11           0.1    0.497   140
              50         1.517   11           0.06   0.567   110
              50         1.083   11           0.05   0.628   90
              50         0.792   11           0.06   0.679   70
              50         0.597   11           0.065  0.724   50
              50         0.466   11           0.06   0.762   25
              50         0.378   11           0.04   0.796   15
              250        0.254   11           0.015  0.87    5
              250        0.207   11           0.01   0.938   1
              500        0.2     11           0.008  0.98    0
              500        0.2     11           0.005  0.996   0
            Chemical: Thickness=[200, 125, 200, 1475]; PH=[7, 7, 7, 7]; PHUnits=Water
            Nutrient
            CERESSoilTemperature Temperature
            Water: Thickness=[200, 125, 200, 368.8, 368.8, 368.8, 368.8]; InitialValues=[0.423, 0.423, 0.405, 0.427, 0.427, 0.427, 0.327]; InitialPAWmm=324.456; RelativeTo=LL15; FilledFromTop=true
            LayerStructure: Thickness=[150, 150, 150, 150, 100]
            Solute NO3: Thickness=[200, 125, 200, 1475]; InitialValues=[0, 0, 0, 0]; InitialValuesUnits=ppm; WaterTableConcentration=0; D0=0; DepthConstant=0; MaxDepthSoluteAccessible=0; RunoffEffectivenessAtMovingSolute=0; MaxEffectiveRunoff=0
            Solute NH4: Thickness=[1800]; InitialValues=[1]; InitialValuesUnits=ppm; WaterTableConcentration=0; D0=0; DepthConstant=0; MaxDepthSoluteAccessible=0; RunoffEffectivenessAtMovingSolute=0; MaxEffectiveRunoff=0
            Solute Urea: Thickness=[1800]; InitialValues=[0]; InitialValuesUnits=ppm; WaterTableConcentration=0; D0=0; DepthConstant=0; MaxDepthSoluteAccessible=0; RunoffEffectivenessAtMovingSolute=0; MaxEffectiveRunoff=0
            OutputLayers OutputNutrientLayers: Thickness=[150, 150, 300, 300, 300, 300, 300]
            OutputLayers OutputWaterLayers: Thickness=[300, 300, 300, 300, 300, 300]
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