Simulations: Version=220
  DataStore
    ExcelInput ExcelMultiInput: SheetNames=[Observed]
      FileNames=[data/Lincoln2021.xlsx, data/Lincoln2023.xlsx, data/Lincoln2024.xlsx]
  Folder Sensibility
    Folder CO2AndTranspirationEfficiency
      Experiment CO2TE
        Memo
          This test examines the impact of a doubling of CO2 from historical (350ppm) on Transpiration Efficiency.  [#Reyenga1999] suggest an increase of approximately 37% in Transpiration Efficiency over this range in CO2 concentration.
          In this test, a series of wheat crops are simulated for Dalby, Queensland, Australia.  Nitrogen limitation is removed.  The slope of plots of biomass production vs crop water use is used to quantify a gross seasonal TE.  The change in slope should approximate the response suggested by [#Reyenga1999].
        Factors
          Factor CO2: Specification=[SetCO2]
            Manager 350ppm
              CO2 = 350
```csharp
using Models.Soils;
using System.Xml.Serialization;
using Models;
using Models.PMF;
using System.Text;
using System.Collections.Generic;
using APSIM.Shared.Utilities;
using Models.Core;
using System;
using Models.Climate;

namespace Models
{
    [Serializable] 
    [System.Xml.Serialization.XmlInclude(typeof(Model))]
    public class Script : Model
    {
        [Link] Weather Met;
        [Link] Clock Clock;
    
        [Description("CO2 conc")]
        public double CO2 { get; set; }
    
        
        [EventSubscribe("PreparingNewWeatherData")]
        private void OnPreparingNewWeatherData(object sender, EventArgs e)
        {
            Met.CO2 = CO2;        
        }
    }
}
```
            Manager 700ppm
              CO2 = 700
              script: same as in Sensibility.CO2AndTranspirationEfficiency.CO2TE.Factors.CO2.350ppm
        Simulation CO2TEBaseSimulation
          Clock: Start=1990-01-01; End=2000-12-31
          Summary summaryfile
          Weather: FileName=%root%/Examples/WeatherFiles/AU_Dalby.met
          SoilArbitrator Soil Arbitrator
          Zone Field: Area=1; Slope=0; AspectAngle=0; Altitude=50
            Fertiliser
            SurfaceOrganicMatter: InitialResidueName=wheat_stubble; InitialResidueType=wheat; InitialResidueMass=500; InitialStandingFraction=0; InitialCPR=0; InitialCNR=100
            Plant Wheat
            MicroClimate: a_interception=0; b_interception=1; c_interception=0; d_interception=0; SoilHeatFluxFraction=0.4; MinimumHeightDiffForNewLayer=0; NightInterceptionFraction=0.5; ReferenceHeight=2
            Soil: ASCOrder=Vertosol; ASCSubOrder=Black; SoilType=Clay; Site=Norwin; NearestTown=Norwin; Region=Darling Downs and Granite Belt; State=Queensland; Country=Australia; NaturalVegetation=Qld. Bluegrass, possible Qld. Blue gum; ApsoilNumber=900; Latitude=-27.5818; Longitude=151.3202; LocationAccuracy=+/- 20m
              DataSource=CSIRO Sustainable Ecosystems, Toowoomba; Characteriesd as part of the GRDC funded project"Doing it better, doing it smarter, managing soil water in Australian agriculture' 2011
              Comments=OC, CLL for all crops estimated-based on Bongeen Mywybilla Soil No1
              Physical
                Thickness  BD      AirDry  LL15    DUL     SAT     KS
                150        1.0106  0.1303  0.2605  0.521   0.5887  20
                150        1.0715  0.1987  0.2484  0.4967  0.5657  20
                300        1.0939  0.28    0.28    0.4884  0.5572  20
                300        1.1586  0.28    0.28    0.4803  0.5328  20
                300        1.173   0.28    0.28    0.4716  0.5274  20
                300        1.1629  0.28    0.28    0.4571  0.5312  20
                300        1.1875  0.28    0.28    0.4523  0.5219  20
                SoilCrop WheatSoil: LL=[0.261, 0.248, 0.28, 0.306, 0.36, 0.392, 0.446]; KL=[0.06, 0.06, 0.06, 0.04, 0.04, 0.02, 0.01]; XF=[1, 1, 1, 1, 1, 1, 1]
              WaterBalance SoilWater: SummerDate=1-Nov; SummerU=5; SummerCona=5; WinterDate=1-Apr; WinterU=5; WinterCona=5; DiffusConst=40; DiffusSlope=16; Salb=0.12; CN2Bare=73; CNRed=20; CNCov=0.8; PSIDul=-100; Thickness=[150, 150, 300, 300, 300, 300, 300]; SWCON=[0.3, 0.3, 0.3, 0.3, 0.3, 0.3, 0.3]
              Organic: FOMCNRatio=40; CarbonUnits=Total
                Thickness  Carbon  SoilCNRatio  FBiom  FInert  FOM
                150        1.2     12           0.04   0.4     347.129
                150        0.96    12           0.02   0.6     270.344
                300        0.6     12           0.02   0.8     163.972
                300        0.3     12           0.02   1       99.4541
                300        0.18    12           0.01   1       60.322
                300        0.12    12           0.01   1       36.5871
                300        0.12    12           0.01   1       22.1912
              Chemical: Thickness=[150, 150, 300, 300, 300, 300, 300]; PH=[8, 8, 8, 8, 8, 8, 8]; PHUnits=Water
              Water: Thickness=[150, 150, 300, 300, 300, 300, 300]; InitialValues=[0.521, 0.4967, 0.4884, 0.4803, 0.4716, 0.4571, 0.4523]; FilledFromTop=false
              Nutrient
              Solute NO3: Thickness=[150, 150, 300, 300, 300, 300, 300]; InitialValues=[1, 1, 1, 1, 1, 1, 1]; InitialValuesUnits=ppm; WaterTableConcentration=0; D0=0; DepthConstant=0; MaxDepthSoluteAccessible=0; RunoffEffectivenessAtMovingSolute=0; MaxEffectiveRunoff=0
              Solute NH4: Thickness=[150, 150, 300, 300, 300, 300, 300]; InitialValues=[0.1, 0.1, 0.1, 0.1, 0.1, 0.1, 0.1]; InitialValuesUnits=ppm; WaterTableConcentration=0; D0=0; DepthConstant=0; MaxDepthSoluteAccessible=0; RunoffEffectivenessAtMovingSolute=0; MaxEffectiveRunoff=0
              Solute Urea: Thickness=[150, 150, 300, 300, 300, 300, 300]; InitialValues=[0, 0, 0, 0, 0, 0, 0]; InitialValuesUnits=kg/ha; WaterTableConcentration=0; D0=0; DepthConstant=0; MaxDepthSoluteAccessible=0; RunoffEffectivenessAtMovingSolute=0; MaxEffectiveRunoff=0
              SoilTemperature Temperature: InteractionsPerDay=8
            Report SensibilityReport: EventNames=[Wheat].Harvesting
              VariableNames:
                [Clock].Today.Date
                [Wheat].Grain.Wt
                [Wheat].AboveGround.Wt
                Sum of [Wheat].Leaf.Transpiration from [Wheat].Sowing to [Wheat].Harvesting as CropET
            Manager SetCO2
              CO2 = 0
```csharp
using APSIM.Core;
using Models.Climate;
using System;
using Models.Core;
using APSIM.Shared.Utilities;
using System.Collections.Generic;
using System.Text;
using Models.PMF;
using Models;
using System.Xml.Serialization;
using Models.Soils;

namespace Models
{
    [Serializable] 
    [System.Xml.Serialization.XmlInclude(typeof(Model))]
    public class Script : Model, IStructureDependency
    {
        [Link] private Weather Met;
        [Link] private Clock Clock;
        [Link] private Zone zone;
        public IStructure Structure { private get; set; }
    
        [Description("CO2 conc")]
        public double CO2 { get; set; }
    
        

        

        [EventSubscribe("PreparingNewWeatherData")]
        private void OnPreparingNewWeatherData(object sender, EventArgs e)
        {
            Structure.Set("Weather.CO2", CO2, relativeTo: zone);
        }
    }
}
```
            Manager SowingRule
              StartDate = 1-may
              EndDate = 10-jul
              MinESW = 100
              MinRain = 25
              RainDays = 7
              CultivarName = Hartog
              SowingDepth = 30
              RowSpacing = 250
              Population = 120
```csharp
using APSIM.Numerics;
using Models.Climate;
using APSIM.Shared.Utilities;
using Models.Utilities;
using Models.Soils.Nutrients;
using Models.Soils;
using Models.PMF;
using Models.Core;
using System;
using Models.Interfaces;

namespace Models
{
    [Serializable]
    public class Script : Model
    {
        [Link] private Clock Clock;
        [Link] private Fertiliser Fertiliser;
        [Link] private Summary Summary;
        [Link] private Plant Wheat;
        [Link] private Soil Soil;
        private Accumulator accumulatedRain;
        [Link]
        private ISoilWater waterBalance;
        
        [Description("Start of sowing window (d-mmm)")]
        public string StartDate { get; set;}
        [Description("End of sowing window (d-mmm)")]
        public string EndDate { get; set;}
        [Description("Minimum extractable soil water for sowing (mm)")]
        public double MinESW { get; set;}
        [Description("Accumulated rainfall required for sowing (mm)")]
        public double MinRain { get; set;}
        [Description("Duration of rainfall accumulation (d)")]
        public int RainDays { get; set;}
        [Description("Cultivar to be sown")]
        [Display(Type=DisplayType.CultivarName)]
        public string CultivarName { get; set;}
        [Description("Sowing depth (mm)")]
        public double SowingDepth { get; set;}        
        [Description("Row spacing (mm)")]
        public double RowSpacing { get; set;}    
        [Description("Plant population (/m2)")]
        public double Population { get; set;}    
        
        
        [EventSubscribe("StartOfSimulation")]
        private void OnSimulationCommencing(object sender, EventArgs e)
        {
            accumulatedRain = new Accumulator(this, "[Weather].Rain", RainDays);
        }
        

        [EventSubscribe("DoManagement")]
        private void OnDoManagement(object sender, EventArgs e)
        {        
            accumulatedRain.Update();
            
            if ((DateUtilities.WithinDates(StartDate,Clock.Today,EndDate) &&
                !Wheat.IsAlive &&
                MathUtilities.Sum(waterBalance.ESW) > MinESW &&
                accumulatedRain.Sum > MinRain) || (DateUtilities.CompareDates(EndDate, Clock.Today)) == 0)
            {
               Wheat.Sow(population:Population, cultivar:CultivarName, depth:SowingDepth, rowSpacing:RowSpacing);    
            }
        
        }
        
    }
}
```
            Manager Harvest
```csharp
using Models.Soils.Nutrients;
using System;
using Models.Core;
using Models.PMF;
using Models.Soils;
using Models.Soils.Nutrients;
using Models.Utilities;
using APSIM.Shared.Utilities;

namespace Models
{
    [Serializable]
    public class Script : Model
    {
        [Link] Plant Wheat;

        [EventSubscribe("DoManagement")]
        private void OnDoManagement(object sender, EventArgs e)
        {
            if (Wheat.IsReadyForHarvesting)
            {
               Wheat.Harvest();
               Wheat.EndCrop();    
            }
        
        }
        
    }
}
```
            Manager SowingFertiliser
              Amount = 300
              CropName = wheat
```csharp
using Models.Soils;
using System;
using Models.Core;
using Models.PMF;
namespace Models
{
    [Serializable]
    public class Script : Model
    {
        [Link] Clock Clock;
        [Link] Fertiliser Fertiliser;
        [Link] Summary Summary;
        
        
        [Description("Amount of fertiliser to be applied (kg/ha)")]
        public double Amount { get; set;}
        
        [Description("Crop to be fertilised")]
        public string CropName { get; set;}
        
        
        

        [EventSubscribe("Sowing")]
        private void OnSowing(object sender, EventArgs e)
        {
            Model crop = sender as Model;
            if (crop.Name.ToLower()==CropName.ToLower())
                Fertiliser.Apply(amount: Amount, type: "NO3N");
        }
        
    }
}
```
            Report HarvestReport
            Report ObsAnalysisReport: EventNames=[Clock].DoReport
              VariableNames:
                [Clock].Today
                [Clock].Today.DayOfYear
                [Simulation].Name
                [IWeather].MinT
                [IWeather].MaxT
                [IWeather].MeanT
                [IWeather].Radn
                [IWeather].Rain
                [IWeather].VPD
                [IWeather].PanEvap
                [IWeather].Wind
                [IWeather].CO2
                [IWeather].Latitude
                [IWeather].Longitude
                [Wheat].DaysAfterSowing
                [Wheat].Phenology.AccumulatedTT
                [Wheat].Phenology.CurrentPhase.Name
                [Wheat].Phenology.CurrentStageName
                [Wheat].Phenology.Photoperiod
                [Wheat].Phenology.PTQ
                [Wheat].Phenology.Stage
                [Wheat].Phenology.ThermalTime
                [Wheat].Phenology.Zadok.Stage
                [Wheat].SowingData.Cultivar
                [Wheat].Population
                [TT00]
                [TT01]
                [TT02]
                [TT03]
                [TT04]
                [TT05]
                [TT06]
                [TT07]
            AccumulateFunctionGeneral TT00: AccumulateToday=false; NameOfPlantToLink=Wheat; StartStageName=Sowing; EndStageName=HarvestRipe; FractionRemovedOnStage=0; FractionRemovedOnEvent=0; FractionRemovedOnDate=0; FractionRemovedOnCut=0; FractionRemovedOnHarvest=0; FractionRemovedOnGraze=0; FractionRemovedOnPrune=0
              SubDailyInterpolation TTdaily: agregationMethod=1
                WangEngelTempFunction Response: MinTemp=0; OptTemp=26; MaxTemp=37; RefTemp=0; Beta=1; MaximumTemperatureWeighting=0
                HourlySinPpAdjusted InterpolationMethod
            AccumulateFunctionGeneral TT01: AccumulateToday=false; NameOfPlantToLink=Wheat; StartStageName=Sowing; EndStageName=HarvestRipe; FractionRemovedOnStage=0; FractionRemovedOnEvent=0; FractionRemovedOnDate=0; FractionRemovedOnCut=0; FractionRemovedOnHarvest=0; FractionRemovedOnGraze=0; FractionRemovedOnPrune=0
              SubDailyInterpolation TTdaily: agregationMethod=1
                WangEngelTempFunction Response: MinTemp=1; OptTemp=26; MaxTemp=37; RefTemp=0; Beta=1; MaximumTemperatureWeighting=0
                HourlySinPpAdjusted InterpolationMethod
            AccumulateFunctionGeneral TT02: AccumulateToday=false; NameOfPlantToLink=Wheat; StartStageName=Sowing; EndStageName=HarvestRipe; FractionRemovedOnStage=0; FractionRemovedOnEvent=0; FractionRemovedOnDate=0; FractionRemovedOnCut=0; FractionRemovedOnHarvest=0; FractionRemovedOnGraze=0; FractionRemovedOnPrune=0
              SubDailyInterpolation TTdaily: agregationMethod=1
                WangEngelTempFunction Response: MinTemp=2; OptTemp=26; MaxTemp=37; RefTemp=0; Beta=1; MaximumTemperatureWeighting=0
                HourlySinPpAdjusted InterpolationMethod
            AccumulateFunctionGeneral TT03: AccumulateToday=false; NameOfPlantToLink=Wheat; StartStageName=Sowing; EndStageName=HarvestRipe; FractionRemovedOnStage=0; FractionRemovedOnEvent=0; FractionRemovedOnDate=0; FractionRemovedOnCut=0; FractionRemovedOnHarvest=0; FractionRemovedOnGraze=0; FractionRemovedOnPrune=0
              SubDailyInterpolation TTdaily: agregationMethod=1
                WangEngelTempFunction Response: MinTemp=3; OptTemp=26; MaxTemp=37; RefTemp=0; Beta=1; MaximumTemperatureWeighting=0
                HourlySinPpAdjusted InterpolationMethod
            AccumulateFunctionGeneral TT04: AccumulateToday=false; NameOfPlantToLink=Wheat; StartStageName=Sowing; EndStageName=HarvestRipe; FractionRemovedOnStage=0; FractionRemovedOnEvent=0; FractionRemovedOnDate=0; FractionRemovedOnCut=0; FractionRemovedOnHarvest=0; FractionRemovedOnGraze=0; FractionRemovedOnPrune=0
              SubDailyInterpolation TTdaily: agregationMethod=1
                WangEngelTempFunction Response: MinTemp=4; OptTemp=26; MaxTemp=37; RefTemp=0; Beta=1; MaximumTemperatureWeighting=0
                HourlySinPpAdjusted InterpolationMethod
            AccumulateFunctionGeneral TT05: AccumulateToday=false; NameOfPlantToLink=Wheat; StartStageName=Sowing; EndStageName=HarvestRipe; FractionRemovedOnStage=0; FractionRemovedOnEvent=0; FractionRemovedOnDate=0; FractionRemovedOnCut=0; FractionRemovedOnHarvest=0; FractionRemovedOnGraze=0; FractionRemovedOnPrune=0
              SubDailyInterpolation TTdaily: agregationMethod=1
                WangEngelTempFunction Response: MinTemp=5; OptTemp=26; MaxTemp=37; RefTemp=0; Beta=1; MaximumTemperatureWeighting=0
                HourlySinPpAdjusted InterpolationMethod
            AccumulateFunctionGeneral TT06: AccumulateToday=false; NameOfPlantToLink=Wheat; StartStageName=Sowing; EndStageName=HarvestRipe; FractionRemovedOnStage=0; FractionRemovedOnEvent=0; FractionRemovedOnDate=0; FractionRemovedOnCut=0; FractionRemovedOnHarvest=0; FractionRemovedOnGraze=0; FractionRemovedOnPrune=0
              SubDailyInterpolation TTdaily: agregationMethod=1
                WangEngelTempFunction Response: MinTemp=6; OptTemp=26; MaxTemp=37; RefTemp=0; Beta=1; MaximumTemperatureWeighting=0
                HourlySinPpAdjusted InterpolationMethod
            AccumulateFunctionGeneral TT07: AccumulateToday=false; NameOfPlantToLink=Wheat; StartStageName=Sowing; EndStageName=HarvestRipe; FractionRemovedOnStage=0; FractionRemovedOnEvent=0; FractionRemovedOnDate=0; FractionRemovedOnCut=0; FractionRemovedOnHarvest=0; FractionRemovedOnGraze=0; FractionRemovedOnPrune=0
              SubDailyInterpolation TTdaily: agregationMethod=1
                WangEngelTempFunction Response: MinTemp=7; OptTemp=26; MaxTemp=37; RefTemp=0; Beta=1; MaximumTemperatureWeighting=0
                HourlySinPpAdjusted InterpolationMethod
          Manager LocationInfo
            Country =
            State =
            Region =
```csharp
using Models.Soils;
using System;
using Models.Core;
using Models.PMF;
using APSIM.Shared.Utilities;

namespace Models
{
    [Serializable]
    public class Script : Model
    {
        [Link] Clock Clock;
        [Link] Fertiliser Fertiliser;
        [Link] Summary Summary;
        
        [Description("Country")]
        public string Country { get; set; }

        [Description("State")]
        public string State { get; set; }

        [Description("Region")]
        public string Region { get; set; }

    }
}
```
          Manager CheckResults
```csharp
using APSIM.Core;
using Models.Factorial;
using Models.Core.Run;
using Models.Core;
using Models.Storage;
using System.Data;
using System.IO;
using System.Collections.Generic;
using System;

namespace Models
{
    [Serializable]
    public class Script : Model, IStructureDependency, IPostSimulationTool
    {
        [Link] private DataStore dataStore;
        
        public IStructure Structure { private get; set; }
        
        //The two values of the factor for this experiment
        private string[] co2 = {"350ppm", "700ppm"};
        
        //The test variable
        private double[] avgYield = {0.0, 0.0};

         
         //number of rows that should be in the table
         private int requiredRows = 11;
        
        public void Run()
        {
            Experiment exp =   Structure.FindParent<Experiment>(recurse: true);
            for(int i = 0; i < co2.Length; i++)
            {
                string filter = "Experiment == \"" + exp.Name + "\" AND CO2 == \"" + co2[i] + "\"";
                DataTable dt = dataStore.Reader.GetData("SensibilityReport", filter: filter);
                
                if (dt.Rows.Count != requiredRows)
                    throw new Exception("Sensibility test failed: CO2=" + co2[i] + ". Expected " + requiredRows.ToString() + " rows in table, but " + dt.Rows.Count.ToString() + " were found." );        
                
                  foreach (DataRow row in dt.Rows)
                    avgYield[i] += (double)row["Wheat.Grain.Wt"];

                avgYield[i] = avgYield[i] / dt.Rows.Count;
                    
            }                
            
            if (avgYield[1] < avgYield[0])
                throw new Exception("Sensibility test failed because average wheat yield decreased with increasing atmospheric CO2" );
            
        }
    }
}
```
    Folder CO2AndTemperatureInteractions
      Experiment CO2XTemperature
        Memo
          This test examines the impact and interactions between increasing temperature and increasing CO2.  Constant weather conditions are applied with daily maximum temperature increasing between treatments (20C to 35C).  CO2 is constant and but doubles between treatments (350ppm to 700ppm).
        Factors
          Permutation
            Factor CO2: Specification=[SetCO2]
              Manager 350ppm
                CO2 = 350
```csharp
using Models.Soils;
using System.Xml.Serialization;
using Models;
using Models.PMF;
using System.Text;
using System.Collections.Generic;
using APSIM.Shared.Utilities;
using Models.Core;
using System;
using Models.Climate;
using Models.Interfaces;

namespace Models
{
    [Serializable] 
    [System.Xml.Serialization.XmlInclude(typeof(Model))]
    public class Script : Model
    {
        [Link] IWeather Weather;
        [Link] Clock Clock;
    
        [Description("CO2 conc")]
        public double CO2 { get; set; }
    
        
        [EventSubscribe("PreparingNewWeatherData")]
        private void OnPreparingNewWeatherData(object sender, EventArgs e)
        {
            Weather.CO2 = CO2;        
        }
    }
}
```
              Manager 420ppm
                CO2 = 420
                script: same as in Sensibility.CO2AndTemperatureInteractions.CO2XTemperature.Factors.Permutation.CO2.350ppm
              Manager 550ppm
                CO2 = 550
                script: same as in Sensibility.CO2AndTemperatureInteractions.CO2XTemperature.Factors.Permutation.CO2.350ppm
              Manager 700ppm
                CO2 = 700
                script: same as in Sensibility.CO2AndTemperatureInteractions.CO2XTemperature.Factors.Permutation.CO2.350ppm
            Factor MaxT: Specification=[Weather].MaxT=20, 25,30,35
        Simulation CO2XTemperatureBase
          Clock: Start=1990-01-01; End=1990-12-31
          ControlledEnvironment Weather: MaxT=25; MinT=10; Rain=0; Radn=20; PanEvap=6; VP=22; Wind=3; CO2=350; AirPressure=1010; DiffuseFraction=0; Latitude=-27; Longitude=0; DayLength=10; SunRise=7; TempLag=0
          Summary summaryfile
          SoilArbitrator Soil Arbitrator
          MicroClimate: a_interception=0; b_interception=1; c_interception=0; d_interception=0; SoilHeatFluxFraction=0.4; MinimumHeightDiffForNewLayer=0; NightInterceptionFraction=0.5; ReferenceHeight=2
          Zone Field: Area=1; Slope=0; AspectAngle=0; Altitude=50
            Fertiliser
            SurfaceOrganicMatter: InitialResidueName=wheat_stubble; InitialResidueType=wheat; InitialResidueMass=500; InitialStandingFraction=0; InitialCPR=0; InitialCNR=100
            Soil: same as Sensibility.CO2AndTranspirationEfficiency.CO2TE.CO2TEBaseSimulation.Field.Soil
            Report SensibilityReport: EventNames=[Wheat].Harvesting
              VariableNames:
                [Clock].Today.Date
                [Weather].CO2
                [Weather].MaxT
                [Wheat].Grain.Wt
                [Wheat].AboveGround.Wt
                Sum of [Wheat].Leaf.Transpiration from [Wheat].Sowing to [Wheat].Harvesting as CropET
                [Wheat].Phenology.MaturityDAS
                ([Grain].Wt/CropET) as WUE
            Operations CropManagement
              1990-05-01  [Wheat].Sow(population:100, cultivar:"Hartog", depth:30, rowSpacing:250);
              1990-05-01  [Fertiliser].Apply(amount: 100, type: "UreaN");
              1990-05-01  [Irrigation].Apply(amount: 50);
              1990-06-01  [Irrigation].Apply(amount: 50);
              1990-07-01  [Fertiliser].Apply(amount: 100, type: "UreaN");
              1990-07-01  [Irrigation].Apply(amount: 50);
              1990-07-07  [Irrigation].Apply(amount: 50);
              1990-07-14  [Irrigation].Apply(amount: 50);
              1990-07-21  [Irrigation].Apply(amount: 50);
              1990-08-01  [Irrigation].Apply(amount: 50);
              1990-08-07  [Irrigation].Apply(amount: 50);
              1990-08-14  [Irrigation].Apply(amount: 50);
              1990-08-21  [Irrigation].Apply(amount: 50);
              1990-09-01  [Fertiliser].Apply(amount: 100, type: "UreaN");
              1990-09-01  [Irrigation].Apply(amount: 50);
              1990-10-01  [Irrigation].Apply(amount: 50);
            Manager SetCO2
              CO2 = 0
```csharp
using APSIM.Core;
using Models.Interfaces;
using Models.Climate;
using System;
using Models.Core;
using APSIM.Shared.Utilities;
using System.Collections.Generic;
using System.Text;
using Models.PMF;
using Models;
using System.Xml.Serialization;
using Models.Soils;

namespace Models
{
    [Serializable] 
    [System.Xml.Serialization.XmlInclude(typeof(Model))]
    public class Script : Model, IStructureDependency
    {
        [Link] private IWeather Weather;
        [Link] private Clock Clock;
        [Link] private Zone zone;
        public IStructure Structure { private get; set; }
    
        [Description("CO2 conc")]
        public double CO2 { get; set; }
    
        

        

        [EventSubscribe("PreparingNewWeatherData")]
        private void OnPreparingNewWeatherData(object sender, EventArgs e)
        {
            Structure.Set("Weather.CO2", CO2, relativeTo: zone);
        }
    }
}
```
            Manager Harvesting
            Manager SowingFertiliser: same as Sensibility.CO2AndTranspirationEfficiency.CO2TE.CO2TEBaseSimulation.Field.SowingFertiliser
            Plant Wheat
            Irrigation
            Report ObsAnalysisReport: same as Sensibility.CO2AndTranspirationEfficiency.CO2TE.CO2TEBaseSimulation.Field.ObsAnalysisReport
            AccumulateFunctionGeneral TT00: same as Sensibility.CO2AndTranspirationEfficiency.CO2TE.CO2TEBaseSimulation.Field.TT00
            AccumulateFunctionGeneral TT01: same as Sensibility.CO2AndTranspirationEfficiency.CO2TE.CO2TEBaseSimulation.Field.TT01
            AccumulateFunctionGeneral TT02: same as Sensibility.CO2AndTranspirationEfficiency.CO2TE.CO2TEBaseSimulation.Field.TT02
            AccumulateFunctionGeneral TT03: same as Sensibility.CO2AndTranspirationEfficiency.CO2TE.CO2TEBaseSimulation.Field.TT03
            AccumulateFunctionGeneral TT04: same as Sensibility.CO2AndTranspirationEfficiency.CO2TE.CO2TEBaseSimulation.Field.TT04
            AccumulateFunctionGeneral TT05: same as Sensibility.CO2AndTranspirationEfficiency.CO2TE.CO2TEBaseSimulation.Field.TT05
            AccumulateFunctionGeneral TT06: same as Sensibility.CO2AndTranspirationEfficiency.CO2TE.CO2TEBaseSimulation.Field.TT06
            AccumulateFunctionGeneral TT07: same as Sensibility.CO2AndTranspirationEfficiency.CO2TE.CO2TEBaseSimulation.Field.TT07
          Manager LocationInfo: same as Sensibility.CO2AndTranspirationEfficiency.CO2TE.CO2TEBaseSimulation.LocationInfo
    Folder ProteinAccumulation
      Experiment ProteinAccumulation
        Memo
          This sensibility test investigates the relationship between grain protein and yield at harvest for two N levels (40 and 120 kg/ha) for 100 years at Dalby.
        Factors
          Factor NRate: Specification=[Fertilise at sowing].Script.Amount=40,120
        Simulation ProteinAccumulationBase
          Clock: Start=1900-01-01; End=2000-12-31
          Summary
          Weather: FileName=%root%/Examples/WeatherFiles/AU_Dalby.met
          SoilArbitrator
          MicroClimate: a_interception=0; b_interception=1; c_interception=0; d_interception=0; SoilHeatFluxFraction=0.4; MinimumHeightDiffForNewLayer=0; NightInterceptionFraction=0.5; ReferenceHeight=2
          Zone Field: Area=1; Slope=0; AspectAngle=0; Altitude=50
            Report ProteinReport: EventNames=[Wheat].Harvesting
              VariableNames:
                [Clock].Today
                [Wheat].Grain.Wt
                [Wheat].Grain.Protein
                [Wheat].Grain.Size
                [Wheat].Grain.Number
                [Wheat].Grain.N
                [Wheat].Grain.NConc
            Report ProteinDailyReport: EventNames=[Clock].DoReport
              VariableNames:
                [Clock].Today
                [Wheat].Grain.Wt
                [Wheat].Grain.Protein
                [Wheat].Grain.Size
                [Wheat].Grain.Number
                [Wheat].Grain.N
                [Wheat].Grain.NConc
            Fertiliser
            Soil: ASCOrder=Vertosol; ASCSubOrder=Black; SoilType=Clay; Site=Norwin; NearestTown=Norwin; Region=Darling Downs and Granite Belt; State=Queensland; Country=Australia; NaturalVegetation=Qld. Bluegrass, possible Qld. Blue gum; ApsoilNumber=900; Latitude=-27.581836; Longitude=151.320206; LocationAccuracy=+/- 20m; YearOfSampling=0
              DataSource=CSIRO Sustainable Ecosystems, Toowoomba; Characteriesd as part of the GRDC funded project"Doing it better, doing it smarter, managing soil water in Australian agriculture' 2011
              Comments=Clay - OC, CLL for all crops estimated-based on Bongeen Mywybilla Soil No1
              Physical
                Thickness  BD       AirDry    LL15      DUL       SAT       KS
                150        1.01056  0.13025   0.2605    0.521     0.588655  20
                150        1.07146  0.198689  0.248362  0.496723  0.565677  20
                300        1.09394  0.28      0.28      0.488438  0.557193  20
                300        1.15861  0.28      0.28      0.480297  0.532787  20
                300        1.17301  0.28      0.28      0.471584  0.527354  20
                300        1.16287  0.28      0.28      0.457071  0.53118   20
                300        1.1875   0.28      0.28      0.452332  0.521888  20
                SoilCrop WheatSoil: LL=[0.261, 0.248, 0.28, 0.306, 0.36, 0.392, 0.446]; KL=[0.06, 0.06, 0.06, 0.04, 0.04, 0.02, 0.01]; XF=[1, 1, 1, 1, 1, 1, 1]
              WaterBalance SoilWater: same as Sensibility.CO2AndTranspirationEfficiency.CO2TE.CO2TEBaseSimulation.Field.Soil.SoilWater
              Organic: same as Sensibility.CO2AndTranspirationEfficiency.CO2TE.CO2TEBaseSimulation.Field.Soil.Organic
              Chemical: Thickness=[150, 150, 300, 300, 300, 300, 300]; PH=[8, 8, 8, 8, 8, 8, 8]; PHUnits=Water
              Water: Thickness=[150, 150, 300, 300, 300, 300, 300]; FilledFromTop=false
                InitialValues=[0.521, 0.496723, 0.488438, 0.480297, 0.471584, 0.457071, 0.452332]
              Nutrient
              Solute NO3: same as Sensibility.CO2AndTranspirationEfficiency.CO2TE.CO2TEBaseSimulation.Field.Soil.NO3
              Solute NH4: same as Sensibility.CO2AndTranspirationEfficiency.CO2TE.CO2TEBaseSimulation.Field.Soil.NH4
              Solute Urea: same as Sensibility.CO2AndTranspirationEfficiency.CO2TE.CO2TEBaseSimulation.Field.Soil.Urea
              SoilTemperature Temperature: InteractionsPerDay=8
            SurfaceOrganicMatter: InitialResidueName=wheat_stubble; InitialResidueType=wheat; InitialResidueMass=500; InitialStandingFraction=0; InitialCPR=0; InitialCNR=100
            Plant Wheat
            Manager Sow using a variable rule
              Crop = [Wheat]
              StartDate = 1-may
              EndDate = 10-jul
              MinESW = 100
              MinRain = 25
              RainDays = 7
              CultivarName = Hartog
              SowingDepth = 30
              RowSpacing = 250
              Population = 120
```csharp
using APSIM.Numerics;
using Models.Climate;
using System.Linq;
using System;
using Models.Core;
using Models.PMF;
using Models.Soils;
using Models.Utilities;
using APSIM.Shared.Utilities;
using Models.Interfaces;

namespace Models
{
    [Serializable]
    public class Script : Model
    {
        [Link] private Clock Clock;
        [Link] private Fertiliser Fertiliser;
        [Link] private Summary Summary;
        [Link] private Soil Soil;
        private Accumulator accumulatedRain;
        [Link]
        private ISoilWater waterBalance;
        
        [Description("Crop")]
        public IPlant Crop { get; set; }

        [Description("Start of sowing window (d-mmm)")]
        public string StartDate { get; set; }

        [Description("End of sowing window (d-mmm)")]
        public string EndDate { get; set; }

        [Description("Minimum extractable soil water for sowing (mm)")]
        public double MinESW { get; set; }

        [Description("Accumulated rainfall required for sowing (mm)")]
        public double MinRain { get; set; }

        [Description("Duration of rainfall accumulation (d)")]
        public int RainDays { get; set; }

        [Display(Type = DisplayType.CultivarName)]
        [Description("Cultivar to be sown")]
        public string CultivarName { get; set; }

        [Description("Sowing depth (mm)")]
        public double SowingDepth { get; set; }

        [Description("Row spacing (mm)")]
        public double RowSpacing { get; set; }

        [Description("Plant population (/m2)")]
        public double Population { get; set; }
        
        
        [EventSubscribe("StartOfSimulation")]
        private void OnSimulationCommencing(object sender, EventArgs e)
        {
            accumulatedRain = new Accumulator(this, "[Weather].Rain", RainDays);
        }

        [EventSubscribe("DoManagement")]
        private void OnDoManagement(object sender, EventArgs e)
        {
            accumulatedRain.Update();
            
            if (DateUtilities.WithinDates(StartDate, Clock.Today, EndDate) &&
                !Crop.IsAlive &&
                MathUtilities.Sum(waterBalance.ESW) > MinESW &&
                accumulatedRain.Sum > MinRain)
            {
                Crop.Sow(population: Population, cultivar: CultivarName, depth: SowingDepth, rowSpacing: RowSpacing);    
            }
        }
    }
}
```
            Manager Fertilise at sowing
              Crop = [Wheat]
              FertiliserType = NO3N
              Amount = 160
```csharp
using Models.Soils;
using System;
using System.Linq;
using Models.Core;
using Models.PMF;
namespace Models
{
    [Serializable]
    public class Script : Model
    {
        [Link] Clock Clock;
        [Link] Fertiliser Fertiliser;
        
        [Description("Crop to be fertilised")]
        public IPlant Crop { get; set; }

        [Description("Type of fertiliser to apply? ")] 
        [Display(Type = DisplayType.FertiliserType)]public string FertiliserType { get; set; }
    
        [Description("Amount of fertiliser to be applied (kg/ha)")]
        public double Amount { get; set; }
        
        [EventSubscribe("Sowing")]
        private void OnSowing(object sender, EventArgs e)
        {
            Model crop = sender as Model;
            if (Crop != null && crop.Name.ToLower() == (Crop as IModel).Name.ToLower())
                Fertiliser.Apply(amount: Amount, type: FertiliserType);
        }
    }
}
```
            Manager Harvest
              Crop = [Wheat]
```csharp
using APSIM.Shared.Utilities;
using Models.Utilities;
using Models.Soils;
using Models.PMF;
using Models.Core;
using System;
using System.Linq;

namespace Models
{
    [Serializable] 
    public class Script : Model
    {
        [Description("Crop")]
        public IPlant Crop { get; set; }
        
        [EventSubscribe("DoManagement")]
        private void OnDoManagement(object sender, EventArgs e)
        {
            if (Crop.IsReadyForHarvesting)
            {
                Crop.Harvest();
                Crop.EndCrop();
            }
        }
    }
}
```
            Report ObsAnalysisReport: same as Sensibility.CO2AndTranspirationEfficiency.CO2TE.CO2TEBaseSimulation.Field.ObsAnalysisReport
            AccumulateFunctionGeneral TT00: same as Sensibility.CO2AndTranspirationEfficiency.CO2TE.CO2TEBaseSimulation.Field.TT00
            AccumulateFunctionGeneral TT01: same as Sensibility.CO2AndTranspirationEfficiency.CO2TE.CO2TEBaseSimulation.Field.TT01
            AccumulateFunctionGeneral TT02: same as Sensibility.CO2AndTranspirationEfficiency.CO2TE.CO2TEBaseSimulation.Field.TT02
            AccumulateFunctionGeneral TT03: same as Sensibility.CO2AndTranspirationEfficiency.CO2TE.CO2TEBaseSimulation.Field.TT03
            AccumulateFunctionGeneral TT04: same as Sensibility.CO2AndTranspirationEfficiency.CO2TE.CO2TEBaseSimulation.Field.TT04
            AccumulateFunctionGeneral TT05: same as Sensibility.CO2AndTranspirationEfficiency.CO2TE.CO2TEBaseSimulation.Field.TT05
            AccumulateFunctionGeneral TT06: same as Sensibility.CO2AndTranspirationEfficiency.CO2TE.CO2TEBaseSimulation.Field.TT06
            AccumulateFunctionGeneral TT07: same as Sensibility.CO2AndTranspirationEfficiency.CO2TE.CO2TEBaseSimulation.Field.TT07
      Experiment NResponse
        Memo
          This sensibility test investigates the time course Grain Mass and protein accumulation for a wide range of N rates for an irrigated crop in one season.
        Factors
          Factor NRate
            Specification=[Fertilise at sowing].Script.Amount=40,80,120,160,200,240,280,360
        Simulation GrainFillingBase
          Clock: Start=1996-01-01; End=1996-12-31
          Summary
          Weather: FileName=%root%/Examples/WeatherFiles/AU_Dalby.met
          SoilArbitrator
          MicroClimate: a_interception=0; b_interception=1; c_interception=0; d_interception=0; SoilHeatFluxFraction=0.4; MinimumHeightDiffForNewLayer=0; NightInterceptionFraction=0.5; ReferenceHeight=2
          Zone Field: Area=1; Slope=0; AspectAngle=0; Altitude=50
            Fertiliser
            Soil: ASCOrder=Vertosol; ASCSubOrder=Black; SoilType=Clay; Site=Norwin; NearestTown=Norwin; Region=Darling Downs and Granite Belt; State=Queensland; Country=Australia; NaturalVegetation=Qld. Bluegrass, possible Qld. Blue gum; ApsoilNumber=900; Latitude=-27.581836; Longitude=151.320206; LocationAccuracy=+/- 20m; YearOfSampling=0
              DataSource=CSIRO Sustainable Ecosystems, Toowoomba; Characteriesd as part of the GRDC funded project"Doing it better, doing it smarter, managing soil water in Australian agriculture' 2011
              Comments=Clay - OC, CLL for all crops estimated-based on Bongeen Mywybilla Soil No1
              Physical: same as Sensibility.ProteinAccumulation.ProteinAccumulation.ProteinAccumulationBase.Field.Soil.Physical
              WaterBalance SoilWater: same as Sensibility.CO2AndTranspirationEfficiency.CO2TE.CO2TEBaseSimulation.Field.Soil.SoilWater
              Organic: same as Sensibility.CO2AndTranspirationEfficiency.CO2TE.CO2TEBaseSimulation.Field.Soil.Organic
              Chemical: Thickness=[150, 150, 300, 300, 300, 300, 300]; PH=[8, 8, 8, 8, 8, 8, 8]; PHUnits=Water
              Water: Thickness=[150, 150, 300, 300, 300, 300, 300]; InitialValues=[0.521, 0.497, 0.488, 0.48, 0.472, 0.457, 0.452]; FilledFromTop=false
              Nutrient
              Solute NO3: same as Sensibility.CO2AndTranspirationEfficiency.CO2TE.CO2TEBaseSimulation.Field.Soil.NO3
              Solute NH4: same as Sensibility.CO2AndTranspirationEfficiency.CO2TE.CO2TEBaseSimulation.Field.Soil.NH4
              Solute Urea: same as Sensibility.CO2AndTranspirationEfficiency.CO2TE.CO2TEBaseSimulation.Field.Soil.Urea
              SoilTemperature Temperature: InteractionsPerDay=8
            Irrigation
            SurfaceOrganicMatter: InitialResidueName=wheat_stubble; InitialResidueType=wheat; InitialResidueMass=500; InitialStandingFraction=0; InitialCPR=0; InitialCNR=100
            Plant Wheat
            Manager Sow using a variable rule: same as Sensibility.ProteinAccumulation.ProteinAccumulation.ProteinAccumulationBase.Field.Sow using a variable rule
            Manager Fertilise at sowing: same as Sensibility.ProteinAccumulation.ProteinAccumulation.ProteinAccumulationBase.Field.Fertilise at sowing
            Manager Harvest: same as Sensibility.ProteinAccumulation.ProteinAccumulation.ProteinAccumulationBase.Field.Harvest
            Report ProteinReport: EventNames=[Wheat].Harvesting
              VariableNames:
                [Clock].Today
                [Wheat].Grain.Wt
                [Wheat].Grain.Protein
                [Wheat].Grain.Size
                [Wheat].Grain.Number
                [Wheat].Grain.N
                [Wheat].Grain.NConc
            Manager AutomaticIrrigation
              allowIrrigation = True
              seasonStart = 1-may
              seasonEnd = 30-Sep
              seasonsAllocation = 10000
              triggerDeficit = 50
              targetDeficit = 95
              returndays = 3
              maximumAmount = 30
              depthPAWC = 650
```csharp
using Newtonsoft.Json;
using APSIM.Shared.Utilities;
using System.Xml.Serialization;
using Models.Soils;
using Models.PMF;
using Models.Core;
using System;
using System.Linq;
using Models.Interfaces;



        
namespace Models
{
    [Serializable] 
    [System.Xml.Serialization.XmlInclude(typeof(Model))]
    public class Script : Model
    {
        [Link] private ISummary summary;
        [Link] private Irrigation Irrigation;
        [Link] private Clock Clock;
        [Link] private Soil Soil;
        [Link(IsOptional = true)] private IPlant existingCrop;
        private DateTime StartDate;
        private DateTime EndDate;
        private double TopDUL;
        private double TopLL;
        private int nLayers;
        [Link]
        private IPhysical soilPhysical;
        [Link]
        private ISoilWater waterBalance;
        //Communication to other modules
       
        //User inputs from properties tab
        [Description("Turn irrigation on?")]
        public bool allowIrrigation { get; set; }
        [Description("Start of irrigation season (dd-MMM)")]
        public string seasonStart { get; set; }
        [Description("End of irrigation season (dd-MMM)")]
        public string seasonEnd { get; set; }
        [Description("Season allocation (mm)")]
        public double seasonsAllocation { get; set; }
        [Description("Deficit to trigger irrigation (% PAWC)")]
        public double triggerDeficit { get; set; }
        [Description("Deficit to stop irrigaton (% PAWC)")]
        public double targetDeficit { get; set; }
        [Description("Minimum days for irrigation to return")]
        public double returndays { get; set; }
        [Description("Maximum irrigation application (mm/day)")]
        public double maximumAmount { get; set; }
        [Description("Depth to calculate PAWC (mm)")]
        public double depthPAWC { get; set; }

        //Class members
        [JsonIgnore] public double TopSWdeficit { get; set; }
        [JsonIgnore] public double TopSWC { get; set; }
        [JsonIgnore] public double DaysSinceIrrigation { get; set; }
        [JsonIgnore] public double AmountToApply { get; set; }
        [JsonIgnore] public double SeasonAppliedAmount { get; set; }
        
        private bool IrrigationIsAllowed { get; set; }
        private bool SeasonIsOpen { get; set; }
        private bool CropIsActive { get; set; }
        private bool IrrigatorIsAvailable { get; set; }
        private bool SoilIsDry { get; set; }

    
        //Calculate static soil variables
        [EventSubscribe("StartOfSimulation")]
        private void OnStartOfSimulation(object sender, EventArgs e)
        {   
            //Set the season dates
            StartDate = DateTime.Parse(seasonStart + "-" + Clock.Today.Year.ToString());
            EndDate = DateTime.Parse(seasonEnd + "-" + Clock.Today.Year.ToString());
            
            //Can we irrigate at all?
            IrrigationIsAllowed = false; 
            if (allowIrrigation)
                IrrigationIsAllowed = true; 

            //Calculate soil water variables
            double depthFromSurface = 0.0;
            double fracLayer = 0.0;
            nLayers = soilPhysical.Thickness.Length;
            for (int layer = 0; layer < nLayers; layer++)
            {
                fracLayer = Math.Min(1.0, (depthPAWC - depthFromSurface) / soilPhysical.Thickness[layer]);
                TopLL += soilPhysical.LL15mm[layer] * fracLayer;
                TopDUL += soilPhysical.DULmm[layer] * fracLayer;
                depthFromSurface += soilPhysical.Thickness[layer];
                if (depthFromSurface >= depthPAWC)
                    layer = nLayers;
            }
        }
             
        //Determine daily requirement for irrigation
        [EventSubscribe("StartOfDay")]
        private void OnStartOfDay(object sender, EventArgs e)
        {
            //Can we irrigate today?          
            SeasonIsOpen = isBetween(Clock.Today, StartDate, EndDate);
            if (!SeasonIsOpen)
                SeasonAppliedAmount = 0;

            //Is there a crop in the ground that needs irrigation?
            CropIsActive = false;
            if ((existingCrop != null) && (existingCrop.IsAlive))
                CropIsActive = true;
            //if ((existingCrop.Phenology.Stage >= 3.0) && (existingCrop.Phenology.Stage < 6.0))
          
            //Is the irrigator available?
            IrrigatorIsAvailable = false;
            DaysSinceIrrigation += 1;
            if (DaysSinceIrrigation >= returndays)
                IrrigatorIsAvailable = true;
          
            //Is the soil dry enough to require irrigation?
            SoilIsDry = false;
            double depthFromSurface = 0.0;
            double fracLayer = 0.0;
            TopSWC = 0.0;
            for (int layer = 0; layer < nLayers; layer++)
            //for (int layer = 0; depthFromSurface < depthPAWC + soilPhysical.Thickness[layer]; layer++)
            {
                fracLayer = Math.Min(1.0, (depthPAWC - depthFromSurface) / soilPhysical.Thickness[layer]);
                TopSWC += waterBalance.SWmm[layer] * fracLayer;
                depthFromSurface += soilPhysical.Thickness[layer];
                if (depthFromSurface >= depthPAWC)
                    layer = nLayers;
            }
            
            TopSWdeficit = TopSWC - TopDUL;
            if (Math.Max(0.0, -TopSWdeficit) >= (TopDUL - TopLL) * (100 - triggerDeficit) / 100)
                SoilIsDry = true;
                
            //Are all the conditions ratifying irrigation
            if (IrrigationIsAllowed && SeasonIsOpen && CropIsActive && IrrigatorIsAvailable && SoilIsDry)
            {
                //Lets bloody well irrigate then!!!!
                AmountToApply = TopDUL * targetDeficit / 100 - TopSWC;
                AmountToApply = Math.Max(0.0, Math.Min(AmountToApply, seasonsAllocation - SeasonAppliedAmount));
                AmountToApply = Math.Min(AmountToApply,maximumAmount);
                Irrigation.Apply(AmountToApply);
                DaysSinceIrrigation = 0;
                SeasonAppliedAmount += AmountToApply;
            }
        }
        
        ///Checks whether theDate is between iniDate and endDate (non-year specific)
        private bool isBetween(DateTime theDay, DateTime iniDate, DateTime endDate)
        {
            bool result = false;
            if (iniDate.DayOfYear < endDate.DayOfYear)
            {
                // period is within one year, ex: summer in the northern hemisphere
                if ((theDay.DayOfYear >= iniDate.DayOfYear) && (theDay.DayOfYear <= endDate.DayOfYear))
                    result = true;
            }
            else
            {
                // period goes over the end of the year, ex: summer in the southern hemisphere
                if ((theDay.DayOfYear >= iniDate.DayOfYear) || (theDay.DayOfYear <= endDate.DayOfYear))
                    result = true;
            }
            
            return result;
        }
    }
}
```
            Report ProteinDailyReport: EventNames=[Clock].DoReport
              VariableNames:
                [Clock].Today
                [Wheat].Grain.Wt
                [Wheat].Grain.Protein
                [Wheat].Grain.Size
                [Wheat].Grain.Number
                [Wheat].Grain.N
                [Wheat].Grain.NConc
                [Wheat].Grain.NperKernel
                [Wheat].Leaf.Fn
                [Wheat].Leaf.Fw
                [Wheat].Leaf.LAI
                [Wheat].AboveGround.Wt
            Report ObsAnalysisReport: same as Sensibility.CO2AndTranspirationEfficiency.CO2TE.CO2TEBaseSimulation.Field.ObsAnalysisReport
            AccumulateFunctionGeneral TT00: same as Sensibility.CO2AndTranspirationEfficiency.CO2TE.CO2TEBaseSimulation.Field.TT00
            AccumulateFunctionGeneral TT01: same as Sensibility.CO2AndTranspirationEfficiency.CO2TE.CO2TEBaseSimulation.Field.TT01
            AccumulateFunctionGeneral TT02: same as Sensibility.CO2AndTranspirationEfficiency.CO2TE.CO2TEBaseSimulation.Field.TT02
            AccumulateFunctionGeneral TT03: same as Sensibility.CO2AndTranspirationEfficiency.CO2TE.CO2TEBaseSimulation.Field.TT03
            AccumulateFunctionGeneral TT04: same as Sensibility.CO2AndTranspirationEfficiency.CO2TE.CO2TEBaseSimulation.Field.TT04
            AccumulateFunctionGeneral TT05: same as Sensibility.CO2AndTranspirationEfficiency.CO2TE.CO2TEBaseSimulation.Field.TT05
            AccumulateFunctionGeneral TT06: same as Sensibility.CO2AndTranspirationEfficiency.CO2TE.CO2TEBaseSimulation.Field.TT06
            AccumulateFunctionGeneral TT07: same as Sensibility.CO2AndTranspirationEfficiency.CO2TE.CO2TEBaseSimulation.Field.TT07
      Experiment WaterResponse
        Memo
          This sensibility test investigates the time course of protein and mass accumulation in grains in response to water stress levels.
        Factors
          Factor Irrigation: Specification=[IrrigationSchedule].Script.Amount = 0,10, 20, 40, 80
        Simulation WaterResponseBase
          Clock: Start=1996-05-01; End=1996-11-01
          Summary
          Weather: FileName=%root%/Examples/WeatherFiles/AU_Dalby.met
          SoilArbitrator
          MicroClimate: a_interception=0; b_interception=1; c_interception=0; d_interception=0; SoilHeatFluxFraction=0.4; MinimumHeightDiffForNewLayer=0; NightInterceptionFraction=0.5; ReferenceHeight=2
          Zone Field: Area=1; Slope=0; AspectAngle=0; Altitude=50
            Fertiliser
            Soil: ASCOrder=Vertosol; ASCSubOrder=Black; SoilType=Black Vertosol; Site=Norwin; NearestTown=Norwin; Region=Darling Downs and Granite Belt; State=Queensland; Country=Australia; NaturalVegetation=Qld. Bluegrass, possible Qld. Blue gum; ApsoilNumber=900; Latitude=-27.581836; Longitude=151.320206; LocationAccuracy=+/- 20m; YearOfSampling=0
              DataSource=CSIRO Sustainable Ecosystems, Toowoomba; Characteriesd as part of the GRDC funded project"Doing it better, doing it smarter, managing soil water in Australian agriculture' 2011
              Comments=Clay - OC, CLL for all crops estimated-based on Bongeen Mywybilla Soil No1
              Physical
                Thickness  ParticleSizeSand  ParticleSizeSilt  ParticleSizeClay  Rocks  BD     AirDry  LL15   DUL    SAT    KS
                150        5                 65                30                0      1.011  0.13    0.261  0.521  0.589  20
                150        5                 65                30                0      1.071  0.199   0.248  0.497  0.566  20
                300        5                 65                30                0      1.094  0.28    0.28   0.488  0.557  20
                300        5                 65                30                0      1.159  0.28    0.28   0.48   0.533  20
                300        5                 65                30                0      1.173  0.28    0.28   0.472  0.527  20
                300        5                 65                30                0      1.163  0.28    0.28   0.457  0.531  20
                300        5                 65                30                0      1.187  0.28    0.28   0.452  0.522  20
                Rocks, ParticleSizeSand, ParticleSizeSilt, ParticleSizeClay source: Calculated
                SoilCrop WheatSoil: LL=[0.261, 0.248, 0.28, 0.306, 0.36, 0.392, 0.446]; KL=[0.06, 0.06, 0.06, 0.04, 0.04, 0.02, 0.01]; XF=[1, 1, 1, 1, 1, 1, 1]
                SoilCrop SorghumSoil: LL=[0.261, 0.248, 0.28, 0.348, 0.365, 0.379, 0.39]; KL=[0.07, 0.07, 0.07, 0.05, 0.05, 0.04, 0.03]; XF=[1, 1, 1, 1, 1, 1, 1]
                  LL, KL, XF source: Estimated
                SoilCrop CottonSoil: LL=[0.261, 0.248, 0.28, 0.313, 0.336, 0.354, 0.377]; KL=[0.1, 0.1, 0.1, 0.1, 0.09, 0.07, 0.05]; XF=[1, 1, 1, 1, 1, 1, 1]
                  LL, KL, XF source: Estimated
              WaterBalance SoilWater: same as Sensibility.CO2AndTranspirationEfficiency.CO2TE.CO2TEBaseSimulation.Field.Soil.SoilWater
              Organic: same as Sensibility.CO2AndTranspirationEfficiency.CO2TE.CO2TEBaseSimulation.Field.Soil.Organic
              Chemical: Thickness=[150, 150, 300, 300, 300, 300, 300]; PH=[8, 8, 8, 8, 8, 8, 8]; PHUnits=Water
              Water: Thickness=[150, 150, 300, 300, 300, 300, 300]; InitialValues=[0.521, 0.497, 0.435, 0.306, 0.36, 0.392, 0.446]; FilledFromTop=true
              Nutrient
              Solute NO3: same as Sensibility.CO2AndTranspirationEfficiency.CO2TE.CO2TEBaseSimulation.Field.Soil.NO3
              Solute NH4: same as Sensibility.CO2AndTranspirationEfficiency.CO2TE.CO2TEBaseSimulation.Field.Soil.NH4
              Solute Urea: same as Sensibility.CO2AndTranspirationEfficiency.CO2TE.CO2TEBaseSimulation.Field.Soil.Urea
              SoilTemperature Temperature: InteractionsPerDay=8
            Irrigation
            SurfaceOrganicMatter: InitialResidueName=wheat_stubble; InitialResidueType=wheat; InitialResidueMass=500; InitialStandingFraction=0; InitialCPR=0; InitialCNR=100
            Plant Wheat
            Manager Sow using a variable rule: same as Sensibility.ProteinAccumulation.ProteinAccumulation.ProteinAccumulationBase.Field.Sow using a variable rule
            Manager Fertilise at sowing
              Crop = [Wheat]
              FertiliserType = NO3N
              Amount = 300
              script: same as in Sensibility.ProteinAccumulation.ProteinAccumulation.ProteinAccumulationBase.Field.Fertilise at sowing
            Manager Harvest: same as Sensibility.ProteinAccumulation.ProteinAccumulation.ProteinAccumulationBase.Field.Harvest
            Report ProteinReport: EventNames=[Wheat].Harvesting
              VariableNames:
                [Clock].Today
                [Wheat].Grain.Wt
                [Wheat].Grain.Protein
                [Wheat].Grain.Size
                [Wheat].Grain.Number
                [Wheat].Grain.N
                [Wheat].Grain.NConc
            Report ProteinDailyReport: EventNames=[Clock].DoReport
              VariableNames:
                [Clock].Today
                [Wheat].Grain.Wt
                [Wheat].Grain.Protein
                [Wheat].Grain.Size
                [Wheat].Grain.Number
                [Wheat].Grain.N
                [Wheat].Grain.NConc
                [Wheat].Grain.NperKernel
                [Wheat].Leaf.Fn
                [Wheat].Leaf.Fw
                [Wheat].Leaf.LAI
                [Wheat].AboveGround.Wt
                sum([Soil].Water.MM)
                [Irrigation].IrrigationApplied
            Manager IrrigationSchedule
              IrrigateDates = 1-jul, 1-aug, 15-aug, 1-sep, 15-sep, 1-oct
              Amount = 30
              Depth = 0
              Efficiency = 1
              WillRunoff = False
```csharp
using Models.Soils;
using System;
using System.Linq;
using Models.Core;
using Models.PMF;
using APSIM.Shared.Utilities;
namespace Models
{
    [Serializable]
    public class Script : Model
    {
        [Link] Clock Clock;
        [Link] Irrigation Irrigation;
        
        [Separator("A component to apply irrigation on one or more dates on every year of the simulation")]

        [Description("Enter the irrigation dates as dd-mmm with comma separation (any year information entered will be ignored)")] 
        public string[] IrrigateDates { get; set; }
        
        [Description("Amount of irrigation to be applied (mm)")] 
        public double Amount { get; set; }
        
        [Description("Depth in the soil to apply the  irrigation (mm)")] 
        public double Depth { get; set; }
        
        [Description("Efficiency of irrigation (0-1)")] 
        public double Efficiency { get; set; }
        
        [Description("Will the irrigation runoff?")] 
        public bool WillRunoff { get; set; }
        
        [EventSubscribe("DoManagement")]
        private void OnDoManagement(object sender, EventArgs e)
        {
            foreach (string ddMMM in IrrigateDates)
            {
                if (DateUtilities.DatesEqual(ddMMM, Clock.Today))
                    Irrigation.Apply(amount: Amount, depth: Depth, efficiency: Efficiency, willRunoff: WillRunoff);
            }
        }
    }
}
```
            Report ObsAnalysisReport: same as Sensibility.CO2AndTranspirationEfficiency.CO2TE.CO2TEBaseSimulation.Field.ObsAnalysisReport
            AccumulateFunctionGeneral TT00: same as Sensibility.CO2AndTranspirationEfficiency.CO2TE.CO2TEBaseSimulation.Field.TT00
            AccumulateFunctionGeneral TT01: same as Sensibility.CO2AndTranspirationEfficiency.CO2TE.CO2TEBaseSimulation.Field.TT01
            AccumulateFunctionGeneral TT02: same as Sensibility.CO2AndTranspirationEfficiency.CO2TE.CO2TEBaseSimulation.Field.TT02
            AccumulateFunctionGeneral TT03: same as Sensibility.CO2AndTranspirationEfficiency.CO2TE.CO2TEBaseSimulation.Field.TT03
            AccumulateFunctionGeneral TT04: same as Sensibility.CO2AndTranspirationEfficiency.CO2TE.CO2TEBaseSimulation.Field.TT04
            AccumulateFunctionGeneral TT05: same as Sensibility.CO2AndTranspirationEfficiency.CO2TE.CO2TEBaseSimulation.Field.TT05
            AccumulateFunctionGeneral TT06: same as Sensibility.CO2AndTranspirationEfficiency.CO2TE.CO2TEBaseSimulation.Field.TT06
            AccumulateFunctionGeneral TT07: same as Sensibility.CO2AndTranspirationEfficiency.CO2TE.CO2TEBaseSimulation.Field.TT07
      Experiment PotentialGrainSize (disabled)
        Memo
          This sensibility test investigates the time course of protein and mass accumulation in grains in response to water stress levels.
        Factors
          Factor Value: Specification=[Hartog]
            Cultivar Hartog36
              Command:
                [Phenology].Phyllochron.BasePhyllochron.FixedValue = 107.48
                [Grain].MaximumPotentialGrainSize.FixedValue = 0.036
                [Grain].NumberFunction.GrainNumber.GrainsPerGramOfStem.FixedValue = 28.6
                [Phenology].PhyllochronPpSensitivity.FixedValue = 0.247
                [Phenology].CAMP.FLNparams.MinLN = 7
                [Phenology].CAMP.FLNparams.PpLN = 4
                [Phenology].CAMP.FLNparams.VrnLN = 2
                [Phenology].CAMP.FLNparams.VxPLN = 0
                [Phenology].HeadEmergenceLongDayBase.FixedValue = 50
                [Phenology].HeadEmergencePpSensitivity.FixedValue = 5
                [Phenology].CAMP.EnvData.VrnTreatTemp = 6
                [Phenology].CAMP.EnvData.VrnTreatDuration = 60
            Cultivar Hartog40
              Command:
                [Phenology].Phyllochron.BasePhyllochron.FixedValue = 107.48
                [Grain].MaximumPotentialGrainSize.FixedValue = 0.04
                [Grain].NumberFunction.GrainNumber.GrainsPerGramOfStem.FixedValue = 26
                [Phenology].PhyllochronPpSensitivity.FixedValue = 0.247
                [Phenology].CAMP.FLNparams.MinLN = 7
                [Phenology].CAMP.FLNparams.PpLN = 4
                [Phenology].CAMP.FLNparams.VrnLN = 2
                [Phenology].CAMP.FLNparams.VxPLN = 0
                [Phenology].HeadEmergenceLongDayBase.FixedValue = 50
                [Phenology].HeadEmergencePpSensitivity.FixedValue = 5
                [Phenology].CAMP.EnvData.VrnTreatTemp = 6
                [Phenology].CAMP.EnvData.VrnTreatDuration = 60
            Cultivar Hartog44
              Command:
                [Phenology].Phyllochron.BasePhyllochron.FixedValue = 107.48
                [Grain].MaximumPotentialGrainSize.FixedValue = 0.044
                [Grain].NumberFunction.GrainNumber.GrainsPerGramOfStem.FixedValue = 23.6
                [Phenology].PhyllochronPpSensitivity.FixedValue = 0.247
                [Phenology].CAMP.FLNparams.MinLN = 7
                [Phenology].CAMP.FLNparams.PpLN = 4
                [Phenology].CAMP.FLNparams.VrnLN = 2
                [Phenology].CAMP.FLNparams.VxPLN = 0
                [Phenology].HeadEmergenceLongDayBase.FixedValue = 50
                [Phenology].HeadEmergencePpSensitivity.FixedValue = 5
                [Phenology].CAMP.EnvData.VrnTreatTemp = 6
                [Phenology].CAMP.EnvData.VrnTreatDuration = 60
        Simulation PotentialGrainSizeBase
          Clock: Start=1996-05-01; End=1996-11-01
          Summary
          Weather: FileName=%root%/Examples/WeatherFiles/AU_Dalby.met
          SoilArbitrator
          MicroClimate: a_interception=0; b_interception=1; c_interception=0; d_interception=0; SoilHeatFluxFraction=0.4; MinimumHeightDiffForNewLayer=0; NightInterceptionFraction=0.5; ReferenceHeight=2
          Zone Field: Area=1; Slope=0; AspectAngle=0; Altitude=50
            Fertiliser
            Soil: ASCOrder=Vertosol; ASCSubOrder=Black; SoilType=Black Vertosol; Site=Norwin; NearestTown=Norwin; Region=Darling Downs and Granite Belt; State=Queensland; Country=Australia; NaturalVegetation=Qld. Bluegrass, possible Qld. Blue gum; ApsoilNumber=900; Latitude=-27.581836; Longitude=151.320206; LocationAccuracy=+/- 20m; YearOfSampling=0
              DataSource=CSIRO Sustainable Ecosystems, Toowoomba; Characteriesd as part of the GRDC funded project"Doing it better, doing it smarter, managing soil water in Australian agriculture' 2011
              Comments=Clay - OC, CLL for all crops estimated-based on Bongeen Mywybilla Soil No1
              Physical
                Thickness  ParticleSizeSand  ParticleSizeSilt  ParticleSizeClay  Rocks  BD     AirDry  LL15   DUL    SAT    KS
                150        5                 65                30                0      1.011  0.13    0.261  0.521  0.589  20
                150        5                 65                30                0      1.071  0.199   0.248  0.497  0.566  20
                300        5                 65                30                0      1.094  0.28    0.28   0.488  0.557  20
                300        5                 65                30                0      1.159  0.28    0.28   0.48   0.533  20
                300        5                 65                30                0      1.173  0.28    0.28   0.472  0.527  20
                300        5                 65                30                0      1.163  0.28    0.28   0.457  0.531  20
                300        5                 65                30                0      1.187  0.28    0.28   0.452  0.522  20
                Rocks, ParticleSizeSand, ParticleSizeSilt, ParticleSizeClay source: Calculated
                SoilCrop WheatSoil: LL=[0.261, 0.248, 0.28, 0.306, 0.36, 0.392, 0.446]; KL=[0.06, 0.06, 0.06, 0.04, 0.04, 0.02, 0.01]; XF=[1, 1, 1, 1, 1, 1, 1]
                SoilCrop SorghumSoil: LL=[0.261, 0.248, 0.28, 0.348, 0.365, 0.379, 0.39]; KL=[0.07, 0.07, 0.07, 0.05, 0.05, 0.04, 0.03]; XF=[1, 1, 1, 1, 1, 1, 1]
                  LL, KL, XF source: Estimated
                SoilCrop CottonSoil: LL=[0.261, 0.248, 0.28, 0.313, 0.336, 0.354, 0.377]; KL=[0.1, 0.1, 0.1, 0.1, 0.09, 0.07, 0.05]; XF=[1, 1, 1, 1, 1, 1, 1]
                  LL, KL, XF source: Estimated
              WaterBalance SoilWater: SummerDate=1-Nov; SummerU=5; SummerCona=5; WinterDate=1-Apr; WinterU=5; WinterCona=5; DiffusConst=40; DiffusSlope=16; Salb=0.12; CN2Bare=73; CNRed=20; CNCov=0.8; PSIDul=-100; Thickness=[150, 150, 300, 300, 300, 300, 300]; SWCON=[0.3, 0.3, 0.3, 0.3, 0.3, 0.3, 0.3]
              Organic: FOMCNRatio=40; CarbonUnits=Total
                Thickness  Carbon  SoilCNRatio  FBiom  FInert  FOM
                150        1.2     12           0.04   0.4     347.129
                150        0.96    12           0.02   0.6     270.344
                300        0.6     12           0.02   0.8     163.972
                300        0.3     12           0.02   1       99.4541
                300        0.18    12           0.01   1       60.322
                300        0.12    12           0.01   1       36.5871
                300        0.12    12           0.01   1       22.1912
              Chemical: Thickness=[150, 150, 300, 300, 300, 300, 300]; PH=[8, 8, 8, 8, 8, 8, 8]; PHUnits=Water
              Water: Thickness=[150, 150, 300, 300, 300, 300, 300]; InitialValues=[0.521, 0.497, 0.435, 0.306, 0.36, 0.392, 0.446]; FilledFromTop=true
              Nutrient
              Solute NO3: Thickness=[150, 150, 300, 300, 300, 300, 300]; InitialValues=[1, 1, 1, 1, 1, 1, 1]; InitialValuesUnits=ppm; WaterTableConcentration=0; D0=0; DepthConstant=0; MaxDepthSoluteAccessible=0; RunoffEffectivenessAtMovingSolute=0; MaxEffectiveRunoff=0
              Solute NH4: Thickness=[150, 150, 300, 300, 300, 300, 300]; InitialValues=[0.1, 0.1, 0.1, 0.1, 0.1, 0.1, 0.1]; InitialValuesUnits=ppm; WaterTableConcentration=0; D0=0; DepthConstant=0; MaxDepthSoluteAccessible=0; RunoffEffectivenessAtMovingSolute=0; MaxEffectiveRunoff=0
              Solute Urea: Thickness=[150, 150, 300, 300, 300, 300, 300]; InitialValues=[0, 0, 0, 0, 0, 0, 0]; InitialValuesUnits=kg/ha; WaterTableConcentration=0; D0=0; DepthConstant=0; MaxDepthSoluteAccessible=0; RunoffEffectivenessAtMovingSolute=0; MaxEffectiveRunoff=0
              SoilTemperature Temperature: InteractionsPerDay=8
            Irrigation
            SurfaceOrganicMatter: InitialResidueName=wheat_stubble; InitialResidueType=wheat; InitialResidueMass=500; InitialStandingFraction=0; InitialCPR=0; InitialCNR=100
            Plant Wheat
            Manager Sow using a variable rule
              Crop = [Wheat]
              StartDate = 1-may
              EndDate = 10-jul
              MinESW = 100
              MinRain = 25
              RainDays = 7
              CultivarName = Hartog
              SowingDepth = 30
              RowSpacing = 250
              Population = 120
              script: same as in Sensibility.ProteinAccumulation.ProteinAccumulation.ProteinAccumulationBase.Field.Sow using a variable rule
            Manager Fertilise at sowing
              Crop = [Wheat]
              FertiliserType = NO3N
              Amount = 300
              script: same as in Sensibility.ProteinAccumulation.ProteinAccumulation.ProteinAccumulationBase.Field.Fertilise at sowing
            Manager Harvest
              Crop = [Wheat]
              script: same as in Sensibility.ProteinAccumulation.ProteinAccumulation.ProteinAccumulationBase.Field.Harvest
            Report ProteinReport: EventNames=[Wheat].Harvesting
              VariableNames:
                [Clock].Today
                [Wheat].Grain.Wt
                [Wheat].Grain.Protein
                [Wheat].Grain.Size
                [Wheat].Grain.Number
                [Wheat].Grain.N
                [Wheat].Grain.NConc
            Manager AutomaticIrrigation
              allowIrrigation = True
              seasonStart = 1-may
              seasonEnd = 30-Sep
              seasonsAllocation = 10000
              triggerDeficit = 50
              targetDeficit = 95
              returndays = 3
              maximumAmount = 30
              depthPAWC = 650
              script: same as in Sensibility.ProteinAccumulation.NResponse.GrainFillingBase.Field.AutomaticIrrigation
            Report ProteinDailyReport: EventNames=[Clock].DoReport
              VariableNames:
                [Clock].Today
                [Wheat].Grain.Wt
                [Wheat].Grain.Protein
                [Wheat].Grain.Size
                [Wheat].Grain.Number
                [Wheat].Grain.N
                [Wheat].Grain.NConc
                [Wheat].Grain.NperKernel
                [Wheat].Leaf.Fn
                [Wheat].Leaf.Fw
                [Wheat].Leaf.LAI
                [Wheat].AboveGround.Wt
                sum([Soil].Water.MM)
                [Irrigation].IrrigationApplied
            Report ObsAnalysisReport: same as Sensibility.CO2AndTranspirationEfficiency.CO2TE.CO2TEBaseSimulation.Field.ObsAnalysisReport
            AccumulateFunctionGeneral TT00: same as Sensibility.CO2AndTranspirationEfficiency.CO2TE.CO2TEBaseSimulation.Field.TT00
            AccumulateFunctionGeneral TT01: same as Sensibility.CO2AndTranspirationEfficiency.CO2TE.CO2TEBaseSimulation.Field.TT01
            AccumulateFunctionGeneral TT02: same as Sensibility.CO2AndTranspirationEfficiency.CO2TE.CO2TEBaseSimulation.Field.TT02
            AccumulateFunctionGeneral TT03: same as Sensibility.CO2AndTranspirationEfficiency.CO2TE.CO2TEBaseSimulation.Field.TT03
            AccumulateFunctionGeneral TT04: same as Sensibility.CO2AndTranspirationEfficiency.CO2TE.CO2TEBaseSimulation.Field.TT04
            AccumulateFunctionGeneral TT05: same as Sensibility.CO2AndTranspirationEfficiency.CO2TE.CO2TEBaseSimulation.Field.TT05
            AccumulateFunctionGeneral TT06: same as Sensibility.CO2AndTranspirationEfficiency.CO2TE.CO2TEBaseSimulation.Field.TT06
            AccumulateFunctionGeneral TT07: same as Sensibility.CO2AndTranspirationEfficiency.CO2TE.CO2TEBaseSimulation.Field.TT07
    Folder LeafAppearance
      Simulation LeafAppearance
        Clock: Start=2011-05-01; End=2011-11-12
        Summary summaryfile
        Weather: FileName=met/Gatton2011.met
        SoilArbitrator Soil Arbitrator
        Zone Field: Area=1; Slope=0; AspectAngle=0; Altitude=50
          Irrigation
          Fertiliser
          Operations Sowing
            2011-06-15  [Wheat].Sow(population:160, cultivar:"Hartog", depth:30, rowSpacing:250);
            2011-08-15  [Fertiliser].Apply(amount: 100, type: "UreaN");
            2011-11-05  [Wheat].Harvest();
            2011-11-05  [Wheat].EndCrop();
          Soil: SoilType=Black Vertosol; Site=Lawes; NearestTown=Lawes, Q 4343; Region=Lockyer; State=Queensland; Country=Australia; NaturalVegetation=Blue Gum, Moreton Bay Ash, Tea Tree; ApsoilNumber=37; Latitude=-27.537; Longitude=152.336; LocationAccuracy=+-20m; DataSource=CSIRO Sustainable Ecosystems, Toowoomba
            Comments=Soil naming structure: \State\Region\Classification-Local Name (Site/district and locator number); oc and ph estimated
            Physical
              Thickness  BD    AirDry  LL15  DUL   SAT
              150        1.32  0.13    0.26  0.41  0.47
              150        1.3   0.208   0.26  0.43  0.48
              300        1.23  0.26    0.26  0.46  0.51
              300        1.27  0.26    0.26  0.44  0.49
              300        1.37  0.25    0.25  0.4   0.45
              300        1.35  0.26    0.26  0.41  0.46
              300        1.35  0.26    0.26  0.38  0.46
              SoilCrop WheatSoil: LL=[0.26, 0.26, 0.26, 0.26, 0.25, 0.29, 0.36]; KL=[0.06, 0.06, 0.06, 0.04, 0.04, 0.02, 0.02]; XF=[1, 1, 1, 1, 1, 1, 1]
            WaterBalance SoilWater: SummerDate=1-Nov; SummerU=6; SummerCona=3.5; WinterDate=1-Apr; WinterU=4; WinterCona=2.5; DiffusConst=40; DiffusSlope=16; Salb=0.12; CN2Bare=73; CNRed=20; CNCov=0.8; PSIDul=-100; Thickness=[150, 150, 300, 300, 300, 300, 300]; SWCON=[0.3, 0.3, 0.3, 0.3, 0.3, 0.3, 0.3]
            Organic: FOMCNRatio=40; CarbonUnits=Total
              Thickness  Carbon  SoilCNRatio  FBiom  FInert  FOM
              150        0.9538  12           0.04   0.4     347.129
              150        0.9538  12           0.02   0.6     270.344
              300        0.9615  12           0.02   0.8     163.972
              300        0.8462  12           0.02   1       99.4541
              300        0.5462  12           0.01   1       60.322
              300        0.2615  12           0.01   1       36.5871
              300        0.2     12           0.01   1       22.1912
            Chemical: Thickness=[150, 150, 300, 300, 300, 300, 300]; PH=[8, 8, 8, 8, 8, 8, 8]; PHUnits=Water
            Water: Thickness=[150, 150, 300, 300, 300, 300, 300]; InitialValues=[0.41, 0.43, 0.46, 0.44, 0.4, 0.41, 0.38]; FilledFromTop=true
            Nutrient
            Solute NO3: Thickness=[150, 150, 300, 300, 300, 300, 300]; InitialValuesUnits=ppm; WaterTableConcentration=0; D0=0; DepthConstant=0; MaxDepthSoluteAccessible=0; RunoffEffectivenessAtMovingSolute=0; MaxEffectiveRunoff=0
              InitialValues=[38.0228, 12.9554, 0.421763, 0.421763, 0.421763, 0.421763, 0.421763]
            Solute NH4: Thickness=[150, 150, 300, 300, 300, 300, 300]; InitialValuesUnits=ppm; WaterTableConcentration=0; D0=0; DepthConstant=0; MaxDepthSoluteAccessible=0; RunoffEffectivenessAtMovingSolute=0; MaxEffectiveRunoff=0
              InitialValues=[0.380228, 0.15486, 0.0421763, 0.0421763, 0.0421763, 0.0421763, 0.0421763]
            Solute Urea: same as Sensibility.CO2AndTranspirationEfficiency.CO2TE.CO2TEBaseSimulation.Field.Soil.Urea
            SoilTemperature Temperature: InteractionsPerDay=8
          SurfaceOrganicMatter: InitialResidueName=wheat_stubble; InitialResidueType=wheat; InitialResidueMass=500; InitialStandingFraction=0; InitialCPR=0; InitialCNR=100
          Plant Wheat
          MicroClimate: a_interception=0; b_interception=1; c_interception=0; d_interception=0; SoilHeatFluxFraction=0.4; MinimumHeightDiffForNewLayer=0; NightInterceptionFraction=0.5; ReferenceHeight=2
          Manager Automatic irrigation based on water deficit
            AutoIrrigationOn = True
            FASWThreshold = 0.9
            FASWDepth = 600
```csharp
using APSIM.Numerics;
using Models.Soils.Nutrients;
using System;
using Models.Core;
using System.Collections.Generic;
using System.Text;
using Models.Soils;
using Models.PMF;
using Models;
using System.Xml.Serialization;
using APSIM.Shared.Utilities;
using Models.Interfaces;

namespace Models
{
    [Serializable] 
    public class Script : Model
    {
        [Link] private Zone zone;
        [Link] private Irrigation irrigation;
        [Link] private Soil soil;
        [Link]
        private IPhysical soilPhysical;
        [Link]
        private ISoilWater waterBalance;
        public double FASW { get; set; }
        public double WaterDeficit  { get; set; }
    
        
        [Description("Auto irrigation on?")]
        public bool AutoIrrigationOn { get; set; }

        [Description("Threshold fraction available water (0-1)")]
        public double FASWThreshold { get; set; }

        [Description("Soil depth (mm) to which fraction available water is calculated")]
        public double FASWDepth { get; set; }

        [EventSubscribe("DoManagement")]
        private void OnDoManagement(object sender, EventArgs e)
        {
            CalculateFASW();
            if (AutoIrrigationOn)
            {
                if (FASW < FASWThreshold)
                {
                    double amount = 10;
                    irrigation.Apply(WaterDeficit, depth: 0);
                }
            }
        }
        
        private void CalculateFASW()
        {
            double[] LL15 = MathUtilities.Multiply(soilPhysical.LL15, soilPhysical.Thickness);
            double[] DUL = MathUtilities.Multiply(soilPhysical.DUL, soilPhysical.Thickness);
        
            int nlayr = GetLayerIndex();
            double cumdep = MathUtilities.Sum(soilPhysical.Thickness, 0, nlayr, 0.0);

            double excess_fr = MathUtilities.Divide((cumdep - FASWDepth), soilPhysical.Thickness[nlayr], 0.0);

            // note that results may be strange if swdep < ll15
            double avail_sw = (MathUtilities.Sum(waterBalance.SWmm, 0, nlayr, 0.0)
                              - excess_fr * waterBalance.SWmm[nlayr])
                              - (MathUtilities.Sum(LL15, 0, nlayr, 0.0)
                              - excess_fr * LL15[nlayr]);


            double pot_avail_sw = (MathUtilities.Sum(DUL, 0, nlayr, 0.0)
                                  - excess_fr * DUL[nlayr])
                                  - (MathUtilities.Sum(LL15, 0, nlayr, 0.0)
                                  - excess_fr * LL15[nlayr]);

            FASW = MathUtilities.Divide(avail_sw, pot_avail_sw, 0.0);
            WaterDeficit = MathUtilities.Constrain(pot_avail_sw - avail_sw, 0.0, 100000);
        }

        private int GetLayerIndex()
        {
            double[] cumThickness = soilPhysical.ThicknessCumulative;
            for (int i = 1; i < cumThickness.Length; i++)
            {
                if (FASWDepth < cumThickness[i])
                    return i - 1;
            }
            
            return cumThickness.Length - 1;
        }

    }
}
```
          Report HarvestReport
          Report DailyReport
          Report ObsAnalysisReport: same as Sensibility.CO2AndTranspirationEfficiency.CO2TE.CO2TEBaseSimulation.Field.ObsAnalysisReport
          AccumulateFunctionGeneral TT00: same as Sensibility.CO2AndTranspirationEfficiency.CO2TE.CO2TEBaseSimulation.Field.TT00
          AccumulateFunctionGeneral TT01: same as Sensibility.CO2AndTranspirationEfficiency.CO2TE.CO2TEBaseSimulation.Field.TT01
          AccumulateFunctionGeneral TT02: same as Sensibility.CO2AndTranspirationEfficiency.CO2TE.CO2TEBaseSimulation.Field.TT02
          AccumulateFunctionGeneral TT03: same as Sensibility.CO2AndTranspirationEfficiency.CO2TE.CO2TEBaseSimulation.Field.TT03
          AccumulateFunctionGeneral TT04: same as Sensibility.CO2AndTranspirationEfficiency.CO2TE.CO2TEBaseSimulation.Field.TT04
          AccumulateFunctionGeneral TT05: same as Sensibility.CO2AndTranspirationEfficiency.CO2TE.CO2TEBaseSimulation.Field.TT05
          AccumulateFunctionGeneral TT06: same as Sensibility.CO2AndTranspirationEfficiency.CO2TE.CO2TEBaseSimulation.Field.TT06
          AccumulateFunctionGeneral TT07: same as Sensibility.CO2AndTranspirationEfficiency.CO2TE.CO2TEBaseSimulation.Field.TT07
        Manager LocationInfo
          Country = Australia
          State = Queensland
          Region =
          script: same as in Sensibility.CO2AndTranspirationEfficiency.CO2TE.CO2TEBaseSimulation.LocationInfo
    Folder TerminalWaterStress
      Experiment TerminalWaterStress
        Memo
          This sensibility test investigates the time course of protein and mass accumulation in grains in response to water stress levels.
        Factors
          Factor Irrigation: Specification=[IrrigationSchedule]
            Manager Full
              IrrigateDates = 1-jul, 1-aug, 15-aug, 1-sep, 15-sep, 1-Oct
              Amount = 90
              Depth = 0
              Efficiency = 1
              WillRunoff = False
              script: same as in Sensibility.ProteinAccumulation.WaterResponse.WaterResponseBase.Field.IrrigationSchedule
            Manager TerminalStress
              IrrigateDates = 1-jul, 1-aug
              Amount = 90
              Depth = 0
              Efficiency = 1
              WillRunoff = False
              script: same as in Sensibility.ProteinAccumulation.WaterResponse.WaterResponseBase.Field.IrrigationSchedule
        Simulation TerminalWaterStressBase
          Clock: Start=1995-06-13; End=1995-10-31
          Summary
          Weather: FileName=met/APS26.met
          SoilArbitrator
          MicroClimate: a_interception=0; b_interception=1; c_interception=0; d_interception=0; SoilHeatFluxFraction=0.4; MinimumHeightDiffForNewLayer=0; NightInterceptionFraction=0.5; ReferenceHeight=2
          Zone Field: Area=1; Slope=0; AspectAngle=0; Altitude=50
            Fertiliser
            Soil: same as Sensibility.ProteinAccumulation.WaterResponse.WaterResponseBase.Field.Soil
            Irrigation
            SurfaceOrganicMatter: InitialResidueName=wheat_stubble; InitialResidueType=wheat; InitialResidueMass=500; InitialStandingFraction=0; InitialCPR=0; InitialCNR=100
            Plant Wheat
            Operations Sowing
              1995-06-13  [Wheat].Sow(population:120, cultivar:"Hartog", depth:10, rowSpacing:250);
              1995-10-31  [Wheat].Harvest()
              1995-10-31  [Wheat].EndCrop()
            Manager Fertilise at sowing: same as Sensibility.ProteinAccumulation.WaterResponse.WaterResponseBase.Field.Fertilise at sowing
            Report TerminalStressReport: EventNames=[Clock].DoReport
              VariableNames:
                [Simulation].Name
                [Clock].Today
                sum([Soil].Water.MM)
                sum([Soil].NO3.kgha) as TotalNO3
                [Wheat].AboveGround.N
                [Wheat].AboveGround.Wt
                [Wheat].AboveGroundLive.N
                [Wheat].AboveGroundLive.Wt
                [Wheat].AboveGroundDead.N
                [Wheat].AboveGroundDead.Wt
                [Wheat].Grain.N
                [Wheat].Grain.NConc
                [Wheat].Grain.Number
                [Wheat].Grain.Size
                [Wheat].Grain.Wt
                [Wheat].Leaf.Tips
                [Wheat].Leaf.CoverGreen
                [Wheat].Leaf.CoverTotal
                [Wheat].Leaf.Dead.N
                [Wheat].Leaf.Dead.NConc
                [Wheat].Leaf.Dead.Wt
                [Wheat].Leaf.Ligules
                [Wheat].Leaf.Fn
                [Wheat].Leaf.Fw
                [Wheat].Leaf.Height
                [Wheat].Leaf.LAI
                [Wheat].Leaf.Live.N
                [Wheat].Leaf.Live.NConc
                [Wheat].Leaf.Live.Wt
                [Wheat].Leaf.SpecificArea
                [Wheat].Leaf.SpecificNitrogen
                [Wheat].Leaf.Transpiration
                [Wheat].Phenology.CurrentPhase.Name
                [Wheat].Phenology.CurrentStageName
                [Wheat].SowingData.Cultivar
                [Wheat].Phenology.HaunStage
                [Wheat].Phenology.HaunStage
                [Wheat].Leaf.Height
                [Wheat].Leaf.Tips
                [Wheat].Leaf.FinalLeafNumber
                [Wheat].Leaf.MainStemPopulation
                [Wheat].Leaf.StemPopulation
                [Wheat].Phenology.PTQ
                [Wheat].Phenology.Phyllochron
                [Wheat].Total.N
                [Wheat].Total.Wt
                ([Wheat].Leaf.Transpiration + [ISoilWater].Es + [MicroClimate].PrecipitationInterception) as ET
                [IWeather].MeanT
                [Wheat].Phenology.Photoperiod
                [Wheat].Phenology.AccumulatedTT
                [SurfaceOrganicMatter].Wt
                ([SurfaceOrganicMatter].N / [SurfaceOrganicMatter].Wt) as StubbleN
                ([SurfaceOrganicMatter].C / [SurfaceOrganicMatter].N) as StubbleCNR
            Manager IrrigationSchedule: same as Sensibility.ProteinAccumulation.WaterResponse.WaterResponseBase.Field.IrrigationSchedule
            Report ObsAnalysisReport: same as Sensibility.CO2AndTranspirationEfficiency.CO2TE.CO2TEBaseSimulation.Field.ObsAnalysisReport
            AccumulateFunctionGeneral TT00: same as Sensibility.CO2AndTranspirationEfficiency.CO2TE.CO2TEBaseSimulation.Field.TT00
            AccumulateFunctionGeneral TT01: same as Sensibility.CO2AndTranspirationEfficiency.CO2TE.CO2TEBaseSimulation.Field.TT01
            AccumulateFunctionGeneral TT02: same as Sensibility.CO2AndTranspirationEfficiency.CO2TE.CO2TEBaseSimulation.Field.TT02
            AccumulateFunctionGeneral TT03: same as Sensibility.CO2AndTranspirationEfficiency.CO2TE.CO2TEBaseSimulation.Field.TT03
            AccumulateFunctionGeneral TT04: same as Sensibility.CO2AndTranspirationEfficiency.CO2TE.CO2TEBaseSimulation.Field.TT04
            AccumulateFunctionGeneral TT05: same as Sensibility.CO2AndTranspirationEfficiency.CO2TE.CO2TEBaseSimulation.Field.TT05
            AccumulateFunctionGeneral TT06: same as Sensibility.CO2AndTranspirationEfficiency.CO2TE.CO2TEBaseSimulation.Field.TT06
            AccumulateFunctionGeneral TT07: same as Sensibility.CO2AndTranspirationEfficiency.CO2TE.CO2TEBaseSimulation.Field.TT07
    Folder DetailedDynamics
      Experiment DetailedDynamics
        Memo
          This sensibility test investigates the time course of dry matter and nitrogen content in plant organs within a growing season.
        Factors
          Factor Irrigation: Specification=[IrrigationSchedule]
            Manager Full: same as Sensibility.TerminalWaterStress.TerminalWaterStress.Factors.Irrigation.Full
        Simulation DetailedDynamicsBase
          Clock: Start=1995-06-13; End=1995-10-31
          Summary
          Weather: FileName=met/APS26.met
          SoilArbitrator
          MicroClimate: a_interception=0; b_interception=1; c_interception=0; d_interception=0; SoilHeatFluxFraction=0.4; MinimumHeightDiffForNewLayer=0; NightInterceptionFraction=0.5; ReferenceHeight=2
          Zone Field: Area=1; Slope=0; AspectAngle=0; Altitude=50
            Fertiliser
            Soil: same as Sensibility.ProteinAccumulation.WaterResponse.WaterResponseBase.Field.Soil
            Irrigation
            SurfaceOrganicMatter: InitialResidueName=wheat_stubble; InitialResidueType=wheat; InitialResidueMass=500; InitialStandingFraction=0; InitialCPR=0; InitialCNR=100
            Plant Wheat
            Operations Sowing: same as Sensibility.TerminalWaterStress.TerminalWaterStress.TerminalWaterStressBase.Field.Sowing
            Manager Fertilise at sowing: same as Sensibility.ProteinAccumulation.WaterResponse.WaterResponseBase.Field.Fertilise at sowing
            Report DetailedDynamicsReport: EventNames=[Clock].DoReport
              VariableNames:
                [Simulation].Name
                [Clock].Today
                [Wheat].Phenology.CurrentStageName
                [Wheat].Arbitrator.DM.TotalFixationSupply
                [Wheat].Arbitrator.DM.TotalPlantDemand
                [Wheat].Stem.Live.Wt
                [Wheat].Stem.Live.StructuralWt
                [Wheat].Stem.Total.Wt
                [Wheat].Stem.Total.StructuralWt
                [Wheat].Stem.Live.N
                [Wheat].Stem.Live.StructuralN
                [Wheat].Stem.Total.N
                [Wheat].Stem.Total.StructuralN
                [Wheat].Stem.NConc
                [Wheat].Stem.MinimumNConc
                [Wheat].Stem.CriticalNConc
                [Wheat].Stem.MaximumNConc
                [Wheat].Stem.DMDemand.Total
                [Wheat].Spike.Live.Wt
                [Wheat].Spike.Live.StructuralWt
                [Wheat].Spike.Total.Wt
                [Wheat].Spike.Total.StructuralWt
                [Wheat].Spike.Live.N
                [Wheat].Spike.Live.StructuralN
                [Wheat].Spike.Total.N
                [Wheat].Spike.Total.StructuralN
                [Wheat].Spike.NConc
                [Wheat].Spike.MinimumNConc
                [Wheat].Spike.CriticalNConc
                [Wheat].Spike.MaximumNConc
                [Wheat].Spike.DMDemand.Total
                [Wheat].Leaf.Live.Wt
                [Wheat].Leaf.Live.StructuralWt
                [Wheat].Leaf.Live.NConc
                [Wheat].Leaf.Dead.NConc
                [Wheat].Leaf.Total.Wt
                [Wheat].Leaf.Total.StructuralWt
                [Wheat].Leaf.Live.N
                [Wheat].Leaf.Live.StructuralN
                [Wheat].Leaf.Total.N
                [Wheat].Leaf.Total.StructuralN
                [Wheat].Leaf.Total.MetabolicN
                [Wheat].Leaf.Total.StorageN
                [Wheat].Leaf.NConc
                [Wheat].Leaf.MinNConc
                [Wheat].Leaf.NSupply.ReAllocation
                [Wheat].Leaf.NSupply.ReTranslocation
                [Wheat].Leaf.NDemand.Total
                [Wheat].Leaf.NDemand.Structural
                [Wheat].Leaf.NDemand.Metabolic
                [Wheat].Leaf.NDemand.Storage
                [Wheat].Leaf.DMDemand.Total
                [Wheat].Grain.DMDemand.Total
                [Wheat].Root.DMDemand.Total
                [Wheat].Grain.Wt
                [Wheat].Grain.N
                [Wheat].Grain.NConc
            Manager IrrigationSchedule: same as Sensibility.ProteinAccumulation.WaterResponse.WaterResponseBase.Field.IrrigationSchedule
            Report ObsAnalysisReport: same as Sensibility.CO2AndTranspirationEfficiency.CO2TE.CO2TEBaseSimulation.Field.ObsAnalysisReport
            AccumulateFunctionGeneral TT00: same as Sensibility.CO2AndTranspirationEfficiency.CO2TE.CO2TEBaseSimulation.Field.TT00
            AccumulateFunctionGeneral TT01: same as Sensibility.CO2AndTranspirationEfficiency.CO2TE.CO2TEBaseSimulation.Field.TT01
            AccumulateFunctionGeneral TT02: same as Sensibility.CO2AndTranspirationEfficiency.CO2TE.CO2TEBaseSimulation.Field.TT02
            AccumulateFunctionGeneral TT03: same as Sensibility.CO2AndTranspirationEfficiency.CO2TE.CO2TEBaseSimulation.Field.TT03
            AccumulateFunctionGeneral TT04: same as Sensibility.CO2AndTranspirationEfficiency.CO2TE.CO2TEBaseSimulation.Field.TT04
            AccumulateFunctionGeneral TT05: same as Sensibility.CO2AndTranspirationEfficiency.CO2TE.CO2TEBaseSimulation.Field.TT05
            AccumulateFunctionGeneral TT06: same as Sensibility.CO2AndTranspirationEfficiency.CO2TE.CO2TEBaseSimulation.Field.TT06
            AccumulateFunctionGeneral TT07: same as Sensibility.CO2AndTranspirationEfficiency.CO2TE.CO2TEBaseSimulation.Field.TT07
    Folder SevereEarlyWaterStress
      Experiment SevereEarlyWaterStress
        Memo
          This sensibility test investigates the ability of a wheat simulation to be affected by strong early water deficit, but not fail totally, and recover when rainfall returns.
        Factors
          Factor Irrigation: Specification=[IrrigationSchedule]
            Manager LowStress
              IrrigateDates = 15-may, 1-jul, 1-aug, 1-sep, 15-sep, 1-Oct
              Amount = 90
              Depth = 0
              Efficiency = 1
              WillRunoff = False
              script: same as in Sensibility.ProteinAccumulation.WaterResponse.WaterResponseBase.Field.IrrigationSchedule
            Manager TemporaryEarlyStress
              IrrigateDates = 15-jun, 1-jul, 1-aug, 1-sep, 15-sep, 1-Oct
              Amount = 90
              Depth = 0
              Efficiency = 1
              WillRunoff = False
              script: same as in Sensibility.ProteinAccumulation.WaterResponse.WaterResponseBase.Field.IrrigationSchedule
            Manager EarlyStress
              IrrigateDates = 30-jun, 1-jul, 1-aug, 1-sep, 15-sep, 1-Oct
              Amount = 90
              Depth = 0
              Efficiency = 1
              WillRunoff = False
              script: same as in Sensibility.ProteinAccumulation.WaterResponse.WaterResponseBase.Field.IrrigationSchedule
        Simulation SevereEarlyWaterStressBase
          Clock: Start=1995-05-13; End=1995-10-31
          Summary
          ControlledEnvironment: MaxT=18; MinT=8; Rain=0; Radn=15; PanEvap=5; VP=2; Wind=3; CO2=350; AirPressure=1010; DiffuseFraction=0.9; Latitude=-30; Longitude=0; DayLength=12; SunRise=6; TempLag=7
          SoilArbitrator
          MicroClimate: a_interception=0; b_interception=1; c_interception=0; d_interception=0; SoilHeatFluxFraction=0.4; MinimumHeightDiffForNewLayer=0; NightInterceptionFraction=0.5; ReferenceHeight=2
          Zone Field: Area=1; Slope=0; AspectAngle=0; Altitude=50
            Fertiliser
            Soil: ASCOrder=Vertosol; ASCSubOrder=Black; SoilType=Black Vertosol; Site=Norwin; NearestTown=Norwin; Region=Darling Downs and Granite Belt; State=Queensland; Country=Australia; NaturalVegetation=Qld. Bluegrass, possible Qld. Blue gum; ApsoilNumber=900; Latitude=-27.581836; Longitude=151.320206; LocationAccuracy=+/- 20m; YearOfSampling=0
              DataSource=CSIRO Sustainable Ecosystems, Toowoomba; Characteriesd as part of the GRDC funded project"Doing it better, doing it smarter, managing soil water in Australian agriculture' 2011
              Comments=Clay - OC, CLL for all crops estimated-based on Bongeen Mywybilla Soil No1
              Physical: same as Sensibility.ProteinAccumulation.WaterResponse.WaterResponseBase.Field.Soil.Physical
              WaterBalance SoilWater: same as Sensibility.CO2AndTranspirationEfficiency.CO2TE.CO2TEBaseSimulation.Field.Soil.SoilWater
              Organic: same as Sensibility.CO2AndTranspirationEfficiency.CO2TE.CO2TEBaseSimulation.Field.Soil.Organic
              Chemical: Thickness=[150, 150, 300, 300, 300, 300, 300]; PH=[8, 8, 8, 8, 8, 8, 8]; PHUnits=Water
              Water: Thickness=[150, 150, 300, 300, 300, 300, 300]; InitialValues=[0.35, 0.248, 0.28, 0.28, 0.28, 0.28, 0.28]; FilledFromTop=true
              Nutrient
              Solute NO3: same as Sensibility.CO2AndTranspirationEfficiency.CO2TE.CO2TEBaseSimulation.Field.Soil.NO3
              Solute NH4: same as Sensibility.CO2AndTranspirationEfficiency.CO2TE.CO2TEBaseSimulation.Field.Soil.NH4
              Solute Urea: same as Sensibility.CO2AndTranspirationEfficiency.CO2TE.CO2TEBaseSimulation.Field.Soil.Urea
              SoilTemperature Temperature: InteractionsPerDay=8
            Irrigation
            SurfaceOrganicMatter: InitialResidueName=wheat_stubble; InitialResidueType=wheat; InitialResidueMass=500; InitialStandingFraction=0; InitialCPR=0; InitialCNR=100
            Plant Wheat
            Operations Sowing
              1995-05-13  [Wheat].Sow(population:120, cultivar:"Hartog", depth:10, rowSpacing:250);
              1995-10-31  [Wheat].Harvest()
              1995-10-31  [Wheat].EndCrop()
            Manager Fertilise at sowing: same as Sensibility.ProteinAccumulation.WaterResponse.WaterResponseBase.Field.Fertilise at sowing
            Report TerminalStressReport: EventNames=[Clock].DoReport
              VariableNames:
                [Simulation].Name
                [Clock].Today
                sum([Soil].Water.MM)
                sum([Soil].Physical.LL15mm)
                sum([Soil].NO3.kgha) as TotalNO3
                [Irrigation].IrrigationApplied
                [Wheat].AboveGround.N
                [Wheat].AboveGround.Wt
                [Wheat].AboveGroundLive.N
                [Wheat].AboveGroundLive.Wt
                [Wheat].AboveGroundDead.N
                [Wheat].AboveGroundDead.Wt
                [Wheat].Grain.N
                [Wheat].Grain.NConc
                [Wheat].Grain.Number
                [Wheat].Grain.Size
                [Wheat].Grain.Wt
                [Wheat].Leaf.Tips
                [Wheat].Leaf.CoverGreen
                [Wheat].Leaf.CoverTotal
                [Wheat].Leaf.Dead.N
                [Wheat].Leaf.Dead.NConc
                [Wheat].Leaf.Dead.Wt
                [Wheat].Leaf.Ligules
                [Wheat].Leaf.Fn
                [Wheat].Leaf.Fw
                [Wheat].Leaf.Height
                [Wheat].Leaf.LAI
                [Wheat].Leaf.Live.N
                [Wheat].Leaf.Live.NConc
                [Wheat].Leaf.Live.Wt
                [Wheat].Leaf.SpecificArea
                [Wheat].Leaf.SpecificNitrogen
                [Wheat].Leaf.Transpiration
                [Wheat].Phenology.CurrentPhase.Name
                [Wheat].Phenology.CurrentStageName
                [Wheat].SowingData.Cultivar
                [Wheat].Phenology.HaunStage
                [Wheat].Phenology.HaunStage
                [Wheat].Leaf.Height
                [Wheat].Leaf.Tips
                [Wheat].Leaf.FinalLeafNumber
                [Wheat].Leaf.MainStemPopulation
                [Wheat].Leaf.StemPopulation
                [Wheat].Phenology.PTQ
                [Wheat].Phenology.Phyllochron
                [Wheat].Total.N
                [Wheat].Total.Wt
                ([Wheat].Leaf.Transpiration + [ISoilWater].Es + [MicroClimate].PrecipitationInterception) as ET
                [IWeather].MeanT
                [Wheat].Phenology.Photoperiod
                [Wheat].Phenology.AccumulatedTT
                [SurfaceOrganicMatter].Wt
                ([SurfaceOrganicMatter].N / [SurfaceOrganicMatter].Wt) as StubbleN
                ([SurfaceOrganicMatter].C / [SurfaceOrganicMatter].N) as StubbleCNR
            Manager IrrigationSchedule: same as Sensibility.ProteinAccumulation.WaterResponse.WaterResponseBase.Field.IrrigationSchedule
            Report ObsAnalysisReport: same as Sensibility.CO2AndTranspirationEfficiency.CO2TE.CO2TEBaseSimulation.Field.ObsAnalysisReport
            AccumulateFunctionGeneral TT00: same as Sensibility.CO2AndTranspirationEfficiency.CO2TE.CO2TEBaseSimulation.Field.TT00
            AccumulateFunctionGeneral TT01: same as Sensibility.CO2AndTranspirationEfficiency.CO2TE.CO2TEBaseSimulation.Field.TT01
            AccumulateFunctionGeneral TT02: same as Sensibility.CO2AndTranspirationEfficiency.CO2TE.CO2TEBaseSimulation.Field.TT02
            AccumulateFunctionGeneral TT03: same as Sensibility.CO2AndTranspirationEfficiency.CO2TE.CO2TEBaseSimulation.Field.TT03
            AccumulateFunctionGeneral TT04: same as Sensibility.CO2AndTranspirationEfficiency.CO2TE.CO2TEBaseSimulation.Field.TT04
            AccumulateFunctionGeneral TT05: same as Sensibility.CO2AndTranspirationEfficiency.CO2TE.CO2TEBaseSimulation.Field.TT05
            AccumulateFunctionGeneral TT06: same as Sensibility.CO2AndTranspirationEfficiency.CO2TE.CO2TEBaseSimulation.Field.TT06
            AccumulateFunctionGeneral TT07: same as Sensibility.CO2AndTranspirationEfficiency.CO2TE.CO2TEBaseSimulation.Field.TT07
  Folder Replacements
    Report HarvestReport: EventNames=[Wheat].Harvesting
      VariableNames:
        [Clock].Today
        [Clock].StartDate
        [Wheat].SowingDate
        [Wheat].SowingData.Cultivar
        [Wheat].SowingData.Population
        [Wheat].SowingDate.DayOfYear
        [Wheat].SowingData.RowSpacing
        [IWeather].Latitude
        [IWeather].Longitude
        [IWeather].FileName
        [LocationInfo].Script.Country
        [LocationInfo].Script.State
        [LocationInfo].Script.Region
        [Wheat].AboveGround.N
        [Wheat].AboveGround.NConc
        [Wheat].AboveGround.Wt
        [Wheat].Ear.N
        [Wheat].Ear.NConc
        [Wheat].Ear.Wt
        [Wheat].Grain.N
        [Wheat].Grain.NConc
        [Wheat].Grain.Number
        [Wheat].Grain.Protein
        [Wheat].Grain.Size
        [Wheat].Grain.Wt
        [Wheat].Leaf.N
        [Wheat].Leaf.StemPopulation
        [Wheat].Leaf.Wt
        [Wheat].Phenology.CAMP.TSHS
        [Wheat].Phenology.CAMP.VSHS
        [Wheat].Phenology.CurrentStageName
        [Wheat].Phenology.EmergenceDAS
        [Wheat].Phenology.FinalLeafNumber
        [Wheat].Phenology.FlagLeafDAS
        [Wheat].Phenology.FloweringDAS
        [Wheat].Phenology.HeadingDAS
        [Wheat].Phenology.MaturityDAS
        [Wheat].Phenology.TerminalSpikeletDAS
        [Wheat].Spike.HeadNumber
        [Wheat].Spike.N
        [Wheat].Spike.Wt
        [Wheat].Stem.N
        [Wheat].Stem.NConc
        [Wheat].Stem.Wt
    Report DailyReport: EventNames=[Clock].DoReport
      VariableNames:
        [Clock].Today
        [IWeather].MinT
        [IWeather].MaxT
        [IWeather].Radn
        [Wheat].Phenology.AccumulatedTT
        [Wheat].Phenology.CurrentStageName
        [Wheat].Phenology.CurrentPhaseName
        [Wheat].Phenology.PTQ
        [Wheat].Phenology.Stage
        [Wheat].DaysAfterSowing
        [Wheat].SowingData.Cultivar
        [Wheat].AboveGround.N
        [Wheat].AboveGround.NConc
        [Wheat].AboveGround.Wt
        [Wheat].Ear.N
        [Wheat].Ear.NConc
        [Wheat].Ear.Wt
        [Wheat].Ear.WtProportion
        [Wheat].Grain.N
        [Wheat].Grain.NConc
        [Wheat].Grain.Wt
        [Wheat].Leaf.CoverGreen
        [Wheat].Leaf.CoverTotal
        [Wheat].Leaf.Dead.N
        [Wheat].Leaf.Dead.NConc
        [Wheat].Leaf.Dead.Wt
        [Wheat].Leaf.DeadWtProportion
        [Wheat].Leaf.Fn
        [Wheat].Leaf.Fw
        [Wheat].Leaf.Height
        [Wheat].Leaf.LAI
        [Wheat].Leaf.Live.N
        [Wheat].Leaf.Live.NConc
        [Wheat].Leaf.Live.StorageWt
        [Wheat].Leaf.Live.StorageN
        [Wheat].Leaf.Live.StructuralN
        [Wheat].Leaf.Live.MetabolicN
        [Wheat].Leaf.Live.Wt
        [Wheat].Leaf.LiveWtProportion
        [Wheat].Leaf.Photosynthesis
        [Wheat].Leaf.N
        //[Wheat].Leaf.Canopy.TotalSpecificArea
        [Wheat].Leaf.SpecificAreaCanopy
        [Wheat].Leaf.StemNumberPerPlant
        [Wheat].Leaf.StemPopulation
        [Wheat].Leaf.Wt
        [Wheat].Phenology.CurrentStageName
        [Wheat].Phenology.HaunStage
        [Wheat].Phenology.Zadok.Stage
        [Wheat].Root.Wt
        [Wheat].Spike.N
        [Wheat].Spike.NConc
        [Wheat].Spike.Live.StorageWt
        [Wheat].Spike.Wt
        [Wheat].Stem.N
        [Wheat].Stem.NConc
        [Wheat].Stem.Live.StorageWt
        [Wheat].Stem.Wt
        [Wheat].Stem.Live.StorageWt
        [Wheat].Stem.Live.StructuralWt
        [Wheat].Stem.DMDemand.Storage
        [Wheat].Stem.DMDemand.Structural
        [Wheat].Stem.DMDemand.Total
        [Wheat].Stem.WtProportion
        ([Wheat].Leaf.Transpiration + [ISoilWater].Es + [MicroClimate].PrecipitationInterception)
        sum([Soil].NO3.kgha)
        sum([Soil].Water.MM)
        [Soil].Water.Volumetric
    Manager MaxLeafSize
```csharp
using APSIM.Core;
using Newtonsoft.Json;
using APSIM.Shared.Utilities;
using Models.Soils.Arbitrator;
using Models.PMF.Organs;
using Models.PMF;
using Models.Interfaces;
using Models.Core;
using System.Xml.Serialization;
using System.Collections.Generic;
using System;
using Models.PMF.Struct;
using Models.Soils;



namespace Models
{
    [Serializable] 
    public class Script : Model, IStructureDependency
    {
        public IStructure Structure { private get; set; }
//        [Link] private Clock Clock;
//        [Link] private Plant Wheat;
//        public  event EventHandler LeafReport;
//        [Link(Type = LinkType.Path, Path = "[Wheat].Structure")]
//        private Structure structure;
//        
//        private Zone thisZone {get; set;}
//        
//        
//        [JsonIgnore] public int LeafPosition { get; set; }
//        [JsonIgnore] public double LeafSize { get; set; }
//        [JsonIgnore] public double MaxLeafSize { get; set; }
//        

        

//        [EventSubscribe("StartOfSimulation")]
//        private void DoStartOfSimulation(object sender, EventArgs e)
//        {
//               thisZone = this.Parent.Parent as Zone;
//        }
//        
//        [EventSubscribe("NewLeaf")]
//        private void OnNewLeaf(object sender, EventArgs e)
//        {
//                LeafPosition = (int)Structure.Get("Wheat.Leaf.ExpandedCohortNo", relativeTo: thisZone); 
//                LeafSize =   (double)Structure.Get("Wheat.Leaf.CohortSize["+((LeafPosition+1).ToString())+"]", relativeTo: thisZone);
//                MaxLeafSize = (double)Structure.Get("Wheat.Leaf.CohortMaxArea["+((LeafPosition+1).ToString())+"]", relativeTo: thisZone);
//                LeafReport.Invoke(this, new EventArgs());
//        }
    }
}
```
    Report MaxLeafSizeReport: EventNames=//[MaxLeafSize].Script.LeafReport
      VariableNames:
        //[MaxLeafSize].Script.LeafSize
        //[MaxLeafSize].Script.LeafPosition
        //[MaxLeafSize].Script.MaxLeafSize
    Manager Harvesting
```csharp
using APSIM.Core;
using Models.Soils.Nutrients;
using System;
using Models.Core;
using System.Collections.Generic;
using System.Text;
using Models.Soils;
using Models.PMF;
using Models;
using System.Xml.Serialization;
using APSIM.Shared.Utilities;
using Models.PMF.Phen;

namespace Models
{
    [Serializable] 
    public class Script : Model, IStructureDependency
    {
        [Link] private Plant Wheat;
        [Link] private Simulation sim;
        [Link] private Clock clock;
        [Link(Type = LinkType.Path, Path = "[Wheat].Phenology")]
        private Phenology phenology;
        public IStructure Structure { private get; set; }


        

        [EventSubscribe("DoManagement")]
        private void OnDoManagement(object sender, EventArgs e)
        {
            if (phenology.CurrentPhase.Name == "GrainRipening")
            {
                Wheat.Harvest();
                Wheat.EndCrop();
                Structure.Set("Clock.EndDate", clock.Today, relativeTo: sim);  
            }
        }

        [EventSubscribe("EndOfDay")]
        private void OnEndOfDay(object sender, EventArgs e)
        {
            if ((clock.Today.Equals(clock.EndDate))&&(Wheat.IsAlive))
            {
                Wheat.Harvest();
                Wheat.EndCrop();
                Structure.Set("Clock.EndDate", clock.Today, relativeTo: sim);  
            }
        }

    }
}
```
    Report NDVIDailyReport: EventNames=[Clock].DoReport
      VariableNames:
        [Simulation].Name
        [Clock].Today
        [Spectral].NDVI
        [Wheat].SowingData.Cultivar
  Experiment Lincoln2021: DisabledSimNames=[Lincoln2021SD15MarCVCRW247, Lincoln2021SD18FebCVCRW247]
    Memo Phenology Not modeled
      The purpose of this experiment is to test model predictions of canopy development, biomass accumulation and partition.  The cultivars used do not have sufficient data with different sowing dates to allow accurate fitting of phenology parameters.  However, detailed observtions of the timing of phenological stages were conducted for this experiment.  As such, the timing of phenology stages was set (using the SetModelParamsBySimulation model in the base simulation) to ensure good alignment of the models phenology with the experiment so model comparisons of biomass could be made without confunding of poor phenology predictions.
    Factors
      Permutation
        Factor SD
          CompositeFactor 18Feb
            Specifications:
              [Sowing].Script.SowDate = 18-Feb
              [Harvest].Script.HarvDate = 15-Feb
          CompositeFactor 15Mar
            Specifications:
              [Sowing].Script.SowDate = 15-Mar
              [Harvest].Script.HarvDate = 20-Feb
          CompositeFactor 15Apr
            Specifications:
              [Sowing].Script.SowDate = 15-Apr
              [Harvest].Script.HarvDate = 20-Feb
          CompositeFactor 27May
            Specifications:
              [Sowing].Script.SowDate = 27-May
              [Harvest].Script.HarvDate = 20-Feb
        Factor CV: Specification=[Sowing].Script.CultivarName=Kerrin, Zyatt, Graham, CRW247
    Simulation Wheat
      Clock: Start=2021-01-01; End=2022-03-12
      Summary SummaryFile
      Weather: FileName=met/LincolnUni.met
      SoilArbitrator
      Zone Field: Area=1; Slope=0; AspectAngle=0; Altitude=50
        Soil TempletonSiltLoam: SoilType=NZ_sedementary; Region=Plains; State=Canterbury; Country=New Zealand; Latitude=0; Longitude=0
          DataSource=Generic profile descriptions provided by Trevor Webb and data for functional horizions based on SWAMP project results
          Comments=Bulk density values were measured on the fine earth fraction so values entered into apsim soil are adjusted down to account for stone content (assuming stones are inert from all soil process so their mass and volume is removed from model paramaters).  SAT, DUL, LL15 and Air dry have been adjusted down to account for stone content.  OC has not been adjusted so the model will get the correct carbon and N amounts using the adjusted BD.
          Chemical: Thickness=[180, 150, 400, 270, 500]; PH=[6, 6, 6, 6, 6]; PHUnits=Water
          Physical
            Thickness  ParticleSizeSand  ParticleSizeSilt  ParticleSizeClay  Rocks  BD     AirDry  LL15  DUL   SAT
            200        5                 65                30                0.275  1      0.05    0.1   0.32  0.42
            200        5                 65                30                0.119  1.324  0.12    0.15  0.35  0.41
            200        5                 65                30                0.189  1.35   0.1     0.1   0.3   0.37
            200        5                 65                30                0.218  1.301  0.08    0.08  0.3   0.37
            200        5                 65                30                0.303  1.301  0.06    0.07  0.28  0.33
            200        5                 65                30                0.324  1.301  0.06    0.08  0.25  0.32
            200        5                 65                30                0.366  1.301  0.1     0.1   0.23  0.3
            200        5                 65                30                0.345  1.301  0.1     0.1   0.24  0.31
            Rocks, ParticleSizeSand, ParticleSizeSilt, ParticleSizeClay source: Calculated
            SoilCrop WheatSoil: LL=[0.1, 0.12, 0.1, 0.08, 0.06, 0.08, 0.1, 0.1]; KL=[0.06, 0.06, 0.1, 0.1, 0.05, 0.03, 0.02, 0.01]; XF=[1, 1, 1, 1, 1, 1, 1, 1]
          WaterBalance SoilWater: SummerDate=1-oct; SummerU=6; SummerCona=3; WinterDate=1-Apr; WinterU=2; WinterCona=1; DiffusConst=0; DiffusSlope=0; Salb=0.13; CN2Bare=0; CNRed=0; CNCov=0.8; PSIDul=-100; Thickness=[200, 200, 200, 200, 200, 200, 200, 200]; SWCON=[1, 1, 1, 1, 1, 1, 1, 1]
          Organic: FOMCNRatio=40; CarbonUnits=Total
            Thickness  Carbon  SoilCNRatio  FBiom   FInert  FOM
            180        2.6251  11           0.0333  0.4371  427.528
            150        1.2469  11           0.0187  0.6569  316.72
            400        0.316   11           0.0117  0.8496  142.312
            270        0.208   11           0.0102  0.945   82.9318
            500        0.2004  11           0.01    0.9827  30.5089
          Water: Thickness=[200, 200, 200, 200, 200, 200, 200, 200]; InitialValues=[0.35, 0.35, 0.25, 0.25, 0.25, 0.2, 0.18, 0.2]; FilledFromTop=false
          Nutrient
          Solute NO3: Thickness=[180, 150, 400, 270, 500]; InitialValues=[265, 40.2427, 5.01813, 2.41979, 1.9216]; InitialValuesUnits=ppm; WaterTableConcentration=0; D0=0; DepthConstant=0; MaxDepthSoluteAccessible=0; RunoffEffectivenessAtMovingSolute=0; MaxEffectiveRunoff=0
          Solute NH4: Thickness=[180, 150, 400, 270, 500]; InitialValues=[1.5, 0.854582, 0.442264, 0.38432, 0.38432]; InitialValuesUnits=ppm; WaterTableConcentration=0; D0=0; DepthConstant=0; MaxDepthSoluteAccessible=0; RunoffEffectivenessAtMovingSolute=0; MaxEffectiveRunoff=0
          Solute Urea: Thickness=[180, 150, 400, 270, 500]; InitialValues=[0, 0, 0, 0, 0]; InitialValuesUnits=kg/ha; WaterTableConcentration=0; D0=0; DepthConstant=0; MaxDepthSoluteAccessible=0; RunoffEffectivenessAtMovingSolute=0; MaxEffectiveRunoff=0
          SoilTemperature Temperature: InteractionsPerDay=8
        Fertiliser
        SurfaceOrganicMatter: InitialResidueName=wheat_stubble; InitialResidueType=wheat; InitialResidueMass=500; InitialStandingFraction=0; InitialCPR=0; InitialCNR=100
        Plant Wheat
        MicroClimate: a_interception=0; b_interception=1; c_interception=0; d_interception=0; SoilHeatFluxFraction=0.4; MinimumHeightDiffForNewLayer=0; NightInterceptionFraction=0.5; ReferenceHeight=2
        Manager Sowing
          SowDate = 24-Jul
          CultivarName = Amethyst
          SowingDepth = 50
          RowSpacing = 150
          Population = 220
          EmergeDate =
```csharp
using APSIM.Shared.Utilities;
using Models.Utilities;
using Models.Soils;
using Models.PMF;
using Models.Core;
using System;

namespace Models
{
    [Serializable]
    public class Script : Model
    {
        [Link] Clock Clock;
        [Link] Fertiliser Fertiliser;
        [Link] Summary Summary;
        [Link] Soil Soil;
        
        [Link] Plant wheat;

        [Description("Sowing date (d-mmm)")]
        public string SowDate { get; set; }

        [Display(Type = DisplayType.CultivarName)]
        [Description("Cultivar to be sown")]
        public string CultivarName { get; set; }

        [Description("Sowing depth (mm)")]
        public double SowingDepth { get; set; }

        [Description("Row spacing (mm)")]
        public double RowSpacing { get; set; }

        [Description("Plant population (/m2)")]
        public double Population { get; set; }
        
        [Description("Emergence Date (d-MMM)")]
        public string EmergeDate {get; set;}
        
        private bool sown {get; set;} = false;

        [EventSubscribe("DoManagement")]
        private void OnDoManagement(object sender, EventArgs e)
        {
            if (DateUtilities.WithinDates(SowDate, Clock.Today, SowDate) && (sown == false))
            {
                wheat.Sow(population: Population, cultivar: CultivarName, depth: SowingDepth, rowSpacing: RowSpacing);    
                sown = true;
            }
        }
    }
}
```
        Manager SowingFertiliser
          Amount = 0
          CropName = wheat
          script: same as in Sensibility.CO2AndTranspirationEfficiency.CO2TE.CO2TEBaseSimulation.Field.SowingFertiliser
        Manager Harvest
          HarvDate =
```csharp
using Models.Soils.Nutrients;
using System;
using Models.Core;
using Models.PMF;
using Models.Soils;
using Models.Soils.Nutrients;
using Models.Utilities;
using APSIM.Shared.Utilities;

namespace Models
{
    [Serializable]
    public class Script : Model
    {
        [Link] Plant Wheat;
        [Link] Clock clock;
        
        [Description("Sowing date (d-mmm)")]
        public string HarvDate { get; set; }

        [EventSubscribe("DoManagement")]
        private void OnDoManagement(object sender, EventArgs e)
        {
            
            //if (Wheat.IsReadyForHarvesting)
            //if(clock.Today.Equals(DateTime.Parse("2024-02-1")))
            //string HarvDate = "20-Feb";
            if (DateUtilities.WithinDates(HarvDate, clock.Today, HarvDate)&&(Wheat.IsAlive))
            {
               Wheat.Harvest();
               Wheat.EndCrop();    
            }
        
        }
        
    }
}
```
        Manager Fertilise on Z25
          Stage = 25
          FertiliserType = UreaN
          Amount = 50
```csharp
using APSIM.Core;
using Models.PMF;
using Models.Core;
using System;
using Models.Soils;
namespace Models
{
    [Serializable] 
    public class Script : Model, IStructureDependency
    {
        [Link] private Clock Clock;
        [Link] private Fertiliser Fertiliser;
        [Link] private Summary Summary;
        [Link] private Plant Wheat;
        public IStructure Structure { private get; set; }
 
        private bool hasFertilised = false;

        [Description("Fertilise once crop reaches stage:")]
        public double Stage { get; set; }

        [Description("Type of fertiliser to apply? ")] 
        [Display(Type = DisplayType.FertiliserType)]public string FertiliserType { get; set; }

        [Description("Amount of fertiliser to be applied (kg/ha)")] 
        public double Amount { get; set; }
     

        

        [EventSubscribe("DoManagement")] 
        private void OnDoManagement(object sender, EventArgs e)
        { 
            double zadok = (double)Structure.GetObject("Phenology.Zadok.Stage", relativeTo: Wheat).Value; 
 
            if (zadok >= Stage && !hasFertilised)
            { 
                Summary.WriteMessage(this, "Fertilising!!", MessageType.Diagnostic); 
                Fertiliser.Apply(amount: Amount, type: FertiliserType);
                hasFertilised = true; 
            } 
        }

        [EventSubscribe("Sowing")]
        private void OnSowing(object sender, EventArgs e)
        {
            hasFertilised = false;
        }
    }
}
```
        Manager Fertilise on Z30
          Stage = 30
          FertiliserType = UreaN
          Amount = 100
          script: same as in Lincoln2021.Wheat.Field.Fertilise on Z25
        Report DailyReport
        Report HarvestReport
        Operations
          2021-03-01  [Irrigation].Apply (10);
          2021-03-04  [Irrigation].Apply (20);
          2021-03-09  [Irrigation].Apply (40);
          2021-03-11  [Irrigation].Apply (40);
          2021-03-17  [Irrigation].Apply (15);
          2021-03-22  [Irrigation].Apply (25);
          2021-03-30  [Irrigation].Apply (10);
          2021-10-21  [Irrigation].Apply (14);
          2021-11-01  [Irrigation].Apply (21);
          2021-11-06  [Irrigation].Apply (4);
          2021-11-07  [Irrigation].Apply (31.5);
          2021-11-12  [Irrigation].Apply (21);
          2021-11-16  [Irrigation].Apply (35);
          2021-11-18  [Irrigation].Apply (42);
          2021-11-19  [Irrigation].Apply (24.5);
          2021-11-20  [Irrigation].Apply (24.5);
          2021-11-24  [Irrigation].Apply (52);
          2021-11-25  [Irrigation].Apply (45.5);
          2021-11-29  [Irrigation].Apply (21);
        Irrigation
        Report MaxLeafAreaReport
        Manager MaxLeafAreaCalc
```csharp
using Models.Soils;
using System;
using System.Collections.Generic;
using System.Xml.Serialization;
using Models.Core;
using Models.Interfaces;
using APSIM.Shared.Utilities;



namespace Models
{
    [Serializable] 
    public class Script : Model
    {
    
        
    }
}
```
        Report NDVIDailyReport
        SetModelParamsBySimulation: SetEventName=[Plant].PlantSowing; ParameterFile=inputs/Lincoln2021ParameterSets.csv
        Spectral: DrySoilNDVI=0.12; WetSoilNDVI=0.2; GreenCropNDVI=0.9; DeadCropNDVI=0.1
        Report ObsAnalysisReport: same as Sensibility.CO2AndTranspirationEfficiency.CO2TE.CO2TEBaseSimulation.Field.ObsAnalysisReport
        AccumulateFunctionGeneral TT00: same as Sensibility.CO2AndTranspirationEfficiency.CO2TE.CO2TEBaseSimulation.Field.TT00
        AccumulateFunctionGeneral TT01: same as Sensibility.CO2AndTranspirationEfficiency.CO2TE.CO2TEBaseSimulation.Field.TT01
        AccumulateFunctionGeneral TT02: same as Sensibility.CO2AndTranspirationEfficiency.CO2TE.CO2TEBaseSimulation.Field.TT02
        AccumulateFunctionGeneral TT03: same as Sensibility.CO2AndTranspirationEfficiency.CO2TE.CO2TEBaseSimulation.Field.TT03
        AccumulateFunctionGeneral TT04: same as Sensibility.CO2AndTranspirationEfficiency.CO2TE.CO2TEBaseSimulation.Field.TT04
        AccumulateFunctionGeneral TT05: same as Sensibility.CO2AndTranspirationEfficiency.CO2TE.CO2TEBaseSimulation.Field.TT05
        AccumulateFunctionGeneral TT06: same as Sensibility.CO2AndTranspirationEfficiency.CO2TE.CO2TEBaseSimulation.Field.TT06
        AccumulateFunctionGeneral TT07: same as Sensibility.CO2AndTranspirationEfficiency.CO2TE.CO2TEBaseSimulation.Field.TT07
      Manager LocationInfo
        Country = New Zealand
        State = Canterbury Region
        Region =
        script: same as in Sensibility.CO2AndTranspirationEfficiency.CO2TE.CO2TEBaseSimulation.LocationInfo
  Experiment Lincoln2023
    DisabledSimNames=[Lincoln2023SD19AprCVCesario, Lincoln2023SD27MarCVCesario, Lincoln2023SD19AprCVStockade, Lincoln2023SD27MarCVStockade, Lincoln2023SD19-AprCvCesario, Lincoln2023SD27-MarCvCesario, Lincoln2023SD19-AprCvStockade, Lincoln2023SD27-MarCvStockade]
    Memo Phenology Not modeled: same as Lincoln2021.Phenology Not modeled
    Factors
      Permutation
        Factor SD
          CompositeFactor 27Mar
            Specifications:
              [Sowing].Script.SowDate = 27-Mar
              [FertiliserEvents]
            Operations FertiliserEvents
              2023-08-03  [Fertiliser].Apply(100, "UreaN", 0);
              2023-09-07  [Fertiliser].Apply(100, "UreaN", 0);
              2023-10-20  [Fertiliser].Apply(70, "UreaN", 0);
          CompositeFactor 19Apr
            Specifications:
              [Sowing].Script.SowDate = 19-Apr
              [FertiliserEvents]
            Operations FertiliserEvents
              2023-08-20  [Fertiliser].Apply(100, "UreaN", 0);
              2023-09-10  [Fertiliser].Apply(100, "UreaN", 0);
              2023-11-07  [Fertiliser].Apply(70, "UreaN", 0);
          CompositeFactor 18May
            Specifications:
              [Sowing].Script.SowDate = 18-May
              [FertiliserEvents]
            Operations FertiliserEvents
              2023-09-28  [Fertiliser].Apply(100, "UreaN", 0);
              2023-10-18  [Fertiliser].Apply(100, "UreaN", 0);
              2023-11-07  [Fertiliser].Apply(70, "UreaN", 0);
        Factor CV
          Specification=[Sowing].Script.CultivarName = Stockade, Cesario, Kerrin, Sorrial, Graham, Voltron
    Simulation Lincoln23Base
      Weather: FileName=met/Lincoln_23.met
      Clock: Start=2023-03-20; End=2024-02-05
      Summary
      SoilArbitrator
      MicroClimate: a_interception=0; b_interception=1; c_interception=0; d_interception=0; SoilHeatFluxFraction=0.4; MinimumHeightDiffForNewLayer=0; NightInterceptionFraction=0.5; ReferenceHeight=2
      Manager LocationInfo
        Country = New Zealand
        State = Canterbury Region
        Region = Canterbury Region
        script: same as in Sensibility.CO2AndTranspirationEfficiency.CO2TE.CO2TEBaseSimulation.LocationInfo
      Zone Field: Area=1; Slope=0; AspectAngle=0; Altitude=50
        Soil Wakanui Silt Loam: Latitude=0; Longitude=0
          Physical
            Thickness  ParticleSizeSand  ParticleSizeSilt  ParticleSizeClay  Rocks  BD    AirDry  LL15   DUL    SAT
            200        5                 65                30                0      1.13  0.1     0.139  0.353  0.549
            100        5                 65                30                0      1.28  0.1     0.139  0.325  0.496
            100        5                 65                30                0      1.46  0.137   0.137  0.29   0.432
            100        5                 65                30                0      1.58  0.127   0.127  0.27   0.389
            100        5                 65                30                0      1.49  0.094   0.094  0.28   0.42
            100        5                 65                30                0      1.4   0.072   0.072  0.28   0.451
            100        5                 65                30                0      1.37  0.064   0.064  0.28   0.464
            100        5                 65                30                0      1.41  0.073   0.073  0.304  0.448
            100        5                 65                30                0      1.38  0.105   0.105  0.31   0.462
            100        5                 65                30                0      1.43  0.134   0.134  0.295  0.455
            100        5                 65                30                0      1.43  0.139   0.139  0.28   0.455
            100        5                 65                30                0      1.43  0.135   0.135  0.29   0.455
            100        5                 65                30                0      1.39  0.142   0.142  0.3    0.456
            100        5                 65                30                0      1.39  0.15    0.15   0.33   0.455
            100        5                 65                30                0      1.39  0.184   0.184  0.34   0.455
            100        5                 65                30                0      1.39  0.235   0.235  0.34   0.455
            100        5                 65                30                0      1.39  0.229   0.229  0.33   0.455
            100        5                 65                30                0      1.39  0.232   0.232  0.34   0.455
            100        5                 65                30                0      1.39  0.231   0.231  0.32   0.455
            100        5                 65                30                0      1.39  0.184   0.184  0.3    0.455
            100        5                 65                30                0      1.39  0.149   0.149  0.335  0.455
            100        5                 65                30                0      1.39  0.17    0.17   0.34   0.455
            Rocks, ParticleSizeSand, ParticleSizeSilt, ParticleSizeClay source: Calculated
            SoilCrop WheatSoil
              LL=[0.139, 0.139, 0.137, 0.127, 0.094, 0.072, 0.064, 0.073, 0.105, 0.134, 0.139, 0.135, 0.142, 0.15, 0.184, 0.235, 0.229, 0.34, 0.32, 0.3, 0.335, 0.34]
              KL=[0.12, 0.12, 0.11, 0.11, 0.11, 0.1, 0.09, 0.05, 0.03, 0.03, 0.04, 0.05, 0.05, 0.015, 0.015, 0.01, 0.01, 0.01, 0.01, 0.01, 0.01, 0.01]
              XF=[1, 1, 1, 1, 1, 1, 1, 1, 1, 1, 1, 1, 1, 1, 1, 1, 1, 1, 1, 1, 1, 1]
          WaterBalance SoilWater: SummerDate=1-Nov; SummerU=6; SummerCona=3.5; WinterDate=1-Apr; WinterU=6; WinterCona=3.5; DiffusConst=88; DiffusSlope=35.4; Salb=0.18; CN2Bare=68; CNRed=20; CNCov=0.8; DischargeWidth=5; CatchmentArea=10; PSIDul=-100
            Thickness=[200, 100, 100, 100, 100, 100, 100, 100, 100, 100, 100, 100, 100, 100, 100, 100, 100, 100, 100, 100, 100, 100]
            SWCON=[0.55, 0.55, 0.55, 0.55, 0.55, 0.55, 0.55, 0.55, 0.55, 0.55, 0.55, 0.55, 0.65, 0.65, 0.65, 0.65, 0.65, 0.65, 0.65, 0.65, 0.65, 0.65]
          Water: FilledFromTop=true
            Thickness=[200, 100, 100, 100, 100, 100, 100, 100, 100, 100, 100, 100, 100, 100, 100, 100, 100, 100, 100, 100, 100, 100]
            InitialValues=[0.353, 0.325, 0.29, 0.27, 0.28, 0.28, 0.28, 0.304, 0.31, 0.295, 0.28, 0.29, 0.3, 0.33, 0.34, 0.34, 0.33, 0.34, 0.32, 0.3, 0.335, 0.34]
          Chemical: PHUnits=Water
            Thickness  PH   CEC
            200        6.6  12.44
            100        6.2  11.6525
            100        5.7  11.045
            100        5.5  10.6625
            100        5.5  9.4025
            100        5.5  9.4025
            100        5.5  9.4025
            100        5.5  9.4025
            100        5.5  9.4025
            100        5.5  9.4025
            100        5.5  9.4025
            100        5.5  9.4025
            100        5.5  9.4025
            100        5.5  9.4025
            100        5.5  9.4025
            100        5.5  9.4025
            100        5.5  9.4025
            100        5.5  9.4025
            100        5.5  9.4025
            100        5.5  9.4025
            100        5.5  9.4025
            100        5.5  9.4025
            CEC source: Calculated
          Nutrient
          SoilTemperature Temperature: InteractionsPerDay=8
          Solute NO3: Thickness=[150, 150, 150, 150, 600, 300, 300]; InitialValues=[21.1, 50.9, 62.8, 42.3, 1, 1, 1]; InitialValuesUnits=ppm; WaterTableConcentration=0; D0=0; DepthConstant=0; MaxDepthSoluteAccessible=0; RunoffEffectivenessAtMovingSolute=0; MaxEffectiveRunoff=0
          Solute NH4: Thickness=[150, 150, 150, 150, 600, 300, 300]; InitialValues=[3, 0.2, 0.6, 0.4, 0.1, 0.1, 0.1]; InitialValuesUnits=ppm; WaterTableConcentration=0; D0=0; DepthConstant=0; MaxDepthSoluteAccessible=0; RunoffEffectivenessAtMovingSolute=0; MaxEffectiveRunoff=0
          Solute Urea: Thickness=[150, 150, 150, 150, 600, 300, 300]; InitialValues=[0, 0, 0, 0, 0, 0, 0]; InitialValuesUnits=kg/ha; WaterTableConcentration=0; D0=0; DepthConstant=0; MaxDepthSoluteAccessible=0; RunoffEffectivenessAtMovingSolute=0; MaxEffectiveRunoff=0
          Organic: same as Sensibility.CO2AndTranspirationEfficiency.CO2TE.CO2TEBaseSimulation.Field.Soil.Organic
        Soil (disabled): Site=I12; NearestTown=Lincoln; Region=Canterbury; Country=New Zealand; Comments=I12 Lincoln University
          Physical
            Thickness  ParticleSizeSand  ParticleSizeSilt  ParticleSizeClay  Rocks     BD    AirDry  LL15   DUL   SAT
            100        5                 65                30                0.22101   1.26  0.05    0.075  0.35  0.38
            100        5                 65                30                0.22101   1.26  0.06    0.078  0.35  0.38
            100        5                 65                30                0.200511  1.26  0.07    0.07   0.32  0.39
            100        5                 65                30                0.246423  1.44  0.07    0.07   0.29  0.32
            100        5                 65                30                0.293522  1.44  0.069   0.07   0.27  0.3
            100        5                 65                30                0.246423  1.44  0.07    0.07   0.31  0.32
            100        5                 65                30                0.102947  1.57  0.07    0.07   0.33  0.34
            100        5                 65                30                0         1.57  0.07    0.07   0.35  0.35
            100        5                 65                30                0         1.57  0.07    0.07   0.34  0.35
            100        5                 65                30                0         1.58  0.07    0.07   0.34  0.35
            100        5                 65                30                0         1.58  0.07    0.07   0.34  0.35
            100        5                 65                30                0         1.58  0.07    0.07   0.34  0.35
            100        5                 65                30                0         1.58  0.08    0.08   0.34  0.35
            100        5                 65                30                0         1.59  0.078   0.08   0.33  0.35
            100        5                 65                30                0         1.59  0.08    0.08   0.33  0.35
            100        5                 65                30                0         1.59  0.087   0.09   0.32  0.34
            100        5                 65                30                0.112903  1.59  0.09    0.09   0.3   0.33
            100        5                 65                30                0.112903  1.59  0.09    0.09   0.3   0.33
            100        5                 65                30                0.112903  1.59  0.09    0.09   0.3   0.33
            100        5                 65                30                0.112903  1.59  0.08    0.08   0.31  0.33
            100        5                 65                30                0.112903  1.59  0.09    0.09   0.31  0.33
            100        5                 65                30                0         1.59  0.09    0.09   0.32  0.34
            100        5                 65                30                0         1.59  0.09    0.09   0.35  0.38
            Rocks, ParticleSizeSand, ParticleSizeSilt, ParticleSizeClay source: Calculated
            SoilCrop WheatSoil
              LL=[0.075, 0.078, 0.07, 0.07, 0.07, 0.07, 0.07, 0.07, 0.07, 0.07, 0.07, 0.07, 0.08, 0.08, 0.08, 0.09, 0.09, 0.09, 0.09, 0.08, 0.09, 0.09, 0.09]
              KL=[0.06, 0.06, 0.06, 0.06, 0.06, 0.06, 0.04, 0.03, 0.03, 0.02, 0.02, 0.02, 0.02, 0.02, 0.02, 0.01, 0.01, 0.01, 0.01, 0.01, 0, 0, 0]
              XF=[1, 1, 1, 1, 1, 1, 1, 1, 1, 1, 1, 1, 1, 1, 1, 0.5, 0.5, 0, 0, 0, 0, 0, 0]
          WaterBalance SoilWater: SummerDate=1-Nov; SummerU=5; SummerCona=5; WinterDate=1-Apr; WinterU=5; WinterCona=5; DiffusConst=40; DiffusSlope=16; Salb=0.12; CN2Bare=73; CNRed=20; CNCov=0.8; PSIDul=-100
          Organic: same as Sensibility.ProteinAccumulation.PotentialGrainSize.PotentialGrainSizeBase.Field.Soil.Organic
          Chemical: PHUnits=Water
            Thickness  PH  CEC
            150        6   11.045
            150        6   10.505
            150        6   9.695
            150        6   9.695
            600        6   8.885
            300        6   8.615
            300        6   8.615
            CEC source: Calculated
          Water: FilledFromTop=false
            Thickness=[100, 100, 100, 100, 100, 100, 100, 100, 100, 100, 100, 100, 100, 100, 100, 100, 100, 100, 100, 100, 100, 100, 100]
            InitialValues=[0.35, 0.35, 0.32, 0.29, 0.27, 0.31, 0.33, 0.35, 0.34, 0.34, 0.34, 0.34, 0.34, 0.33, 0.33, 0.32, 0.3, 0.3, 0.3, 0.31, 0.31, 0.32, 0.35]
          Nutrient
          Solute NO3: Thickness=[150, 150, 150, 150, 600, 300, 300]; InitialValues=[21.1, 50.9, 62.8, 42.3, 1, 1, 1]; InitialValuesUnits=ppm; WaterTableConcentration=0; D0=0; DepthConstant=0; MaxDepthSoluteAccessible=0; RunoffEffectivenessAtMovingSolute=0; MaxEffectiveRunoff=0
          Solute NH4: Thickness=[150, 150, 150, 150, 600, 300, 300]; InitialValues=[3, 0.2, 0.6, 0.4, 0.1, 0.1, 0.1]; InitialValuesUnits=ppm; WaterTableConcentration=0; D0=0; DepthConstant=0; MaxDepthSoluteAccessible=0; RunoffEffectivenessAtMovingSolute=0; MaxEffectiveRunoff=0
          Solute Urea: Thickness=[150, 150, 150, 150, 600, 300, 300]; InitialValues=[0, 0, 0, 0, 0, 0, 0]; InitialValuesUnits=kg/ha; WaterTableConcentration=0; D0=0; DepthConstant=0; MaxDepthSoluteAccessible=0; RunoffEffectivenessAtMovingSolute=0; MaxEffectiveRunoff=0
          SoilTemperature Temperature: InteractionsPerDay=8
        Report DailyReport
        Report HarvestReport
        Fertiliser
        SurfaceOrganicMatter: InitialResidueName=wheat_stubble; InitialResidueType=wheat; InitialResidueMass=500; InitialStandingFraction=0; InitialCPR=0; InitialCNR=100
        Plant Wheat
        Manager Sowing
          SowDate = 24-Jul
          CultivarName = Amethyst
          SowingDepth = 50
          RowSpacing = 150
          Population = 150
```csharp
using APSIM.Shared.Utilities;
using Models.Utilities;
using Models.Soils;
using Models.PMF;
using Models.Core;
using System;

namespace Models
{
    [Serializable]
    public class Script : Model
    {
        [Link] Clock Clock;
        [Link] Fertiliser Fertiliser;
        [Link] Summary Summary;
        [Link] Soil Soil;
        
        [Link] Plant wheat;

        [Description("Sowing date (d-mmm)")]
        public string SowDate { get; set; }

        [Display(Type = DisplayType.CultivarName)]
        [Description("Cultivar to be sown")]
        public string CultivarName { get; set; }

        [Description("Sowing depth (mm)")]
        public double SowingDepth { get; set; }

        [Description("Row spacing (mm)")]
        public double RowSpacing { get; set; }

        [Description("Plant population (/m2)")]
        public double Population { get; set; }
   

        [EventSubscribe("DoManagement")]
        private void OnDoManagement(object sender, EventArgs e)
        {
            if (DateUtilities.WithinDates(SowDate, Clock.Today, SowDate))
            {
                wheat.Sow(population: Population, cultivar: CultivarName, depth: SowingDepth, rowSpacing: RowSpacing);    
            }
        }
    }
}
```
        Manager SowingFertiliser
          Amount = 220
          CropName = wheat
          script: same as in Sensibility.CO2AndTranspirationEfficiency.CO2TE.CO2TEBaseSimulation.Field.SowingFertiliser
        Manager Harvesting
        Operations FertiliserEvents
        Operations IrrigationEvents
          2023-09-12  [Irrigation].Apply (72);
          2023-11-03  [Irrigation].Apply (15);
          2023-11-04  [Irrigation].Apply (30);
          2023-11-11  [Irrigation].Apply (15);
          2023-11-19  [Irrigation].Apply (30);
          2023-11-26  [Irrigation].Apply (20);
          2023-12-02  [Irrigation].Apply (10);
          2023-12-09  [Irrigation].Apply (20);
          2023-12-10  [Irrigation].Apply (10);
          2023-12-30  [Irrigation].Apply (10);
          2024-01-02  [Irrigation].Apply (10);
          2024-01-06  [Irrigation].Apply (15);
          2024-01-08  [Irrigation].Apply (15);
          2024-01-11  [Irrigation].Apply (15);
          2024-01-15  [Irrigation].Apply (15);
          2024-01-18  [Irrigation].Apply (15);
        Irrigation
        Report MaxLeafAreaReport
        Manager MaxLeafAreaCalc
          script: same as in Lincoln2021.Wheat.Field.MaxLeafAreaCalc
        Report NDVIDailyReport
        SetModelParamsBySimulation: SetEventName=[Plant].PlantSowing; ParameterFile=inputs/Lincoln2023ParameterSets.csv
        Spectral: DrySoilNDVI=0.16; WetSoilNDVI=0.26; GreenCropNDVI=0.82; DeadCropNDVI=0.1
        Report ObsAnalysisReport: same as Sensibility.CO2AndTranspirationEfficiency.CO2TE.CO2TEBaseSimulation.Field.ObsAnalysisReport
        AccumulateFunctionGeneral TT00: same as Sensibility.CO2AndTranspirationEfficiency.CO2TE.CO2TEBaseSimulation.Field.TT00
        AccumulateFunctionGeneral TT01: same as Sensibility.CO2AndTranspirationEfficiency.CO2TE.CO2TEBaseSimulation.Field.TT01
        AccumulateFunctionGeneral TT02: same as Sensibility.CO2AndTranspirationEfficiency.CO2TE.CO2TEBaseSimulation.Field.TT02
        AccumulateFunctionGeneral TT03: same as Sensibility.CO2AndTranspirationEfficiency.CO2TE.CO2TEBaseSimulation.Field.TT03
        AccumulateFunctionGeneral TT04: same as Sensibility.CO2AndTranspirationEfficiency.CO2TE.CO2TEBaseSimulation.Field.TT04
        AccumulateFunctionGeneral TT05: same as Sensibility.CO2AndTranspirationEfficiency.CO2TE.CO2TEBaseSimulation.Field.TT05
        AccumulateFunctionGeneral TT06: same as Sensibility.CO2AndTranspirationEfficiency.CO2TE.CO2TEBaseSimulation.Field.TT06
        AccumulateFunctionGeneral TT07: same as Sensibility.CO2AndTranspirationEfficiency.CO2TE.CO2TEBaseSimulation.Field.TT07
  Experiment Lincoln2024
    DisabledSimNames=[Lincoln2023SD19-AprCvCesario, Lincoln2023SD27-MarCvCesario, Lincoln2023SD19-AprCvStockade, Lincoln2023SD27-MarCvStockade]
    Memo Phenology Not modeled: same as Lincoln2021.Phenology Not modeled
    Factors
      Permutation
        Factor SD
          CompositeFactor 20Mar
            Specifications:
              [Sowing].Script.SowDate = 20-Mar
              [ApplyFertiliser].Script.FertiliserDates = 17-May,7-Aug, 27-Aug, 25-Oct
              [IrrigationEvents]
              [Clock].EndDate = 10-Jan-2025
              [Sowing].Script.Population = 135
            Operations IrrigationEvents
              2024-04-06  [Irrigation].Apply (12);
              2024-05-06  [Irrigation].Apply (11);
              2024-08-27  [Irrigation].Apply (5);
              2024-09-06  [Irrigation].Apply (10);
              2024-09-20  [Irrigation].Apply (10);
              2024-10-09  [Irrigation].Apply (20);
              2024-10-12  [Irrigation].Apply (20);
              2024-10-25  [Irrigation].Apply (7.5);
              2024-11-01  [Irrigation].Apply (7.5);
              2024-11-09  [Irrigation].Apply (45);
              2024-11-17  [Irrigation].Apply (40);
              2024-11-24  [Irrigation].Apply (40);
              2024-12-01  [Irrigation].Apply (30);
              2024-12-07  [Irrigation].Apply (40);
              2024-12-15  [Irrigation].Apply (50);
          CompositeFactor 16Apr
            Specifications:
              [Sowing].Script.SowDate = 16-Apr
              [ApplyFertiliser].Script.FertiliserDates = 25-Jun, 6-Sep, 20-Sep, 1-Nov
              [IrrigationEvents]
              [Clock].EndDate = 20-Jan-2025
              [Sowing].Script.Population = 115
            Operations IrrigationEvents
              2024-04-06  [Irrigation].Apply (12);
              2024-05-06  [Irrigation].Apply (11);
              2024-08-27  [Irrigation].Apply (5);
              2024-09-06  [Irrigation].Apply (10);
              2024-09-20  [Irrigation].Apply (10);
              2024-10-09  [Irrigation].Apply (10);
              2024-10-13  [Irrigation].Apply (30);
              2024-11-01  [Irrigation].Apply (7.5);
              2024-11-09  [Irrigation].Apply (45);
              2024-11-17  [Irrigation].Apply (40);
              2024-11-24  [Irrigation].Apply (40);
              2024-12-01  [Irrigation].Apply (30);
              2024-12-07  [Irrigation].Apply (40);
              2024-12-15  [Irrigation].Apply (50);
        Factor N
          CompositeFactor Nil: Specifications=[ApplyFertiliser].Script.NFrac = 0
          CompositeFactor Low: Specifications=[ApplyFertiliser].Script.NFrac = 33.3
          CompositeFactor Mid: Specifications=[ApplyFertiliser].Script.NFrac = 66.6
          CompositeFactor High: Specifications=[ApplyFertiliser].Script.NFrac = 100
    Simulation Lincoln24Base
      Weather: FileName=met/Lincoln2024.met
      Clock: Start=2024-03-15; End=2025-01-20
      Summary
      SoilArbitrator
      MicroClimate: a_interception=0; b_interception=1; c_interception=0; d_interception=0; SoilHeatFluxFraction=0.4; MinimumHeightDiffForNewLayer=0; NightInterceptionFraction=0.5; ReferenceHeight=2
      Manager LocationInfo: same as Lincoln2023.Lincoln23Base.LocationInfo
      Zone Field: Area=1; Slope=0; AspectAngle=0; Altitude=50
        Soil Wakanui Silt Loam: Latitude=0; Longitude=0
          Physical: same as Lincoln2023.Lincoln23Base.Field.Wakanui Silt Loam.Physical
          WaterBalance SoilWater: same as Lincoln2023.Lincoln23Base.Field.Wakanui Silt Loam.SoilWater
          Water: same as Lincoln2023.Lincoln23Base.Field.Wakanui Silt Loam.Water
          Chemical: same as Lincoln2023.Lincoln23Base.Field.Wakanui Silt Loam.Chemical
          Nutrient
          SoilTemperature Temperature: InteractionsPerDay=8
          Solute NO3: Thickness=[200, 200, 200, 200, 400, 300, 300]; InitialValues=[17, 11, 2, 2, 2, 2, 2]; InitialValuesUnits=ppm; WaterTableConcentration=0; D0=0; DepthConstant=0; MaxDepthSoluteAccessible=0; RunoffEffectivenessAtMovingSolute=0; MaxEffectiveRunoff=0
          Solute NH4: Thickness=[200, 200, 200, 200, 400, 300, 300]; InitialValues=[2, 2, 1, 1, 1, 1, 1]; InitialValuesUnits=ppm; WaterTableConcentration=0; D0=0; DepthConstant=0; MaxDepthSoluteAccessible=0; RunoffEffectivenessAtMovingSolute=0; MaxEffectiveRunoff=0
          Solute Urea: same as Lincoln2023.Lincoln23Base.Field.Wakanui Silt Loam.Urea
          Organic: FOMCNRatio=40; CarbonUnits=Total
            Thickness  Carbon  SoilCNRatio  FBiom  FInert  FOM
            200        3       8            0.12   0.1     5000
            200        1.5     8            0.12   0.2     2000
            200        1       8            0.12   0.5     700
            200        0.3     8            0.12   1       0
            200        0.18    8            0.12   1       0
            200        0.12    8            0.12   1       0
            200        0.12    8            0.12   1       0
        Fertiliser
        Irrigation
        SurfaceOrganicMatter: InitialResidueName=lucerne_residue; InitialResidueType=lucerne; InitialResidueMass=0; InitialStandingFraction=0; InitialCPR=0; InitialCNR=20
        Plant Wheat
        Operations FertiliserEvents
        Operations IrrigationEvents
        Manager Sowing
          SowDate = 24-Jul
          CultivarName = Kerrin
          SowingDepth = 50
          RowSpacing = 150
          Population = 150
          script: same as in Lincoln2023.Lincoln23Base.Field.Sowing
        Manager ApplyFertiliser
          FertiliserType = UreaN
          FertiliserDates =
          Amount = 116
          NFrac = -
```csharp
using Models.Soils;
using System;
using System.Linq;
using Models.Core;
using Models.PMF;
using APSIM.Shared.Utilities;
namespace Models
{
    [Serializable]
    public class Script : Model
    {
        [Link] Clock Clock;
        [Link] Fertiliser Fertiliser;
        
        [Separator("A component to apply fertiliser on one or more dates on every year of the simulation")]

        [Description("Type of fertiliser to apply? ")] 
        [Display(Type = DisplayType.FertiliserType)]public string FertiliserType { get; set; }

        [Description("Dates to apply fertiliser ")] 
        public string[] FertiliserDates { get; set; } 

        [Description("Amount of fertiliser to be applied (kg /ha)")] 
        public double Amount { get; set; }

        [Description("Fraction of max applied")] 
        public double NFrac { get; set; }
        
        [EventSubscribe("DoManagement")]
        private void OnDoManagement(object sender, EventArgs e)
        {
            foreach (string ddMMM in FertiliserDates)
            {
                if (DateUtilities.DatesEqual(ddMMM, Clock.Today))
                {
                   Fertiliser.Apply(amount: Amount*NFrac/100, type: FertiliserType);

                }
            }
        }
    }
}
```
        Manager Harvesting
```csharp
using Models.PMF.Phen;
using APSIM.Shared.Utilities;
using System.Xml.Serialization;
using Models;
using Models.PMF;
using Models.Soils;
using System.Text;
using System.Collections.Generic;
using Models.Core;
using System;
using Models.Soils.Nutrients;

namespace Models
{
    [Serializable] 
    public class Script : Model
    {


    }
}
```
        Report HarvestReport: EventNames=[Wheat].Harvesting
          VariableNames:
            [Simulation].Name
            [Clock].Today
            [Wheat].SowingDate
            [Wheat].SowingData.Cultivar
            [Wheat].Phenology.CurrentPhase.Name
            [Wheat].Phenology.CurrentStageName
            [Wheat].Phenology.EmergenceDAS
            [Wheat].Phenology.TerminalSpikeletDAS
            [Wheat].Phenology.FlagLeafDAS
            [Wheat].Phenology.HeadingDAS
            [Wheat].Phenology.FloweringDAS
            [Wheat].Phenology.MaturityDAS
            [Wheat].Grain.Wt
            [Wheat].Grain.N
            [Wheat].Grain.Number
            [Wheat].Grain.Size
            [Wheat].Grain.NConc
            [Wheat].AboveGround.Wt
            [Wheat].AboveGround.N
            [Wheat].Grain.Protein
            [Wheat].Grain.Size
            [Wheat].Phenology.FinalLeafNumber
            [Wheat].Leaf.MainStemPopulation
            [Wheat].SowingData.Cultivar
            [Wheat].SowingDate.DayOfYear
            [Clock].StartDate
            ([Wheat].Phenology.FloweringDAS - [Wheat].Phenology.EmergenceDAS) as FloweringDAE
            [IWeather].Latitude
            [IWeather].Longitude
            [IWeather].FileName
            [IWeather].CO2
            [IWeather].Amp
            [IWeather].Tav
            [LocationInfo].Script.Country
            [LocationInfo].Script.State
            [LocationInfo].Script.Region
        Report DailyReport: EventNames=[Clock].DoReport
          VariableNames:
            [Simulation].Name
            [Clock].Today
            [Soil].Water.Volumetric
            sum([Soil].Water.MM)
            sum([Soil].NO3.kgha)
            [IWeather].Radn
            [IWeather].MeanT
            [Wheat].AboveGround.N
            [Wheat].AboveGround.Wt
            [Wheat].AboveGroundLive.N
            [Wheat].AboveGroundLive.Wt
            [Wheat].AboveGroundDead.N
            [Wheat].AboveGroundDead.Wt
            [Wheat].Ear.N
            [Wheat].Ear.NConc
            [Wheat].Ear.Wt
            [Wheat].Grain.N
            [Wheat].Grain.NConc
            [Wheat].Grain.Number
            [Wheat].Grain.Size
            [Wheat].Grain.Wt
            [Wheat].Grain.NperKernel
            [Wheat].Leaf.Tips
            [Wheat].Leaf.CoverGreen
            [Wheat].Leaf.CoverTotal
            [Wheat].Leaf.Dead.N
            [Wheat].Leaf.Dead.NConc
            [Wheat].Leaf.Dead.Wt
            [Wheat].Leaf.Ligules
            [Wheat].Leaf.Fn
            [Wheat].Leaf.Fw
            [Wheat].Leaf.Height
            [Wheat].Leaf.LAI
            [Wheat].Leaf.Live.N
            [Wheat].Leaf.Live.NConc
            [Wheat].Leaf.Live.Wt
            [Wheat].Leaf.SpecificArea
            [Wheat].Leaf.SpecificAreaCanopy
            [Wheat].Leaf.SpecificNitrogen
            [Wheat].Leaf.Transpiration
            [Wheat].Phenology.CurrentPhase.Name
            [Wheat].Phenology.CurrentStageName
            [Wheat].Phenology.EmergenceDAS
            [Wheat].Phenology.Stage
            [Wheat].Phenology.ThermalTime
            [Wheat].Phenology.Zadok.Stage
            [Wheat].Root.Depth
            [Wheat].Root.N
            [Wheat].Root.Wt
            [Wheat].Root.NConc
            [Wheat].Spike.N
            [Wheat].Spike.NConc
            [Wheat].Spike.Wt
            [Wheat].Stem.N
            [Wheat].Stem.NConc
            [Wheat].Stem.Wt
            [Wheat].StemPlusSpike.Wt
            [Wheat].StemPlusSpike.N
            [Wheat].SowingData.Cultivar
            [Wheat].Phenology.HaunStage
            [Wheat].Leaf.Height
            [Wheat].Leaf.Tips
            [Wheat].Leaf.FinalLeafNumber
            [Wheat].Leaf.MainStemPopulation
            [Wheat].Leaf.StemPopulation
            [Wheat].Leaf.StemNumberPerPlant
            [Wheat].Phenology.PTQ
            [Wheat].Phenology.Phyllochron
            [Wheat].Total.N
            [Wheat].Total.Wt
            [IWeather].MeanT
            [Wheat].Phenology.Photoperiod
            [Wheat].Phenology.AccumulatedTT
            ([Wheat].Leaf.Transpiration + [Soil].SoilWater.Es + [MicroClimate].PrecipitationInterception)
            [Wheat].Leaf.Photosynthesis.FT
        Report SowingReport: EventNames=[Wheat].Sowing
          VariableNames:
            [Simulation].Name
            [Clock].Today
            [Wheat].SowingData.Cultivar
            [IWeather].Latitude
            [IWeather].Longitude
            [LocationInfo].Script.Country
            [LocationInfo].Script.State
            [LocationInfo].Script.Region
        Manager MaxLeafSize
```csharp
using Models.Soils;
using Models.PMF.Struct;
using System;
using System.Collections.Generic;
using System.Xml.Serialization;
using Models.Core;
using Models.Interfaces;
using Models.PMF;
using Models.PMF.Organs;
using Models.Soils.Arbitrator;
using APSIM.Shared.Utilities;
using Newtonsoft.Json;



namespace Models
{
    [Serializable] 
    public class Script : Model
    {
        [Link] private Clock Clock;
        [Link] private Plant Wheat;
        public  event EventHandler LeafReport;
        [Link(Type = LinkType.Path, Path = "[Wheat].Structure")]
        private Structure structure;
        
        
        [JsonIgnore] public int LeafPosition { get; set; }
        [JsonIgnore] public double LeafSize { get; set; }
        [JsonIgnore] public double MaxLeafSize { get; set; }
        
        [EventSubscribe("DoManagement")]
        private void OnDoManagement(object sender, EventArgs e)
        {
            var leaf = Wheat.Leaf as Leaf;
            if ((leaf.ExpandedCohortNo > LeafPosition) & (structure.NextLeafProportion == 1))
            {
                LeafPosition = (int)leaf.ExpandedCohortNo;
                LeafSize = leaf.CohortSize[LeafPosition];
                MaxLeafSize = leaf.CohortMaxArea[LeafPosition];
                LeafReport.Invoke(this, new EventArgs());
            }
        }
    }
}
```
        Report MaxLeafSizeReport: EventNames=[MaxLeafSize].Script.LeafReport
          VariableNames:
            [MaxLeafSize].Script.LeafSize
            [MaxLeafSize].Script.LeafPosition
            [MaxLeafSize].Script.MaxLeafSize
        Report NDVIDailyReport
        SetModelParamsBySimulation: SetEventName=[Plant].PlantSowing; ParameterFile=inputs/Lincoln2024ParameterSets.csv
        Spectral: DrySoilNDVI=0.16; WetSoilNDVI=0.21; GreenCropNDVI=0.82; DeadCropNDVI=0.1
        Report ObsAnalysisReport: same as Sensibility.CO2AndTranspirationEfficiency.CO2TE.CO2TEBaseSimulation.Field.ObsAnalysisReport
        AccumulateFunctionGeneral TT00: same as Sensibility.CO2AndTranspirationEfficiency.CO2TE.CO2TEBaseSimulation.Field.TT00
        AccumulateFunctionGeneral TT01: same as Sensibility.CO2AndTranspirationEfficiency.CO2TE.CO2TEBaseSimulation.Field.TT01
        AccumulateFunctionGeneral TT02: same as Sensibility.CO2AndTranspirationEfficiency.CO2TE.CO2TEBaseSimulation.Field.TT02
        AccumulateFunctionGeneral TT03: same as Sensibility.CO2AndTranspirationEfficiency.CO2TE.CO2TEBaseSimulation.Field.TT03
        AccumulateFunctionGeneral TT04: same as Sensibility.CO2AndTranspirationEfficiency.CO2TE.CO2TEBaseSimulation.Field.TT04
        AccumulateFunctionGeneral TT05: same as Sensibility.CO2AndTranspirationEfficiency.CO2TE.CO2TEBaseSimulation.Field.TT05
        AccumulateFunctionGeneral TT06: same as Sensibility.CO2AndTranspirationEfficiency.CO2TE.CO2TEBaseSimulation.Field.TT06
        AccumulateFunctionGeneral TT07: same as Sensibility.CO2AndTranspirationEfficiency.CO2TE.CO2TEBaseSimulation.Field.TT07
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