Simulations: Version=221
  DataStore
    PredictedObserved DailyObsPred: PredictedTableName=DailyReport; ObservedTableName=Observed; FieldNameUsedForMatch=SimulationName; FieldName2UsedForMatch=Clock.Today; AllColumns=false
      Tests: POName=DailyObsPred
        AcceptedStats:
          Name                   n     Slope         Intercept   SEslope      SEintercept  R2           RMSE       NSE         ME          MAE         RSR       RMR
          ET                     123   1.13169       -0.428525   0.0437149    0.169573     0.847065     0.75711    0.750672    0.0416707   0.558234    0.497294  0
          ProfileWater           1327  0.876588      76.0389     0.0130203    5.47947      0.7738       58.7876    0.702733    25.8355     33.06       0.545016  0
          Soil.SoilWater.SW(1)   1300  0.000187106   0.209326    0.000113886  0.00216848   0.00207521   18.9789    -0.0810339  -5.20763    5.28548     1.03933   0
          Soil.SoilWater.SW(10)  8     -0.411168     0.612361    0.204164     0.087484     0.403332     0.0113816  -3.15811    0.00772724  0.00919543  1.90744   0
          Soil.SoilWater.SW(2)   1323  -9.03035e-05  0.237103    7.90585e-05  0.00185795   0.000986689  23.4358    -0.0848838  -6.54813    6.60052     1.04118   0
          Soil.SoilWater.SW(3)   1323  7.41365e-05   0.225765    6.63683e-05  0.00193967   0.000943693  29.1595    -0.0857037  -8.19945    8.22086     1.04158   0
          Soil.SoilWater.SW(4)   1323  0.00032245    0.209832    5.67479e-05  0.00181599   0.0238581    31.9313    -0.0847602  -8.95944    8.97693     1.04112   0
          Soil.SoilWater.SW(5)   1323  0.000184327   0.244192    5.45151e-05  0.00180824   0.00858025   33.0939    -0.0856543  -9.31536    9.33089     1.04155   0
          Soil.SoilWater.SW(6)   1218  0.983201      0.00665286  0.00580358   0.00166975   0.959354     0.0168556  0.958159    0.00202203  0.00893392  0.204467  0
          Soil.SoilWater.SW(7)   1194  0.995766      0.00138347  0.00547865   0.00136097   0.965173     0.0121361  0.964171    0.00036727  0.00674653  0.189207  0
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        AcceptedStatsName=Name n Slope Intercept SEslope SEintercept R2 RMSE NSE ME MAE RSR
    PredictedObserved HarvestObsPred: PredictedTableName=HarvestReport; ObservedTableName=Observed; FieldNameUsedForMatch=SimulationName; FieldName2UsedForMatch=Wheat.Phenology.CurrentStageName; AllColumns=false
      Tests: POName=HarvestObsPred
        AcceptedStats:
          Name                                  n    Slope      Intercept   SEslope     SEintercept  R2          RMSE        NSE         ME           MAE         RSR       RMR
          Wheat.AboveGround.N                   67   1.12809    -1.00273    0.0391678   0.525848     0.927336    2.09151     0.875576    0.540148     1.59606     0.350095  0
          Wheat.AboveGround.Wt                  211  1.01911    34.1751     0.0202867   28.6588      0.923515    188.663     0.904426    58.5184      140.453     0.308417  0
          Wheat.Grain.N                         135  1.07639    -0.257745   0.0362834   0.353004     0.868717    1.79883     0.808865    0.415699     1.36719     0.435568  0
          Wheat.Grain.Nconc                     136  0.52548    0.0109277   0.0578165   0.00130116   0.381364    0.00332647  0.31597     0.000420536  0.00251003  0.824015  0
          Wheat.Grain.Number                    195  0.819153   2260.06     0.0213448   308.959      0.88414     2247.71     0.879203    -81.8409     1634.74     0.346666  0
          Wheat.Grain.Protein                   114  0.424157   7.85561     0.0562272   0.726492     0.336911    2.10436     0.263918    0.550644     1.57133     0.854181  0
          Wheat.Grain.Wt                        233  0.978713   11.017      0.0292591   15.5104      0.828875    103.644     0.801774    0.879252     78.6576     0.444269  0
          Wheat.Leaf.CohortMaxSize(1)           10   0.0270759  255.563     0.0327969   7.48653      0.078506    51.271      -0.92608    36.4016      40.5202     1.31661   0
          Wheat.Leaf.CohortMaxSize(10)          10   1.11919    -412.466    0.256733    521.362      0.703745    224.554     -0.300948   -171.57      207.903     1.08206   0
          Wheat.Leaf.CohortMaxSize(11)          10   0.825212   365.905     0.266736    598.083      0.54471     196.601     0.391552    -23.5263     115.224     0.740002  0
          Wheat.Leaf.CohortMaxSize(12)          10   0.848404   253.801     0.223896    493.954      0.642195    151.745     0.416747    -79.2873     105.917     0.724519  0
          Wheat.Leaf.CohortMaxSize(13)          10   1.09708    -403.529    1.01788     2346.69      0.126797    703.826     -7.88491    -180.887     351.071     2.82779   0
          Wheat.Leaf.CohortMaxSize(14)          10   1.30676    -642.351    0.429337    1019.71      0.536608    603.245     -0.59098    71.3164      415.854     1.19661   0
          Wheat.Leaf.CohortMaxSize(15)          9    -0.26027   2713.41     0.159916    364.78       0.274529    585.946     -0.830732   -109.076     515.056     1.27566   0
          Wheat.Leaf.CohortMaxSize(16)          3    -0.645839  2788.84     7.95817     13511.1      0.00654291  1245.82     -65.0428    6.01155      1116.21     6.6354    0
          Wheat.Leaf.CohortMaxSize(17)          2    3.1965     -3522.2732  0           0            1           590.025     -4.43529    -197.771     555.892     1.64853   0
          Wheat.Leaf.CohortMaxSize(18)          1    -          -           -           -            -           985.267     -           985.267      985.267     -         0
          Wheat.Leaf.CohortMaxSize(2)           10   0.0630555  275.197     0.29264     121.589      0.00577     139.081     -3.00585    -108.611     115.388     1.89875   0
          Wheat.Leaf.CohortMaxSize(3)           10   0.289291   221.125     0.270354    144.318      0.125205    181.922     -2.6244     -152.132     163.333     1.80609   0
          Wheat.Leaf.CohortMaxSize(4)           10   0.345581   263.167     0.345159    223.342      0.111353    208.379     -1.99176    -152.884     173.867     1.64091   0
          Wheat.Leaf.CohortMaxSize(5)           10   0.249259   458.154     0.277019    225.53       0.0919017   229.975     -0.868592   -139.856     146.902     1.29682   0
          Wheat.Leaf.CohortMaxSize(6)           10   0.345905   476.527     0.195687    187.624      0.280871    242.414     -0.0368856  -130.978     145.477     0.966021  0
          Wheat.Leaf.CohortMaxSize(7)           10   0.441949   501.987     0.142766    157.184      0.545013    176.986     0.296106    -101.041     122.714     0.79593   0
          Wheat.Leaf.CohortMaxSize(8)           10   0.589766   515.86      0.179194    229.582      0.575192    169.291     0.574802    1.17705      117.592     0.61861   0
          Wheat.Leaf.CohortMaxSize(9)           10   0.793068   300.515     0.327977    507.562      0.422258    241.916     0.0929616   -15.3812     161.582     0.903512  0
          Wheat.Phenology.FlagLeafDAS.Value()   255  0.974146   6.29479     0.00979673  1.35981      0.97505     8.03204     0.971245    2.92157      5.87059     0.16924   0
          Wheat.Phenology.FloweringDAS.Value()  299  0.943644   8.35638     0.00705763  1.10217      0.983658    6.98781     0.982029    0.0602007    4.93645     0.133831  0
        AcceptedStatsName=Name n Slope Intercept SEslope SEintercept R2 RMSE NSE ME MAE RSR
    Observations: FileNames=[Pask LC07 TT0607.xlsx]; SheetNames=[Observed]
      ColumnNames=[Clock.Today, Wheat.Phenology.Zadok.Stage, Wheat.Phenology.CurrentStageName, Wheat.Leaf.Live.NConc, Wheat.Leaf.Live.Wt, Wheat.Stem.Wt, Wheat.Leaf.Dead.Wt, Wheat.AboveGround.Wt, Wheat.AboveGround.N, Wheat.AboveGround.NConc, Wheat.Leaf.LAI, Wheat.Population, Wheat.Leaf.StemPopulation, Wheat.Spike.Wt, Wheat.Leaf.Live.N, Wheat.Stem.N, Wheat.Spike.N, Wheat.Stem.Nconc, Wheat.Spike.Nconc, Wheat.Grain.Wt, Wheat.Grain.N, Wheat.Grain.Nconc, Wheat.Grain.Size, Wheat.Grain.Number, Wheat.Leaf.Dead.N, Wheat.Spike.HeadNumber, Wheat.Ear.Wt, Wheat.Leaf.Dead.Nconc, Wheat.Ear.N, Wheat.Ear.Nconc]
  Folder Replacements
    Report HarvestReport: EventNames=[Wheat].Harvesting
      VariableNames:
        [Clock].Today
        [Clock].StartDate
        [Wheat].SowingDate
        [Wheat].SowingData.Cultivar
        [Wheat].SowingData.Population
        [Wheat].SowingDate.DayOfYear
        [Wheat].SowingData.RowSpacing
        [IWeather].Latitude
        [IWeather].Longitude
        [IWeather].FileName
        [LocationInfo].Script.Country
        [LocationInfo].Script.State
        [LocationInfo].Script.Region
        [Wheat].AboveGround.N
        [Wheat].AboveGround.NConc
        [Wheat].AboveGround.Wt
        [Wheat].Ear.N
        [Wheat].Ear.NConc
        [Wheat].Ear.Wt
        [Wheat].Grain.N
        [Wheat].Grain.NConc
        [Wheat].Grain.Number
        [Wheat].Grain.Protein
        [Wheat].Grain.Size
        [Wheat].Grain.Wt
        [Wheat].Leaf.N
        [Wheat].Leaf.StemPopulation
        [Wheat].Leaf.Wt
        [Wheat].Phenology.CAMP.TSHS
        [Wheat].Phenology.CAMP.VSHS
        [Wheat].Phenology.CurrentStageName
        [Wheat].Phenology.EmergenceDAS
        [Wheat].Phenology.FinalLeafNumber
        [Wheat].Phenology.FlagLeafDAS
        [Wheat].Phenology.FloweringDAS
        [Wheat].Phenology.HeadingDAS
        [Wheat].Phenology.MaturityDAS
        [Wheat].Phenology.TerminalSpikeletDAS
        [Wheat].Spike.HeadNumber
        [Wheat].Spike.N
        [Wheat].Spike.Wt
        [Wheat].Stem.N
        [Wheat].Stem.NConc
        [Wheat].Stem.Wt
    Report DailyReport: EventNames=[Clock].DoReport
      VariableNames:
        [Clock].Today
        [IWeather].MinT
        [IWeather].MaxT
        [IWeather].Radn
        [Wheat].Phenology.AccumulatedTT
        [Wheat].Phenology.CurrentStageName
        [Wheat].Phenology.CurrentPhaseName
        [Wheat].Phenology.PTQ
        [Wheat].Phenology.Stage
        [Wheat].DaysAfterSowing
        [Wheat].SowingData.Cultivar
        [Wheat].AboveGround.N
        [Wheat].AboveGround.NConc
        [Wheat].AboveGround.Wt
        [Wheat].Ear.N
        [Wheat].Ear.NConc
        [Wheat].Ear.Wt
        [Wheat].Ear.WtProportion
        [Wheat].Grain.N
        [Wheat].Grain.NConc
        [Wheat].Grain.Wt
        [Wheat].Leaf.CoverGreen
        [Wheat].Leaf.CoverTotal
        [Wheat].Leaf.Dead.N
        [Wheat].Leaf.Dead.NConc
        [Wheat].Leaf.Dead.Wt
        [Wheat].Leaf.DeadWtProportion
        [Wheat].Leaf.Fn
        [Wheat].Leaf.Fw
        [Wheat].Leaf.Height
        [Wheat].Leaf.LAI
        [Wheat].Leaf.Live.N
        [Wheat].Leaf.Live.NConc
        [Wheat].Leaf.Live.StorageWt
        [Wheat].Leaf.Live.Wt
        [Wheat].Leaf.LiveWtProportion
        [Wheat].Leaf.N
        //[Wheat].Leaf.Canopy.TotalSpecificArea
        [Wheat].Leaf.SpecificAreaCanopy
        [Wheat].Leaf.StemNumberPerPlant
        [Wheat].Leaf.StemPopulation
        [Wheat].Leaf.Wt
        [Wheat].Phenology.CurrentStageName
        [Wheat].Phenology.HaunStage
        [Wheat].Phenology.Zadok.Stage
        [Wheat].Population
        [Wheat].Root.Depth
        [Wheat].Spike.N
        [Wheat].Spike.NConc
        [Wheat].Spike.Live.StorageWt
        [Wheat].Spike.Wt
        [Wheat].Stem.N
        [Wheat].Stem.NConc
        [Wheat].Stem.Live.StorageWt
        [Wheat].Stem.Wt
        [Wheat].Stem.WtProportion
        ([Wheat].Leaf.Transpiration + [ISoilWater].Es + [MicroClimate].PrecipitationInterception)
        sum([Soil].NO3.kgha)
        sum([Soil].Water.MM)
        [Soil].Water.Volumetric
        [Wheat].Root.RootFrontVelocity.WaterFactor
        [Wheat].Root.RootFrontVelocity.TemperatureFactor
        [Wheat].Root.RootFrontVelocity.PotentialRootFrontVelocity
        [Wheat].Phenology.Photoperiod
        [Wheat].DaysAfterSowing
        [Wheat].Leaf.WaterDemand
        [Wheat].Leaf.Transpiration
    Manager Harvesting
```csharp
using APSIM.Core;
using Models.Soils.Nutrients;
using System;
using Models.Core;
using System.Collections.Generic;
using System.Text;
using Models.Soils;
using Models.PMF;
using Models;
using System.Xml.Serialization;
using APSIM.Shared.Utilities;
using Models.PMF.Phen;

namespace Models
{
    [Serializable] 
    public class Script : Model, IStructureDependency
    {
        [Link] private Plant Wheat;
        [Link] private Simulation sim;
        [Link] private Clock clock;
        [Link(Type = LinkType.Path, Path = "[Wheat].Phenology")]
        private Phenology phenology;
        public IStructure Structure { private get; set; }


        

        [EventSubscribe("DoManagement")]
        private void OnDoManagement(object sender, EventArgs e)
        {
            if (phenology.CurrentPhase.Name == "GrainRipening")
            {
                Wheat.Harvest();
                Wheat.EndCrop();
                Structure.Set("Clock.EndDate", clock.Today, relativeTo: sim);  
            }
        }

        [EventSubscribe("EndOfDay")]
        private void OnEndOfDay(object sender, EventArgs e)
        {
            if ((clock.Today.Equals(clock.EndDate))&&(Wheat.IsAlive))
            {
                Wheat.Harvest();
                Wheat.EndCrop();
                Structure.Set("Clock.EndDate", clock.Today, relativeTo: sim);  
            }
        }

    }
}
```
    Report SowingReport: EventNames=[Wheat].Sowing
      VariableNames:
        [Simulation].Name
        [Clock].Today
        [Wheat].SowingData.Cultivar
        [IWeather].Latitude
        [IWeather].Longitude
        [LocationInfo].Script.Country
        [LocationInfo].Script.State
        [LocationInfo].Script.Region
  Experiment Pask LC07
    Memo
      Lincoln 2007 nitrogen experiment from Pask (2009) and Pask *et al.* (2012).
      Data kindly supplied by Alistair Pask.

      Pask, A. J. D., R. Sylvester-Bradley, P. D. Jamieson, and M. J. Foulkes. ‘Quantifying How Winter Wheat Crops Accumulate and Use Nitrogen Reserves during Growth’. Field Crops Research 126 (14 February 2012): 104–18. https://doi.org/10.1016/j.fcr.2011.09.021.

      Pask, Alistair. ‘Optimising Nitrogen Storage in Wheat Canopies for Genetic Reduction in Fertiliser Nitrogen Inputs’. Thesis (University of Nottingham only), University of Nottingham, 2009. https://eprints.nottingham.ac.uk/12567/.
    Factors
      Permutation
        Factor N
          CompositeFactor None0N
            Specifications:
              [Sowing].Script.Treat = None0N
              [FertDate0].Script.FertiliserType = UreaN
              [FertDate0].Script.FertiliserDates = 6-oct
              [FertDate0].Script.Amount = 0
              [FertDate1].Script.FertiliserType = UreaN
              [FertDate1].Script.FertiliserDates = 6-nov
              [FertDate1].Script.Amount = 0
          CompositeFactor Early70N
            Specifications:
              [Sowing].Script.Treat = Early70N
              [FertDate0].Script.FertiliserType = UreaN
              [FertDate0].Script.FertiliserDates = 6-oct
              [FertDate0].Script.Amount = 70
              [FertDate1].Script.FertiliserType = UreaN
              [FertDate1].Script.FertiliserDates = 6-nov
              [FertDate1].Script.Amount = 0
          CompositeFactor Split70:80N
            Specifications:
              [Sowing].Script.Treat = Split70:80N
              [FertDate0].Script.FertiliserType = UreaN
              [FertDate0].Script.FertiliserDates = 6-oct
              [FertDate0].Script.Amount = 70
              [FertDate1].Script.FertiliserType = UreaN
              [FertDate1].Script.FertiliserDates = 6-nov
              [FertDate1].Script.Amount = 80
          CompositeFactor Split300N
            Specifications:
              [Sowing].Script.Treat = Split300N
              [FertDate0].Script.FertiliserType = UreaN
              [FertDate0].Script.FertiliserDates = 6-oct
              [FertDate0].Script.Amount = 150
              [FertDate1].Script.FertiliserType = UreaN
              [FertDate1].Script.FertiliserDates = 6-nov
              [FertDate1].Script.Amount = 150
          CompositeFactor Split400N
            Specifications:
              [Sowing].Script.Treat = Split400N
              [FertDate0].Script.FertiliserType = UreaN
              [FertDate0].Script.FertiliserDates = 6-oct
              [FertDate0].Script.Amount = 200
              [FertDate1].Script.FertiliserType = UreaN
              [FertDate1].Script.FertiliserDates = 6-nov
              [FertDate1].Script.Amount = 200
          CompositeFactor Split500N
            Specifications:
              [Sowing].Script.Treat = Split500N
              [FertDate0].Script.FertiliserType = UreaN
              [FertDate0].Script.FertiliserDates = 6-oct
              [FertDate0].Script.Amount = 250
              [FertDate1].Script.FertiliserType = UreaN
              [FertDate1].Script.FertiliserDates = 6-nov
              [FertDate1].Script.Amount = 250
          CompositeFactor Split150:250N
            Specifications:
              [Sowing].Script.Treat = Split150:250N
              [FertDate0].Script.FertiliserType = UreaN
              [FertDate0].Script.FertiliserDates = 6-oct
              [FertDate0].Script.Amount = 150
              [FertDate1].Script.FertiliserType = UreaN
              [FertDate1].Script.FertiliserDates = 6-nov
              [FertDate1].Script.Amount = 250
        Factor Cv: Specification=[Sowing].Script.CultivarName = Istabraq
    Simulation Pask LC07base
      Weather: FileName=%root%/Tests/Validation/Wheat/met/Lincoln_-43.6_172.45.met
      Clock: Start=2006-06-08; End=2007-03-17
      Summary
      SoilArbitrator
      MicroClimate: a_interception=0; b_interception=1; c_interception=0; d_interception=0; SoilHeatFluxFraction=0.4; MinimumHeightDiffForNewLayer=0; NightInterceptionFraction=0.5; ReferenceHeight=2
      Manager LocationInfo
        Country = New Zealand
        State = South Island
        Region = Canterbury
```csharp
using Models.Soils;
using System;
using Models.Core;
using Models.PMF;
using APSIM.Shared.Utilities;

namespace Models
{
    [Serializable]
    public class Script : Model
    {
        [Link] Clock Clock;
        [Link] Fertiliser Fertiliser;
        [Link] Summary Summary;
        
        [Description("Country")]
        public string Country { get; set; }

        [Description("State")]
        public string State { get; set; }

        [Description("Region")]
        public string Region { get; set; }

    }
}
```
      Zone Field: Area=1; Slope=0; AspectAngle=0; Altitude=0
        Report DailyReport: EventNames=[Clock].DoReport
          VariableNames:
            [Clock].Today
            [Wheat].Phenology.FloweringDAS
            [Wheat].Phenology.FlagLeafDAS
            [Wheat].Phenology.TerminalSpikeletDAS
        Report HarvestReport: EventNames=[Wheat].Harvesting
          VariableNames:
            [Clock].Today
            [Wheat].Phenology.Stage
            [Wheat].Phenology.Zadok.Stage
            [Wheat].Phenology.FloweringDAS
            [Wheat].Phenology.FlagLeafDAS
            [Wheat].Phenology.TerminalSpikeletDAS
        Report NDVIDailyReport: EventNames=[Clock].DoReport
          VariableNames:
            [Simulation].Name
            [Clock].Today
            [Spectral].NDVI
            [Wheat].SowingData.Cultivar
        Fertiliser
        SurfaceOrganicMatter: InitialResidueName=mown_ryegrass; InitialResidueType=lolium_rigidum; InitialResidueMass=500; InitialStandingFraction=0.9; InitialCPR=0; InitialCNR=70
        Plant Wheat
        Manager Sowing
          SowDate = 8-jun
          Treat =
          CultivarName = Istabraq
          SowingDepth = 20
          RowSpacing = 150
          Population = 172
```csharp
using Newtonsoft.Json;
using System.Data;
using System.Xml.Serialization;
using Models;
using System.Text;
using System.Collections.Generic;
using Models.Interfaces;
using System;
using Models.Core;
using Models.PMF;
using Models.Soils;
using Models.Utilities;
using APSIM.Shared.Utilities;

namespace Models
{
    [Serializable]
    public class Script : Model
    {
        [Link] Clock Clock;
        [Link] Fertiliser Fertiliser;
        [Link] Summary Summary;
        [Link] Soil Soil;
        [Link(ByName = true)] Plant Wheat;
        [Link] Simulation Simulation;
        Accumulator accumulatedRain;
        
        [Description("Sowing date (d-mmm)")]
        public string SowDate { get; set; }
        [Description("Treatment Name")]
        public string Treat { get; set; }
        [Display(Type = DisplayType.CultivarName)]
        [Description("Cultivar to be sown")]
        public string CultivarName { get; set; }
        [Description("Sowing depth (mm)")]
        public double SowingDepth { get; set; }
        [Description("Row spacing (mm)")]
        public double RowSpacing { get; set; }
        [Description("Plant population (/m2)")]
        public double Population { get; set; }



        [EventSubscribe("DoManagement")]
        private void OnDoManagement(object sender, EventArgs e)
        {

            if (DateUtilities.WithinDates(SowDate, Clock.Today, SowDate))
            {
               Wheat.Sow(population: Population, cultivar: CultivarName, depth: SowingDepth, rowSpacing: RowSpacing);    
            }            
        
        }
        
    }
}
```
        Manager FertSow
          FertiliserType = Urea
          Amount = 0
```csharp
using Models.Soils;
using System;
using System.Linq;
using Models.Core;
using Models.PMF;
namespace Models
{
    [Serializable]
    public class Script : Model
    {
        [Link] Clock Clock;
        [Link] Fertiliser Fertiliser;
        [Link(ByName = true)] Plant Wheat;
                
        [Description("Type of fertiliser to apply? ")] 
        [Display(Type = DisplayType.FertiliserType)]public string FertiliserType { get; set; }
    
        [Description("Amount of fertiliser to be applied (kg/ha)")]
        public double Amount { get; set; }
        
        [EventSubscribe("Sowing")]
        private void OnSowing(object sender, EventArgs e)
        {
            Model crop = sender as Model;
            if (Wheat != null && crop.Name.ToLower() == (Wheat as IModel).Name.ToLower())
                Fertiliser.Apply(amount: Amount, type: FertiliserType);
        }
    }
}
```
        Manager FertStage
          Stage = 30
          FertiliserType = UreaN
          Amount = 0
```csharp
using APSIM.Core;
using Models.PMF;
using Models.Core;
using System.Linq;
using System;
using Models.Soils;
namespace Models
{
    [Serializable] 
    public class Script : Model, IStructureDependency
    {
        [Link] private Clock Clock;
        [Link] private Fertiliser Fertiliser;
        [Link] private Summary Summary;
        [Link(ByName = true)] private Plant Wheat;
        public IStructure Structure { private get; set; }
 
        private bool hasFertilised = false;

        [Description("Fertilise once crop reaches stage:")]
        public double Stage { get; set; }

        [Description("Type of fertiliser to apply? ")] 
        [Display(Type = DisplayType.FertiliserType)]public string FertiliserType { get; set; }

        [Description("Amount of fertiliser to be applied (kg/ha)")] 
        public double Amount { get; set; }
     

        

        [EventSubscribe("DoManagement")] 
        private void OnDoManagement(object sender, EventArgs e)
        { 
            double zadok = (double)Structure.GetObject("Phenology.Zadok.Stage", relativeTo: Wheat).Value; 
 
            if (zadok >= Stage && !hasFertilised)
            { 
                Summary.WriteMessage(this, "Fertilising!!", MessageType.Diagnostic); 
                Fertiliser.Apply(amount: Amount, type: FertiliserType);
                hasFertilised = true; 
            } 
        }

        [EventSubscribe("Sowing")]
        private void OnSowing(object sender, EventArgs e)
        {
            hasFertilised = false;
        }
    }
}
```
        Manager Harvesting
```csharp
using APSIM.Core;
using Models.Soils.Nutrients;
using System;
using Models.Core;
using System.Collections.Generic;
using System.Text;
using Models.Soils;
using Models.PMF;
using Models;
using System.Xml.Serialization;
using APSIM.Shared.Utilities;
using Models.PMF.Phen;

namespace Models
{
    [Serializable]
    public class Script : Model, IStructureDependency
    {
        [Link(ByName = true)] private Plant Wheat;
        [Link] private Simulation sim;
        [Link] private Clock clock;
        public IStructure Structure { private get; set; }
        

        

        [EventSubscribe("DoManagement")]
        private void OnDoManagement(object sender, EventArgs e)
        {
            if (Wheat.IsReadyForHarvesting)
            {
               Wheat.Harvest();
               Wheat.EndCrop();    
            }
        
        }
        
        [EventSubscribe("EndOfDay")]
        private void OnEndOfDay(object sender, EventArgs e)
        {
            if ((clock.Today.Equals(clock.EndDate))&&(Wheat.IsAlive))
            {
                Wheat.Harvest();
                Wheat.EndCrop();
                Structure.Set("Clock.EndDate", clock.Today, relativeTo: sim);  
            }
        }
        
    }
    
    
    
}
```
        Operations Management
        Irrigation
        Manager IrrDate0
          IrrigateDates = 6-oct
          Amount = 15
          Depth = 0
          Efficiency = 1
          WillRunoff = False
```csharp
using Models.Soils;
using System;
using System.Linq;
using Models.Core;
using Models.PMF;
using APSIM.Shared.Utilities;
namespace Models
{
    [Serializable]
    public class Script : Model
    {
        [Link] Clock Clock;
        [Link] Irrigation Irrigation;
        
        [Separator("A component to apply irrigation on one or more dates on every year of the simulation")]

        [Description("Enter the irrigation dates as dd-mmm with comma separation (any year information entered will be ignored)")] 
        public string[] IrrigateDates { get; set; }
        
        [Description("Amount of irrigation to be applied (mm)")] 
        public double Amount { get; set; }
        
        [Description("Depth in the soil to apply the  irrigation (mm)")] 
        public double Depth { get; set; }
        
        [Description("Efficiency of irrigation (0-1)")] 
        public double Efficiency { get; set; }
        
        [Description("Will the irrigation runoff?")] 
        public bool WillRunoff { get; set; }
        
        [EventSubscribe("DoManagement")]
        private void OnDoManagement(object sender, EventArgs e)
        {
            foreach (string ddMMM in IrrigateDates)
            {
                if (DateUtilities.DatesEqual(ddMMM, Clock.Today))
                    Irrigation.Apply(amount: Amount, depth: Depth, efficiency: Efficiency, willRunoff: WillRunoff);
            }
        }
    }
}
```
        Manager IrrDate1
          IrrigateDates = 6-nov
          Amount = 20
          Depth = 0
          Efficiency = 1
          WillRunoff = False
          script: same as in Pask LC07.Pask LC07base.Field.IrrDate0
        Manager IrrDate2
          IrrigateDates = 24-nov
          Amount = 25
          Depth = 0
          Efficiency = 1
          WillRunoff = False
          script: same as in Pask LC07.Pask LC07base.Field.IrrDate0
        Manager FertDate0
          FertiliserType = NO3N
          FertiliserDates = 24-apr
          Amount = 0
```csharp
using Models.Soils;
using System;
using System.Linq;
using Models.Core;
using Models.PMF;
using APSIM.Shared.Utilities;
namespace Models
{
    [Serializable]
    public class Script : Model
    {
        [Link] Clock Clock;
        [Link] Fertiliser Fertiliser;
        
        [Separator("A component to apply fertiliser on one or more dates on every year of the simulation")]

        [Description("Type of fertiliser to apply? ")] 
        [Display(Type = DisplayType.FertiliserType)]public string FertiliserType { get; set; }

        [Description("Enter the fertilisation dates as dd-mmm with comma separation (any year information entered will be ignored): ")] 
        public string[] FertiliserDates { get; set; } 

        [Description("Amount of fertiliser to be applied each time (kg /ha)")] 
        public double Amount { get; set; }

      
        [EventSubscribe("DoManagement")]
        private void OnDoManagement(object sender, EventArgs e)
        {
            foreach (string ddMMM in FertiliserDates)
            {
                if (DateUtilities.DatesEqual(ddMMM, Clock.Today))
                {
                    Fertiliser.Apply(amount: Amount, type: FertiliserType);
                }
            }
        }
    }
}
```
        Manager FertDate1: same as Pask LC07.Pask LC07base.Field.FertDate0
        Manager NO3Initialise1
          SoluteName = NO3
          DateCsvString = 2006/06/7
          ValueCsvString = 3,4,5,5,5
          ThicknessCsvString = 100,200,200,200,200
```csharp
using APSIM.Core;
using Models.Interfaces;
using Models.AgPasture;
using System.Collections.Generic;
using System.Linq;
using System;
using Models.Core;
using Models.Soils;
using Models.Soils.Nutrients;
using APSIM.Shared.Utilities;
using Models.Climate;

namespace Models
{
    [Serializable] 
    [System.Xml.Serialization.XmlInclude(typeof(Model))]
    public class Script : Model, IStructureDependency
    {
        [Link] private Clock clock;
        [Link] private ISummary summary;
        private Solute solute;
        public IStructure Structure { private get; set; }
        
        
        [Link] private Solute[] solutes;

        private List<DateTime> dates = new List<DateTime>();
        private List<double> values = new List<double>();
        private List<double> thicknesses = new List<double>();

        [Separator("Set the amount of solute in the simulation on 1 or more dates. The name of the solute can be specified. You can set the amount of solute (ppm).")]
       

        [Description("Name of solute:")]
        public string SoluteName { get; set; }

        [Description("Dates (csv) for setting (adding to) the solute:")]
        public string DateCsvString { get; set; }

        [Description("Values (csv) ppm:")]
        public string ValueCsvString { get; set; }
        
        [Description("Matching layer thickness mm:")]
        public string ThicknessCsvString { get; set; }
  
        
        public double SoluteAdded { get; set; }
        public int LayersAdded { get; set; }

        [EventSubscribe("StartOfSimulation")]
        private void OnStartOfSimulation(object sender, EventArgs e)
        {
            solute = Array.Find(solutes, s => s.Name.Equals(SoluteName, StringComparison.InvariantCultureIgnoreCase));
            if (solute == null)
                throw new Exception($"Cannot find solute {SoluteName}");
        
            var dateStrings = DateCsvString.Split(",", StringSplitOptions.RemoveEmptyEntries);
            foreach (var d in dateStrings)
               dates.Add(DateTime.Parse(d));

            var valueStrings = ValueCsvString.Split(",", StringSplitOptions.RemoveEmptyEntries);
            foreach (var v in valueStrings)
               values.Add(Convert.ToDouble(v));
               
            valueStrings = ThicknessCsvString.Split(",", StringSplitOptions.RemoveEmptyEntries);
            foreach (var v in valueStrings)
               thicknesses.Add(Convert.ToDouble(v));
               
               
        }
        
        
        [EventSubscribe("DoDailyInitialisation")] private void DoDailyInitialisation(object sender, EventArgs e)
        {
               SoluteAdded = 0.0;
            foreach (var d in dates)
            {
                if (clock.Today == d) 
                {
                    IPhysical Physical =  Structure.Find<IPhysical>();
                    double[] ppm = SoilUtilities.MapConcentration(values.ToArray(), thicknesses.ToArray(), Physical.Thickness, 0);
                    double[] kgha = SoilUtilities.ppm2kgha(Physical.Thickness, Physical.BD, ppm);
                    SoluteAdded = 0;
                    LayersAdded = 0;
                    for (int i=0; i<kgha.Length; i++) {
                        if (i<solute.kgha.Length) {
                            if (kgha[i]>0) {
                                solute.kgha[i]=kgha[i];
                                SoluteAdded += solute.kgha[i];
                                LayersAdded += 1;
                                }
                            }
                    }
                }
            }
        }
    }
}
```
        Spectral: DrySoilNDVI=0.11; WetSoilNDVI=0.15; GreenCropNDVI=0.75; DeadCropNDVI=0.15
        Report SowingReport: EventNames=[Wheat].Sowing
          VariableNames:
            [Simulation].Name
            [Clock].Today
            [Wheat].SowingData.Cultivar
            [IWeather].Latitude
            [IWeather].Longitude
            [LocationInfo].Script.Country
            [LocationInfo].Script.State
            [LocationInfo].Script.Region
        Soil TempletonSiltLoam: SoilType=NZ_sedementary; Region=Plains; State=Canterbury; Country=New Zealand; Latitude=0; Longitude=0
          DataSource=Generic profile descriptions provided by Trevor Webb and data for functional horizions based on SWAMP project results
          Comments=Bulk density values were measured on the fine earth fraction so values entered into apsim soil are adjusted down to account for stone content (assuming stones are inert from all soil process so their mass and volume is removed from model paramaters).  SAT, DUL, LL15 and Air dry have been adjusted down to account for stone content.  OC has not been adjusted so the model will get the correct carbon and N amounts using the adjusted BD.
          Chemical: PHUnits=Water
            Thickness  PH  CEC
            180        6   14.2515
            150        6   11.150525
            400        6   9.056
            270        6   8.813
            500        6   8.7959
            CEC source: Calculated
          Physical
            Thickness  ParticleSizeSand  ParticleSizeSilt  ParticleSizeClay  Rocks     BD     AirDry  LL15  DUL   SAT
            200        5                 65                30                0.274682  1      0.05    0.1   0.32  0.42
            200        5                 65                30                0.118945  1.324  0.12    0.15  0.35  0.41
            200        5                 65                30                0.188999  1.35   0.1     0.1   0.3   0.37
            200        5                 65                30                0.218457  1.301  0.08    0.08  0.3   0.37
            200        5                 65                30                0.302948  1.301  0.06    0.07  0.28  0.33
            200        5                 65                30                0.324071  1.301  0.06    0.08  0.25  0.32
            200        5                 65                30                0.366317  1.301  0.1     0.1   0.23  0.3
            200        5                 65                30                0.345194  1.301  0.1     0.1   0.24  0.31
            Rocks, ParticleSizeSand, ParticleSizeSilt, ParticleSizeClay source: Calculated
            SoilCrop WheatSoil: LL=[0.1, 0.12, 0.1, 0.08, 0.06, 0.08, 0.1, 0.1]; KL=[0.06, 0.06, 0.1, 0.1, 0.05, 0.03, 0.02, 0.01]; XF=[1, 1, 1, 1, 1, 1, 1, 1]
          WaterBalance SoilWater: SummerDate=1-oct; SummerU=6; SummerCona=3; WinterDate=1-Apr; WinterU=2; WinterCona=1; DiffusConst=0; DiffusSlope=0; Salb=0.13; CN2Bare=0; CNRed=0; CNCov=0.8; PSIDul=-100; Thickness=[200, 200, 200, 200, 200, 200, 200, 200]; SWCON=[1, 1, 1, 1, 1, 1, 1, 1]
          Organic: FOMCNRatio=40; CarbonUnits=Total
            Thickness  Carbon  SoilCNRatio  FBiom   FInert  FOM
            180        2.6251  11           0.0333  0.4371  427.528
            150        1.2469  11           0.0187  0.6569  316.72
            400        0.316   11           0.0117  0.8496  142.312
            270        0.208   11           0.0102  0.945   82.9318
            500        0.2004  11           0.01    0.9827  30.5089
          Water: Thickness=[200, 200, 200, 200, 200, 200, 200, 200]; InitialValues=[0.35, 0.35, 0.25, 0.25, 0.25, 0.2, 0.18, 0.2]; FilledFromTop=false
          Nutrient
          Solute NO3: Thickness=[180, 150, 400, 270, 500]; InitialValues=[17, 5.1, 1.9, 2.9, 1.922]; InitialValuesUnits=ppm; WaterTableConcentration=0; D0=0; DepthConstant=0; MaxDepthSoluteAccessible=0; RunoffEffectivenessAtMovingSolute=0; MaxEffectiveRunoff=0
          Solute NH4: Thickness=[180, 150, 400, 270, 500]; InitialValues=[1.5, 0.854582, 0.442264, 0.38432, 0.38432]; InitialValuesUnits=ppm; WaterTableConcentration=0; D0=0; DepthConstant=0; MaxDepthSoluteAccessible=0; RunoffEffectivenessAtMovingSolute=0; MaxEffectiveRunoff=0
          Solute Urea: Thickness=[180, 150, 400, 270, 500]; InitialValues=[0, 0, 0, 0, 0]; InitialValuesUnits=kg/ha; WaterTableConcentration=0; D0=0; DepthConstant=0; MaxDepthSoluteAccessible=0; RunoffEffectivenessAtMovingSolute=0; MaxEffectiveRunoff=0
          SoilTemperature Temperature: InteractionsPerDay=8
  Experiment Pask TT06
    Memo
      Terrington 2006 nitrogen experiment from Pask (2009) and Pask *et al.* (2012).
      Data kindly supplied by Alistair Pask.

      Pask, A. J. D., R. Sylvester-Bradley, P. D. Jamieson, and M. J. Foulkes. ‘Quantifying How Winter Wheat Crops Accumulate and Use Nitrogen Reserves during Growth’. Field Crops Research 126 (14 February 2012): 104–18. https://doi.org/10.1016/j.fcr.2011.09.021.

      Pask, Alistair. ‘Optimising Nitrogen Storage in Wheat Canopies for Genetic Reduction in Fertiliser Nitrogen Inputs’. Thesis (University of Nottingham only), University of Nottingham, 2009. https://eprints.nottingham.ac.uk/12567/.
    Factors
      Permutation
        Factor N
          CompositeFactor 0
            Specifications:
              [Sowing].Script.Treat = 0
              [FertDate0].Script.FertiliserType = NH4NO3N
              [FertDate0].Script.FertiliserDates = 6-Mar
              [FertDate0].Script.Amount = 0
              [FertDate1].Script.FertiliserType = NH4NO3N
              [FertDate1].Script.FertiliserDates = 25-Apr
              [FertDate1].Script.Amount = 0
              [FertDate2].Script.FertiliserType = NH4NO3N
              [FertDate2].Script.FertiliserDates = 11-May
              [FertDate2].Script.Amount = 0
          CompositeFactor 70
            Specifications:
              [Sowing].Script.Treat = 70
              [FertDate0].Script.FertiliserType = NH4NO3N
              [FertDate0].Script.FertiliserDates = 6-Mar
              [FertDate0].Script.Amount = 40
              [FertDate1].Script.FertiliserType = NH4NO3N
              [FertDate1].Script.FertiliserDates = 25-Apr
              [FertDate1].Script.Amount = 15
              [FertDate2].Script.FertiliserType = NH4NO3N
              [FertDate2].Script.FertiliserDates = 11-May
              [FertDate2].Script.Amount = 15
          CompositeFactor 150
            Specifications:
              [Sowing].Script.Treat = 150
              [FertDate0].Script.FertiliserType = NH4NO3N
              [FertDate0].Script.FertiliserDates = 6-Mar
              [FertDate0].Script.Amount = 40
              [FertDate1].Script.FertiliserType = NH4NO3N
              [FertDate1].Script.FertiliserDates = 25-Apr
              [FertDate1].Script.Amount = 55
              [FertDate2].Script.FertiliserType = NH4NO3N
              [FertDate2].Script.FertiliserDates = 11-May
              [FertDate2].Script.Amount = 55
          CompositeFactor 220
            Specifications:
              [Sowing].Script.Treat = 220
              [FertDate0].Script.FertiliserType = NH4NO3N
              [FertDate0].Script.FertiliserDates = 6-Mar
              [FertDate0].Script.Amount = 40
              [FertDate1].Script.FertiliserType = NH4NO3N
              [FertDate1].Script.FertiliserDates = 25-Apr
              [FertDate1].Script.Amount = 90
              [FertDate2].Script.FertiliserType = NH4NO3N
              [FertDate2].Script.FertiliserDates = 11-May
              [FertDate2].Script.Amount = 90
          CompositeFactor 290
            Specifications:
              [Sowing].Script.Treat = 290
              [FertDate0].Script.FertiliserType = NH4NO3N
              [FertDate0].Script.FertiliserDates = 6-Mar
              [FertDate0].Script.Amount = 40
              [FertDate1].Script.FertiliserType = NH4NO3N
              [FertDate1].Script.FertiliserDates = 25-Apr
              [FertDate1].Script.Amount = 125
              [FertDate2].Script.FertiliserType = NH4NO3N
              [FertDate2].Script.FertiliserDates = 11-May
              [FertDate2].Script.Amount = 125
          CompositeFactor 370
            Specifications:
              [Sowing].Script.Treat = 370
              [FertDate0].Script.FertiliserType = NH4NO3N
              [FertDate0].Script.FertiliserDates = 6-Mar
              [FertDate0].Script.Amount = 40
              [FertDate1].Script.FertiliserType = NH4NO3N
              [FertDate1].Script.FertiliserDates = 25-Apr
              [FertDate1].Script.Amount = 165
              [FertDate2].Script.FertiliserType = NH4NO3N
              [FertDate2].Script.FertiliserDates = 11-May
              [FertDate2].Script.Amount = 165
        Factor Cv
          Specification=[Sowing].Script.CultivarName = Istabraq, Atlanta, Claire, Savannah
    Simulation Pask TT06base
      Weather: FileName=%root%/Tests/Validation/Wheat/met/325_52775.met
      Clock: Start=2005-10-11; End=2006-08-11
      Summary
      SoilArbitrator
      MicroClimate: a_interception=0; b_interception=1; c_interception=0; d_interception=0; SoilHeatFluxFraction=0.4; MinimumHeightDiffForNewLayer=0; NightInterceptionFraction=0.5; ReferenceHeight=2
      Manager LocationInfo
        Country = United Kingdom
        State = England
        Region = Norfolk
        script: same as in Pask LC07.Pask LC07base.LocationInfo
      Zone Field: Area=1; Slope=0; AspectAngle=0; Altitude=0
        Report DailyReport: EventNames=[Clock].DoReport
          VariableNames:
            [Clock].Today
            [Wheat].Phenology.FloweringDAS
            [Wheat].Phenology.FlagLeafDAS
            [Wheat].Phenology.TerminalSpikeletDAS
        Report HarvestReport: EventNames=[Wheat].Harvesting
          VariableNames:
            [Clock].Today
            [Wheat].Phenology.Stage
            [Wheat].Phenology.Zadok.Stage
            [Wheat].Phenology.FloweringDAS
            [Wheat].Phenology.FlagLeafDAS
            [Wheat].Phenology.TerminalSpikeletDAS
        Report NDVIDailyReport: EventNames=[Clock].DoReport
          VariableNames:
            [Simulation].Name
            [Clock].Today
            [Spectral].NDVI
            [Wheat].SowingData.Cultivar
        Fertiliser
        SurfaceOrganicMatter: InitialResidueName=winter canola; InitialResidueType=canola; InitialResidueMass=3000; InitialStandingFraction=0.7; InitialCPR=0; InitialCNR=70
        Plant Wheat
        Manager Sowing
          SowDate = 11-Oct
          Treat =
          CultivarName = Istabraq
          SowingDepth = 30
          RowSpacing = 120
          Population = 204
          script: same as in Pask LC07.Pask LC07base.Field.Sowing
        Manager FertSow: same as Pask LC07.Pask LC07base.Field.FertSow
        Manager FertStage: same as Pask LC07.Pask LC07base.Field.FertStage
        Manager Harvesting: same as Pask LC07.Pask LC07base.Field.Harvesting
        Operations Management
        Irrigation
        Manager IrrDate
          IrrigateDates = 24-jan
          Amount = 0
          Depth = 0
          Efficiency = 1
          WillRunoff = False
          script: same as in Pask LC07.Pask LC07base.Field.IrrDate0
        Soil: SoilType=Clay; Site=Murdeduke Homestead; NearestTown=Winchelsea; Region=South West; State=Victoria; Country=Australia; ApsoilNumber=825; Latitude=-38.191; Longitude=143.742; YearOfSampling=0
          DataSource=Data collected as part of the GRDC project Training growers to manage soil water by CSIRO Sustainable Ecosystems in collaboration with farmers and Agvise consultants
          Comments=Clay - Chem analysis: If EC <0.25 dS/m, ammonium acetate method used for cations, no prewash for soluble salts. pHwater independent.  If EC>0.25dS/m and pHwater>7.5 Tucker cation method used. OC estimated for all layers. Barley CLL estimated
          Physical
            Thickness  ParticleSizeSand  ParticleSizeSilt  ParticleSizeClay  Rocks  BD     AirDry  LL15  DUL    SAT
            150        5                 65                30                0      1.231  0.1     0.2   0.37   0.505
            150        5                 65                30                0      1.172  0.18    0.18  0.375  0.528
            300        5                 65                30                0      1.108  0.16    0.16  0.405  0.552
            300        5                 65                30                0      1.162  0.14    0.14  0.368  0.532
            300        5                 65                30                0      1.372  0.16    0.16  0.32   0.452
            1000       5                 65                30                0      1.372  0.18    0.18  0.32   0.452
            Rocks, ParticleSizeSand, ParticleSizeSilt, ParticleSizeClay source: Calculated
            SoilCrop wheatSoil: LL=[0.2, 0.2, 0.242, 0.203, 0.22, 0.22]; KL=[0.06, 0.06, 0.06, 0.04, 0.04, 0.04]; XF=[1, 1, 1, 1, 1, 1]
          WaterBalance SoilWater: SummerDate=1-Apr; SummerU=6; SummerCona=3.5; WinterDate=1-Nov; WinterU=2; WinterCona=2; DiffusConst=40; DiffusSlope=16; Salb=0.12; CN2Bare=73; CNRed=20; CNCov=0.8; PSIDul=-100; Thickness=[150, 150, 300, 300, 300, 400]; SWCON=[0.3, 0.3, 0.3, 0.3, 0.3, 0.3]
          Organic: FOMCNRatio=40; CarbonUnits=WalkleyBlack
            Thickness  Carbon  SoilCNRatio  FBiom  FInert  FOM
            150        2.1     12           0.04   0.4     446.88
            150        0.96    12           0.02   0.5     307.136
            300        0.6     12           0.02   0.7     145.081
            300        0.3     12           0.02   1       68.531
            300        0.18    12           0.01   1       32.372
          Chemical: PHUnits=Water
            Thickness  PH   EC   ESP   CEC
            150        6.5  0.1  4.2   11
            150        7.5  0.2  5.2   17.4
            300        8.4  0.2  5.9   28.8
            300        9.2  0.3  8.9   26.9
            300        9.2  0.3  15.8  23.4
            EC, CL, ESP, PH source: Unknown source or quality of data
          Nutrient
          Solute NO3: Thickness=[100, 100, 100, 300, 400]; InitialValues=[20.9, 22, 23.2, 7.4, 2]; InitialValuesUnits=ppm; WaterTableConcentration=0; D0=0; DepthConstant=0; MaxDepthSoluteAccessible=0; RunoffEffectivenessAtMovingSolute=0; MaxEffectiveRunoff=0
          Solute NH4: Thickness=[100, 100, 100, 300, 400]; InitialValues=[1, 1, 1, 1, 1]; InitialValuesUnits=ppm; WaterTableConcentration=0; D0=0; DepthConstant=0; MaxDepthSoluteAccessible=0; RunoffEffectivenessAtMovingSolute=0; MaxEffectiveRunoff=0
          Solute Urea: Thickness=[150, 150, 300, 300, 300]; InitialValues=[0, 0, 0, 0, 0]; InitialValuesUnits=kg/ha; WaterTableConcentration=0; D0=0; DepthConstant=0; MaxDepthSoluteAccessible=0; RunoffEffectivenessAtMovingSolute=0; MaxEffectiveRunoff=0
          Water: Thickness=[150, 150, 300, 300, 300, 1000]; InitialValues=[0.37, 0.375, 0.405, 0.368, 0.32, 0.32]; FilledFromTop=false
          SoilTemperature Temperature: InteractionsPerDay=8
        Manager FertDate0: same as Pask LC07.Pask LC07base.Field.FertDate0
        Manager FertDate1: same as Pask LC07.Pask LC07base.Field.FertDate0
        Manager FertDate2: same as Pask LC07.Pask LC07base.Field.FertDate0
        Manager NO3Initialise1
          SoluteName = NO3
          DateCsvString = 2005/10/10
          ValueCsvString = 5,8,8,8,9
          ThicknessCsvString = 100,200,200,200,200
          script: same as in Pask LC07.Pask LC07base.Field.NO3Initialise1
        Spectral: DrySoilNDVI=0.11; WetSoilNDVI=0.15; GreenCropNDVI=0.75; DeadCropNDVI=0.15
        Report SowingReport: EventNames=[Wheat].Sowing
          VariableNames:
            [Simulation].Name
            [Clock].Today
            [Wheat].SowingData.Cultivar
            [IWeather].Latitude
            [IWeather].Longitude
            [LocationInfo].Script.Country
            [LocationInfo].Script.State
            [LocationInfo].Script.Region
  Experiment Pask TT07
    Memo
      Terrington 2007 nitrogen experiment from Pask (2009) and Pask *et al.* (2012).
      Data kindly supplied by Alistair Pask.

      Pask, A. J. D., R. Sylvester-Bradley, P. D. Jamieson, and M. J. Foulkes. ‘Quantifying How Winter Wheat Crops Accumulate and Use Nitrogen Reserves during Growth’. Field Crops Research 126 (14 February 2012): 104–18. https://doi.org/10.1016/j.fcr.2011.09.021.

      Pask, Alistair. ‘Optimising Nitrogen Storage in Wheat Canopies for Genetic Reduction in Fertiliser Nitrogen Inputs’. Thesis (University of Nottingham only), University of Nottingham, 2009. https://eprints.nottingham.ac.uk/12567/.
    Factors
      Permutation
        Factor N
          CompositeFactor 0
            Specifications:
              [Sowing].Script.Treat = 0
              [FertDate0].Script.FertiliserType = NH4NO3N
              [FertDate0].Script.FertiliserDates = 26-Mar
              [FertDate0].Script.Amount = 0
              [FertDate1].Script.FertiliserType = NH4NO3N
              [FertDate1].Script.FertiliserDates = 24-Apr
              [FertDate1].Script.Amount = 0
              [FertDate2].Script.FertiliserType = NH4NO3N
              [FertDate2].Script.FertiliserDates = 9-May
              [FertDate2].Script.Amount = 0
          CompositeFactor 60
            Specifications:
              [Sowing].Script.Treat = 60
              [FertDate0].Script.FertiliserType = NH4NO3N
              [FertDate0].Script.FertiliserDates = 26-Mar
              [FertDate0].Script.Amount = 40
              [FertDate1].Script.FertiliserType = NH4NO3N
              [FertDate1].Script.FertiliserDates = 24-Apr
              [FertDate1].Script.Amount = 10
              [FertDate2].Script.FertiliserType = NH4NO3N
              [FertDate2].Script.FertiliserDates = 9-May
              [FertDate2].Script.Amount = 10
          CompositeFactor 120
            Specifications:
              [Sowing].Script.Treat = 120
              [FertDate0].Script.FertiliserType = NH4NO3N
              [FertDate0].Script.FertiliserDates = 26-Mar
              [FertDate0].Script.Amount = 40
              [FertDate1].Script.FertiliserType = NH4NO3N
              [FertDate1].Script.FertiliserDates = 24-Apr
              [FertDate1].Script.Amount = 40
              [FertDate2].Script.FertiliserType = NH4NO3N
              [FertDate2].Script.FertiliserDates = 9-May
              [FertDate2].Script.Amount = 40
          CompositeFactor 180
            Specifications:
              [Sowing].Script.Treat = 180
              [FertDate0].Script.FertiliserType = NH4NO3N
              [FertDate0].Script.FertiliserDates = 26-Mar
              [FertDate0].Script.Amount = 40
              [FertDate1].Script.FertiliserType = NH4NO3N
              [FertDate1].Script.FertiliserDates = 24-Apr
              [FertDate1].Script.Amount = 70
              [FertDate2].Script.FertiliserType = NH4NO3N
              [FertDate2].Script.FertiliserDates = 9-May
              [FertDate2].Script.Amount = 70
          CompositeFactor 260
            Specifications:
              [Sowing].Script.Treat = 260
              [FertDate0].Script.FertiliserType = NH4NO3N
              [FertDate0].Script.FertiliserDates = 26-Mar
              [FertDate0].Script.Amount = 40
              [FertDate1].Script.FertiliserType = NH4NO3N
              [FertDate1].Script.FertiliserDates = 24-Apr
              [FertDate1].Script.Amount = 110
              [FertDate2].Script.FertiliserType = NH4NO3N
              [FertDate2].Script.FertiliserDates = 9-May
              [FertDate2].Script.Amount = 110
          CompositeFactor 340
            Specifications:
              [Sowing].Script.Treat = 340
              [FertDate0].Script.FertiliserType = NH4NO3N
              [FertDate0].Script.FertiliserDates = 26-Mar
              [FertDate0].Script.Amount = 40
              [FertDate1].Script.FertiliserType = NH4NO3N
              [FertDate1].Script.FertiliserDates = 24-Apr
              [FertDate1].Script.Amount = 150
              [FertDate2].Script.FertiliserType = NH4NO3N
              [FertDate2].Script.FertiliserDates = 9-May
              [FertDate2].Script.Amount = 150
        Factor Cv
          Specification=[Sowing].Script.CultivarName = Istabraq, Atlanta, Claire, Savannah
    Simulation Pask TT07base
      Weather: FileName=%root%/Tests/Validation/Wheat/met/325_52775.met
      Clock: Start=2006-10-30; End=2007-08-13
      Summary
      SoilArbitrator
      MicroClimate: a_interception=0; b_interception=1; c_interception=0; d_interception=0; SoilHeatFluxFraction=0.4; MinimumHeightDiffForNewLayer=0; NightInterceptionFraction=0.5; ReferenceHeight=2
      Manager LocationInfo: same as Pask TT06.Pask TT06base.LocationInfo
      Zone Field: Area=1; Slope=0; AspectAngle=0; Altitude=0
        Report DailyReport: EventNames=[Clock].DoReport
          VariableNames:
            [Clock].Today
            [Wheat].Phenology.FloweringDAS
            [Wheat].Phenology.FlagLeafDAS
            [Wheat].Phenology.TerminalSpikeletDAS
        Report HarvestReport: EventNames=[Wheat].Harvesting
          VariableNames:
            [Clock].Today
            [Wheat].Phenology.Stage
            [Wheat].Phenology.Zadok.Stage
            [Wheat].Phenology.FloweringDAS
            [Wheat].Phenology.FlagLeafDAS
            [Wheat].Phenology.TerminalSpikeletDAS
        Report NDVIDailyReport: EventNames=[Clock].DoReport
          VariableNames:
            [Simulation].Name
            [Clock].Today
            [Spectral].NDVI
            [Wheat].SowingData.Cultivar
        Fertiliser
        SurfaceOrganicMatter: InitialResidueName=winter canola; InitialResidueType=canola; InitialResidueMass=3000; InitialStandingFraction=0.7; InitialCPR=0; InitialCNR=70
        Plant Wheat
        Manager Sowing
          SowDate = 30-Oct
          Treat =
          CultivarName = Istabraq
          SowingDepth = 20
          RowSpacing = 120
          Population = 172
          script: same as in Pask LC07.Pask LC07base.Field.Sowing
        Manager FertSow
          FertiliserType = NH4NO3N
          Amount = 0
          script: same as in Pask LC07.Pask LC07base.Field.FertSow
        Manager FertStage: same as Pask LC07.Pask LC07base.Field.FertStage
        Manager Harvesting: same as Pask LC07.Pask LC07base.Field.Harvesting
        Operations Management
        Irrigation
        Manager IrrDate: same as Pask TT06.Pask TT06base.Field.IrrDate
        Soil: SoilType=Clay; Site=Murdeduke Homestead; NearestTown=Winchelsea; Region=South West; State=Victoria; Country=Australia; ApsoilNumber=825; Latitude=-38.191; Longitude=143.742; YearOfSampling=0
          DataSource=Data collected as part of the GRDC project Training growers to manage soil water by CSIRO Sustainable Ecosystems in collaboration with farmers and Agvise consultants
          Comments=Clay - Chem analysis: If EC <0.25 dS/m, ammonium acetate method used for cations, no prewash for soluble salts. pHwater independent.  If EC>0.25dS/m and pHwater>7.5 Tucker cation method used. OC estimated for all layers. Barley CLL estimated
          Physical
            Thickness  ParticleSizeSand  ParticleSizeSilt  ParticleSizeClay  Rocks  BD     AirDry  LL15  DUL    SAT
            150        5                 65                30                0      1.231  0.1     0.2   0.37   0.505
            150        5                 65                30                0      1.172  0.16    0.2   0.375  0.528
            300        5                 65                30                0      1.108  0.2     0.2   0.405  0.552
            300        5                 65                30                0      1.162  0.2     0.2   0.368  0.532
            300        5                 65                30                0      1.372  0.2     0.2   0.308  0.452
            1000       5                 65                30                0      1.372  0.2     0.2   0.308  0.452
            Rocks, ParticleSizeSand, ParticleSizeSilt, ParticleSizeClay source: Calculated
            SoilCrop wheatSoil: LL=[0.2, 0.2, 0.242, 0.203, 0.22, 0.22]; KL=[0.06, 0.06, 0.06, 0.04, 0.04, 0.04]; XF=[1, 1, 1, 1, 1, 1]
          WaterBalance SoilWater: SummerDate=1-April; SummerU=6; SummerCona=3.5; WinterDate=1-Nov; WinterU=2; WinterCona=2; DiffusConst=40; DiffusSlope=16; Salb=0.12; CN2Bare=73; CNRed=20; CNCov=0.8; PSIDul=-100; Thickness=[150, 150, 300, 300, 300]; SWCON=[0.3, 0.3, 0.3, 0.3, 0.3]
          Organic: same as Pask TT06.Pask TT06base.Field.Soil.Organic
          Chemical: same as Pask TT06.Pask TT06base.Field.Soil.Chemical
          Nutrient
          Solute NO3: Thickness=[100, 100, 100, 300, 400]; InitialValues=[19.3, 20.3, 21.4, 6.8, 2]; InitialValuesUnits=ppm; WaterTableConcentration=0; D0=0; DepthConstant=0; MaxDepthSoluteAccessible=0; RunoffEffectivenessAtMovingSolute=0; MaxEffectiveRunoff=0
          Solute NH4: same as Pask TT06.Pask TT06base.Field.Soil.NH4
          Solute Urea: same as Pask TT06.Pask TT06base.Field.Soil.Urea
          Water: Thickness=[150, 150, 300, 300, 300, 1000]; InitialValues=[0.37, 0.375, 0.405, 0.368, 0.308, 0.308]; FilledFromTop=false
          SoilTemperature Temperature: InteractionsPerDay=8
        Manager FertDate0: same as Pask LC07.Pask LC07base.Field.FertDate0
        Manager FertDate1: same as Pask LC07.Pask LC07base.Field.FertDate0
        Manager FertDate2: same as Pask LC07.Pask LC07base.Field.FertDate0
        Manager NO3Initialise1
          SoluteName = NO3
          DateCsvString = 2006/10/29
          ValueCsvString = 5,7,7,8,8
          ThicknessCsvString = 100,200,200,200,200
          script: same as in Pask LC07.Pask LC07base.Field.NO3Initialise1
        Spectral: DrySoilNDVI=0.11; WetSoilNDVI=0.15; GreenCropNDVI=0.75; DeadCropNDVI=0.15
        Report SowingReport: EventNames=[Wheat].Sowing
          VariableNames:
            [Simulation].Name
            [Clock].Today
            [Wheat].SowingData.Cultivar
            [IWeather].Latitude
            [IWeather].Longitude
            [LocationInfo].Script.Country
            [LocationInfo].Script.State
            [LocationInfo].Script.Region
  Folder Combined Results
    Memo Combined Results
      Simulation results for the combined datasets from the various countries are shown in the following graphs.  The model is able to adequately capture the influence of growing conditions (soil, climate) and management (population, Nitrogen, irrigation, sowing date).
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