Simulations: Version=220
  Memo TitlePage
    # The APSIM Wheat Model

    _Brown, H.E., Huth, N.I. and Holzworth, D.P._
  Memo Introduction
    The APSIM wheat model has been developed using the Plant Modelling Framework (PMF) of [#brown_plant_2014]. This new framework provides a library of plant organ and process submodels that can be coupled, at runtime, to construct a model in much the same way that models can be coupled to construct a simulation. This means that dynamic composition of lower level process and organ classes (e.g. photosynthesis, leaf) into larger constructions (e.g. maize, wheat, sorghum) can be achieved by the model developer without additional coding.

    The wheat model consists of:

    * a phenology model to simulate development through sequential developmental phases
    * a structure model to simulate plant morphology
    * a collection of organs to simulate the various plant parts
    * an arbitrator to allocate resources (N, biomass) to the various plant organs

    This work builds upon earlier APSIM Wheat models such as NWheat ([#Asseng200225], [#KeatingNWheat]), NWheatS ([#Asseng1998163]), Cropmod-Wheat ([#Wang2002GenericCropModel]), and the earlier versions developed in Plant ([APSIM Wheat 7.5](https://\"http://www.apsim.info/Documentation/Model,CropandSoil/CropModuleDocumentation/Wheat.aspx)") and then within the Plant Modelling Framework ([#brown_plant_2014]).
  DataStore
    ExcelInput ExcelMultiInput: FileNames=[Observed/Dookie2024_Observed.xlsx]; SheetNames=[Observed]
  Folder Replacements
    Manager MaxLeafSize
```csharp
using Models.Soils;
using Models.PMF.Struct;
using System;
using System.Collections.Generic;
using System.Xml.Serialization;
using Models.Core;
using Models.Interfaces;
using Models.PMF;
using Models.PMF.Organs;
using Models.Soils.Arbitrator;
using APSIM.Shared.Utilities;
using Newtonsoft.Json;



namespace Models
{
    [Serializable] 
    public class Script : Model
    {
//        [Link] private Clock Clock;
//        [Link] private Plant Wheat;
//        public  event EventHandler LeafReport;
//        [Link(Type = LinkType.Path, Path = "[Wheat].Structure")]
//        private Structure structure;
//        
//        
//        [JsonIgnore] public int LeafPosition { get; set; }
//        [JsonIgnore] public double MaxLeafSize { get; set; }
//        
//        [EventSubscribe("DoManagement")]
//        private void OnDoManagement(object sender, EventArgs e)
//        {
//            var leaf = Wheat.Leaf as Leaf;
//            if ((leaf.ExpandedCohortNo > LeafPosition) & (structure.NextLeafProportion == 1))
//            {
//                LeafPosition = (int)
//                leaf.ExpandedCohortNo;
//                MaxLeafSize = leaf.CohortSize[LeafPosition - 1];
//                LeafReport.Invoke(this, new EventArgs());
//            }
//        }
    }
}
```
    Manager Harvesting
```csharp
using APSIM.Core;
using Models.Soils.Nutrients;
using System;
using Models.Core;
using System.Collections.Generic;
using System.Text;
using Models.Soils;
using Models.PMF;
using Models;
using System.Xml.Serialization;
using APSIM.Shared.Utilities;
using Models.PMF.Phen;

namespace Models
{
    [Serializable] 
    public class Script : Model, IStructureDependency
    {
        [Link] private Plant Wheat;
        [Link] private Simulation sim;
        [Link] private Clock clock;
        [Link(Type = LinkType.Path, Path = "[Wheat].Phenology")]
        private Phenology phenology;
        public IStructure Structure { private get; set; }


        

        [EventSubscribe("DoManagement")]
        private void OnDoManagement(object sender, EventArgs e)
        {
            if (phenology.CurrentPhase.Name == "GrainRipening")
            {
                Wheat.Harvest();
                Wheat.EndCrop();
                Structure.Set("Clock.EndDate", clock.Today, relativeTo: sim);  
            }
        }

        [EventSubscribe("EndOfDay")]
        private void OnEndOfDay(object sender, EventArgs e)
        {
            if ((clock.Today.Equals(clock.EndDate))&&(Wheat.IsAlive))
            {
                Wheat.Harvest();
                Wheat.EndCrop();
                Structure.Set("Clock.EndDate", clock.Today, relativeTo: sim);  
            }
        }

    }
}
```
  Experiment DookieWWHI2024
    DisabledSimNames=[DookieWWHI2024CvIllaboSow14-May, DookieWWHI2024CvKittyhawkSow14-May, DookieWWHI2024CvWedgetailSow14-May, DookieWWHI2024CvWylahSow14-May, DookieWWHI2024CvWhistlerSow14-May, DookieWWHI2024CvRosellaSow14-May, DookieWWHI2024CvOspreySow14-May, DookieWWHI2024CvScepterSow17-Apr, DookieWWHI2024CvMaceSow17-Apr, DookieWWHI2024CvGregorySow17-Apr, DookieWWHI2024CvWyalkatchemSow17-Apr, DookieWWHI2024CvYitpiSow17-Apr, DookieWWHI2024CvJanzSow17-Apr, DookieWWHI2024CvMeeringSow17-Apr]
    Factors
      Permutation
        Factor Cv
          Memo Emergence dates
            Emergence dates were set to the observed date of 50% emergence for most cultivars except some of the early sown ones that had a protracted emergence period.  For them emergence date was set prior to 50% at more like 20%
          CompositeFactor Winter
            Specifications:
              [Sowing].Script.CultivarName = Mowhawk
              [Sowing].Script.Population = 86
          CompositeFactor Spring
            Specifications:
              [Sowing].Script.CultivarName = Sunmaster
              [Sowing].Script.Population = 131
        Factor Sow
          CompositeFactor 17-Apr
            Specifications:
              [Sowing].Script.SowDate = 17-Apr
              [ManagementSpring].Enabled = false
              [ManagementWinter].Enabled = true
          CompositeFactor 14-May
            Specifications:
              [Sowing].Script.SowDate = 14-May
              [ManagementSpring].Enabled = true
              [ManagementWinter].Enabled = false
    Simulation McPoyles
      Weather: FileName=Met/Dookie2024.met
      Clock: Start=2024-04-10; End=2024-11-17
      Summary
      SoilArbitrator
      MicroClimate: a_interception=0; b_interception=1; c_interception=0; d_interception=0; SoilHeatFluxFraction=0.4; MinimumHeightDiffForNewLayer=0; NightInterceptionFraction=0.5; ReferenceHeight=2
      Manager LocationInfo
        Country = Australia
        State = Western Australia
        Region = South West
```csharp
using Models.Soils;
using System;
using Models.Core;
using Models.PMF;
using APSIM.Shared.Utilities;

namespace Models
{
    [Serializable]
    public class Script : Model
    {
        [Link] Clock Clock;
        [Link] Fertiliser Fertiliser;
        [Link] Summary Summary;
        
        [Description("Country")]
        public string Country { get; set; }

        [Description("State")]
        public string State { get; set; }

        [Description("Region")]
        public string Region { get; set; }

    }
}
```
      Zone Field: Area=1; Slope=0; AspectAngle=0; Altitude=0
        Fertiliser
        Irrigation
        SurfaceOrganicMatter: InitialResidueName=Canola stubble; InitialResidueType=canola; InitialResidueMass=3000; InitialStandingFraction=0.7; InitialCPR=0; InitialCNR=70
        Plant Wheat
        Manager Sowing
          SowDate = 1-may
          Treat =
          CultivarName =
          SowingDepth = 30
          RowSpacing = 225
          Population = 180
```csharp
using Newtonsoft.Json;
using System.Data;
using System.Xml.Serialization;
using Models;
using System.Text;
using System.Collections.Generic;
using Models.Interfaces;
using System;
using Models.Core;
using Models.PMF;
using Models.Soils;
using Models.Utilities;
using APSIM.Shared.Utilities;

namespace Models
{
    [Serializable]
    public class Script : Model
    {
        [Link] Clock Clock;
        [Link] Fertiliser Fertiliser;
        [Link] Summary Summary;
        [Link] Soil Soil;
        [Link(ByName = true)] Plant Wheat;
        [Link] Simulation Simulation;
        Accumulator accumulatedRain;
        
        [Description("Sowing date (d-mmm)")]
        public string SowDate { get; set; }
        [Description("Treatment Name")]
        public string Treat { get; set; }
        [Display(Type = DisplayType.CultivarName)]
        [Description("Cultivar to be sown")]
        public string CultivarName { get; set; }
        [Description("Sowing depth (mm)")]
        public double SowingDepth { get; set; }
        [Description("Row spacing (mm)")]
        public double RowSpacing { get; set; }
        [Description("Plant population (/m2)")]
        public double Population { get; set; }
        //[Description("Emergence Date (d-MMM)")]
        // public string EmergeDate {get; set;}



        [EventSubscribe("DoManagement")]
        private void OnDoManagement(object sender, EventArgs e)
        {

            if (DateUtilities.WithinDates(SowDate, Clock.Today, SowDate))
            {
               Wheat.Sow(population: Population, cultivar: CultivarName, depth: SowingDepth, rowSpacing: RowSpacing);   
               // Wheat.Phenology.SetPhaseCompletionDate(EmergeDate,"Emerging"); 
            }            
        
        }
        
    }
}
```
        Manager Harvest
          NoHarvestBefore = 17-Nov
```csharp
using APSIM.Core;
using Models.Soils.Nutrients;
using System;
using Models.Core;
using System.Collections.Generic;
using System.Text;
using Models.Soils;
using Models.PMF;
using Models;
using System.Xml.Serialization;
using APSIM.Shared.Utilities;
using Models.PMF.Phen;

namespace Models
{
    [Serializable]
    public class Script : Model, IStructureDependency
    {
        [Link(ByName = true)] private Plant Wheat;
        [Link] private Simulation sim;
        [Link] private Clock clock;
        [Link] private Summary summary;
        public IStructure Structure { private get; set; }
        
        [Description("Prevent harvesting before: ")]
        public string NoHarvestBefore {get; set;}
        

        

        [EventSubscribe("DoManagement")]
        private void OnDoManagement(object sender, EventArgs e)
        {
            if (Wheat.IsReadyForHarvesting && DateUtilities.CompareDates(NoHarvestBefore, clock.Today) >= 0)
            {
                Wheat.Harvest();
                Wheat.EndCrop();
            }
        }
        
        [EventSubscribe("EndOfDay")]
        private void OnEndOfDay(object sender, EventArgs e)
        {
            if ((clock.Today.Equals(clock.EndDate))&&(Wheat.IsAlive))
            {
                Wheat.Harvest();
                Wheat.EndCrop();
                Structure.Set("Clock.EndDate", clock.Today, relativeTo: sim);
            }
        }
    }
}
```
        Spectral: DrySoilNDVI=0.1; WetSoilNDVI=0.2; GreenCropNDVI=0.85; DeadCropNDVI=0.15
        Operations ManagementWinter
          2024-04-17  [Fertiliser].Apply(amount: 100, type: "MAP")
          2024-04-17  [Irrigation].Apply(100)
          2024-07-26  [Fertiliser].Apply(amount: 68, type: "UreaN")
          2024-08-26  [Fertiliser].Apply(amount: 68, type: "UreaN")
          2024-05-01  [Irrigation].Apply(5)
          Memo
            2024	Dookie	17-Apr-24	Winter	MAP	100

            2024	Dookie	14-May-24	Spring	MAP	100

            2024	Dookie	26-Jul-24	Winter & Spring	Urea	150

            2024	Dookie	26-Aug-24	Winter & Spring	Urea	150

            2024	Dookie	01-May-24	Winter	5	Establishment irrigation (winter wheat only)
        Operations ManagementSpring
          2024-05-14  [Fertiliser].Apply(amount: 100, type: "MAP")
          2024-05-14  [Irrigation].Apply(100)
          2024-07-26  [Fertiliser].Apply(amount: 68, type: "UreaN")
          2024-08-26  [Fertiliser].Apply(amount: 68, type: "UreaN")
          Memo
            2024	Dookie	17-Apr-24	Winter	MAP	100

            2024	Dookie	14-May-24	Spring	MAP	100

            2024	Dookie	26-Jul-24	Winter & Spring	Urea	150

            2024	Dookie	26-Aug-24	Winter & Spring	Urea	150

            2024	Dookie	01-May-24	Winter	5	Establishment irrigation (winter wheat only)
        Soil Dookie24Soil: SoilType=Sandy duplex; LocalName=Ironstone gravelly soils; Site=Tenterden; NearestTown=Tenterden; Region=Southern Region; State=Western Australia; Country=Australia; ApsoilNumber=1150; Latitude=-34.442704; Longitude=117.394537; LocationAccuracy=+/- 20m; YearOfSampling=2015; DataSource=Rob Summers DAFWA
          Comments=gravel - Wa2 - Sb diff 6 - gravelly sandy earth light clay at depth
          Physical
            Thickness  ParticleSizeSand  ParticleSizeSilt  ParticleSizeClay  Rocks  BD     AirDry  LL15   DUL    SAT
            100        87.81             6.15              6.05              0      1.294  0.082   0.18   0.31   0.341
            100        86.18             4.95              8.86              0      1.443  0.11    0.11   0.19   0.209
            200        86.18             4.95              8.86              0      1.513  0.27    0.27   0.371  0.408
            200        88.29             3.92              7.79              0      1.2    0.27    0.27   0.465  0.511
            200        88.29             3.92              7.79              0      1.4    0.274   0.274  0.413  0.455
            200        88.29             3.92              7.79              0      1.519  0.297   0.297  0.332  0.365
            200        84.27             2.96              12.77             0      1.417  0.275   0.275  0.328  0.361
            200        84.27             2.96              12.77             0      1.669  0.258   0.258  0.315  0.346
            200        84.27             2.96              12.77             0      1.56   0.193   0.193  0.334  0.367
            200        84.27             2.96              12.77             0      1.68   0.252   0.252  0.31   0.342
            SoilCrop wheatSoil
              LL=[0.18, 0.11, 0.27, 0.27, 0.274, 0.297, 0.275, 0.258, 0.193, 0.252]
              KL=[0.06, 0.06, 0.06, 0.06, 0.06, 0.06, 0.06, 0.06, 0.06, 0.06]
              XF=[1, 1, 1, 1, 1, 1, 1, 1, 1, 1]
          WaterBalance SoilWater: SummerDate=1-Nov; SummerU=6; SummerCona=3.5; WinterDate=1-Apr; WinterU=2; WinterCona=2; DiffusConst=88; DiffusSlope=35; Salb=0.12; CN2Bare=73; CNRed=20; CNCov=0.8; PSIDul=-100; Thickness=[100, 100, 100, 100, 100, 100, 100]; SWCON=[0.5, 0.5, 0.5, 0.5, 0.3, 0.3, -]
          Organic: FOMCNRatio=40; CarbonUnits=Total
            Thickness  Carbon  SoilCNRatio  FBiom  FInert  FOM
            100        1.48    12           0.035  0.4     315.5
            100        0.64    12           0.02   0.5     127.3
            200        0.4     12           0.02   0.5     127.3
            200        0.35    12           0.02   0.7     61.6
            200        0.25    12           0.02   0.7     61.6
            200        0.21    12           0.02   0.7     61.6
            200        0.1     12           0.015  0.7     60.5
            200        0.1     12           0.015  0.7     60.1
            200        0.1     12           0.015  0.867   58.2
            200        0.1     12           0.015  0.95    42.2
          Chemical: PHUnits=Water
            Thickness  PH   EC     ESP    CEC
            100        5.1  0.132  0.026  7.003
            100        5.2  0.085  0.052  4.205
            200        6.3  0.085  0.052  4.205
            200        7.2  0.065  0.064  3.411
            200        7.6  0.065  0.064  3.411
            200        7.9  0.065  0.064  3.411
            200        7.9  0.064  0.083  3.514
            200        7.9  0.064  0.083  3.514
            200        8    0.087  0.125  4.193
            200        8.1  0.098  0.146  4.533
          Nutrient
          Solute NO3: Thickness=[100, 100, 200, 200, 200, 200, 200, 200, 200, 200]; InitialValues=[25, 5.5, 3.1, 1.8, 1.4, 2.2, 3.4, 4.2, 4.1, 4.4]; InitialValuesUnits=ppm; WaterTableConcentration=0; D0=0; DepthConstant=0; MaxDepthSoluteAccessible=0; RunoffEffectivenessAtMovingSolute=0; MaxEffectiveRunoff=0
          Solute NH4: Thickness=[100, 100, 200, 200, 200, 200, 200, 200, 200, 200]; InitialValues=[1.3, 1, 1.2, 0.9, 0.9, 0.7, 0.7, 0.7, 0.5, 1.6]; InitialValuesUnits=ppm; WaterTableConcentration=0; D0=0; DepthConstant=0; MaxDepthSoluteAccessible=0; RunoffEffectivenessAtMovingSolute=0; MaxEffectiveRunoff=0
          Solute Urea: Thickness=[100, 100, 200, 200, 200, 200, 200, 200, 200, 200]; InitialValues=[0, 0, 0, 0, 0, 0, 0, 0, 0, 0]; InitialValuesUnits=kg/ha; WaterTableConcentration=0; D0=0; DepthConstant=0; MaxDepthSoluteAccessible=0; RunoffEffectivenessAtMovingSolute=0; MaxEffectiveRunoff=0
          Water: Thickness=[100, 100, 200, 200, 200, 200, 200, 200, 200, 200]; FilledFromTop=true
            InitialValues=[0.103, 0.14, 0.37, 0.46, 0.41, 0.33, 0.33, 0.31, 0.33, 0.31]
          SoilTemperature (disabled): InteractionsPerDay=8
          CERESSoilTemperature Temperature
        AccumulateFunctionGeneral TT00: AccumulateToday=false; NameOfPlantToLink=Wheat; StartStageName=Sowing; EndStageName=HarvestRipe; FractionRemovedOnStage=0; FractionRemovedOnEvent=0; FractionRemovedOnDate=0; FractionRemovedOnCut=0; FractionRemovedOnHarvest=0; FractionRemovedOnGraze=0; FractionRemovedOnPrune=0
          SubDailyInterpolation TTdaily: agregationMethod=1
            WangEngelTempFunction Response: MinTemp=0; OptTemp=26; MaxTemp=37; RefTemp=0; Beta=1; MaximumTemperatureWeighting=0
            HourlySinPpAdjusted InterpolationMethod
        AccumulateFunctionGeneral TT01: AccumulateToday=false; NameOfPlantToLink=Wheat; StartStageName=Sowing; EndStageName=HarvestRipe; FractionRemovedOnStage=0; FractionRemovedOnEvent=0; FractionRemovedOnDate=0; FractionRemovedOnCut=0; FractionRemovedOnHarvest=0; FractionRemovedOnGraze=0; FractionRemovedOnPrune=0
          SubDailyInterpolation TTdaily: agregationMethod=1
            WangEngelTempFunction Response: MinTemp=1; OptTemp=26; MaxTemp=37; RefTemp=0; Beta=1; MaximumTemperatureWeighting=0
            HourlySinPpAdjusted InterpolationMethod
        AccumulateFunctionGeneral TT02: AccumulateToday=false; NameOfPlantToLink=Wheat; StartStageName=Sowing; EndStageName=HarvestRipe; FractionRemovedOnStage=0; FractionRemovedOnEvent=0; FractionRemovedOnDate=0; FractionRemovedOnCut=0; FractionRemovedOnHarvest=0; FractionRemovedOnGraze=0; FractionRemovedOnPrune=0
          SubDailyInterpolation TTdaily: agregationMethod=1
            WangEngelTempFunction Response: MinTemp=2; OptTemp=26; MaxTemp=37; RefTemp=0; Beta=1; MaximumTemperatureWeighting=0
            HourlySinPpAdjusted InterpolationMethod
        AccumulateFunctionGeneral TT03: AccumulateToday=false; NameOfPlantToLink=Wheat; StartStageName=Sowing; EndStageName=HarvestRipe; FractionRemovedOnStage=0; FractionRemovedOnEvent=0; FractionRemovedOnDate=0; FractionRemovedOnCut=0; FractionRemovedOnHarvest=0; FractionRemovedOnGraze=0; FractionRemovedOnPrune=0
          SubDailyInterpolation TTdaily: agregationMethod=1
            WangEngelTempFunction Response: MinTemp=3; OptTemp=26; MaxTemp=37; RefTemp=0; Beta=1; MaximumTemperatureWeighting=0
            HourlySinPpAdjusted InterpolationMethod
        AccumulateFunctionGeneral TT04: AccumulateToday=false; NameOfPlantToLink=Wheat; StartStageName=Sowing; EndStageName=HarvestRipe; FractionRemovedOnStage=0; FractionRemovedOnEvent=0; FractionRemovedOnDate=0; FractionRemovedOnCut=0; FractionRemovedOnHarvest=0; FractionRemovedOnGraze=0; FractionRemovedOnPrune=0
          SubDailyInterpolation TTdaily: agregationMethod=1
            WangEngelTempFunction Response: MinTemp=4; OptTemp=26; MaxTemp=37; RefTemp=0; Beta=1; MaximumTemperatureWeighting=0
            HourlySinPpAdjusted InterpolationMethod
        AccumulateFunctionGeneral TT05: AccumulateToday=false; NameOfPlantToLink=Wheat; StartStageName=Sowing; EndStageName=HarvestRipe; FractionRemovedOnStage=0; FractionRemovedOnEvent=0; FractionRemovedOnDate=0; FractionRemovedOnCut=0; FractionRemovedOnHarvest=0; FractionRemovedOnGraze=0; FractionRemovedOnPrune=0
          SubDailyInterpolation TTdaily: agregationMethod=1
            WangEngelTempFunction Response: MinTemp=5; OptTemp=26; MaxTemp=37; RefTemp=0; Beta=1; MaximumTemperatureWeighting=0
            HourlySinPpAdjusted InterpolationMethod
        AccumulateFunctionGeneral TT06: AccumulateToday=false; NameOfPlantToLink=Wheat; StartStageName=Sowing; EndStageName=HarvestRipe; FractionRemovedOnStage=0; FractionRemovedOnEvent=0; FractionRemovedOnDate=0; FractionRemovedOnCut=0; FractionRemovedOnHarvest=0; FractionRemovedOnGraze=0; FractionRemovedOnPrune=0
          SubDailyInterpolation TTdaily: agregationMethod=1
            WangEngelTempFunction Response: MinTemp=6; OptTemp=26; MaxTemp=37; RefTemp=0; Beta=1; MaximumTemperatureWeighting=0
            HourlySinPpAdjusted InterpolationMethod
        AccumulateFunctionGeneral TT07: AccumulateToday=false; NameOfPlantToLink=Wheat; StartStageName=Sowing; EndStageName=HarvestRipe; FractionRemovedOnStage=0; FractionRemovedOnEvent=0; FractionRemovedOnDate=0; FractionRemovedOnCut=0; FractionRemovedOnHarvest=0; FractionRemovedOnGraze=0; FractionRemovedOnPrune=0
          SubDailyInterpolation TTdaily: agregationMethod=1
            WangEngelTempFunction Response: MinTemp=7; OptTemp=26; MaxTemp=37; RefTemp=0; Beta=1; MaximumTemperatureWeighting=0
            HourlySinPpAdjusted InterpolationMethod
        Report AnalysisReport
          VariableNames:
            [Clock].Today
            [Simulation].Name
            [IWeather].MinT
            [IWeather].MaxT
            [IWeather].MeanT
            [IWeather].Radn
            [IWeather].Rain
            [IWeather].VPD
            [IWeather].PanEvap
            [IWeather].Wind
            [IWeather].CO2
            [IWeather].Latitude
            [IWeather].Longitude
             [Soil].Water.Volumetric
             [Wheat].Population
             [Wheat].AboveGround.N
             [Wheat].AboveGround.Wt
             [Wheat].AboveGroundDead.N
             [Wheat].AboveGroundDead.Wt
             [Wheat].AboveGroundLive.N
             [Wheat].AboveGroundLive.Wt
             [Wheat].Ear.N
             [Wheat].Ear.NConc
             [Wheat].Ear.Wt
             [Wheat].Grain.N
             [Wheat].Grain.NConc
             [Wheat].Grain.NperKernel
             [Wheat].Grain.Number
             [Wheat].Grain.Size
             [Wheat].Grain.Wt
             [Wheat].Leaf.CoverGreen
             [Wheat].Leaf.CoverTotal
             [Wheat].Leaf.Dead.N
             [Wheat].Leaf.Dead.NConc
             [Wheat].Leaf.Dead.Wt
             [Wheat].Leaf.FinalLeafNumber
             [Wheat].Leaf.Fn
             [Wheat].Leaf.Fw
             [Wheat].Leaf.Height
             [Wheat].Leaf.LAI
             [Wheat].Leaf.Ligules
             [Wheat].Leaf.Live.N
             [Wheat].Leaf.Live.NConc
             [Wheat].Leaf.Live.Wt
             [Wheat].Leaf.MainStemPopulation
             [Wheat].Leaf.Photosynthesis.FT
             [Wheat].Leaf.SpecificArea
             [Wheat].Leaf.SpecificAreaCanopy
             [Wheat].Leaf.SpecificNitrogen
             [Wheat].Leaf.StemNumberPerPlant
             [Wheat].Leaf.StemPopulation
             [Wheat].Leaf.Tips
             [Wheat].Leaf.Transpiration
             [Wheat].Phenology.AccumulatedTT
             [Wheat].Phenology.CurrentPhase.Name
             [Wheat].Phenology.CurrentStageName
             [Wheat].Phenology.EmergenceDAS
             [Wheat].Phenology.HaunStage
             [Wheat].Phenology.Photoperiod
             [Wheat].Phenology.Phyllochron
             [Wheat].Phenology.PTQ
             [Wheat].Phenology.Stage
             [Wheat].Phenology.ThermalTime
             [Wheat].Phenology.Zadok.Stage
             [Wheat].Root.Depth
             [Wheat].Root.N
             [Wheat].Root.NConc
             [Wheat].Root.Wt
             [Wheat].SowingData.Cultivar
             [Wheat].Spike.N
             [Wheat].Spike.NConc
             [Wheat].Spike.Wt
             [Wheat].Stem.N
             [Wheat].Stem.NConc
             [Wheat].Stem.Wt
             [Wheat].StemPlusSpike.N
             [Wheat].StemPlusSpike.Wt
             [Wheat].Total.N
             [Wheat].Total.Wt
             sum([Soil].NO3.kgha)
             sum([Soil].Water.MM)
             [Spectral].NDVI
             1.0 * [Wheat].Grain.Wt / ([Wheat].AboveGround.Wt + 0.00001) as HarvestIndex
            1.0 * [Wheat].Leaf.Live.StorageWt / ([Wheat].Leaf.Live.Wt + 0.00001) as Wheat.Leaf.Live.WSCConc
            1.0 * [Wheat].Leaf.Dead.StorageWt/([Wheat].Leaf.Dead.Wt + 0.00001) as Wheat.Leaf.Dead.WSCConc
            1.0 * ([Wheat].Stem.Live.StorageWt+[Wheat].Stem.Dead.StorageWt) / ([Wheat].Stem.Wt + 0.00001) as Wheat.Stem.WSCConc
            1.0 * ([Wheat].Spike.Live.StorageWt+[Wheat].Spike.Dead.StorageWt) / ([Wheat].Spike.Wt + 0.00001) as Wheat.Spike.WSCConc
          EventNames:
            [Clock].DoReport
            [Wheat].Harvesting
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